// SBML level 2 version 4

model lei2001()
  // Lei2001_Yeast_Aerobic_Metabolism
  // This the model from the article:
  // A biochemically structured model for Saccharomyces cerevisiae.
  // Lei F, Rotbøll M, Jørgensen SB. J Biotechnol. 2001 Jul 12;88(3):205-21. PMID: 11434967 ,DOI: 10.1016/S0168-1656(01)00269-3
  // Abstract:
  // A biochemically structured model for the aerobic growth of Saccharomyces cerevisiae on glucose and ethanol is presented. The model focuses on the pyruvate and acetaldehyde branch points where overflow metabolism occurs when the growth changes from oxidative to oxido-reductive. The model is designed to describe the onset of aerobic alcoholic fermentation during steady-state as well as under dynamical conditions, by triggering an increase in the glycolytic flux using a key signalling component which is assumed to be closely related to acetaldehyde. An investigation of the modelled process dynamics in a continuous cultivation revealed multiple steady states in a region of dilution rates around the transition between oxidative and oxido-reductive growth. A bifurcation analysis using the two external variables, the dilution rate, D, and the inlet concentration of glucose, S(f), as parameters, showed that a fold bifurcation occurs close to the critical dilution rate resulting in multiple steady-states. The region of dilution rates within which multiple steady states may occur depends strongly on the substrate feed concentration. Consequently a single steady state may prevail at low feed concentrations, whereas multiple steady states may occur over a relatively wide range of dilution rates at higher feed concentrations.
  // This model originates from BioModels Database: A Database of Annotated Published Models. It is copyright (c) 2005-2010 The BioModels Team.
  // For more information see the terms of use .
  // To cite BioModels Database, please use Le Novère N., Bornstein B., Broicher A., Courtot M., Donizelli M., Dharuri H., Li L., Sauro H., Schilstra M., Shapiro B., Snoep J.L., Hucka M. (2006) BioModels Database: A Free, Centralized Database of Curated, Published, Quantitative Kinetic Models of Biochemical and Cellular Systems Nucleic Acids Res., 34: D689-D691.
  // biomodels.db:MODEL1003250000
  // biomodels.db:BIOMD0000000245
  // isDescribedBy pubmed:11434967
  // occursIn taxonomy:4932
  // hasVersion kegg.pathway:sce00020 kegg.pathway:sce00010
  // hasVersion GO:0006006 GO:0006099

  // Compartments:
  compartment env = 1; env is "environment";  // isVersionOf GO:0005576
  compartment cell = 1;  // GO:0005623

  // Species:
  species s_glu in env = 15; s_glu is "Glucose";  // CHEBI:17234 kegg.compound:C00293
  species s_pyr in env = 0; s_pyr is "Pyruvate";  // CHEBI:15361 kegg.compound:C00022
  species s_acetate in env = 0; s_acetate is "Acetate";  // CHEBI:40480 kegg.compound:C00033
  species s_acetald in env = 0; s_acetald is "Acetaldehyde";  // CHEBI:15343 kegg.compound:C00084
  species s_EtOH in env = 0;  // CHEBI:16236 kegg.compound:C00469
  species x in env = 0.002; x is "BM";
  species $a in env; a is "BM(active)";
  species $AcDH in env; AcDH is "BM(AcDH)";
  species $CO2 in env = 0;  // CHEBI:16526 kegg.compound:C00011
  species $Red in env = 0; Red is "Red. Equ. (NADH)";  // CHEBI:16908 kegg.compound:C00004
  species $S_f in env = 15; S_f is "Glucose(feed)";  // hasVersion CHEBI:17234 kegg.compound:C00293

  // Parameters:
  qO2 has mmole_per_g_per_h;
  qCO2 has mmole_per_g_per_h;
  X_a = 0.1 dimensionless;
  X_AcDH = 0.0075 dimensionless;
  k_1h = 0.584 g_per_l_per_h;
  K_1h = 0.0116 g_per_l;
  k_1l = 1.43 g_per_l_per_h;
  K_1l = 0.94 g_per_l;
  k_1e = 47.1 g_per_l_per_h;
  K_1e = 0.12 g_per_l;
  K_1i = 14.2 l_per_g;
  k_2 = 0.501 g_per_l_per_h;
  K_2 = 2e-5 g_per_l;
  K_2i = 0.101 l_per_g;
  k_3 = 5.81 g_per_l_per_h;
  K_3 = 5e-7 g_per_l;
  k_4 = 4.8 g_per_l_per_h;
  K_4 = 0.000264 g_per_l;
  k_5 = 0.0104 g_per_l_per_h;
  K_5 = 0.0102 g_per_l;
  k_5e = 0.775 g_per_l_per_h;
  K_5e = 0.1 g_per_l;
  K_5i = 440 l_per_g;
  k_6 = 2.82 g_per_l_per_h;
  K_6 = 0.034 g_per_l;
  k_6r = 0.0125 dimensionless;
  K_6e = 0.057 g_per_l;
  k_7 = 1.203 g_per_l_per_h;
  K_7 = 0.0101 g_per_l;
  k_8 = 0.589 g_per_l_per_h;
  k_9 = 0.008 g_per_l_per_h;
  K_9 = 1e-6 g_per_l;
  k_9e = 0.0751 g_per_l_per_h;
  K_9e = 13 g_per_l;
  K_9i = 25 l_per_g;
  k_9c = 0.00399 g_per_l_per_h;
  k_10 = 0.392 g_per_l_per_h;
  K_10 = 0.0023 g_per_l;
  k_10e = 0.00339 g_per_l_per_h;
  K_10e = 0.0018 g_per_l;
  k_11 = 0.02 g_per_l_per_h;
  D = 0.1 per_h; D is "Dilutionrate";

  // Assignment rules:
  a := x*X_a;
  AcDH := x*X_AcDH;
  qO2 := 1000/32*(0.178*glycolysis + 0.908*TCA_pyruvate + 0.363*Acetald_dehydrogenase + 1.066*TCA_acetate - 0.363*ADH + 0.063*BM_growth_gluc + 0.214*BM_growth_acetate)/(x*env);
  qCO2 := 1000/44.01*(1.499*TCA_pyruvate + 0.5*Pyruvate_Dehydrogenase + 1.466*TCA_acetate + 0.127*BM_growth_gluc + 0.325*BM_growth_acetate)/(x*env);

  // Rate rules:
  X_a' = ((0.732*BM_growth_gluc + 0.619*BM_growth_acetate)*(1 - X_a) - Acdh_production - active_BM_degradation)/(x*env);
  X_AcDH' = (Acdh_production - Acdh_degradation - (0.732*BM_growth_gluc + 0.619*BM_growth_acetate)*X_AcDH)/(x*env);

  // Reactions:
  glycolysis: s_glu => 0.978 s_pyr + 0.178 $Red; (k_1l*s_glu/(s_glu + K_1l) + k_1h*s_glu/(s_glu + K_1h) + k_1e*s_acetald*s_glu/(s_glu*(K_1i*s_acetald + 1) + K_1e))*x*X_a*env;  // modifiers: s_acetald, x; GO:0006096
  TCA_pyruvate: s_pyr => 1.499 $CO2 + 0.908 $Red; k_2*s_pyr/((s_pyr + K_2)*(K_2i*s_glu + 1))*x*X_a*env; TCA_pyruvate is "TCA (pyruvate)";  // modifiers: x, s_glu; GO:0006099
  Pyruvate_Dehydrogenase: s_pyr => 0.5 s_acetald + 0.33 $CO2; k_3*s_pyr^4/(s_pyr^4 + K_3)*x*X_a*env;  // modifiers: x; hasVersion ec-code:1.2.4.1 ec-code:2.3.1.12; isVersionOf kegg.reaction:R00209 GO:0004738
  Acetald_dehydrogenase: s_acetald => 1.363 s_acetate + 0.363 $Red; k_4*s_acetald/(s_acetald + K_4)*x*X_a*X_AcDH*env; Acetald_dehydrogenase is "Acetald. dehydrogenase";  // modifiers: x, s_EtOH; isVersionOf ec-code:1.2.1.3 kegg.reaction:R00710 GO:0004029
  TCA_acetate: s_acetate => 1.446 $CO2 + 1.066 $Red; (k_5*s_acetate/(s_acetate + K_5) + k_5e*s_acetate/((s_acetate + K_5e)*(1 + K_5i*s_glu)))*x*X_a*env; TCA_acetate is "TCA (acetate)";  // modifiers: x, s_glu; GO:0006099
  ADH: s_acetald + 0.363 $Red -> 1.045 s_EtOH; k_6*(s_acetald - k_6r*s_EtOH)/(s_acetald + K_6 + K_6e*s_EtOH)*x*X_a*env;  // modifiers: x; hasVersion kegg.reaction:R00754; isVersionOf ec-code:1.1.1.1 GO:0004022
  BM_growth_gluc: s_glu => 0.732 x + 0.127 $CO2 + 0.063 $Red; k_7*s_glu/(s_glu + K_7)*x*X_a*env; BM_growth_gluc is "BM growth (gluc)";  // isVersionOf GO:0008283 GO:0016049
  BM_growth_acetate: s_acetate => 0.619 x + 0.325 $CO2 + 0.214 $Red; k_8*s_acetate/((s_acetate + K_5e)*(1 + K_5i*s_glu))*x*X_a*env; BM_growth_acetate is "BM growth (acetate)";  // modifiers: s_glu; isVersionOf GO:0016049 GO:0008283
  Acdh_production: $a => $AcDH; ((k_9*s_glu/(s_glu + K_9) + k_9e*s_EtOH/(s_EtOH + K_9e))/(K_9i*s_glu + 1) + k_9c*s_glu/(s_glu + K_9))*X_a*x*env;  // modifiers: x, s_glu, s_EtOH; isVersionOf GO:0006412
  active_BM_degradation: $a => ; (k_10*s_glu/(s_glu + K_10) + k_10e*s_EtOH/(s_EtOH + K_10e))*X_a*x*env;  // modifiers: x, s_glu, s_EtOH; isVersionOf GO:0009056
  Acdh_degradation: $AcDH => ; k_11*X_AcDH*x*env;  // modifiers: x; isVersionOf GO:0030163
  s_glu_in: $S_f => s_glu; S_f*D*env; s_glu_in is "Glucose inflow";
  s_glu_out: s_glu => ; s_glu*D*env; s_glu_out is "Glucose outflow";
  s_pyr_out: s_pyr => ; s_pyr*D*env; s_pyr_out is "Pyruvate outflow";
  s_acetate_out: s_acetate => ; s_acetate*D*env; s_acetate_out is "Acetate outflow";
  s_acetald_out: s_acetald => ; s_acetald*D*env; s_acetald_out is "Acetaldehyde outflow";
  s_EtOH_out: s_EtOH => ; s_EtOH*D*env; s_EtOH_out is "EtOH outflow";
  a_out: $a => ; a*D*env; a_out is "active BM outflow";
  x_out: x => ; x*D*env; x_out is "BM outflow";
  AcDH_out: $AcDH => ; AcDH*D*env; AcDH_out is "AcDH BM outflow";

  // Unit definitions:
  unit substance = gram; substance is "gram";
  unit time = 3600 second; time is "hours";
  unit volume = litre; volume is "liter";
  unit per_h = 1 / (3600 second); per_h is "per hour";
  unit g_per_l = gram / litre; g_per_l is "gram per liter";
  unit l_per_g = litre / gram; l_per_g is "liter per gram";
  unit g_per_l_per_h = gram / (litre * 3600 second); g_per_l_per_h is "gram per liter per hour";
  unit mmole_per_g_per_h = 1e-3 mole / (3600 second * gram); mmole_per_g_per_h is "mmole per gram BM per hour";
end
