// SBML level 2 version 4

model BIOMD0000000320()
  // Grange2001 - PK interaction of L-dopa and benserazide
  // A pharmacokinetics of L-dopa in rats after administration of L-dopa alone (BIOMD0000000321) or L-dopa combined with a peripheral AADC (amino-acid-decarboxylase) inhibitor (this model: BIOMD0000000320) has been studied using noncompartmental analysis.
  // This model is described in the article:
  // A pharmacokinetic model to predict the PK interaction of L-dopa and benserazide in rats.
  // Grange S, Holford NH, Guentert TW
  // Pharmaceutical Research [2001, 18(8):1174-1184]
  // Abstract:
  // PURPOSE: To study the PK interaction of L-dopa/benserazide in rats. METHODS: Male rats received a single oral dose of 80 mg/kg L-dopa or 20 mg/kg benserazide or 80/20 mg/kg L-dopa/benserazide. Based on plasma concentrations the kinetics of L-dopa, 3-O-methyldopa (3-OMD), benserazide, and its metabolite Ro 04-5127 were characterized by noncompartmental analysis and a compartmental model where total L-dopa clearance was the sum of the clearances mediated by amino-acid-decarboxylase (AADC), catechol-O-methyltransferase and other enzymes. In the model Ro 04-5127 inhibited competitively the L-dopa clearance by AADC.
  // RESULTS: The coadministration of L-dopa/benserazide resulted in a major increase in systemic exposure to L-dopa and 3-OMD and a decrease in L-dopa clearance. The compartmental model allowed an adequate description of the observed L-dopa and 3-OMD concentrations in the absence and presence of benserazide. It had an advantage over noncompartmental analysis because it could describe the temporal change of inhibition and recovery of AADC.
  // CONCLUSIONS: Our study is the first investigation where the kinetics of benserazide and Ro 04-5127 have been described by a compartmental model. The L-dopa/benserazide model allowed a mechanism-based view of the L-dopa/benserazide interaction and supports the hypothesis that Ro 04-5127 is the primary active metabolite of benserazide.
  // The volumes and variables in this model are taken for a rat with 0.25 kg. The inital dose for L_Dopa (L_Dopa_per_kg_rat) and Benserazide (Benserazide_per_kg_rat) are to be given in umole per kg. 80 mg/kg L-Dopa correspond to 404 umol/kg, 20 mg/kg benserazide to 78 umol/kg. To change the model to a different mass of rat the compartment volumes, and the parameters rat_body_mass and Q have to changed accordingly.
  // The model has three species (A-dopa, A_B, A_M) whose initial concentrations are calculated from a listOfInitialAssignments . While running for the first time the time-course (24hrs) for this model in COPASI (up to version 4.6, Build 33), the resulting graph displays only straight lines for all the species. Any subsequent runs should provide proper plots (i.e. without making any change to the model, just by clicking the "run" button again).
  // The above issue is caused by some initial assignments which are not calculated when COPASI imports the file. This issue should not be present in newer releases of COPASI.
  // This model is hosted on BioModels Database and identified by: MODEL0910130001 .
  // To cite BioModels Database, please use: BioModels Database: An enhanced, curated and annotated resource for published quantitative kinetic models .
  // To the extent possible under law, all copyright and related or neighbouring rights to this encoded model have been dedicated to the public domain worldwide. Please refer to CC0 Public Domain Dedication for more information.
  // biomodels.db:MODEL0910130001
  // biomodels.db:BIOMD0000000320
  // isDescribedBy pubmed:11587490
  // isVersionOf icd:G20 GO:0051583
  // occursIn taxonomy:10116
  // hasProperty DOID:14330

  // Compartments:
  compartment gut = 1;  // isVersionOf BTO:0000648
  compartment Vdopa = 0.496; Vdopa is "V_L_Dopa";  // isVersionOf FMA:7563
  compartment V_3_OMD = 0.128;  // isVersionOf FMA:7563
  compartment V1_B = 0.202;  // isVersionOf FMA:76700
  compartment V2_B = 0.127;  // isVersionOf FMA:76700
  compartment V1_M = 0.0691;  // isVersionOf FMA:76700
  compartment V2_M = 3.2;  // isVersionOf FMA:76700

  // Species:
  substanceOnly species A_dopa in gut = L_Dopa_per_kg_rat*rat_body_mass;  // CHEBI:15765 kegg.compound:C00355 pubchem.compound:6047
  substanceOnly species A_B in gut = A_bens_tot*(1 - B_M_frac);  // kegg.drug:D03082 pubchem.compound:2327
  substanceOnly species A_M in gut = A_bens_tot*B_M_frac;  // isVersionOf CHEBI:25212; pubchem.compound:188973
  species C_dopa in Vdopa = 0;  // CHEBI:15765 kegg.compound:C00355 pubchem.compound:6047
  species C_OMD in V_3_OMD = 0; C_OMD is "C_3-OMD";  // pubchem.compound:9307; isVersionOf CHEBI:25212
  // Ro 04-5127, an inhibitor of amino-acid carboxylase (AADC), in the central compartment
  species C1_M in V1_M = 0;  // isVersionOf CHEBI:25212; pubchem.compound:188973
  // Ro 04-5127 in the peripheral compartment
  species C2_M in V2_M = 0;  // isVersionOf CHEBI:25212; pubchem.compound:188973
  // Benserazide in the central compartment
  species C1_B in V1_B = 0;  // kegg.drug:D03082 pubchem.compound:2327
  // Benserazide in the peripheral compartment
  species C2_B in V2_B = 0;  // kegg.drug:D03082 pubchem.compound:2327

  // Parameters:
  // bioavailability of L-Dopa
  F_c has dimensionless;
  // hepatic bioavailability of L-Dopa
  F_H has dimensionless;
  // gastro-intestinal bioavailability of L-Dopa
  F_G = 1 dimensionless;
  // hepatic blood clearance of L-Dopa
  CL_H has l_per_h;
  // hepatic blood flow
  Q = 0.828;
  // hepatically cleared fraction of l-dopa
  f_H = 0.13 dimensionless;
  // total clearance speed of L-Dopa
  CL_dopa has l_per_h;
  f_rest has dimensionless;
  f_AADC = 0.69 dimensionless;
  f_COMT = 0.1 dimensionless;
  // L-Dopa clearance by AADC
  CL_AADC has l_per_h;
  // L-dopa clearance via unspecified elimination pathways
  CL_rest has l_per_h;
  // catechol-O-methyltransferase mediated L-Dopa clearance
  CL_COMT has l_per_h;
  // uninhibited AADC clearance velocity
  CL_AADC0 has l_per_h;
  ki = 0.00246;
  // total clearance of L-Dopa wo. inhibition
  CL_dopa0 = 0.823 l_per_h;
  // absorption rate constant of L_DOPA in the gut
  ka_c = 1.29;
  // absorption rate constant of Ro 04-5127
  ka_M = 2.47; ka_M is "ka_m";
  // absorption rate constant of benserazide
  ka_B = 0.94; ka_B is "ka_b";
  // oral bioavailability of Benserazide
  F_B = 0.022 dimensionless;
  CL_OMD = 0.00895 l_per_h; CL_OMD is "CL_3_OMD";
  CL_B = 1.67 l_per_h;
  fm = 0.15 dimensionless;
  CL_M = 4.29 l_per_h;
  CL_dB = 0.072 l_per_h;
  CL_dM = 1.06 l_per_h;
  L_Dopa_per_kg_rat = 404 umol_per_kg;
  Benserazide_per_kg_rat = 78 umol_per_kg;
  rat_body_mass = 0.25 kilogram;
  A_bens_tot = Benserazide_per_kg_rat*rat_body_mass; A_bens_tot has substance;
  // Ro04-5127 fraction of Bensarazide in gut
  B_M_frac = 0.07; B_M_frac is "Bens_Ro04-5127_fraction_gut";

  // Assignment rules:
  F_c := F_H*F_G;
  F_H := 1 - CL_H/Q;
  CL_H := f_H*CL_dopa;
  CL_dopa := CL_AADC + CL_rest + CL_COMT;
  f_rest := 1 - (f_AADC + f_COMT);
  CL_AADC := CL_AADC0/(1 + C1_M/ki);
  CL_rest := CL_dopa0*f_rest;
  CL_COMT := CL_dopa0*f_COMT;
  CL_AADC0 := CL_dopa0*f_AADC;

  // Reactions:
  l_dopa_absorption: A_dopa => C_dopa; ka_c*A_dopa*F_c; l_dopa_absorption is "L_Dopa absorption from gut";  // isVersionOf GO:0050892
  l_dopa_blood_hepa_clearance: A_dopa => ; ka_c*A_dopa*(1 - F_c); l_dopa_blood_hepa_clearance is "hepatic and blood L-Dopa clearance";  // hasVersion GO:0042737; GO:0030421
  ro_04_5127_absorption: A_M => C1_M; ka_M*A_M; ro_04_5127_absorption is "ro 04-5127 absorption from gut";  // isVersionOf GO:0050892
  benserazide_absorption: A_B => C1_B; ka_B*A_B*F_B; benserazide_absorption is "benserazide absorption from gut";  // isVersionOf GO:0050892
  benserazide_gut_clearance: A_B => ; ka_B*A_B*(1 - F_B); benserazide_gut_clearance is "benserazide clearance from gut";  // hasVersion GO:0042737; GO:0030421
  AADC_clearance: C_dopa => ; CL_AADC*C_dopa; AADC_clearance is "L-Dopa clearance via AADC";  // isVersionOf reactome:REACT_15382.1; isVersionOf ec-code:4.1.1.28 GO:0042737
  COMT_clearance: C_dopa => C_OMD; CL_COMT*C_dopa; COMT_clearance is "L-Dopa clearance via COMT";  // isVersionOf ec-code:2.1.1.6 GO:0042737
  rest_clearance: C_dopa => ; CL_rest*C_dopa; rest_clearance is "rest clearance of L-Dopa";  // hasVersion GO:0042737; hasVersion GO:0007588
  _3_OMD_clearance: C_OMD => ; CL_OMD*C_OMD; _3_OMD_clearance is "3-OMD clearance";  // hasVersion GO:0007588; hasVersion GO:0042737
  bens_clearance: C1_B => ; CL_B*C1_B; bens_clearance is "benserazide clearance";  // hasVersion GO:0007588; hasVersion GO:0042737
  bens_metabolism: C1_B => C1_M; fm/(1 - fm)*CL_B*C1_B; bens_metabolism is "benserazide metabolism to ro 04-5127";  // isVersionOf GO:0042737
  ro_clearance: C1_M => ; CL_M*C1_M; ro_clearance is "ro 04-5127 clearance";  // hasVersion GO:0007588; hasVersion GO:0042737
  bens_distribution: C1_B -> C2_B; CL_dB*(C1_B - C2_B); bens_distribution is "benserazide distribution";
  ro_distribution: C1_M -> C2_M; CL_dM*(C1_M - C2_M); ro_distribution is "ro 04-5127 distribution";

  // Unit definitions:
  unit substance = 1e-9 mole; substance is "micromole";
  unit umol_per_kg = 1e-9 mole / kilogram; umol_per_kg is "micromole_per_kg";
  unit per_h = 1 / (3600 second);
  unit l_per_h = litre / (3600 second);
  unit time = 3600 second; time is "hours";
end
