// SBML level 2 version 4

model Nag2011_ChloroplasticStarchDegradation()
  // This model is from the article:
  // Kinetic modeling and exploratory numerical simulation of chloroplastic starch degradation.
  // Nag A, Lunacek M, Graf PA, Chang CH. BMC Syst Biol.2011 Jun 18;5:94. 21682905,
  // Abstract:
  // BACKGROUND: Higher plants and algae are able to fix atmospheric carbon dioxide through photosynthesis and store this fixed carbon in large quantities as starch, which can be hydrolyzed into sugars serving as feedstock for fermentation to biofuels and precursors. Rational engineering of carbon flow in plant cells requires a greater understanding of how starch breakdown fluxes respond to variations in enzyme concentrations, kinetic parameters, and metabolite concentrations. We have therefore developed and simulated a detailed kinetic ordinary differential equation model of the degradation pathways for starch synthesized in plants and green algae, which to our knowledge is the most complete such model reported to date. RESULTS: Simulation with 9 internal metabolites and 8 external metabolites, the concentrations of the latter fixed at reasonable biochemical values, leads to a single reference solution showing β-amylase activity to be the rate-limiting step in carbon flow from starch degradation. Additionally, the response coefficients for stromal glucose to the glucose transporter kcat and KM are substantial, whereas those for cytosolic glucose are not, consistent with a kinetic bottleneck due to transport. Response coefficient norms show stromal maltopentaose and cytosolic glucosylated arabinogalactan to be the most and least globally sensitive metabolites, respectively, and β-amylase kcat and KM for starch to be the kinetic parameters with the largest aggregate effect on metabolite concentrations as a whole. The latter kinetic parameters, together with those for glucose transport, have the greatest effect on stromal glucose, which is a precursor for biofuel synthetic pathways. Exploration of the steady-state solution space with respect to concentrations of 6 external metabolites and 8 dynamic metabolite concentrations show that stromal metabolism is strongly coupled to starch levels, and that transport between compartments serves to lower coupling between metabolic subsystems in different compartments. CONCLUSIONS: We find that in the reference steady state, starch cleavage is the most significant determinant of carbon flux, with turnover of oligosaccharides playing a secondary role. Independence of stationary point with respect to initial dynamic variable values confirms a unique stationary point in the phase space of dynamically varying concentrations of the model network. Stromal maltooligosaccharide metabolism was highly coupled to the available starch concentration. From the most highly converged trajectories, distances between unique fixed points of phase spaces show that cytosolic maltose levels depend on the total concentrations of arabinogalactan and glucose present in the cytosol. In addition, cellular compartmentalization serves to dampen much, but not all, of the effects of one subnetwork on another, such that kinetic modeling of single compartments would likely capture most dynamics that are fast on the timescale of the transport reactions.
  // This model originates from BioModels Database: A Database of Annotated Published Models (http://www.ebi.ac.uk/biomodels/). It is copyright (c) 2005-2011 The BioModels.net Team.
  // For more information see the terms of use.
  // To cite BioModels Database, please use: Li C, Donizelli M, Rodriguez N, Dharuri H, Endler L, Chelliah V, Li L, He E, Henry A, Stefan MI, Snoep JL, Hucka M, Le Novère N, Laibe C (2010) BioModels Database: An enhanced, curated and annotated resource for published quantitative kinetic models. BMC Syst Biol., 4:92.
  // biomodels.db:MODEL1106030000
  // biomodels.db:BIOMD0000000353
  // isDescribedBy pubmed:21682905
  // isDerivedFrom pubmed:18581371
  // hasTaxon taxonomy:3701
  // isVersionOf GO:0005983

  // Compartments:
  compartment Cell = 3.534e-12 volume;  // isVersionOf GO:0005623
  compartment Cytosol in Cell = 0.447*Cell; Cytosol has volume;  // isVersionOf GO:0005829
  compartment Chloroplast in Cytosol = 0.2*Cell; Chloroplast has volume;  // isVersionOf GO:0009507
  compartment ChloroplastOuterMembrane in Cytosol = 1000 area; ChloroplastOuterMembrane is "Chloroplast Outer Membrane";  // 2-D; isVersionOf GO:0009707
  compartment ChloroplastIntermembraneSpace in ChloroplastOuterMembrane = 0.01*Chloroplast; ChloroplastIntermembraneSpace has volume; ChloroplastIntermembraneSpace is "Chloroplast Intermembrane Space";  // isVersionOf GO:0031972
  compartment ChloroplastInnerMembrane in ChloroplastIntermembraneSpace = 1000 area; ChloroplastInnerMembrane is "Chloroplast Inner Membrane";  // 2-D; isVersionOf GO:0009706
  compartment ChloroplastStroma in ChloroplastInnerMembrane = 0.5*Chloroplast; ChloroplastStroma has volume; ChloroplastStroma is "Chloroplast Stroma";  // isVersionOf GO:0009570

  // Species:
  species $cpd_C00080_CY in Cytosol = 0.1; cpd_C00080_CY is "H+";  // substance in umole; isVersionOf CHEBI:24636 kegg.compound:C00080
  species cpd_C00369_CS in ChloroplastStroma; cpd_C00369_CS is "Starch";  // substance in gram; isVersionOf CHEBI:28017 kegg.compound:C00369
  species $cpd_C00369Glc_CS in ChloroplastStroma = 1000; cpd_C00369Glc_CS is "Starch Glucosyl unit";  // substance in umole; isVersionOf CHEBI:28017 kegg.compound:C00369 MOD:00726
  species cpd_C00369db_CS in ChloroplastStroma = 0; cpd_C00369db_CS is "Starch exposed to Beta Amylase due to action of Isoamylase (Starch DB)";  // substance in gram; isVersionOf CHEBI:28017 kegg.compound:C00369 MOD:00726
  species cpd_C00208_CY in Cytosol = 10; cpd_C00208_CY is "Maltose";  // substance in umole; isVersionOf CHEBI:17306 kegg.compound:C00208
  species cpd_C00208_CS in ChloroplastStroma = 10; cpd_C00208_CS is "Maltose";  // substance in umole; isVersionOf CHEBI:17306 kegg.compound:C00208
  species cpd_C01835_CS in ChloroplastStroma = 100; cpd_C01835_CS is "Maltotriose";  // substance in umole; isPartOf CHEBI:61993 kegg.compound:C01835
  species cpd_G00343_CS in ChloroplastStroma = 1000; cpd_G00343_CS is "Maltopentaose";  // substance in umole; isVersionOf CHEBI:62006
  species cpd_C00031_CS in ChloroplastStroma = 10; cpd_C00031_CS is "(D)-Glucose";  // substance in umole; isVersionOf CHEBI:17634
  species cpd_C00031_CY in Cytosol = 10; cpd_C00031_CY is "(D)-Glucose";  // substance in umole; isVersionOf CHEBI:17634 kegg.compound:C00031
  species cpd_C00569_CY in Cytosol = 10000; cpd_C00569_CY is "Arabinogalactan (AG)";  // substance in umole; isVersionOf CHEBI:27569 kegg.compound:C00569
  species cpd_C00569Glc_CY in Cytosol = 10000; cpd_C00569Glc_CY is "Glucosyl Arabinogalactan (GlcAG)";  // substance in umole; isVersionOf CHEBI:27569 kegg.compound:C00569 MOD:00726
  species $cpd_C00002tot_CY in Cytosol = 10000; cpd_C00002tot_CY is "ATP pool";  // substance in umole; isVersionOf CHEBI:15422 kegg.compound:C00002
  species $cpd_C00008tot_CY in Cytosol = 10000; cpd_C00008tot_CY is "ADP pool";  // substance in umole; isVersionOf CHEBI:16761 kegg.compound:C00008
  species $cpd_C00009tot_CY in Cytosol = 10000; cpd_C00009tot_CY is "Orthophosphate(HPi) pool";  // substance in umole; isVersionOf CHEBI:18367 kegg.compound:C00009
  species cpd_C00051_CY in Cytosol = 1000; cpd_C00051_CY is "Glutathione (reduced)";  // substance in umole; isVersionOf CHEBI:16856 kegg.compound:C00051
  species cpd_C00660tot_CY in Cytosol = 10000; cpd_C00660tot_CY is "(D)-Glucose-1,6-bisphosphate pool";  // substance in umole; isVersionOf CHEBI:17680 kegg.compound:C00660
  species cpd_C03339tot_CY in Cytosol = 10000; cpd_C03339tot_CY is "2,3-Bisphosphoglycerate pool";  // substance in umole; isVersionOf CHEBI:19324 kegg.compound:C03339
  species $cpd_C00103tot_CY in Cytosol = 10000; cpd_C00103tot_CY is "G1P pool";  // substance in umole; isVersionOf CHEBI:29042 kegg.compound:C11450
  species $cpd_C00092tot_CY in Cytosol = 10000; cpd_C00092tot_CY is "G6P pool";  // substance in umole; isVersionOf CHEBI:17665 kegg.compound:C00668
  species ec_3_2_1_2_CS in ChloroplastStroma = 0.00783; ec_3_2_1_2_CS is "Beta amylase";  // substance in gram; ec-code:3.2.1.2
  species ec_3_2_1_68_CS in ChloroplastStroma = 0.0118; ec_3_2_1_68_CS is "Isoamylase";  // substance in gram; ec-code:3.2.1.68
  species ec_2_4_1_25_CS in ChloroplastStroma = 2; ec_2_4_1_25_CS is "Disproportionating enzyme 1(DPE1)";  // substance in umole; ec-code:2.4.1.25
  species ec_2_4_1_25_CY in Cytosol = 2; ec_2_4_1_25_CY is "Disproportionating enzyme 2(DPE2)";  // substance in umole; ec-code:2.4.1.25
  species ec_2_4_1_1_CY in Cytosol = 2; ec_2_4_1_1_CY is "Cytosolic Glucan phosphorylase";  // substance in umole; ec-code:2.4.1.1
  species ec_2_7_1_1_CY in Cytosol = 10; ec_2_7_1_1_CY is "Hexokinase";  // substance in umole; ec-code:2.7.1.1
  species tc_2_A_84_1_2_CIMS in ChloroplastIntermembraneSpace = 2; tc_2_A_84_1_2_CIMS is "Maltose exporter (MEX)";  // substance in umole; tcdb:2.A.84.1.2
  species tc_2_A_1_1_17_CIMS in ChloroplastIntermembraneSpace = 20; tc_2_A_1_1_17_CIMS is "Glucose transporter (pGlcT)";  // substance in umole; tcdb:2.A.1.1.17

  // Parameters:
  C00369_MW = 0.27 gm_per_umole; C00369_MW is "Starch Mol. Wt.";
  N_Glc_Starch = 1667 dimensionless; N_Glc_Starch is "Number of Glucosyl units in a Starch molecule";
  f_bamylase = 0.582 dimensionless; f_bamylase is "Fraction of Starch amenable to degradation by Beta Amylase only";
  f_G2 = 0.87 dimensionless; f_G2 is "Fraction of starch degraded to Maltose";
  f_G3 = 0.13 dimensionless; f_G3 is "Fraction of starch degraded to Maltotriose";
  conv_gm_umole = 1 gm_per_umole; conv_gm_umole is "Unit conversion factor to meet SBML standards";
  ec_3_2_1_2_MW = 0.206 gm_per_umole; ec_3_2_1_2_MW is "Beta amylase molecular weight";
  G00343_MW = 0.000828 gm_per_umole; G00343_MW is "Maltopentaose Mol. Wt.";
  C01835_MW = 0.000504 gm_per_umole; C01835_MW is "Maltotriose Mol. Wt.";
  C00208_MW = 0.000342 gm_per_umole; C00208_MW is "Maltose Mol. Wt.";
  R05196CS_kcat = 50 per_s; R05196CS_kcat is "DPE1 kcat";
  R05196CS_Keq = 1 dimensionless; R05196CS_Keq is "DPE1 Keq";
  R05196CS_G3_KM = 3300 uM; R05196CS_G3_KM is "DPE1 G3 KM";
  R05196CS_Glc_KM = 11700 uM; R05196CS_Glc_KM is "DPE1 Glc KM";
  R05196CS_G5_KM = 210 uM; R05196CS_G5_KM is "DPE1 G5 KM";
  R05196CS_G3_Ki = 746.42 uM; R05196CS_G3_Ki is "DPE1 G3 Ki";
  R05196CS_Glc_Ki = 5571.429 uM; R05196CS_Glc_Ki is "DPE1 Glc Ki";
  R05196CS_G5_Ki = 100 uM; R05196CS_G5_Ki is "DPE1 G5 Ki";
  AT2G40840CY_kcat = 50 per_s; AT2G40840CY_kcat is "DPE2 kcat";
  AT2G40840CY_Keq = 1 dimensionless; AT2G40840CY_Keq is "DPE2 Keq";
  AT2G40840CY_Glc_KM = 11700 uM; AT2G40840CY_Glc_KM is "DPE2 Glc KM";
  AT2G40840CY_G2_KM = 4600 uM; AT2G40840CY_G2_KM is "DPE2 Maltose KM";
  AT2G40840CY_AG_KM = 1100 uM; AT2G40840CY_AG_KM is "DPE2 AG KM";
  AT2G40840CY_GlcAG_KM = 1100 uM; AT2G40840CY_GlcAG_KM is "DPE2 GlcAG KM";
  AT2G40840CY_Glc_Ki = 5571.429 uM; AT2G40840CY_Glc_Ki is "DPE2 Glc Ki";
  AT2G40840CY_G2_Ki = 2190.476 uM; AT2G40840CY_G2_Ki is "DPE2 Maltose Ki";
  AT2G40840CY_AG_Ki = 1000 uM; AT2G40840CY_AG_Ki is "DPE2 AG Ki";
  AT2G40840CY_GlcAG_Ki = 1000 uM; AT2G40840CY_GlcAG_Ki is "DPE2 GlcAG Ki";
  R06050CY_kcat = 50 per_s; R06050CY_kcat is "Cytosolic glucan phosphorylase kcat";
  R06050CY_GlcAG_KM = 2100 uM; R06050CY_GlcAG_KM is "Cytosolic glucan phosphorylase Glucosyl Arabinogalactan KM";
  R06050CY_GlcAG_Ki = 3800 uM; R06050CY_GlcAG_Ki is "Cytosolic glucan phosphorylase Glucosyl Arabinogalactan Ki";
  R06050CY_AG_KM = 3800 uM; R06050CY_AG_KM is "Cytosolic glucan phosphorylase Arabinogalactan KM";
  R06050CY_Pi_KM = 5900 uM; R06050CY_Pi_KM is "Cytosolic glucan phosphorylase Pi KM";
  R06050CY_G1P_KM = 2000 uM; R06050CY_G1P_KM is "Cytosolic glucan phosphorylase G1P KM";
  R06050CY_G1P_Ki = 3100 uM; R06050CY_G1P_Ki is "Cytosolic glucan phosphorylase G1P Ki";
  R06050CY_Keq = 0.000615 dimensionless; R06050CY_Keq is "Cytosolic glucan phosphorylase Keq";
  TC_2_A_84_1_2_kcat = 5.963 per_s; TC_2_A_84_1_2_kcat is "Maltose exporter (MEX) kcat";
  TC_2_A_84_1_2_KM = 4000 uM; TC_2_A_84_1_2_KM is "Maltose exporter (MEX) KM";
  TC_2_A_1_1_17_kcat = 240.278 per_s; TC_2_A_1_1_17_kcat is "Glucose transporter (pGlcT) kcat";
  TC_2_A_1_1_17_KM = 19300 uM; TC_2_A_1_1_17_KM is "Glucose transporter (pGlcT) KM";
  R02112CS_Gn_KM = 0.5 gm_per_L; R02112CS_Gn_KM is "Beta Amylase KM for Starch";
  R02112CS_G5_KM = 1.46 gm_per_L; R02112CS_G5_KM is "Beta Amylase KM for Maltopentaose";
  R02112CS_G2C_KM = 4.19 gm_per_L_2; R02112CS_G2C_KM is "Beta Amylase KM for Maltose condensation";
  R02112CS_Keq = 18800 gm_per_L; R02112CS_Keq is "Keq for Maltotetraose degradation";
  R02112CS_Gn_kcat = 0.073 per_s; R02112CS_Gn_kcat is "kcat_betaamylase_Starch";
  R02112CS_G5_kcat = 0.0913 per_s; R02112CS_G5_kcat is "kcat_betaamylase_Maltopentaose";
  ec_3_2_1_68_CS_kcat = 0.0198 per_s; ec_3_2_1_68_CS_kcat is "Isoamylase kcat";
  R00299CY_kfor = 180 per_s; R00299CY_kfor is "Hexokinase kcat,forward";
  R00299CY_krev has per_s; R00299CY_krev is "Hexokinase kcat,reverse";
  R00299CY_Keq = 155 dimensionless; R00299CY_Keq is "Hexokinase Keq";
  R00299CY_MgATP_KM = 1000 uM; R00299CY_MgATP_KM is "Hexokinase KM(MgATP)";
  R00299CY_MgATP_Ki = 1000 uM; R00299CY_MgATP_Ki is "Hexokinase Ki(MgATP)";
  R00299CY_Glc_KM = 47 uM; R00299CY_Glc_KM is "Hexokinase KM(glucose)";
  R00299CY_Glc_Ki = 47 uM; R00299CY_Glc_Ki is "Hexokinase Ki(glucose)";
  R00299CY_G6P_KM = 47 uM; R00299CY_G6P_KM is "Hexokinase KM(G6P)";
  R00299CY_G6P_Ki = 47 uM; R00299CY_G6P_Ki is "Hexokinase Ki(G6P)";
  R00299CY_MgADP_KM = 1000 uM; R00299CY_MgADP_KM is "Hexokinase KM(MgADP)";
  R00299CY_MgADP_Ki = 1000 uM; R00299CY_MgADP_Ki is "Hexokinase Ki(MgADP)";
  R00299CY_G6P_Kip = 10 uM; R00299CY_G6P_Kip is "Hexokinase Ki(G6P),2";
  R00299CY_BPG_Kip = 4000 uM; R00299CY_BPG_Kip is "Hexokinase Ki(2,3-bisphosphoglycerate)";
  R00299CY_G16P_Kip = 30 uM; R00299CY_G16P_Kip is "Hexokinase Ki(glucose 1,6-bisphosphate";
  R00299CY_GSH_Kip = 3000 uM; R00299CY_GSH_Kip is "Hexokinase Ki(glutathione)";

  // Assignment rules:
  R00299CY_krev := R00299CY_kfor*R00299CY_MgADP_Ki*R00299CY_G6P_KM/(R00299CY_Keq*R00299CY_Glc_Ki*R00299CY_MgATP_KM);
  cpd_C00369_CS := cpd_C00369Glc_CS*C00369_MW/N_Glc_Starch;

  // Rate rules:
  cpd_C00369db_CS' = ec_3_2_1_68_CS*ec_3_2_1_68_CS_kcat*(1 - 1/(1 + exp(-100*(cpd_C00369db_CS/(cpd_C00369_CS*(1 - f_bamylase)) - 0.3))) + 1/(1 + exp(-100*(cpd_C00369db_CS/(cpd_C00369_CS*(1 - f_bamylase)) - 0.3)))*(1 - 1.429*(cpd_C00369db_CS/(cpd_C00369_CS*(1 - f_bamylase)) - 0.3)));

  // Reactions:
  rn_R02112CS_G2: 1.23457e4 $cpd_C00369Glc_CS -> 2923.98 cpd_C00208_CS; ChloroplastStroma*R02112CS_Gn_kcat*ec_3_2_1_2_CS*(f_G2*(f_bamylase*cpd_C00369_CS + cpd_C00369db_CS) - (cpd_C00208_CS*C00208_MW)^2/R02112CS_Keq)/(conv_gm_umole*(f_G2*(f_bamylase*cpd_C00369_CS + cpd_C00369db_CS) + R02112CS_Gn_KM*(1 + (cpd_C00208_CS*C00208_MW)^2/R02112CS_G2C_KM))); rn_R02112CS_G2 is "Maltose formation from Starch";  // modifiers: ec_3_2_1_2_CS, cpd_C00369_CS, cpd_C00369db_CS
  rn_R02112CS_G3: 1.85185e4 $cpd_C00369Glc_CS => 1984.13 cpd_C01835_CS; ChloroplastStroma*R02112CS_Gn_kcat*ec_3_2_1_2_CS*f_G3*(f_bamylase*cpd_C00369_CS + cpd_C00369db_CS)/(conv_gm_umole*(f_G3*(f_bamylase*cpd_C00369_CS + cpd_C00369db_CS) + R02112CS_Gn_KM)); rn_R02112CS_G3 is "Maltotriose formation from Starch";  // modifiers: ec_3_2_1_2_CS, cpd_C00369_CS, cpd_C00369db_CS
  rn_R02112CS_G5: 1207.73 cpd_G00343_CS => 2923.98 cpd_C00208_CS + 1984.13 cpd_C01835_CS; ChloroplastStroma*R02112CS_G5_kcat*ec_3_2_1_2_CS*cpd_G00343_CS*G00343_MW/(conv_gm_umole*(cpd_G00343_CS*G00343_MW + R02112CS_G5_KM)); rn_R02112CS_G5 is "Maltopentaose degradation";  // modifiers: ec_3_2_1_2_CS
  tr_TC_2_A_84_1_2: cpd_C00208_CS => cpd_C00208_CY; ChloroplastStroma*TC_2_A_84_1_2_kcat*tc_2_A_84_1_2_CIMS*cpd_C00208_CS/(TC_2_A_84_1_2_KM + cpd_C00208_CS); tr_TC_2_A_84_1_2 is "Maltose exporter";  // modifiers: tc_2_A_84_1_2_CIMS
  tr_TC_2_A_1_1_17: cpd_C00031_CS => cpd_C00031_CY; ChloroplastStroma*TC_2_A_1_1_17_kcat*tc_2_A_1_1_17_CIMS*cpd_C00031_CS/(TC_2_A_1_1_17_KM + cpd_C00031_CS); tr_TC_2_A_1_1_17 is "Plastidic Glucose transporter";  // modifiers: tc_2_A_1_1_17_CIMS
  // Kinetics reversible random sequential bi-bi.
  rn_R00299CY: $cpd_C00002tot_CY + cpd_C00031_CY -> $cpd_C00092tot_CY + $cpd_C00008tot_CY + $cpd_C00080_CY; ec_2_7_1_1_CY*Cytosol*(R00299CY_kfor*cpd_C00002tot_CY*cpd_C00031_CY/(R00299CY_Glc_Ki*R00299CY_MgATP_KM) - R00299CY_krev*cpd_C00092tot_CY*cpd_C00008tot_CY/(R00299CY_MgADP_Ki*R00299CY_G6P_KM))/(1 + cpd_C00002tot_CY/R00299CY_MgATP_Ki + cpd_C00031_CY/R00299CY_Glc_Ki*(1 + cpd_C00092tot_CY/R00299CY_G6P_Kip + cpd_C00660tot_CY/R00299CY_G16P_Kip + cpd_C03339tot_CY/R00299CY_BPG_Kip + cpd_C00051_CY/R00299CY_GSH_Kip) + cpd_C00002tot_CY*cpd_C00031_CY/(R00299CY_Glc_Ki*R00299CY_MgATP_KM) + cpd_C00092tot_CY/R00299CY_G6P_Ki + cpd_C00008tot_CY/R00299CY_MgADP_Ki + cpd_C00092tot_CY*cpd_C00008tot_CY/(R00299CY_MgADP_Ki*R00299CY_G6P_KM)); rn_R00299CY is "Hexokinase";  // modifiers: ec_2_7_1_1_CY, cpd_C00051_CY, cpd_C00660tot_CY, cpd_C03339tot_CY
  rn_R06050CY: cpd_C00569Glc_CY + $cpd_C00009tot_CY -> $cpd_C00103tot_CY + cpd_C00569_CY; Cytosol*R06050CY_kcat*ec_2_4_1_1_CY*(cpd_C00569Glc_CY*cpd_C00009tot_CY - cpd_C00103tot_CY*cpd_C00569_CY/R06050CY_Keq)/(R06050CY_GlcAG_Ki*R06050CY_Pi_KM + R06050CY_Pi_KM*cpd_C00569Glc_CY + R06050CY_GlcAG_KM*cpd_C00009tot_CY + cpd_C00569Glc_CY*cpd_C00009tot_CY + R06050CY_GlcAG_Ki*R06050CY_Pi_KM/(R06050CY_G1P_Ki*R06050CY_AG_KM)*(R06050CY_AG_KM*cpd_C00103tot_CY + R06050CY_G1P_KM*cpd_C00569_CY + cpd_C00103tot_CY*cpd_C00569_CY)); rn_R06050CY is "Cytosolic glucan phosphorylase";  // modifiers: ec_2_4_1_1_CY
  rn_AT2G40840CY: cpd_C00208_CY + cpd_C00569_CY -> cpd_C00031_CY + cpd_C00569Glc_CY; Cytosol*AT2G40840CY_kcat*ec_2_4_1_25_CY*(cpd_C00208_CY*cpd_C00569_CY - cpd_C00031_CY*cpd_C00569Glc_CY/AT2G40840CY_Keq)/(AT2G40840CY_AG_KM*cpd_C00208_CY + AT2G40840CY_G2_KM*cpd_C00569_CY + cpd_C00208_CY*cpd_C00569_CY + AT2G40840CY_G2_KM*AT2G40840CY_AG_Ki/(AT2G40840CY_Glc_KM*AT2G40840CY_GlcAG_Ki)*(AT2G40840CY_GlcAG_KM*cpd_C00031_CY*(1 + cpd_C00208_CY/AT2G40840CY_G2_Ki) + AT2G40840CY_Glc_KM*cpd_C00569Glc_CY*(1 + cpd_C00569_CY/AT2G40840CY_AG_Ki) + cpd_C00031_CY*cpd_C00569Glc_CY)); rn_AT2G40840CY is "DPE2";  // modifiers: ec_2_4_1_25_CY
  rn_R05196CS: 2 cpd_C01835_CS -> cpd_C00031_CS + cpd_G00343_CS; ChloroplastStroma*R05196CS_kcat*ec_2_4_1_25_CS*(cpd_C01835_CS^2 - cpd_C00031_CS*cpd_G00343_CS/R05196CS_Keq)/(R05196CS_G3_KM*cpd_C01835_CS + cpd_C01835_CS^2 + R05196CS_G3_KM*R05196CS_G3_Ki/(R05196CS_Glc_KM*R05196CS_G5_Ki)*(R05196CS_G5_KM*cpd_C00031_CS*(1 + cpd_C01835_CS/R05196CS_G3_Ki) + R05196CS_Glc_KM*cpd_G00343_CS*(1 + cpd_C01835_CS/R05196CS_G3_Ki) + cpd_C00031_CS*cpd_G00343_CS)); rn_R05196CS is "DPE1";  // modifiers: ec_2_4_1_25_CS

  // Unit definitions:
  unit per_s = 1 / second;
  unit volume = litre;
  unit area = (1e-6 metre)^2;
  unit umole = 1e-6 mole;
  unit uM = 1e-6 mole / litre;
  unit uM_per_s = 1e-6 mole / (litre * second);
  unit per_uM_per_s = litre / (1e-6 mole * second);
  unit gm_per_L = gram / litre;
  unit gm_per_L_2 = gram^2 / litre^2;
  unit gm_per_umole = gram / (1e-6 mole);
end
