// SBML level 2 version 4

model Bertram2004_PancreaticBetaCell_modelB()
  // This a model from the article:
  // Calcium and glycolysis mediate multiple bursting modes in pancreatic islets.
  // Bertram R, Satin L, Zhang M, Smolen P, Sherman A. Biophys J2004 Nov;87(5):3074-87 15347584,
  // Abstract:
  // Pancreatic islets of Langerhans produce bursts of electrical activity when exposed to stimulatory glucose levels. These bursts often have a regular repeating pattern, with a period of 10-60 s. In some cases, however, the bursts are episodic, clustered into bursts of bursts, which we call compound bursting. Consistent with this are recordings of free Ca2+ concentration, oxygen consumption, mitochondrial membrane potential, and intraislet glucose levels that exhibit very slow oscillations, with faster oscillations superimposed. We describe a new mathematical model of the pancreatic beta-cell that can account for these multimodal patterns. The model includes the feedback of cytosolic Ca2+ onto ion channels that can account for bursting, and a metabolic subsystem that is capable of producing slow oscillations driven by oscillations in glycolysis. This slow rhythm is responsible for the slow mode of compound bursting in the model. We also show that it is possible for glycolytic oscillations alone to drive a very slow form of bursting, which we call "glycolytic bursting." Finally, the model predicts that there is bistability between stationary and oscillatory glycolysis for a range of parameter values. We provide experimental support for this model prediction. Overall, the model can account for a diversity of islet behaviors described in the literature over the past 20 years.
  // This model was taken from the CellML repository and automatically converted to SBML.
  // The original model was: Bertram R, Satin L, Zhang M, Smolen P, Sherman A. (2004) - version=1.0
  // The original CellML model was created by:
  // Catherine Lloyd
  // c.lloyd@auckland.ac.nz
  // The University of Auckland
  // This model originates from BioModels Database: A Database of Annotated Published Models (http://www.ebi.ac.uk/biomodels/). It is copyright (c) 2005-2011 The BioModels.net Team.
  // For more information see the terms of use.
  // To cite BioModels Database, please use: Li C, Donizelli M, Rodriguez N, Dharuri H, Endler L, Chelliah V, Li L, He E, Henry A, Stefan MI, Snoep JL, Hucka M, Le Novère N, Laibe C (2010) BioModels Database: An enhanced, curated and annotated resource for published quantitative kinetic models. BMC Syst Biol., 4:92.
  // biomodels.db:MODEL1006230042
  // biomodels.db:BIOMD0000000373
  // isDescribedBy pubmed:15347584
  // isDerivedFrom pubmed:15294427
  // occursIn BTO:0000783
  // isVersionOf GO:0061469 GO:0044342 GO:0006096

  // Compartments:
  compartment COMpartment = 1;

  // Species:
  species V in COMpartment = -60/COMpartment;  // PATO:0001462
  species n in COMpartment = 0.025/COMpartment;  // isVersionOf GO:0005251
  species c in COMpartment = 0.25/COMpartment;  // isVersionOf CHEBI:29108
  species cer in COMpartment = 185/COMpartment;  // isVersionOf CHEBI:29108
  species g6p in COMpartment = 200/COMpartment;  // isVersionOf CHEBI:14314
  species fbp in COMpartment = 40/COMpartment;  // isVersionOf CHEBI:16905
  species adp in COMpartment = 780/COMpartment;  // isVersionOf CHEBI:16761

  // Parameters:
  Cm = 5300;
  gK = 2700;
  gKCa = 600;
  kd = 0.5;
  gCa = 1000;
  VCa = 25;
  taun = 20;
  fcyt = 0.01;
  fer = 0.01;
  sigmaV = 31;
  pleak = 0.0002;
  Kserca = 0.4;
  lambdaer = 1;
  epser = 1;
  alpha = 4.5e-6;
  kpmca = 0.2;
  Rgk = 0.2;
  atot = 3000;
  pfkbas = 0.06;
  lambda = 0.005;
  bottom1 = 1;
  topa1 = 0;
  k1 = 30;
  k2 = 1;
  k3 = 50000;
  k4 = 1000;
  cat = 2;
  famp = 0.02;
  fatp = 20;
  ffbp = 0.2;
  fbt = 20;
  fmt = 20;
  VK = -75;
  gkatpbar = 25000;
  kdd = 17;
  ktd = 26;
  ktt = 1;
  taua = 300000;
  r1 = 0.35;
  r = 1;
  vg = 2.2;
  kg = 10;

  // Assignment rules:
  IK := gK*n*(V - VK);
  IKCa := gKCa/(1 + (kd/c)^2)*(V - VK);
  minf := 1/(1 + exp(-(20 + V/1)/12));
  ICa := gCa*minf*(V - VCa);
  ninf := 1/(1 + exp(-(16 + V/1)/5));
  Jmem := -(alpha*ICa + kpmca*c);
  Jserca := Kserca*c;
  Jleak := pleak*(cer - c);
  Jer := epser*(Jleak - Jserca)/lambdaer;
  rgpdh := 0.2*abs(fbp*1/1^2)^(1/2);
  f6p := 0.3*g6p;
  topa2 := topa1;
  weight3 := f6p^2/(k3*1);
  topa3 := topa2 + weight3;
  weight5 := fbp/k2;
  weight7 := fbp*f6p^2/(k2*k3*ffbp*1);
  mgadp := 0.165*adp;
  adp3m := 0.135*adp;
  topo := 0.08*(1 + 2*mgadp/(kdd*1)) + 0.89*(mgadp/(kdd*1))^2;
  y := vg*(rgpdh/(kg + rgpdh));
  fback := r + y;
  rad := abs((adp - atot)^2 - 4*adp^2)^(1/2)/1;
  atp := 0.5*(atot - adp + rad*1);
  weight2 := atp^2/(k4*1);
  bottom2 := bottom1 + weight2;
  bottom3 := bottom2 + weight3;
  weight4 := (f6p*atp)^2/(fatp*k3*k4*1^2);
  topa4 := topa3 + weight4;
  bottom4 := bottom3 + weight4;
  topa5 := topa4;
  bottom5 := bottom4 + weight5;
  weight6 := fbp*atp^2/(k2*k4*fbt*1);
  topa6 := topa5;
  bottom6 := bottom5 + weight6;
  topa7 := topa6 + weight7;
  bottom7 := bottom6 + weight7;
  weight8 := fbp*f6p^2*atp^2/(k2*k3*k4*ffbp*fbt*fatp*1^2);
  topa8 := topa7 + weight8;
  topa9 := topa8;
  bottom8 := bottom7 + weight8;
  topa10 := topa9;
  atp4m := 0.05*atp;
  bottomo := (1 + mgadp/(kdd*1))^2*(1 + adp3m/(ktd*1) + atp4m/(ktt*1));
  katpo := topo/bottomo;
  IKATP := gkatpbar*katpo*(V - VK);
  amp := adp*adp/atp;
  weight9 := amp/k1;
  bottom9 := bottom8 + weight9;
  weight10 := amp*atp^2/(k1*k4*fmt*1);
  bottom10 := bottom9 + weight10;
  weight11 := amp*f6p^2/(k1*k3*famp*1);
  topa11 := topa10 + weight11;
  bottom11 := bottom10 + weight11;
  weight12 := amp*f6p^2*atp^2/(k1*k3*k4*famp*fmt*fatp*1^2);
  topa12 := topa11 + weight12;
  bottom12 := bottom11 + weight12;
  weight13 := amp*fbp/(k1*k2);
  topa13 := topa12;
  bottom13 := bottom12 + weight13;
  weight14 := amp*fbp*atp^2/(k1*k2*k4*fbt*fmt*1);
  topa14 := topa13;
  bottom14 := bottom13 + weight14;
  weight15 := amp*fbp*f6p^2/(k1*k2*k3*ffbp*famp*1);
  topa15 := topa14;
  bottom15 := bottom14 + weight15;
  weight16 := amp*fbp*f6p^2*atp^2/(k1*k2*k3*k4*ffbp*famp*fbt*fmt*fatp*1^2);
  topa16 := topa15 + weight16;
  bottom16 := bottom15 + weight16;
  topb := weight15;
  pfk := 1*((pfkbas*cat*topa16 + cat*topb)/bottom16);
  ratio := atp/adp;

  // Rate rules:
  V' = -(IK + ICa + IKCa + IKATP)/Cm;
  n' = (ninf - n)/taun;
  c' = fcyt*(Jmem + Jer);
  cer' = -fer*sigmaV*Jer;
  g6p' = lambda*(Rgk - pfk);
  fbp' = lambda*(pfk/1 - 0.5*rgpdh);
  adp' = (atp - adp*exp(fback*(1 - c/r1)))/(taua*1);
end
