// SBML level 2 version 4

model Chay1997_CalciumConcentration()
  // This a model from the article:
  // Effects of extracellular calcium on electrical bursting and intracellular and luminal calcium oscillations in insulin secreting pancreatic beta-cells.
  // Chay TR Biophys J.1997 Sep;73(3):1673-88. 9284334,
  // Abstract:
  // The extracellular calcium concentration has interesting effects on bursting of pancreatic beta-cells. The mechanism underlying the extracellular Ca2+ effect is not well understood. By incorporating a low-threshold transient inward current to the store-operated bursting model of Chay, this paper elucidates the role of the extracellular Ca2+ concentration in influencing electrical activity, intracellular Ca2+ concentration, and the luminal Ca2+ concentration in the intracellular Ca2+ store. The possibility that this inward current is a carbachol-sensitive and TTX-insensitive Na+ current discovered by others is discussed. In addition, this paper explains how these three variables respond when various pharmacological agents are applied to the store-operated model.
  // This model was taken from the CellML repository and automatically converted to SBML.
  // The original model was: Chay TR (1997) - version05
  // The original CellML model was created by:
  // Lloyd, Catherine, May
  // c.lloyd@aukland.ac.nz
  // The University of Auckland
  // The Bioengineering Institute
  // This model originates from BioModels Database: A Database of Annotated Published Models (http://www.ebi.ac.uk/biomodels/). It is copyright (c) 2005-2011 The BioModels.net Team.
  // For more information see the terms of use.
  // To cite BioModels Database, please use: Li C, Donizelli M, Rodriguez N, Dharuri H, Endler L, Chelliah V, Li L, He E, Henry A, Stefan MI, Snoep JL, Hucka M, Le Novère N, Laibe C (2010) BioModels Database: An enhanced, curated and annotated resource for published quantitative kinetic models. BMC Syst Biol., 4:92.
  // biomodels.db:MODEL0491199816
  // biomodels.db:BIOMD0000000378
  // isDescribedBy pubmed:9284334
  // isVersionOf GO:0061469 GO:0044342 GO:0019722
  // occursIn BTO:0000783
  // hasTaxon taxonomy:9606

  // Compartments:
  compartment Compartment = 1;

  // Species:
  species V_membrane in Compartment = -38.34146/Compartment;  // PATO:0001462
  species h in Compartment = 0.214723/Compartment;  // hasProperty GO:0022836
  species d in Compartment = 0.0031711238/Compartment;  // hasProperty GO:0022836
  species n in Compartment = 0.1836403/Compartment;  // isVersionOf GO:0005251
  species Ca_i_cytosolic_calcium in Compartment = 0.6959466/Compartment;  // isVersionOf CHEBI:29108
  species Ca_lum in Compartment = 102.686/Compartment;  // isVersionOf CHEBI:29108

  // Parameters:
  R = 8314;
  T = 310;
  F = 96485;
  Cm = 1;  // CHEBI:29108
  g_fast = 600;
  V_fast = 80;
  Vm = -25;
  Sm = 9;
  lamda_h = 12.5;
  Vh = -48;
  Sh = -7;
  K_Ca = 1;
  P_Ca = 2;
  Ca_o = 2500;
  lamda_d = 2.5;
  Vd = -10;
  Sd = 5;
  Ca_i_calcium_current_f_gate = 1;
  g_NS = 5;
  K_NS = 50;
  VNS = -20;
  V_K = -75;
  g_K_dr = 600;
  lamda_n = 12.5;
  Vn = -18;
  Sn = 14;
  g_K_Ca = 5;
  g_K_ATP = 2;
  g_NaL = 0.3;
  V_Na = 80;
  k_rel = 0.2;
  k_Ca = 7;
  k_pump = 30;
  omega = 0.2;

  // Assignment rules:
  m_infinity := 1/(1 + exp((Vm - V_membrane)/Sm));
  i_fast := g_fast*m_infinity^3*h*(V_membrane - V_fast);
  tau_h := 1/(lamda_h*(exp((Vh - V_membrane)/(2*Sh)) + exp((V_membrane - Vh)/(2*Sh))));
  h_infinity := 1/(1 + exp((Vh - V_membrane)/Sh));
  tau_d := 1/(lamda_d*(exp((Vd - V_membrane)/(2*Sd)) + exp((V_membrane - Vd)/(2*Sd))));
  f_infinity := K_Ca/(K_Ca + Ca_i_calcium_current_f_gate);
  i_Ca := P_Ca*d*f_infinity*2*F*V_membrane/(R*T)*(Ca_o - Ca_i_cytosolic_calcium*exp(2*F*V_membrane/(R*T)))/(1 - exp(2*F*V_membrane/(R*T)));
  d_infinity := 1/(1 + exp((Vd - V_membrane)/Sd));
  i_NS := g_NS*K_NS^2/(K_NS^2 + Ca_lum^2)*((V_membrane - VNS)/(1 - exp(0.1*(VNS - V_membrane))) - 10);
  i_K_dr := g_K_dr*n^4*(V_membrane - V_K);
  n_infinity := 1/(1 + exp((Vn - V_membrane)/Sn));
  tau_n := 1/(lamda_n*(exp((Vn - V_membrane)/(2*Sn)) + exp((V_membrane - Vn)/(2*Sn))));
  i_K_ATP := g_K_ATP*(V_membrane - V_K);
  i_K_Ca := g_K_Ca*Ca_i_cytosolic_calcium^3/(K_Ca^3 + Ca_i_cytosolic_calcium^3)*(V_membrane - V_K);
  i_NaL := g_NaL*(V_membrane - V_Na);

  // Rate rules:
  V_membrane' = -(i_K_dr + i_K_Ca + i_K_ATP + i_fast + i_Ca + i_NS + i_NaL)/Cm;
  h' = (h_infinity - h)/tau_h;
  d' = (d_infinity - d)/tau_d;
  n' = (n_infinity - n)/tau_n;
  Ca_i_cytosolic_calcium' = k_rel*(Ca_lum - Ca_i_cytosolic_calcium) - (omega*i_Ca + k_Ca*Ca_i_cytosolic_calcium + k_pump*Ca_i_cytosolic_calcium);
  Ca_lum' = -k_rel*(Ca_lum - Ca_i_cytosolic_calcium) + k_pump*Ca_i_cytosolic_calcium;
end
