// SBML level 2 version 4

function V2_4(k, S, Sx)
  k*S*Sx;
end
V2_4 is "V2-4";

function V3(k, S, Sx)
  k*S*Sx;
end

function V1(k1, Sx, d, S, k2)
  k1*(1 + Sx + d*((S/k2)^4/(1 + (S/k2)^4)));
end

model Cloutier2012()
  // Cloutier2012 - Feedback motif for Parkinson's disease
  // This model is described in the article:
  // Feedback motif for the pathogenesis of Parkinson's disease.
  // Cloutier M, Middleton R, Wellstead P.
  // IET Syst Biol 2012 Jun; 6(3): 86-93
  // Abstract:
  // Previous article on the integrative modelling of Parkinson's disease (PD) described a mathematical model with properties suggesting that PD pathogenesis is associated with a feedback-induced biochemical bistability. In this article, the authors show that the dynamics of the mathematical model can be extracted and distilled into an equivalent two-state feedback motif whose stability properties are controlled by multi-factorial combinations of risk factors and genetic mutations associated with PD. Based on this finding, the authors propose a principle for PD pathogenesis in the form of the switch-like transition of a bistable feedback process from 'healthy' homeostatic levels of reactive oxygen species and the protein ?-synuclein, to an alternative 'disease' state in which concentrations of both molecules are stable at the damagingly high-levels associated with PD. The bistability is analysed using the rate curves and steady-state response characteristics of the feedback motif. In particular, the authors show how a bifurcation in the feedback motif marks the pathogenic moment at which the 'healthy' state is lost and the 'disease' state is initiated. Further analysis shows how known risks (such as: age, toxins and genetic predisposition) modify the stability characteristics of the feedback motif in a way that is compatible with known features of PD, and which explain properties such as: multi-factorial causality, variability in susceptibility and severity, multi-timescale progression and the special cases of familial Parkinson's and Parkinsonian symptoms induced purely by toxic stress.
  // Stress of 2.6 obtained by optimization (parameter S1) was imposed between days 10 and 150 in order to reproduce the Figure.
  // This model is hosted on BioModels Database and identified by: BIOMD0000000558.
  // To cite BioModels Database, please use: BioModels Database: An enhanced, curated and annotated resource for published quantitative kinetic models.
  // To the extent possible under law, all copyright and related or neighbouring rights to this encoded model have been dedicated to the public domain worldwide. Please refer to CC0 Public Domain Dedication for more information.
  // biomodels.db:MODEL1410300000
  // biomodels.db:BIOMD0000000558
  // isDescribedBy pubmed:22757587
  // isDerivedFrom pubmed:22757585
  // hasTaxon taxonomy:9606
  // isVersionOf GO:0000302 GO:0070841

  // Compartments:
  // Type cell: Neuron
  compartment Neuron = 1;  // BTO:0000938

  // Species:
  // Reactive oxygen species
  species ROS in Neuron = 1;  // CHEBI:26523
  // Misfolded alpha-synuclein
  species alpha_syn in Neuron = 1; alpha_syn is "alpha-syn";  // isVersionOf uniprot:P37840

  // Parameters:
  k1 = 17280;
  k2 = 17280;
  k3 = 0.168;
  k4 = 0.168;
  dalphasyn = 15;
  kalphasyn = 8.5;
  S2_4 = 1; S2_4 is "S2-4";

  // Assignment rules:
  S1 := piecewise(2.6, (time > 10) && (time < 150), 0);

  // Reactions:
  ROS_1: => ROS; Neuron*V1(k1, S1, dalphasyn, alpha_syn, kalphasyn);  // modifiers: alpha_syn
  ROS_2: ROS => ; Neuron*V2_4(k2, ROS, S2_4);
  aSyn_1: => alpha_syn; Neuron*V3(k3, ROS, S2_4);  // modifiers: ROS
  aSyn_2: alpha_syn => ; Neuron*V2_4(k4, alpha_syn, S2_4);

  // Unit definitions:
  unit volume = 1e-3 litre;
  unit time = 86400 second;
  unit substance = 1e-6 mole;
end
