// SBML level 2 version 4

model Model_1()
  // Blum2000_LHsecretion_1
  // A mathematical model quantifying GnRH-induced LH secretion from gonadotropes by Blum et al (2000)
  // This paper includes three stages, and the model does not include the third stage. Also an event is included which remove the hormone GnRH at time=5min. Figure 1 and Figure 2 of the paper are reproduced, using SBML odeSolver. We choose to encode the model with the concentration of GnRH equal to 1.0nM.
  // This model originates from BioModels Database: A Database of Annotated Published Models. It is copyright (c) 2005-2009 The BioModels Team.
  // For more information see the terms of use.
  // To cite BioModels Database, please use Le Novère N., Bornstein B., Broicher A., Courtot M., Donizelli M., Dharuri H., Li L., Sauro H., Schilstra M., Shapiro B., Snoep J.L., Hucka M. (2006) BioModels Database: A Free, Centralized Database of Curated, Published, Quantitative Kinetic Models of Biochemical and Cellular Systems Nucleic Acids Res., 34: D689-D691.
  // biomodels.db:MODEL3092061764
  // biomodels.db:BIOMD0000000077
  // isDescribedBy pubmed:10662710
  // isPartOf GO:0032275 GO:0007200
  // hasTaxon taxonomy:131567
  // isVersionOf GO:0097210

  // Compartments:
  compartment cell = 1;  // GO:0005623

  // Species:
  species H in cell = 1;  // hasVersion uniprot:P51924; hasVersion uniprot:P07490
  species HR in cell = 0;  // hasVersion uniprot:P07490 uniprot:P30969
  species R in cell = 0.01;  // hasVersion uniprot:P30969
  species HRRH in cell = 0;  // isVersionOf GO:0043234
  species E in cell = 0;  // pirsf:PIRSF005483
  species GQ in cell = 0.1;  // hasVersion GO:0005834
  species IP3 in cell = 0;  // isVersionOf CHEBI:16595; isVersionOf kegg.compound:C01245
  species CHO in cell;  // isVersionOf interpro:IPR000699

  // Parameters:
  alpha = 2 substance;
  beta = 4 unitDefinition_3;

  // Assignment rules:
  CHO := 0.001*alpha*IP3*(0.3 + 0.3*beta*time*exp(1 - beta*time))/(1 + 0.001*alpha*IP3);

  // Reactions:
  H_binding_to_R: H + R -> HR; cell*(H_binding_to_R_k1*H*R - H_binding_to_R_k2*HR);  // isVersionOf GO:0051428 GO:0005102; isVersionOf GO:0004968
    H_binding_to_R_k1 = 2.5; H_binding_to_R_k2 = 5;
  HR_forming_HRRH: 2 HR -> HRRH; cell*(HR_forming_HRRH_k1*HR^2 - HR_forming_HRRH_k2*HRRH);  // isVersionOf GO:0006461
    HR_forming_HRRH_k1 = 2500; HR_forming_HRRH_k2 = 5;
  reaction_2: HRRH + GQ -> E; cell*(reaction_2_k1*HRRH*GQ - reaction_2_k2*E); reaction_2 is "G protein react with dimer producing E";  // isVersionOf GO:0007202
    reaction_2_k1 = 4000; reaction_2_k2 = 200;
  reaction_3: IP3 => ; cell*reaction_3_k1*IP3; reaction_3 is "IP3 converted into inactive metabolites";  // isVersionOf GO:0009056
    reaction_3_k1 = 10;
  Production_of_IP3: => IP3; cell*k*E;  // modifiers: E; isVersionOf GO:0004629
    k = 20000000;

  // Events:
  RemovalH: at (time > 5): H = 0; RemovalH is "removal of hormone";  // isVersionOf GO:0046888

  // Unit definitions:
  unit time = 60 second;
  unit substance = 1e-9 mole;
  unit unitDefinition_3 = 1 / (60 second); unitDefinition_3 is "unit for beta";
end
