// SBML level 2 version 1

model model_0000001()
  // Wu2006_K+Channel
  // The model is described in the paper by Wu and Chang (2006). Diethyl pyrocarbonate, a histidine-modifying agent, directly stimulates activity of ATP-sensitive potassium channels in pituitary GH3 cells. Biochem Pharmacol. 71(5): 615-23.
  // The unit of time is ms, and the simulation time is 80 s, that is 8e4 ms. Therfore, you probably need to increase the maximum steps for your simulator.
  // The figure 7 has been reproduced by MathSBML. Application of DEPC as indicated at horizontal bar was mimicked by an increase of maximal conductance of Katp-channels from 500 to 530 ps at t=30 s.
  // To the extent possible under law, all copyright and related or neighbouring rights to this encoded model have been dedicated to the public domain worldwide. Please refer to CC0 Public Domain Dedication for more information.
  // In summary, you are entitled to use this encoded model in absolutely any manner you deem suitable, verbatim, or with modification, alone or embedded it in a larger context, redistribute it, commercially or not, in a restricted way or not.
  // To cite BioModels Database, please use: Li C, Donizelli M, Rodriguez N, Dharuri H, Endler L, Chelliah V, Li L, He E, Henry A, Stefan MI, Snoep JL, Hucka M, Le Novère N, Laibe C (2010) BioModels Database: An enhanced, curated and annotated resource for published quantitative kinetic models. BMC Syst Biol., 4:92.
  // biomodels.db:MODEL2981976537
  // biomodels.db:BIOMD0000000124
  // isDescribedBy pubmed:16375866
  // hasTaxon taxonomy:10114
  // isVersionOf GO:0015272 GO:0019228 GO:0016570
  // isDerivedFrom pubmed:6305437 pubmed:15294427

  // Compartments:
  compartment cell = 1; cell is "GH3 cell";  // isVersionOf GO:0005623

  // Species:
  species c in cell = 0.1; c is "cytosolic free ca concentration";  // CHEBI:29108 kegg.compound:C00076
  species cer in cell = 100; cer is "ER ca concentration";  // CHEBI:29108 kegg.compound:C00076

  // Parameters:
  gca = 1000; gca is "ca current conductance";
  gkca = 900; gkca is "ca activated k conductance";
  gk = 1400; gk is "k current conductance";
  gir = 5; gir is "erg k current conductance";
  vca = 50; vca is "ca reversal potential";
  vk = -75; vk is "k reversal potential";
  vir = -75;
  cm = 5300; cm is "membrane capacitance";
  taun = 16;
  alpha = 4.5e-6;
  fcyt = 0.01;
  kpmca = 0.2;
  kd = 0.3;
  vn = -16;
  vm = -20;
  sn = 5;
  sm = 12;
  kserca = 0.4;
  dact = 0.35;
  dinact = 0.4;
  fer = 0.01;
  pleak = 0.0005;
  dip3 = 0.5;
  vcytver = 5;
  ip3 = 0;
  sa = 0.1;
  r = 0.14;
  taua = 300000;
  // gkatp = 500 if t < than tstim 530 otherwise
  gkatp = 500;
  var ica; ica is "calcium current";
  var ik; ik is "delayed rectifier k current";
  var ikca; ikca is "ca dependent k current";
  var ikatp; ikatp is "nucleotide sensitive k current";
  var iir; iir is "erg like k current";
  V = -60;
  n = 0.01;
  a = 0.46;
  nIR = 0.008;
  rIR = 0.282;

  // Assignment rules:
  alphaIRn := 0.09/(1 + exp(0.11*(V + 100)));
  betaIRn := 0.00035*exp(0.07*(V + 25));
  nIRinf := 1/(1 + betaIRn/alphaIRn);
  tauIRn := 1/(alphaIRn + betaIRn);
  alphaIRr := 30/(1 + exp(0.04*(V + 230)));
  betaIRr := 0.15/(1 + exp(-0.05*(V + 120)));
  rIRinf := 1/(1 + betaIRr/alphaIRr);
  tauIRr := 1/(alphaIRr + betaIRr);
  // activation function
  minf := 1/(1 + exp((vm - V)/sm));
  // delayed rectifier K+ current
  ik := gk*n*(V - vk);
  // Fraction of K(ca) channels activated by cytosolic Ca2+
  w := c^5/(c^5 + kd^5);
  // nucleotide-sensitive K+ current
  ikatp := gkatp*a*(V - vk);
  // Ca ionic currents
  ica := gca*minf*(V - vca);
  // activation function
  ninf := 1/(1 + exp((vn - V)/sn));
  // activation function
  ainf := 1/(1 + exp((r - c)/sa));
  // Ca2+ dependent K+ current
  ikca := gkca*w*(V - vk);
  // Flux of Ca2+ through the membrane
  jmem := -(alpha*ica + kpmca*c);
  // Ca2+ flux into the ER via SERCA
  jserca := kserca*c;
  // Ca2+ leak is proportional to gradient between Ca2+ and ER
  jleak := pleak*(cer - c);
  // fraction of open channels
  oinf := c/(dact + c)*(ip3/(dip3 + ip3))*(dinact/(dinact + c));
  // Ca2+ efflux through the IP3R
  jip3 := oinf*(cer - c);
  // net Ca2+ efflux from the ER
  jer := jleak + jip3 - jserca;
  iir := gir*nIR*rIR*(V - vir);

  // Rate rules:
  nIR' = (nIRinf - nIR)/tauIRn;
  rIR' = (rIRinf - rIR)/tauIRr;
  n' = (ninf - n)/taun;
  a' = (ainf - a)/taua;
  V' = -(ica + ik + ikca + ikatp + iir)/cm;

  // Reactions:
  cytosolic_free_Ca2_concentration: => c; cell*fcyt*(jmem + jer); cytosolic_free_Ca2_concentration is "cytosolic free Ca2+ concentration";  // isVersionOf GO:0051924
  ER_Ca2_concentration: => cer; -fer*vcytver*jer*cell; ER_Ca2_concentration is "ER Ca2+ concentration";  // isVersionOf GO:0051924

  // Events:
  // Increase of maximal conductance of K_ATP channels from 500 to 530 at time=30000 ms
  event_0000001: at (time > 3e4): gkatp = 530;

  // Unit definitions:
  unit time = 1e-3 second; time is "millisecond";
  unit mV = 1e-3 volt; mV is "millivolt";
  unit substance = 1e-6 mole; substance is "micromole";
end
