// SBML level 2 version 4

model chance()
  // Chance1960_Glycolysis_Respiration
  // This model is described inthe article:
  // Metabolic control mechanisms. 5. A solution for the equations representing interaction between glycolysis and respiration in ascites tumor cells.
  // Britton Chance, David Garfinkel, Joseph Higgins and Benno Hess, J Biol Chem. 1960 35:2426-2439. PubmedID: 13692276
  // Abstract:
  // The other papers of this series present experimental evidence for possible relationships between the kinetics of oxygen, glucose, adenosine diphosphate, adenosine triphosphate, and phosphate and those of the cytochromes and pyridine nucleotides of the ascites tumor cell. From these general experiments we are able to formulate, under the law of mass action, a minimum hypothesis under which the four metabolic regulations previously described can be observed. In brief, the system can be represented by the known enzyme systems, a relatively higher ADP affinity in respiration than in glycolysis, the mitochondrial membrane, a segregation of ATP into two compartments, and an ATP-utilizing system that is responsive to small decreases of the intracellular ADP level. The chemical equations for the pathway from glucose to oxygen are solved by a digital computer method so that the responses of the chemical equations and of the living cell can be accurately compared.
  // For reasons already described, we greatly prefer a com- puter representation based upon a physical or chemical law representing the action of the system to a model simulating the operation of the chemical system but not based upon funda- mental laws for the reactions involved; such a representation would not adequately represent the kinetics of the system, as in an electric circuit network or in some types of hydraulic ana- logues.
  // The model gives solutions of the reaction kinetics for three types of metabolism:
  // 0 - 64s, metabolism of endogenous substrate
  // 64s - 119s, metabolism of added glucose, illustrating the activated and inhibited aspects of glucose metabolism
  // 119s - 153s, relief of glucose and oxygen inhibition by the addition of an uncoupling agent
  // This model originates from BioModels Database: A Database of Annotated Published Models (http://www.ebi.ac.uk/biomodels/). It is copyright (c) 2005-2011 The BioModels.net Team.
  // For more information see the terms of use .
  // To cite BioModels Database, please use: Li C, Donizelli M, Rodriguez N, Dharuri H, Endler L, Chelliah V, Li L, He E, Henry A, Stefan MI, Snoep JL, Hucka M, Le Novère N, Laibe C (2010) BioModels Database: An enhanced, curated and annotated resource for published quantitative kinetic models. BMC Syst Biol., 4:92.
  // biomodels.db:MODEL1010190002
  // biomodels.db:BIOMD0000000281
  // isDescribedBy pubmed:13692276
  // occursIn taxonomy:9606 BTO:0000094
  // hasVersion kegg.pathway:hsa00010
  // hasVersion reactome:REACT_1383.6

  // Compartments:
  compartment cell = 1;  // GO:0005623

  // Species:
  species GLU in cell = 0; GLU is "(GLU) glucose";  // kegg.compound:C00293; CHEBI:17234
  species ENZ in cell = 1e-5; ENZ is "(ENZ) hexokinase";  // isVersionOf interpro:IPR001312; hasProperty GO:0004396
  species ENG in cell = 0; ENG is "(ENG) hexokinase-glucose intermediate";  // hasPart CHEBI:17234; hasVersion interpro:IPR001312
  species TP1 in cell = 0.0005; TP1 is "(TP1) adenosine triphosphate in store 1 (cytoplasm)";  // CHEBI:15422; kegg.compound:C00002
  species ADP in cell = 0.0001; ADP is "(ADP) adenosine diphosphate";  // CHEBI:16761; kegg.compound:C00008
  species GLP in cell = 0; GLP is "(GLP) glucose 6-phosphate";  // CHEBI:4170 kegg.compound:C00092
  species ETZ in cell = 1e-5; ETZ is "(ETZ) phosphofructokinase";  // isVersionOf interpro:IPR022463; hasProperty GO:0008662
  species ETG in cell = 0; ETG is "(ETG) phosphofructokinase intermediate";  // hasPart CHEBI:4170; hasVersion interpro:IPR022463; hasProperty GO:0008662
  species GPP in cell = 0; GPP is "(GPP) hexose diphosphate";  // kegg.compound:C05378; CHEBI:28013
  species GAP in cell = 0; GAP is "(GAP) glyceraldehyde 3-phosphate";  // CHEBI:29052; kegg.compound:C00118
  species DHA in cell = 0; DHA is "(DHA) dihydroxacetone phosphate";  // kegg.compound:C00111; CHEBI:16108
  species DPN in cell = 0.0001; DPN is "(DPN) extramitochondrial diphospyridine nucleotide";  // CHEBI:15846 kegg.compound:C00003
  species DPH in cell = 0.0001; DPH is "(DPH) extramitochondrial reduced diphospyridine nucleotide";  // CHEBI:16908 kegg.compound:C00004
  species PID in cell = 0.004; PID is "(PID) inorganic phosphate";  // CHEBI:18367 kegg.compound:C00009
  species DGA in cell = 0; DGA is "(DGA) 1,3 diphosphoglycerate";  // kegg.compound:C00236; CHEBI:16001
  species PGA in cell = 0; PGA is "(PGA) 3 phosphoglycerate";  // kegg.compound:C00197; CHEBI:17794
  species PYR in cell = 0.001; PYR is "(PYR) pyruvate";  // kegg.compound:C00022; CHEBI:32816
  species LAC in cell = 0.001; LAC is "(LAC) lactate";  // kegg.compound:C00186; CHEBI:422
  species DIN in cell = 3e-5; DIN is "(DIN) intramitochondrial diphospyridine nucleotide";  // kegg.compound:C00003; CHEBI:15846
  species DIH in cell = 3e-5; DIH is "(DIH) intramitochondrial reduced diphospyridine nucleotide";  // CHEBI:16908; kegg.compound:C00004
  species XI in cell = 2e-5; XI is "(XI) low energy intermediate in oxidative phosphorylation";  // isPartOf GO:0045259 GO:0005746
  species XSI in cell = 2e-5; XSI is "(XSI) high energy intermediate in oxidative phosphorylation";  // isPartOf GO:0045259 GO:0005746
  species OXY in cell = 0.0005; OXY is "(OXY) oxygen";  // kegg.compound:C00007; CHEBI:15379
  species XSP in cell = 2e-5; XSP is "(XSP) phosphorylated intermediate in oxidative phosphorylation";  // isPartOf GO:0005746 GO:0045259
  species TP2 in cell = 0.0005; TP2 is "(TP2) adenosine triphosphate in store 2 (mitochondria)";  // kegg.compound:C00002; CHEBI:15422
  species DBP in cell = 0; DBP is "(DBP) dibromophenol";  // CHEBI:33625
  species PUE in cell = 2e-6; PUE is "(PUE) enzyme concerned in ATP utilization";  // isVersionOf kegg.compound:C00017; isVersionOf CHEBI:16541
  species PPP in cell = 1e-6; PPP is "(PPP) enzyme intermediate concerned in ATP utilization";  // hasPart CHEBI:15422 CHEBI:16541; hasProperty GO:0016887
  species AGP in cell = 0; AGP is "(AGP) alpha-glycerophosphate";  // kegg.compound:C00623; CHEBI:16221
  species MOD in cell = 5e-5; MOD is "(MOD) glyceraldehyde 3-phoshphate dehydrogenase-DPN complex";  // hasPart CHEBI:15846; hasVersion interpro:IPR006424
  species MOB in cell = 0; MOB is "(MOB) acyl enzyme intermediate of glyceraldehyde 3-phoshphate dehydrogenase";  // hasPart CHEBI:29052; hasVersion interpro:IPR006424; hasProperty GO:0004365
  species MOX in cell = 0; MOX is "(MOX) glyceraldehyde 3-phoshphate dehydrogenase";  // isVersionOf uniprot:P04406 uniprot:Q2TSD0 interpro:IPR006424; hasProperty GO:0004365

  // Parameters:
  GLU_0 has dimensionless; GLU_0 is "relative GLU";
  ENZ_0 has dimensionless; ENZ_0 is "relative ENZ";
  ENG_0 has dimensionless; ENG_0 is "relative ENG";
  TP1_0 has dimensionless; TP1_0 is "relative TP1";
  ADP_0 has dimensionless; ADP_0 is "relative ADP";
  GLP_0 has dimensionless; GLP_0 is "relative GLP";
  ETZ_0 has dimensionless; ETZ_0 is "relative ETZ";
  ETG_0 has dimensionless; ETG_0 is "relative ETG";
  GPP_0 has dimensionless; GPP_0 is "relative GPP";
  GAP_0 has dimensionless; GAP_0 is "relative GAP";
  DHA_0 has dimensionless; DHA_0 is "relative DHA";
  DPN_0 has dimensionless; DPN_0 is "relative DPN";
  DPH_0 has dimensionless; DPH_0 is "relative DPH";
  PID_0 has dimensionless; PID_0 is "relative PID";
  DGA_0 has dimensionless; DGA_0 is "relative DGA";
  PGA_0 has dimensionless; PGA_0 is "relative PGA";
  PYR_0 has dimensionless; PYR_0 is "relative PYR";
  LAC_0 has dimensionless; LAC_0 is "relative LAC";
  DIN_0 has dimensionless; DIN_0 is "relative DIN";
  DIH_0 has dimensionless; DIH_0 is "relative DIH";
  XI_0 has dimensionless; XI_0 is "relative XI";
  XSI_0 has dimensionless; XSI_0 is "relative XSI";
  OXY_0 has dimensionless; OXY_0 is "relative OXY";
  XSP_0 has dimensionless; XSP_0 is "relative XSP";
  TP2_0 has dimensionless; TP2_0 is "relative TP2";
  DBP_0 has dimensionless; DBP_0 is "relative DBP";
  PUE_0 has dimensionless; PUE_0 is "relative PUE";
  PPP_0 has dimensionless; PPP_0 is "relative PPP";
  AGP_0 has dimensionless; AGP_0 is "relative AGP";
  MOD_0 has dimensionless; MOD_0 is "relative MOD";
  MOB_0 has dimensionless; MOB_0 is "relative MOB";
  MOX_0 has dimensionless; MOX_0 is "relative MOX";

  // Assignment rules:
  GLU_0 := GLU/0.003;
  ENZ_0 := ENZ/1.02e-5;
  ENG_0 := ENG/1.02e-5;
  TP1_0 := TP1/0.0015;
  ADP_0 := ADP/0.001;
  GLP_0 := GLP/0.001;
  ETZ_0 := ETZ/1e-5;
  ETG_0 := ETG/1e-5;
  GPP_0 := GPP/0.001;
  GAP_0 := GAP/0.0002;
  DHA_0 := DHA/0.0013;
  DPN_0 := DPN/0.00025;
  DPH_0 := DPH/0.0002;
  PID_0 := PID/0.005;
  DGA_0 := DGA/0.0002;
  PGA_0 := PGA/0.0002;
  PYR_0 := PYR/0.002;
  LAC_0 := LAC/0.0012;
  DIN_0 := DIN/7e-5;
  DIH_0 := DIH/7e-5;
  XI_0 := XI/6e-5;
  XSI_0 := XSI/6e-5;
  OXY_0 := OXY/0.0005;
  XSP_0 := XSP/6e-5;
  TP2_0 := TP2/0.0015;
  DBP_0 := DBP/0.025;
  PUE_0 := PUE/3.06e-6;
  PPP_0 := PPP/3.06;
  AGP_0 := AGP/0.0013;
  MOD_0 := MOD/5e-5;
  MOB_0 := MOB/0.0001;
  MOX_0 := MOX/5e-5;

  // Reactions:
  reaction_1: GLU + ENZ => ENG; cell*1e-6*reaction_1_k*GLU*ENZ;  // isPartOf ec-code:2.7.1.1; isPartOf kegg.reaction:R00299 GO:0004396
    reaction_1_k = 3000000000 per_M_per_s;
  reaction_2: ENG + TP1 => ADP + GLP + ENZ; cell*1e-6*reaction_2_k*ENG*TP1;  // isPartOf GO:0004396; isPartOf ec-code:2.7.1.1 kegg.reaction:R00299
    reaction_2_k = 10000000000 per_M_per_s;
  reaction_3: GLP + ETZ => ETG; cell*1e-6*reaction_3_k*GLP*ETZ;  // isPartOf ec-code:2.7.1.4 kegg.reaction:R04779 GO:0008865
    reaction_3_k = 40000000000 per_M_per_s;
  reaction_4: ETG + TP1 => GPP + ETZ + ADP; cell*1e-6*reaction_4_k*ETG*TP1;  // isPartOf ec-code:2.7.1.4; isPartOf kegg.reaction:R04779 GO:0008865
    reaction_4_k = 40000000000 per_M_per_s;
  reaction_5: GPP => GAP + DHA; cell*1e-6*reaction_5_k*GPP;  // isVersionOf GO:0004332; isVersionOf ec-code:4.1.2.13 kegg.reaction:R01068
    reaction_5_k = 100000 per_s;
  reaction_6: DHA + DPH => AGP + DPN; cell*1e-6*reaction_6_k*DHA*DPH;  // isPartOf GO:0006127; isVersionOf kegg.reaction:R00842; isVersionOf ec-code:1.1.1.8 GO:0004367
    reaction_6_k = 2000000000 per_M_per_s;
  reaction_7: AGP + DPN => DHA + DPH; cell*1e-6*reaction_7_k*AGP*DPN;  // isPartOf GO:0006127; isVersionOf GO:0004367; isVersionOf ec-code:1.1.1.8 kegg.reaction:R00842
    reaction_7_k = 80000000 per_M_per_s;
  reaction_8: GAP + MOD => MOB + DPH; cell*1e-6*reaction_8_k*GAP*MOD;  // isPartOf ec-code:1.2.1.12 kegg.reaction:R01061 GO:0008943
    reaction_8_k = 600000000000 per_M_per_s;
  reaction_9: MOB + PID => DGA + MOX; cell*1e-6*reaction_9_k*MOB*PID;  // isPartOf GO:0008943; isPartOf ec-code:1.2.1.12 kegg.reaction:R01061
    reaction_9_k = 400000000 per_M_per_s;
  reaction_10: MOX + DPN => MOD; cell*1e-6*reaction_10_k*MOX*DPN;  // isPartOf GO:0008943; isPartOf ec-code:1.2.1.12 kegg.reaction:R01061
    reaction_10_k = 6000000000 per_M_per_s;
  reaction_11: DGA + ADP => TP1 + PGA; cell*1e-6*reaction_11_k*DGA*ADP;  // isVersionOf ec-code:2.7.2.3; isVersionOf kegg.reaction:R01512
    reaction_11_k = 10000000000 per_M_per_s;
  reaction_12: PGA + ADP => TP1 + PYR; cell*1e-6*reaction_12_k*PGA*ADP;  // hasPart ec-code:4.2.1.11; hasPart ec-code:2.7.1.40 kegg.reaction:R00658; hasVersion kegg.reaction:R00200 GO:0004634 GO:0004743
    reaction_12_k = 5000000000 per_M_per_s;
  reaction_13: PYR + DPH => LAC + DPN; cell*1e-6*reaction_13_k*PYR*DPH;  // isVersionOf ec-code:1.1.1.27; isVersionOf kegg.reaction:R00703 GO:0004459
    reaction_13_k = 500000000 per_M_per_s;
  reaction_14: LAC + DPN => PYR + DPH; cell*1e-6*reaction_14_k*LAC*DPN;  // isVersionOf ec-code:1.1.1.27 kegg.reaction:R00703 GO:0004459
    reaction_14_k = 10000000 per_M_per_s;
  reaction_15: PYR + 4 DIN => 4 DIH; cell*1e-6*reaction_15_k*PYR*DIN;  // isVersionOf GO:0042867; hasVersion GO:0006099
    reaction_15_k = 20000000 per_M_per_s;
  reaction_16: DIH + 3 XI + OXY => 3 XSI + DIN; cell*1e-6*reaction_16_k*DIH*XI*OXY;  // isVersionOf GO:0019646
    reaction_16_k = 7500000000000 per_M_squared_per_s;
  reaction_17: XSI + PID => XSP; cell*1e-6*reaction_17_k*XSI*PID;  // isPartOf GO:0006119
    reaction_17_k = 400000000 per_M_per_s;
  reaction_18: XSP + ADP => TP2 + XI; cell*1e-6*reaction_18_k*XSP*ADP;  // isPartOf GO:0006119
    reaction_18_k = 15000000000 per_M_per_s;
  reaction_19: XSI => XI; cell*1e-6*reaction_19_k*XSI*DBP;  // modifiers: DBP; isVersionOf GO:0022900
    reaction_19_k = 120000000 per_M_per_s;
  reaction_20: TP2 => TP1; cell*1e-6*reaction_20_k*TP2*DBP;  // modifiers: DBP; isVersionOf GO:0015867
    reaction_20_k = 4000000 per_M_per_s;
  reaction_21: TP1 + PUE => PPP; cell*1e-6*reaction_21_k*TP1*PUE;  // isVersionOf GO:0005524
    reaction_21_k = 3000000000 per_M_per_s;
  reaction_22: PPP => ADP + PUE + PID; cell*1e-6*reaction_22_k*PPP;  // isVersionOf GO:0006200
    reaction_22_k = 2000000 per_s;

  // Events:
  e_1: at (time >= 64): GLU = 0.003; e_1 is "addition of glucose";
  e_2: at (time >= 119): DBP = 0.025; e_2 is "addition of uncoupling agent";

  // Unit definitions:
  unit per_s = 1 / (10 second); per_s is "per second";
  unit per_M_per_s = 10 litre / (10 mole * 10 second); per_M_per_s is "per molar per second";
  unit per_M_squared_per_s = (10 litre)^2 / ((10 mole)^2 * 10 second); per_M_squared_per_s is "per molar squared per second";
end
