// SBML level 2 version 4

model DellOrco2009_phototransduction()
  // This a model from the article:
  // Network-level analysis of light adaptation in rod cells under normal and altered conditions.
  // Dell'Orco D, Schmidt H, Mariani S, Fanelli F Mol Biosyst2009 Oct; 5(10):1232-46 19756313,
  // Abstract:
  // Photoreceptor cells finely adjust their sensitivity and electrical response according to changes in light stimuli as a direct consequence of the feedback and regulation mechanisms in the phototransduction cascade. In this study, we employed a systems biology approach to develop a dynamic model of vertebrate rod phototransduction that accounts for the details of the underlying biochemistry. Following a bottom-up strategy, we first reproduced the results of a robust model developed by Hamer et al. (Vis. Neurosci., 2005, 22(4), 417), and then added a number of additional cascade reactions including: (a) explicit reactions to simulate the interaction between the activated effector and the regulator of G-protein signalling (RGS); (b) a reaction for the reformation of the G-protein from separate subunits; (c) a reaction for rhodopsin (R) reconstitution from the association of the opsin apoprotein with the 11-cis-retinal chromophore; (d) reactions for the slow activation of the cascade by opsin. The extended network structure successfully reproduced a number of experimental conditions that were inaccessible to prior models. With a single set of parameters the model was able to predict qualitative and quantitative features of rod photoresponses to light stimuli ranging over five orders of magnitude, in normal and altered conditions, including genetic manipulations of the cascade components. In particular, the model reproduced the salient dynamic features of the rod from Rpe65(-/-) animals, a well established model for Leber congenital amaurosis and vitamin A deficiency. The results of this study suggest that a systems-level approach can help to unravel the adaptation mechanisms in normal and in disease-associated conditions on a molecular basis.
  // Figure 7 of the reference is reproduced here. Each plot is obtained by increasing flash strength. More details about generating the plots can be obtained from the comments in the curation figure (go to curation tab).
  // This model originates from BioModels Database: A Database of Annotated Published Models (http://www.ebi.ac.uk/biomodels/). It is copyright (c) 2005-2011 The BioModels.net Team.
  // For more information see the terms of use.
  // To cite BioModels Database, please use: Li C, Donizelli M, Rodriguez N, Dharuri H, Endler L, Chelliah V, Li L, He E, Henry A, Stefan MI, Snoep JL, Hucka M, Le Novère N, Laibe C (2010) BioModels Database: An enhanced, curated and annotated resource for published quantitative kinetic models. BMC Syst Biol., 4:92.
  // biomodels.db:MODEL1103090000
  // biomodels.db:BIOMD0000000326
  // isDescribedBy pubmed:19756313
  // isDerivedFrom pubmed:16212700
  // occursIn FMA:67747 CL:0000604
  // isVersionOf GO:0007602

  // Compartments:
  compartment cytosol = 1;  // isVersionOf GO:0005829

  // Species:
  species Arr in cytosol = 31300000;  // isVersionOf uniprot:P20443
  species Ca2_buff in cytosol = 42.857;  // isVersionOf CHEBI:29108 kegg.compound:C00076
  species Ca2_free in cytosol = 0.6;  // isVersionOf CHEBI:29108 kegg.compound:C00076
  species G_GTP in cytosol = 0;  // hasPart CHEBI:15996 uniprot:Q3U6B2
  species Ga_GDP in cytosol = 0;  // hasPart CHEBI:17552 uniprot:P27600
  species Ga_GTP in cytosol = 0;  // hasPart CHEBI:15996 uniprot:P27600
  species Ga_GTP_PDE_a_Ga_GTP in cytosol = 0;  // hasPart CHEBI:15996 uniprot:P09174 uniprot:P27600
  species Ga_GTP_a_PDE_a_Ga_GTP in cytosol = 0;  // hasPart CHEBI:15996 uniprot:P27600 uniprot:P09174
  species Gbg in cytosol = 0;  // isVersionOf GO:0031680
  species Gt in cytosol = 360000000;  // isVersionOf uniprot:Q8CFY0
  species Ops in cytosol = 0;  // isVersionOf uniprot:O35599
  species Ops_G in cytosol = 0;  // hasPart uniprot:Q3U6B2 uniprot:O35599
  species Ops_G_GTP in cytosol = 0;  // hasPart CHEBI:15996 uniprot:O35599 uniprot:Q3U6B2
  species Ops_Gt in cytosol = 0;  // hasPart uniprot:Q8CFY0 uniprot:O35599
  species PDE in cytosol = 13350000;  // isVersionOf uniprot:P09174
  species PDE_Ga_GTP in cytosol = 0;  // hasPart CHEBI:15996 uniprot:P27600 uniprot:P09174
  species PDE_a_Ga_GTP in cytosol = 0;  // hasPart CHEBI:15996 uniprot:P27600 uniprot:P09174
  species R in cytosol = 3600000000;  // isVersionOf uniprot:P15409
  species R0 in cytosol = 0;  // hasPart uniprot:P15409
  species R0_G in cytosol = 0;  // hasPart uniprot:P15409 uniprot:Q3U6B2
  species R0_G_GTP in cytosol = 0;  // hasPart CHEBI:15996 uniprot:P15409 uniprot:Q3U6B2
  species R0_Gt in cytosol = 0;  // hasPart uniprot:P15409 uniprot:Q8CFY0
  species R0_RKpre in cytosol = 0;  // isVersionOf uniprot:Q9WVL4 uniprot:P15409
  species R1 in cytosol = 0;  // isVersionOf kegg.compound:C02456
  species R1_Arr in cytosol = 0;  // hasPart uniprot:P20443 kegg.compound:C02456
  species R1_G in cytosol = 0;  // hasPart uniprot:Q3U6B2 kegg.compound:C02456
  species R1_G_GTP in cytosol = 0;  // hasPart CHEBI:15996 uniprot:Q3U6B2 kegg.compound:C02456
  species R1_Gt in cytosol = 0;  // hasPart uniprot:Q8CFY0 kegg.compound:C02456
  species R1_RKpost in cytosol = 0;  // hasPart uniprot:Q9WVL4 kegg.compound:C02456
  species R1_RKpre in cytosol = 0;  // hasPart uniprot:Q9WVL4 kegg.compound:C02456
  species R2 in cytosol = 0;  // isVersionOf kegg.compound:C02456
  species R2_Arr in cytosol = 0;  // hasPart uniprot:P20443 kegg.compound:C02456
  species R2_G in cytosol = 0;  // hasPart uniprot:Q3U6B2 kegg.compound:C02456
  species R2_G_GTP in cytosol = 0;  // hasPart CHEBI:15996 uniprot:Q3U6B2 kegg.compound:C02456
  species R2_Gt in cytosol = 0;  // hasPart uniprot:Q8CFY0 kegg.compound:C02456
  species R2_RKpost in cytosol = 0;  // hasPart uniprot:Q9WVL4 kegg.compound:C02456
  species R2_RKpre in cytosol = 0;  // hasPart uniprot:Q9WVL4 kegg.compound:C02456
  species R3 in cytosol = 0;  // isVersionOf kegg.compound:C02456
  species R3_Arr in cytosol = 0;  // hasPart uniprot:P20443 kegg.compound:C02456
  species R3_G in cytosol = 0;  // hasPart uniprot:Q3U6B2 kegg.compound:C02456
  species R3_G_GTP in cytosol = 0;  // hasPart CHEBI:15996 uniprot:Q3U6B2 kegg.compound:C02456
  species R3_Gt in cytosol = 0;  // hasPart uniprot:Q8CFY0 kegg.compound:C02456
  species R3_RKpost in cytosol = 0;  // hasPart uniprot:Q9WVL4 kegg.compound:C02456
  species R3_RKpre in cytosol = 0;  // hasPart uniprot:Q9WVL4 kegg.compound:C02456
  species R4 in cytosol = 0;  // isVersionOf kegg.compound:C02456
  species R4_Arr in cytosol = 0;  // hasPart uniprot:P20443 kegg.compound:C02456
  species R4_G in cytosol = 0;  // hasPart uniprot:Q3U6B2 kegg.compound:C02456
  species R4_G_GTP in cytosol = 0;  // hasPart CHEBI:15996 uniprot:Q3U6B2 kegg.compound:C02456
  species R4_Gt in cytosol = 0;  // hasPart uniprot:Q8CFY0 kegg.compound:C02456
  species R4_RKpost in cytosol = 0;  // hasPart uniprot:Q9WVL4 kegg.compound:C02456
  species R4_RKpre in cytosol = 0;  // hasPart uniprot:Q9WVL4 kegg.compound:C02456
  species R5 in cytosol = 0;  // isVersionOf kegg.compound:C02456
  species R5_Arr in cytosol = 0;  // hasPart uniprot:P20443 kegg.compound:C02456
  species R5_G in cytosol = 0;  // hasPart uniprot:Q3U6B2 kegg.compound:C02456
  species R5_G_GTP in cytosol = 0;  // hasPart CHEBI:15996 uniprot:Q3U6B2 kegg.compound:C02456
  species R5_Gt in cytosol = 0;  // hasPart uniprot:Q8CFY0 kegg.compound:C02456
  species R5_RKpost in cytosol = 0;  // hasPart uniprot:Q9WVL4 kegg.compound:C02456
  species R5_RKpre in cytosol = 0;  // hasPart uniprot:Q9WVL4 kegg.compound:C02456
  species R6 in cytosol = 0;  // isVersionOf kegg.compound:C02456
  species R6_Arr in cytosol = 0;  // hasPart uniprot:P20443 kegg.compound:C02456
  species R6_G in cytosol = 0;  // hasPart uniprot:Q3U6B2 kegg.compound:C02456
  species R6_G_GTP in cytosol = 0;  // hasPart CHEBI:15996 uniprot:Q3U6B2 kegg.compound:C02456
  species R6_Gt in cytosol = 0;  // hasPart uniprot:Q8CFY0 kegg.compound:C02456
  species R6_RKpost in cytosol = 0;  // hasPart uniprot:Q9WVL4 kegg.compound:C02456
  species R6_RKpre in cytosol = 0;  // hasPart uniprot:Q9WVL4 kegg.compound:C02456
  species RGS in cytosol = 3000000;  // isVersionOf uniprot:O54828
  species RGS_Ga_GTP_a_PDE_a_Ga_GTP in cytosol = 0;  // hasPart CHEBI:15996 uniprot:P09174 uniprot:P27600 uniprot:O54828
  species RGS_PDE_a_Ga_GTP in cytosol = 0;  // hasPart CHEBI:15996 uniprot:O54828 uniprot:P27600 uniprot:P09174
  species RK in cytosol = 10838;  // isVersionOf uniprot:Q9WVL4
  species Rec_wCa2_RK in cytosol = 4204560;  // hasPart CHEBI:29108 uniprot:P34057 uniprot:Q9WVL4
  species cGMP in cytosol = 4;  // isVersionOf CHEBI:16356

  // Parameters:
  Rtot = 3600000000;
  PDEtot = 13350000;
  Gtot = 360000000;
  Rectot = 35;
  RGStot = 3000000;
  ArrTot = 31300000;
  flashBG = 0;
  flash0Dur = 0.001;
  flash0Mag = 0;
  flashDel = 0;
  flashDur = 0.001;
  flashMag = 0;
  otherstimulus = 0;
  kRK1_0 = 0.00764296;
  omega = 0.6;
  kRK2 = 250;
  RKdark = 10838;
  kRK3_ATP = 400;
  kRK4 = 20;
  omega_arr = 0.81323;
  kArr = 6.0918e-10;
  kA2 = 0.00323198;
  kA3 = 0.0445091;
  kOps = 6.1172e-13;
  kRrecyc = 0.0007;
  kG1_0 = 3.058611e-5;
  kG2 = 2250.34;
  kG3 = 2000;
  kG4_GDP = 600;
  kG5_GTP = 750;
  kG6 = 2000;
  kG7 = 200;
  kGrecyc = 2;
  kGshutoff = 0.05;
  kP1 = 0.0549715;
  kP1_rev = 0;
  kP2 = 940.706;
  kP3 = 1.49834e-9;
  kP4 = 21.0881;
  kPDEshutoff = 0.033;
  kRGS1 = 1.57e-7;
  kRGS2 = 256.07;
  kRec3 = 9.68777;
  kRec4 = 0.610084;
  Kp = 0.425272;
  w = 2;
  Vcyto = 1;
  Kc = 0.17;
  m = 2.5;
  betadark = 1.2;
  betasub = 0.00043;
  fCa = 0.2;
  Jdark = 29.7778;
  F = 96485.3415;
  cGMPdark = 4;
  ncg = 3;
  gammaCa = 47.554;
  Ca2dark = 0.6;
  Ca2_0 = 0.01;
  k1 = 0.381529;
  k2 = 1.9094;
  eT = 400;
  ktherm = 0.0238;

  // Assignment rules:
  background := flashBG;
  premag := flash0Mag/flash0Dur;
  mag := flashMag/flashDur;
  predur := flash0Dur;
  dur := flashDur;
  del := flashDel;
  preflash := piecewise(premag, time <= predur, 0);
  testflash := piecewise(mag, (time >= del) && (time <= del + dur), 0);
  stimulus := background + preflash + testflash + otherstimulus;
  numConcFactor := 1/(6.022e5*Vcyto);
  kRK1_1 := kRK1_0*exp(-omega);
  kRK1_2 := kRK1_0*exp(-omega*2);
  kRK1_3 := kRK1_0*exp(-omega*3);
  kRK1_4 := kRK1_0*exp(-omega*4);
  kRK1_5 := kRK1_0*exp(-omega*5);
  kRK1_6 := 0;
  kA1_1 := kArr*exp(omega_arr);
  kA1_2 := kArr*exp(omega_arr*2);
  kA1_3 := kArr*exp(omega_arr*3);
  kA1_4 := kArr*exp(omega_arr*4);
  kA1_5 := kArr*exp(omega_arr*5);
  kA1_6 := kArr*exp(omega_arr*6);
  kG1_1 := kG1_0*exp(-omega);
  kG1_2 := kG1_0*exp(-omega*2);
  kG1_3 := kG1_0*exp(-omega*3);
  kG1_4 := kG1_0*exp(-omega*4);
  kG1_5 := kG1_0*exp(-omega*5);
  kG1_6 := kG1_0*exp(-omega*6);
  E := PDE_a_Ga_GTP + 2*Ga_GTP_a_PDE_a_Ga_GTP;
  Rec_wCa2 := (Rectot - Rec_wCa2_RK*numConcFactor)/(1 + (Kp/Ca2_free)^w);
  alfamax := betadark*cGMPdark*(1 + (Ca2dark/Kc)^m);
  J := 2/(2 + fCa)*(cGMP/cGMPdark)^ncg*Jdark + fCa/(fCa + 2)*(Ca2_free - Ca2_0)/(Ca2dark - Ca2_0)*Jdark;
  deltaJ := Jdark - J;

  // Reactions:
  v_r1: R => R0; stimulus*R/Rtot;  // isVersionOf GO:0070141
  // Rn and RK binding before phospohorylation occurs
  v_r2_0: R0 + RK -> R0_RKpre; kRK1_0*RK*R0 - kRK2*R0_RKpre;  // isVersionOf GO:0006461
  // Rn and RK binding before phospohorylation occurs
  v_r2_1: R1 + RK -> R1_RKpre; kRK1_1*RK*R1 - kRK2*R1_RKpre;  // isVersionOf GO:0006461
  // Rn and RK binding before phospohorylation occurs
  v_r2_2: R2 + RK -> R2_RKpre; kRK1_2*RK*R2 - kRK2*R2_RKpre;  // isVersionOf GO:0006461
  // Rn and RK binding before phospohorylation occurs
  v_r2_3: R3 + RK -> R3_RKpre; kRK1_3*RK*R3 - kRK2*R3_RKpre;  // isVersionOf GO:0006461
  // Rn and RK binding before phospohorylation occurs
  v_r2_4: R4 + RK -> R4_RKpre; kRK1_4*RK*R4 - kRK2*R4_RKpre;  // isVersionOf GO:0006461
  // Rn and RK binding before phospohorylation occurs
  v_r2_5: R5 + RK -> R5_RKpre; kRK1_5*RK*R5 - kRK2*R5_RKpre;  // isVersionOf GO:0006461
  // Rn and RK binding before phospohorylation occurs
  v_r2_6: R6 + RK -> R6_RKpre; kRK1_6*RK*R6 - kRK2*R6_RKpre;  // isVersionOf GO:0006461
  // Phosphorylation of Rn to Rn+1. In these reactions ATP (left) and ADP (right) are included in the rate constants
  v_r3_0: R0_RKpre => R1_RKpost; kRK3_ATP*R0_RKpre;  // isVersionOf GO:0016310
  // Phosphorylation of Rn to Rn+1. In these reactions ATP (left) and ADP (right) are included in the rate constants
  v_r3_1: R1_RKpre => R2_RKpost; kRK3_ATP*R1_RKpre;  // isVersionOf GO:0016310
  // Phosphorylation of Rn to Rn+1. In these reactions ATP (left) and ADP (right) are included in the rate constants
  v_r3_2: R2_RKpre => R3_RKpost; kRK3_ATP*R2_RKpre;  // isVersionOf GO:0016310
  // Phosphorylation of Rn to Rn+1. In these reactions ATP (left) and ADP (right) are included in the rate constants
  v_r3_3: R3_RKpre => R4_RKpost; kRK3_ATP*R3_RKpre;  // isVersionOf GO:0016310
  // Phosphorylation of Rn to Rn+1. In these reactions ATP (left) and ADP (right) are included in the rate constants
  v_r3_4: R4_RKpre => R5_RKpost; kRK3_ATP*R4_RKpre;  // isVersionOf GO:0016310
  // Phosphorylation of Rn to Rn+1. In these reactions ATP (left) and ADP (right) are included in the rate constants
  v_r3_5: R5_RKpre => R6_RKpost; kRK3_ATP*R5_RKpre;  // isVersionOf GO:0016310
  // Dissociation of Rn and RK
  v_r4_1: R1_RKpost => R1 + RK; kRK4*R1_RKpost;  // isVersionOf GO:0043241
  // Dissociation of Rn and RK
  v_r4_2: R2_RKpost => R2 + RK; kRK4*R2_RKpost;  // isVersionOf GO:0043241
  // Dissociation of Rn and RK
  v_r4_3: R3_RKpost => R3 + RK; kRK4*R3_RKpost;  // isVersionOf GO:0043241
  // Dissociation of Rn and RK
  v_r4_4: R4_RKpost => R4 + RK; kRK4*R4_RKpost;  // isVersionOf GO:0043241
  // Dissociation of Rn and RK
  v_r4_5: R5_RKpost => R5 + RK; kRK4*R5_RKpost;  // isVersionOf GO:0043241
  // Dissociation of Rn and RK
  v_r4_6: R6_RKpost => R6 + RK; kRK4*R6_RKpost;  // isVersionOf GO:0043241
  // Binding of activated R to Arrestin
  v_r5_1: Arr + R1 -> R1_Arr; kA1_1*Arr*R1 - kA2*R1_Arr;  // isVersionOf GO:0006461
  // Binding of activated R to Arrestin
  v_r5_2: Arr + R2 -> R2_Arr; kA1_2*Arr*R2 - kA2*R2_Arr;  // isVersionOf GO:0006461
  // Binding of activated R to Arrestin
  v_r5_3: Arr + R3 -> R3_Arr; kA1_3*Arr*R3 - kA2*R3_Arr;  // isVersionOf GO:0006461
  // Binding of activated R to Arrestin
  v_r5_4: Arr + R4 -> R4_Arr; kA1_4*Arr*R4 - kA2*R4_Arr;  // isVersionOf GO:0006461
  // Binding of activated R to Arrestin
  v_r5_5: Arr + R5 -> R5_Arr; kA1_5*Arr*R5 - kA2*R5_Arr;  // isVersionOf GO:0006461
  // Binding of activated R to Arrestin
  v_r5_6: Arr + R6 -> R6_Arr; kA1_6*Arr*R6 - kA2*R6_Arr;  // isVersionOf GO:0006461
  // Arrestin mediated R -> ops
  v_r6_1: R1_Arr => Arr + Ops; kA3*R1_Arr;  // isVersionOf GO:0046155
  // Arrestin mediated R -> ops
  v_r6_2: R2_Arr => Arr + Ops; kA3*R2_Arr;  // isVersionOf GO:0046155
  // Arrestin mediated R -> ops
  v_r6_3: R3_Arr => Arr + Ops; kA3*R3_Arr;  // isVersionOf GO:0046155
  // Arrestin mediated R -> ops
  v_r6_4: R4_Arr => Arr + Ops; kA3*R4_Arr;  // isVersionOf GO:0046155
  // Arrestin mediated R -> ops
  v_r6_5: R5_Arr => Arr + Ops; kA3*R5_Arr;  // isVersionOf GO:0046155
  // Arrestin mediated R -> ops
  v_r6_6: R6_Arr => Arr + Ops; kA3*R6_Arr;  // isVersionOf GO:0046155
  // Thermal decay of R's catalytic active form MetaII. Rate constant from Xu et al. We assume that the rate constant is independent of the phosphorylation state. See Mitchell DC, Kibelbek J, Litman BJ. (Biochemistry, 1992) for further detail
  v_r7_0: R0 => Ops; ktherm*R0;  // isVersionOf GO:0046155
  // Thermal decay of R's catalytic active form MetaII. Rate constant from Xu et al. We assume that the rate constant is independent of the phosphorylation state. See Mitchell DC, Kibelbek J, Litman BJ. (Biochemistry, 1992) for further detail
  v_r7_1: R1 => Ops; ktherm*R1;  // isVersionOf GO:0046155
  // Thermal decay of R's catalytic active form MetaII. Rate constant from Xu et al. We assume that the rate constant is independent of the phosphorylation state. See Mitchell DC, Kibelbek J, Litman BJ. (Biochemistry, 1992) for further detail
  v_r7_2: R2 => Ops; ktherm*R2;  // isVersionOf GO:0046155
  // Thermal decay of R's catalytic active form MetaII. Rate constant from Xu et al. We assume that the rate constant is independent of the phosphorylation state. See Mitchell DC, Kibelbek J, Litman BJ. (Biochemistry, 1992) for further detail
  v_r7_3: R3 => Ops; ktherm*R3;  // isVersionOf GO:0046155
  // Thermal decay of R's catalytic active form MetaII. Rate constant from Xu et al. We assume that the rate constant is independent of the phosphorylation state. See Mitchell DC, Kibelbek J, Litman BJ. (Biochemistry, 1992) for further detail
  v_r7_4: R4 => Ops; ktherm*R4;  // isVersionOf GO:0046155
  // Thermal decay of R's catalytic active form MetaII. Rate constant from Xu et al. We assume that the rate constant is independent of the phosphorylation state. See Mitchell DC, Kibelbek J, Litman BJ. (Biochemistry, 1992) for further detail
  v_r7_5: R5 => Ops; ktherm*R5;  // isVersionOf GO:0046155
  // Thermal decay of R's catalytic active form MetaII. Rate constant from Xu et al. We assume that the rate constant is independent of the phosphorylation state. See Mitchell DC, Kibelbek J, Litman BJ. (Biochemistry, 1992) for further detail
  v_r7_6: R6 => Ops; ktherm*R6;  // isVersionOf GO:0046155
  // We assume the reverse reaction to occur with the same rate as v_r13_*
  v_r8: Gt + Ops -> Ops_Gt; kOps*Ops*Gt - kG2*Ops_Gt;  // isVersionOf GO:0006461
  // GDP dissociation from Ops_Gt, GDP is taken into account in the rate constant. Here we assume the same kinetics as in reactions v_r14_*
  v_r9: Ops_Gt -> Ops_G; kG3*Ops_Gt - kG4_GDP*Ops_G;
  // GTP binding to Ops_G, GDP is taken into account in the rate constant. We assume the same kinetics as in reactions v_r15_*
  v_r10: Ops_G => Ops_G_GTP; kG5_GTP*Ops_G;  // isVersionOf GO:0005525
  // Ops_G_GTP dissociation to Ops and G_GTP, here G_GTP is the Gt heterotrimer with bound GTP. We assume the same kinetics as in reactions v_r16_*
  v_r11: Ops_G_GTP => G_GTP + Ops; kG6*Ops_G_GTP;  // isVersionOf GO:0043241
  // Similarly to Firsov et al. (2006) we consider the rate of Rho regeneration from Ops + 11cis_ret combination as a first order kinetics with the rate constant kRecyc implicitely including 11cis_ret concentration. See paper for details.
  v_r12: Ops => R; kRrecyc*Ops;  // isVersionOf GO:0016063
  // Rhodopsin and transducin binding
  v_r13_0: Gt + R0 -> R0_Gt; kG1_0*Gt*R0 - kG2*R0_Gt;  // isVersionOf GO:0006461
  // Rhodopsin and transducin binding
  v_r13_1: Gt + R1 -> R1_Gt; kG1_1*Gt*R1 - kG2*R1_Gt;  // isVersionOf GO:0006461
  // Rhodopsin and transducin binding
  v_r13_2: Gt + R2 -> R2_Gt; kG1_2*Gt*R2 - kG2*R2_Gt;  // isVersionOf GO:0006461
  // Rhodopsin and transducin binding
  v_r13_3: Gt + R3 -> R3_Gt; kG1_3*Gt*R3 - kG2*R3_Gt;  // isVersionOf GO:0006461
  // Rhodopsin and transducin binding
  v_r13_4: Gt + R4 -> R4_Gt; kG1_4*Gt*R4 - kG2*R4_Gt;  // isVersionOf GO:0006461
  // Rhodopsin and transducin binding
  v_r13_5: Gt + R5 -> R5_Gt; kG1_5*Gt*R5 - kG2*R5_Gt;  // isVersionOf GO:0006461
  // Rhodopsin and transducin binding
  v_r13_6: Gt + R6 -> R6_Gt; kG1_6*Gt*R6 - kG2*R6_Gt;  // isVersionOf GO:0006461
  // GDP dissociation from Rn_Gt. GDP is taken into account in the rate constant
  v_r14_0: R0_Gt -> R0_G; kG3*R0_Gt - kG4_GDP*R0_G;  // isVersionOf GO:0046154
  // GDP dissociation from Rn_Gt. GDP is taken into account in the rate constant
  v_r14_1: R1_Gt -> R1_G; kG3*R1_Gt - kG4_GDP*R1_G;  // isVersionOf GO:0046154
  // GDP dissociation from Rn_Gt. GDP is taken into account in the rate constant
  v_r14_2: R2_Gt -> R2_G; kG3*R2_Gt - kG4_GDP*R2_G;  // isVersionOf GO:0046154
  // GDP dissociation from Rn_Gt. GDP is taken into account in the rate constant
  v_r14_3: R3_Gt -> R3_G; kG3*R3_Gt - kG4_GDP*R3_G;  // isVersionOf GO:0046154
  // GDP dissociation from Rn_Gt. GDP is taken into account in the rate constant
  v_r14_4: R4_Gt -> R4_G; kG3*R4_Gt - kG4_GDP*R4_G;  // isVersionOf GO:0046154
  // GDP dissociation from Rn_Gt. GDP is taken into account in the rate constant
  v_r14_5: R5_Gt -> R5_G; kG3*R5_Gt - kG4_GDP*R5_G;  // isVersionOf GO:0046154
  // GDP dissociation from Rn_Gt. GDP is taken into account in the rate constant
  v_r14_6: R6_Gt -> R6_G; kG3*R6_Gt - kG4_GDP*R6_G;  // isVersionOf GO:0046154
  // GTP binding to Rn_G. GTP is taken into account in the rate constant. Here G is still a heterotrimer and GTP binds to such heterotrimer_R complex
  v_r15_0: R0_G => R0_G_GTP; kG5_GTP*R0_G;  // isVersionOf GO:0005525
  // GTP binding to Rn_G. GTP is taken into account in the rate constant. Here G is still a heterotrimer and GTP binds to such heterotrimer_R complex
  v_r15_1: R1_G => R1_G_GTP; kG5_GTP*R1_G;  // isVersionOf GO:0005525
  // GTP binding to Rn_G. GTP is taken into account in the rate constant. Here G is still a heterotrimer and GTP binds to such heterotrimer_R complex
  v_r15_2: R2_G => R2_G_GTP; kG5_GTP*R2_G;  // isVersionOf GO:0005525
  // GTP binding to Rn_G. GTP is taken into account in the rate constant. Here G is still a heterotrimer and GTP binds to such heterotrimer_R complex
  v_r15_3: R3_G => R3_G_GTP; kG5_GTP*R3_G;  // isVersionOf GO:0005525
  // GTP binding to Rn_G. GTP is taken into account in the rate constant. Here G is still a heterotrimer and GTP binds to such heterotrimer_R complex
  v_r15_4: R4_G => R4_G_GTP; kG5_GTP*R4_G;  // isVersionOf GO:0005525
  // GTP binding to Rn_G. GTP is taken into account in the rate constant. Here G is still a heterotrimer and GTP binds to such heterotrimer_R complex
  v_r15_5: R5_G => R5_G_GTP; kG5_GTP*R5_G;  // isVersionOf GO:0005525
  // GTP binding to Rn_G. GTP is taken into account in the rate constant. Here G is still a heterotrimer and GTP binds to such heterotrimer_R complex
  v_r15_6: R6_G => R6_G_GTP; kG5_GTP*R6_G;  // isVersionOf GO:0005525
  // Rn_G_GTP dissociation to Rn and G_GTP. Here G_GTP is the Gt heterotrimer with bound GTP
  v_r16_0: R0_G_GTP => G_GTP + R0; kG6*R0_G_GTP;  // isVersionOf GO:0043241
  // Rn_G_GTP dissociation to Rn and G_GTP. Here G_GTP is the Gt heterotrimer with bound GTP
  v_r16_1: R1_G_GTP => G_GTP + R1; kG6*R1_G_GTP;  // isVersionOf GO:0043241
  // Rn_G_GTP dissociation to Rn and G_GTP. Here G_GTP is the Gt heterotrimer with bound GTP
  v_r16_2: R2_G_GTP => G_GTP + R2; kG6*R2_G_GTP;  // isVersionOf GO:0043241
  // Rn_G_GTP dissociation to Rn and G_GTP. Here G_GTP is the Gt heterotrimer with bound GTP
  v_r16_3: R3_G_GTP => G_GTP + R3; kG6*R3_G_GTP;  // isVersionOf GO:0043241
  // Rn_G_GTP dissociation to Rn and G_GTP. Here G_GTP is the Gt heterotrimer with bound GTP
  v_r16_4: R4_G_GTP => G_GTP + R4; kG6*R4_G_GTP;  // isVersionOf GO:0043241
  // Rn_G_GTP dissociation to Rn and G_GTP. Here G_GTP is the Gt heterotrimer with bound GTP
  v_r16_5: R5_G_GTP => G_GTP + R5; kG6*R5_G_GTP;  // isVersionOf GO:0043241
  // Rn_G_GTP dissociation to Rn and G_GTP. Here G_GTP is the Gt heterotrimer with bound GTP
  v_r16_6: R6_G_GTP => G_GTP + R6; kG6*R6_G_GTP;  // isVersionOf GO:0043241
  // Dissociation of trimeric Gt into alpha and beta-gamma subunits
  v_r17: G_GTP => Ga_GTP + Gbg; kG7*G_GTP;  // isVersionOf GO:0007201
  // PDE activation. Here we have the following assumptions on the effector 1) Each PDE subunit may bind Ga_Gtp and become active independently from the other one and with no cooperativity, 2) A PDE hetero-tetramer can hence bind up to 2 different Ga_GTP and thus it works with its in vivo kcat (the reversible reaction is assumed to be possibly present but in this model its rate is set to zero)
  v_r18: Ga_GTP + PDE -> PDE_Ga_GTP; kP1*PDE*Ga_GTP - kP1_rev*PDE_Ga_GTP;  // isVersionOf GO:0006461
  v_r19: PDE_Ga_GTP => PDE_a_Ga_GTP; kP2*PDE_Ga_GTP;  // isVersionOf GO:0031334
  // Here PDE has two Ga bound but only one active subunit
  v_r20: Ga_GTP + PDE_a_Ga_GTP => Ga_GTP_PDE_a_Ga_GTP; kP3*PDE_a_Ga_GTP*Ga_GTP;  // isVersionOf GO:0006461
  // Here PDE has two Ga bound and both its subunits are active
  v_r21: Ga_GTP_PDE_a_Ga_GTP => Ga_GTP_a_PDE_a_Ga_GTP; kP4*Ga_GTP_PDE_a_Ga_GTP;  // isVersionOf GO:0031334
  // RGS binds to a PDE-Ga complex with both active subunits to form a complex
  v_r22: Ga_GTP_a_PDE_a_Ga_GTP + RGS => RGS_Ga_GTP_a_PDE_a_Ga_GTP; kRGS1*RGS*Ga_GTP_a_PDE_a_Ga_GTP;  // isVersionOf GO:0006461
  // One out of two PDE subunits is deactivated and one GTP is hydrolyzed
  v_r23: RGS_Ga_GTP_a_PDE_a_Ga_GTP => Ga_GDP + PDE_a_Ga_GTP + RGS; kRGS2*RGS_Ga_GTP_a_PDE_a_Ga_GTP;  // isVersionOf GO:0043241
  // RGS binds to a PDE-Ga complex with one active subunit to form a complex. Here we assume that the association rate constant is the same as in v_r22
  v_r24: PDE_a_Ga_GTP + RGS => RGS_PDE_a_Ga_GTP; kRGS1*RGS*PDE_a_Ga_GTP;  // isVersionOf GO:0006461
  // The PDE subunit is deactivated and GTP is hydrolyzed. Here we assume that the deactivation/dissociation rate constant is the same as in v_r23
  v_r25: RGS_PDE_a_Ga_GTP => Ga_GDP + PDE + RGS; kRGS2*RGS_PDE_a_Ga_GTP;  // isVersionOf GO:0043241
  // Inactivation of the PDEa complex by Ga's GTPase capability
  v_r26: PDE_a_Ga_GTP => Ga_GDP + PDE; kPDEshutoff*PDE_a_Ga_GTP;  // isVersionOf GO:0006461
  // Inactivation of the aPDEa complex by Ga's GTPase capability; here we assume that the same rate constant as above applies
  v_r27: Ga_GTP_a_PDE_a_Ga_GTP => Ga_GDP + PDE_a_Ga_GTP; kPDEshutoff*Ga_GTP_a_PDE_a_Ga_GTP;  // isVersionOf GO:0043241
  // Here we assume, according to Felber et al. (1996) that Gt may hydrolize GTP to GDP, and hence inactivate
  v_r28: Ga_GTP => Ga_GDP; kGshutoff*Ga_GTP;  // isVersionOf GO:0006184
  // Gt recycling... heterotrimer reconstitution
  v_r29: Ga_GDP + Gbg => Gt; kGrecyc*Gbg*Ga_GDP;  // isVersionOf GO:0032795
  // RK inhibition by Rec_2Ca (Rec_wCa2 is determined using QSSA and not directly)
  v_r30: RK -> Rec_wCa2_RK; kRec3*Rec_wCa2*RK - kRec4*Rec_wCa2_RK;  // modifiers: Ca2_free; isVersionOf GO:0050254
  // Ca2+ association and dissociation from intracellular buffers, with total concentration eT
  v_r31: Ca2_free -> Ca2_buff; k1*(eT - Ca2_buff)*Ca2_free - k2*Ca2_buff;  // isVersionOf GO:0006816
  // Efflux of Ca2+ via the Na+/Ca2+ - K+ exchanger. Note that intracellular Ca2 cannot be lower than Ca2_0
  v_r32: Ca2_free => ; gammaCa*(Ca2_free - Ca2_0);
  // Influx of extracellular Ca2+ through cGMP-gated cation channels
  v_r33: => Ca2_free; 1e6*fCa*Jdark/((2 + fCa)*F*Vcyto)*(cGMP/cGMPdark)^ncg;  // modifiers: cGMP
  // Synthesis by means of Guanylyl cyclase
  v_r34: => cGMP; alfamax/(1 + (Ca2_free/Kc)^m);  // modifiers: Ca2_free
  // Hydrolysis by means of PDE
  v_r35: cGMP => ; (betadark + betasub*E)*cGMP;  // modifiers: Ga_GTP_a_PDE_a_Ga_GTP, PDE_a_Ga_GTP
end
