// SBML level 2 version 4

model MODEL1309160000()
  // Demin2013 - PKPD behaviour - 5-Lipoxygenase inhibitors
  // This model is described in the article:
  // Systems pharmacology models can be used to understand complex pharmacokinetic-pharmacodynamic behavior: an example using 5-lipoxygenase inhibitors.
  // Demin O, Karelina T, Svetlichniy D, Metelkin E, Speshilov G, Demin O Jr, Fairman D, van der Graaf PH, Agoram BM.
  // CPT Pharmacometrics Syst Pharmacol 2013; 2: e74
  // Abstract:
  // Zileuton, a 5-lipoxygenase (5LO) inhibitor, displays complex pharmaokinetic (PK)-pharmacodynamic (PD) behavior. Available clinical data indicate a lack of dose-bronchodilatory response during initial treatment, with a dose response developing after ~1-2 weeks. We developed a quantitative systems pharmacology (QSP) model to understand the mechanism behind this phenomenon. The model described the release, maturation, and trafficking of eosinophils into the airways, leukotriene synthesis by the 5LO enzyme, leukotriene signaling and bronchodilation, and the PK of zileuton. The model provided a plausible explanation for the two-phase bronchodilatory effect of zileuton-the short-term bronchodilation was due to leukotriene inhibition and the long-term bronchodilation was due to inflammatory cell infiltration blockade. The model also indicated that the theoretical maximum bronchodilation of both 5LO inhibition and leukotriene receptor blockade is likely similar. QSP modeling provided interesting insights into the effects of leukotriene modulation.CPT: Pharmacometrics & Systems Pharmacology (2013) 2, e74; doi:10.1038/psp.2013.49; advance online publication 11 September 2013.
  // This model is hosted on BioModels Database and identified by: BIOMD0000000490.
  // To cite BioModels Database, please use: BioModels Database: An enhanced, curated and annotated resource for published quantitative kinetic models.
  // To the extent possible under law, all copyright and related or neighbouring rights to this encoded model have been dedicated to the public domain worldwide. Please refer to CC0 Public Domain Dedication for more information.
  // biomodels.db:MODEL1309160000
  // biomodels.db:BIOMD0000000490
  // isDescribedBy pubmed:24026253
  // isDerivedFrom pubmed:23146124 pubmed:22020181 pubmed:21560018
  // hasTaxon taxonomy:9606
  // isVersionOf GO:0097366 GO:0006954

  // Compartments:
  compartment Default = 1;
  compartment Vd_LTC in Default = 9.48;
  compartment Vd_LTD in Default = 9.48;
  compartment Vd_LTE in Default = 9.48;
  compartment V_B in Default = 2.81;  // isVersionOf BTO:0000131
  compartment V_AW in Default = 0.21;  // isVersionOf BTO:0001660
  compartment Vd_Hn in Default = 78100;
  compartment Vd_IL5 in Default = 10.2;
  compartment V_BM in Default = 0.825;
  compartment Vd_AW_LTC in Default = 1.54;
  compartment Vd_AW_LTD in Default = 1.54;
  compartment Vd_AW_LTE in Default = 1.54;
  compartment Vd_AW_Hn in Default = 5640;
  compartment Vd_ZF in Default = 9.45;
  compartment Vd_AW_ZF in Default = 3.26;
  compartment Vd_ML in Default = 10;

  // Species:
  species AA_b in Default = 0.2890944;  // isVersionOf CHEBI:15843; occursIn BTO:0000131
  species HPETE_b in Default = 0.2965837;  // isVersionOf pubchem.compound:5280778; occursIn BTO:0000131
  species HETE_b in Default = 5.037703;  // isVersionOf pubchem.compound:5280733; occursIn BTO:0000131
  species LTA4_b in Default = 1.081167;  // isVersionOf pubchem.compound:5280383; occursIn BTO:0000131
  species LTC4_b in Default = 0.8869873;  // isVersionOf pubchem.compound:5280493; occursIn BTO:0000131
  species LTC4_b_out in Vd_LTC = 2168.571;  // isVersionOf pubchem.compound:5280493
  species LTD4_b in Vd_LTD = 1308.488;  // isVersionOf pubchem.compound:6435286
  species LTE4_b in Vd_LTE = 2053.137;  // isVersionOf pubchem.compound:5280879
  species EO_b in V_B = 4.68114e-7;  // occursIn BTO:0000131; isVersionOf CL:0000771
  species EO_i_b in V_B = 5.479176e-8;  // occursIn BTO:0000131; isVersionOf CL:0000771
  species EO_a_b in V_B = 0.0005383185;  // occursIn BTO:0000131; isVersionOf CL:0000771
  species EO_i_aw in V_AW = 1.358698e-7;  // occursIn BTO:0001660; isVersionOf CL:0000771
  species EO_a_aw in V_AW = 0.001358713;  // occursIn BTO:0001660; isVersionOf CL:0000771
  species EO_aw in V_AW = 1.176558e-6;  // occursIn BTO:0001660; isVersionOf CL:0000771
  species Hn_b in Vd_Hn = 14995.88;  // isVersionOf CHEBI:18295; occursIn BTO:0000131
  species IL_b in Vd_IL5 = 0.5994857;  // isVersionOf uniprot:P05113; occursIn BTO:0000131
  species IL_bm in V_BM = 0.4023394;  // isVersionOf uniprot:P05113; occursIn BTO:0000141
  species EO_bm in V_BM = 1.637391e-6;  // isVersionOf CL:0000771; occursIn BTO:0000141
  species AA_aw in Default = 0.1304887;  // isVersionOf CHEBI:15843; occursIn BTO:0001660
  species HPETE_aw in Default = 1.780604;  // isVersionOf pubchem.compound:5280778; occursIn BTO:0001660
  species HETE_aw in Default = 1.960926;  // isVersionOf pubchem.compound:5280733; occursIn BTO:0001660
  species LTA4_aw in Default = 41.69257;  // isVersionOf pubchem.compound:5280383; occursIn BTO:0001660
  species LTC4_aw in Default = 6.806687;  // isVersionOf pubchem.compound:5280493; occursIn BTO:0001660
  species LTC4_aw_out in Vd_AW_LTC = 359.9744;  // isVersionOf pubchem.compound:5280493
  species LTD4_aw in Vd_AW_LTD = 205.7602;  // occursIn BTO:0001660; isVersionOf pubchem.compound:6435286
  species LTE4_aw in Vd_AW_LTE = 322.6366;  // isVersionOf pubchem.compound:5280879; occursIn BTO:0001660
  species Hn_aw in Vd_AW_Hn = 14162.15;  // occursIn BTO:0001660; isVersionOf CHEBI:18295
  species IL_aw in V_AW = 0.6627439;  // isVersionOf uniprot:P05113; occursIn BTO:0001660
  species ZF_intes in Default = 0;  // isVersionOf CHEBI:10112; occursIn BTO:0000648
  species ZF_blood in Vd_ZF = 0;  // isVersionOf CHEBI:10112; occursIn BTO:0001660
  species ZF_airways in Vd_AW_ZF = 0;  // isVersionOf CHEBI:10112; occursIn BTO:0001660
  species ML_intes in Default = 0;  // isVersionOf CHEBI:50730; occursIn BTO:0000648
  species ML_blood in Vd_ML = 0;  // isVersionOf CHEBI:50730; occursIn BTO:0000131

  // Parameters:
  Ca = 1;
  Ca_FEV_ex = 10000;
  Cao_FEV = 10000;
  DOSE_ml = 0;
  DOSE_zf = 0;
  EC50_ML_FEV = 500;
  EC50_act = 0.75;
  EC50_migr = 0.115;
  Et_LTCs = 1;
  FLOa = 1.5;
  F_ml = 0.660688;
  F_zf = 0.082;
  GPx = 1.6;
  GSH_aw = 1000;
  GSH_b = 5000;
  GS_pool_aw = 10000;
  GS_pool_b = 10000;
  HEDH5 = 0.5;
  J_AW_lymfl = 0.00115;
  J_BM_lymfl = 0.00049;
  K_AA = 10.74959;
  K_Ca2 = 14.36738;
  K_Ca3 = 7116.527;
  K_Ca_FEV = 150000;
  K_GSH = 744.9176;
  K_LTA = 1.75951;
  K_LTA_GSH = 1696.6;
  K_LTC = 0.1951215;
  K_PLA2_Ca = 0.1;
  Kd12 = 0.007;
  Kd50 = 0.43;
  KdZ = 20;
  Kd_Hn_FEV = 6300000;
  Kd_IL_migr = 50;
  Kd_LT = 1000;
  Kd_LTE_migr = 50000;
  Kd_LTR1_FEV = 1000;
  Kd_LTR2_FEV = 10000;
  Kd_LT_2 = 10000;
  Kd_gpx_GSSG = 0.07154222;
  Kd_gpx_HETE5 = 6.043446;
  Kd_hedh_HETE5 = 0.331696;
  Kd_hedh_NADP = 2.895899;
  Kd_hedh_NADPH = 2.685581;
  Kd_hedh_oxoETE5 = 1.667019;
  Ke_ox = 99.99979;
  Ke_red = 5.761955e-7;
  Ki_AA = 551.8748;
  Ki_HETE = 0.5408177;
  Ki_ML_EOa = 500;
  Km_1 = 2;
  Km_CoA_AA = 0.005;
  Km_PLA2_APC = 20;
  Km_gpx_GSH = 600;
  Km_gpx_HPETE5 = 5.974381;
  Kp_Hn_AW = 3950;
  Kp_LTC_AW = 0.22;
  Kp_LTD_AW = 0.22;
  Kp_LTE_AW = 0.22;
  Kp_ZF_AW = 0.204;
  Kp_ZF_IW = 0.631;
  LOH_aw = 0;
  LOH_b = 0;
  LOOH_aw = 20;
  LOOH_b = 1;
  MAX_FEV = 4.94;
  ML_airways = 0;
  ML_ex = 0;
  M_Hn = 111.2;
  M_IL5 = 45000;
  M_LTC = 625.8;
  M_LTD = 496.7;
  M_LTE = 439.6;
  M_ML = 586.18;
  M_ZF = 236;
  NADP_aw = 2900;
  NADP_b = 2000;
  NP_pool_aw = 3000;
  NP_pool_b = 3000;
  N_A_pmole = 602000000000;
  OL_b_ex = 0;
  PL = 110;
  Q_AW_blf = 5.23;
  R1_portion_EOa = 0.39;
  R1_portion_FEV = 0.016;
  R2_portion_FEV = 0.037;
  R_FEV = 3.007;
  R_Hn_AW = 5130;
  R_Hn_B = 141;
  R_LTC_AW = 1.4;
  R_LTC_B = 0.538;
  R_LTD_AW = 1.4;
  R_LTD_B = 0.538;
  R_LTE_AW = 1.4;
  R_LTE_B = 0.538;
  R_ZF_AW = 2.96;
  R_ZF_B = 0.533;
  R_in_relax_FEV = 2.073;
  T = 1440;
  TSN_0 = 15.5;
  V_CoA = 350;
  Vmax_PLA2 = 450;
  a = 1;
  al = 1;
  ca = 10;
  diam_EO = 0.00012;
  fup_Hn = 0.77;
  fup_LT = 0.16;
  fup_ML = 0.004;
  fup_ZF = 0.069;
  h_act = 3;
  h_matur = 1;
  h_migr = 3;
  k1 = 1e-6;
  k1_min = 1.6e-7;
  k3 = 34;
  k_3 = 263640;
  k_EO_a_d = 0.00015;
  k_EO_d = 0.0003;
  k_EO_m = 10;
  k_EO_t_baw = 0.04;
  k_EO_t_bmb = 0.02;
  k_Hn_d = 0.033;
  k_Hn_p = 18000000000;
  k_IL_d = 0.0046;
  k_IL_p = 16;
  k_IL_t_awb = 0.05;
  k_IL_t_bbm = 0.001;
  k_LTCs_back = 1003.709;
  k_LTCs_fow = 1068016;
  k_abs_ml = 0.012;
  k_abs_zf = 0.018;
  k_acet = 0.002703885;
  k_dp = 0.067;
  k_elim_ml = 0.00225;
  k_elim_zf = 0.004;
  k_fev_eff = 3000000;
  k_ggt = 0.1;
  k_gpx_cat = 0.4884995;
  k_hedh_1 = 88.33768;
  k_hedh_2 = 1724.404;
  k_hedh_3 = 31.49749;
  k_hedh_4 = 8.077531;
  k_lo = 4642.68;
  k_lta_syn = 54420;
  k_ltc_ltd_el = 0.1;
  k_lte_el = 0.04;
  k_ox = 0.0002658;
  k_ox2 = 67.2;
  k_red = 0.0002538;
  k_red2 = 4.428e-5;
  ka = 500;
  ki = 25000;
  kia = 0.001;
  n_FEV = 1;
  naEO_LTCsyn = 0;
  npi = 3.14;
  oral = 1;
  oxoETE_aw = 0;
  oxoETE_b = 0;
  portion_migr = 0.3;
  zf_inh = 0;

  // Assignment rules:
  ft_zf := ceil(time/T) + ceil((time - 3.6e2)/T) + ceil((time - 6.6e2)/T) + ceil((time - 9.6e2)/T);
  ft_ml := ceil(time/T);
  ZF_blood_conc := fup_ZF*ZF_blood;
  ZF_airways_conc := ZF_airways;
  ML_blood_conc := fup_ML*ML_blood;
  ML_airways_conc := fup_ML*ML_blood;
  w_EO := npi*diam_EO^3/6;
  V_CB := (EO_a_b + EO_b + EO_i_b)*N_A_pmole*w_EO*V_B;
  V_aCB := EO_a_b*N_A_pmole*w_EO*V_B;
  V_LTC_CB := (naEO_LTCsyn*(EO_b + EO_i_b) + EO_a_b)*N_A_pmole*w_EO*V_B;
  V_CAW := (EO_a_aw + EO_aw + EO_i_aw)*N_A_pmole*w_EO*V_AW;
  V_aCAW := EO_a_aw*N_A_pmole*w_EO*V_AW;
  V_LTC_CAW := (naEO_LTCsyn*(EO_aw + EO_i_aw) + EO_a_aw)*N_A_pmole*w_EO*V_AW;
  GSSG_b := (GS_pool_b - GSH_b)/2;
  NADPH_b := NP_pool_b - NADP_b;
  PLA2_D := 1 + Ca/K_PLA2_Ca;
  PLA2_Ca := Ca/K_PLA2_Ca/PLA2_D;
  Ki_AA_AA := Ki_AA;
  K_AA_HETE := Ki_HETE;
  Ki_HPETE_AA := Ki_AA;
  OOH_b := HPETE_b + LOOH_b;
  OH_b := HETE_b + LOH_b;
  r1 := k_ox + k_ox2*Ca/K_Ca2;
  r2 := k_red + k_red2*Ca/K_Ca2;
  REDOX_b := (r2/Ke_red + r1*OH_b/Ke_ox + al*ki*ZF_blood_conc/KdZ*(1 + Ca/K_Ca3))/(r2 + r1*OOH_b);
  RELFLO5_b := (k_lo*AA_b/K_AA + k3*HPETE_b*(1 + AA_b/Ki_AA))/(k_lta_syn + k_3*(1 + AA_b/Ki_HPETE_AA));
  DFLOa_b := (1 + Ca/K_Ca3)*(1 + REDOX_b*(1 + Ca/K_Ca2)/(1 + Ca/K_Ca3) + AA_b/K_AA*(1 + AA_b/Ki_AA_AA) + AA_b/Ki_AA*(1 + HETE_b/K_AA_HETE) + RELFLO5_b*(1 + AA_b/Ki_HPETE_AA) + HETE_b/Ki_HETE + al*ZF_blood_conc/KdZ);
  FLO3_b := FLOa/DFLOa_b;
  FLO2_b := FLO3_b*REDOX_b;
  FLO3t_b := FLO3_b*(1 + Ca/K_Ca3);
  FLO2t_b := FLO2_b*(1 + Ca/K_Ca2);
  FLO5HP_b := FLO3t_b*RELFLO5_b;
  C_b := HPETE_b*GSH_b*GSH_b/(Km_gpx_HPETE5*Km_gpx_GSH*Km_gpx_GSH);
  A_b := GSH_b*GSH_b/(Km_gpx_GSH*Km_gpx_GSH)*(1 + GSSG_b/Kd_gpx_GSSG) + HPETE_b/Km_gpx_HPETE5*(1 + HETE_b/Kd_gpx_HETE5) + C_b;
  B_b := k_gpx_cat*HPETE_b*GSH_b*GSH_b/(Km_gpx_HPETE5*Km_gpx_GSH*Km_gpx_GSH);
  delta_LTCs_b := 1 + LTA4_b/K_LTA + GSH_b/K_GSH + LTA4_b*GSH_b/K_LTA/K_LTA_GSH + LTC4_b/K_LTC;
  nom_LTCs_b := Et_LTCs*(K_LTC*k_LTCs_fow*LTA4_b*GSH_b - k_LTCs_back*K_LTA_GSH*K_GSH*LTC4_b);
  den_LTCs_b := delta_LTCs_b*K_LTA_GSH*K_GSH*K_LTC;
  C_hedh_b := (1 + HETE_b/Kd_hedh_HETE5 + NADPH_b/Kd_hedh_NADPH)*(k_hedh_3*oxoETE_b/Kd_hedh_oxoETE5 + k_hedh_2*NADP_b/Kd_hedh_NADP);
  A_hedh_b := (1 + NADP_b/Kd_hedh_NADP + oxoETE_b/Kd_hedh_oxoETE5)*(k_hedh_1*HETE_b/Kd_hedh_HETE5 + k_hedh_4*NADPH_b/Kd_hedh_NADPH) + C_hedh_b;
  B_hedh_b := k_hedh_1*k_hedh_2*HETE_b*NADP_b/(Kd_hedh_HETE5*Kd_hedh_NADP) - oxoETE_b*NADPH_b*k_hedh_3*k_hedh_4/(Kd_hedh_oxoETE5*Kd_hedh_NADPH);
  GSSG_aw := (GS_pool_aw - GSH_aw)/2;
  NADPH_aw := NP_pool_aw - NADP_aw;
  OOH_aw := HPETE_aw + LOOH_aw;
  OH_aw := HETE_aw + LOH_aw;
  REDOX_aw := (r2/Ke_red + r1*OH_aw/Ke_ox + al*ki*ZF_airways_conc/KdZ*(1 + Ca/K_Ca3))/(r2 + r1*OOH_aw);
  RELFLO5_aw := (k_lo*AA_aw/K_AA + k3*HPETE_aw*(1 + AA_aw/Ki_AA))/(k_lta_syn + k_3*(1 + AA_aw/Ki_HPETE_AA));
  DFLOa_aw := (1 + Ca/K_Ca3)*(1 + REDOX_aw*(1 + Ca/K_Ca2)/(1 + Ca/K_Ca3) + AA_aw/K_AA*(1 + AA_aw/Ki_AA_AA) + AA_aw/Ki_AA*(1 + HETE_aw/K_AA_HETE) + RELFLO5_aw*(1 + AA_aw/Ki_HPETE_AA) + HETE_aw/Ki_HETE + al*ZF_airways_conc/KdZ);
  FLO3_aw := FLOa/DFLOa_aw;
  FLO2_aw := FLO3_aw*REDOX_aw;
  FLO3t_aw := FLO3_aw*(1 + Ca/K_Ca3);
  FLO2t_aw := FLO2_aw*(1 + Ca/K_Ca2);
  FLO5HP_aw := FLO3t_aw*RELFLO5_aw;
  C_aw := HPETE_aw*GSH_aw*GSH_aw/(Km_gpx_HPETE5*Km_gpx_GSH*Km_gpx_GSH);
  A_aw := GSH_aw*GSH_aw/(Km_gpx_GSH*Km_gpx_GSH)*(1 + GSSG_aw/Kd_gpx_GSSG) + HPETE_aw/Km_gpx_HPETE5*(1 + HETE_aw/Kd_gpx_HETE5) + C_aw;
  B_aw := k_gpx_cat*HPETE_aw*GSH_aw*GSH_aw/(Km_gpx_HPETE5*Km_gpx_GSH*Km_gpx_GSH);
  delta_LTCs_aw := 1 + LTA4_aw/K_LTA + GSH_aw/K_GSH + LTA4_aw*GSH_aw/K_LTA/K_LTA_GSH + LTC4_aw/K_LTC;
  nom_LTCs_aw := Et_LTCs*(K_LTC*k_LTCs_fow*LTA4_aw*GSH_aw - k_LTCs_back*K_LTA_GSH*K_GSH*LTC4_aw);
  den_LTCs_aw := delta_LTCs_aw*K_LTA_GSH*K_GSH*K_LTC;
  C_hedh_aw := (1 + HETE_aw/Kd_hedh_HETE5 + NADPH_aw/Kd_hedh_NADPH)*(k_hedh_3*oxoETE_aw/Kd_hedh_oxoETE5 + k_hedh_2*NADP_aw/Kd_hedh_NADP);
  A_hedh_aw := (1 + NADP_aw/Kd_hedh_NADP + oxoETE_aw/Kd_hedh_oxoETE5)*(k_hedh_1*HETE_aw/Kd_hedh_HETE5 + k_hedh_4*NADPH_aw/Kd_hedh_NADPH) + C_hedh_aw;
  B_hedh_aw := k_hedh_1*k_hedh_2*HETE_aw*NADP_aw/(Kd_hedh_HETE5*Kd_hedh_NADP) - oxoETE_aw*NADPH_aw*k_hedh_3*k_hedh_4/(Kd_hedh_oxoETE5*Kd_hedh_NADPH);
  OL_b := R1_portion_EOa*(fup_LT*LTD4_b/Kd_LT)/(1 + fup_LT*LTD4_b/Kd_LT + ML_blood_conc/Ki_ML_EOa) + (1 - R1_portion_EOa)*(fup_LT*(LTC4_b_out + LTD4_b)/Kd_LT_2)/(1 + fup_LT*(LTC4_b_out + LTD4_b)/Kd_LT_2);
  OL_aw := R1_portion_EOa*(LTD4_aw/Kd_LT)/(1 + LTD4_aw/Kd_LT + ML_airways_conc/Ki_ML_EOa) + (1 - R1_portion_EOa)*((LTC4_aw_out + LTD4_aw)/Kd_LT_2)/(1 + (LTC4_aw_out + LTD4_aw)/Kd_LT_2);
  Rec_occup_migr := portion_migr*fup_LT*LTE4_b/(Kd_LTE_migr + fup_LT*LTE4_b) + (1 - portion_migr)*IL_b/(Kd_IL_migr + IL_b);
  Ca_FEV := Cao_FEV + k_fev_eff*(R1_portion_FEV*(LTD4_aw/Kd_LTR1_FEV)/(1 + LTD4_aw/Kd_LTR1_FEV + ML_airways_conc/EC50_ML_FEV) + R2_portion_FEV*((LTD4_aw + LTC4_aw_out)/Kd_LTR2_FEV)/(1 + (LTD4_aw + LTC4_aw_out)/Kd_LTR2_FEV) + (1 - R1_portion_FEV - R2_portion_FEV)*(Hn_aw/Kd_Hn_FEV)/(1 + Hn_aw/Kd_Hn_FEV));
  r_out_FEV := R_FEV - (R_FEV - (R_FEV*(R_FEV - R_in_relax_FEV)^2)^(1/3))*Ca_FEV^n_FEV/(K_Ca_FEV^n_FEV + Ca_FEV^n_FEV);
  r_in_FEV := r_out_FEV - (R_FEV - R_in_relax_FEV)*(R_FEV/r_out_FEV)^5e-1;
  FEV1 := MAX_FEV*(r_in_FEV/R_in_relax_FEV)^2;
  TSN := TSN_0*(R_FEV - (R_FEV*(R_FEV - R_in_relax_FEV)^2)^(1/3))*Ca_FEV_ex^n_FEV/(K_Ca_FEV^n_FEV + Ca_FEV_ex^n_FEV);
  TSN_Hn := TSN_0*(R_FEV - (R_FEV*(R_FEV - R_in_relax_FEV)^2)^(1/3))*Ca_FEV^n_FEV/(K_Ca_FEV^n_FEV + Ca_FEV^n_FEV);
  FEV1_percent := (FEV1 - 3.528)/3.528*1e2;
  time_hour := time/6e1;
  time_day := time/1.44e3;
  N_EO_bm := EO_bm*6.02*1e1^8;
  N_EO_b := EO_b*6.02*1e1^8;
  N_EO_i_b := EO_i_b*6.02*1e1^8;
  N_EO_a_b := EO_a_b*6.02*1e1^8;
  EO_b_tot := EO_b + EO_i_b + EO_a_b;
  N_EO_b_tot := (EO_b + EO_i_b + EO_a_b)*6.02*1e1^8;
  N_EO_aw := EO_aw*6.02*1e1^8;
  N_EO_i_aw := EO_i_aw*6.02*1e1^8;
  N_EO_a_aw := EO_a_aw*6.02*1e1^8;
  EO_aw_tot := EO_aw + EO_i_aw + EO_a_aw;
  N_EO_aw_tot := (EO_aw + EO_i_aw + EO_a_aw)*6.02*1e1^8;
  EO_b_tot_per_ss := 1e2*(EO_b_tot - 5.33e-4)/5.33e-4;
  N_EO_aw_tot_perc := N_EO_aw_tot/8.18735e5*1e2;
  N_EO_b_tot_perc := N_EO_b_tot/4.266021e6*1e2;
  N_EO := (N_EO_b_tot*V_B + N_EO_aw_tot*V_AW)/(V_B + V_AW);
  N_EO_a := (N_EO_a_b*V_B + N_EO_a_aw*V_AW)/(V_B + V_AW);
  LTC4_b_pM := LTC4_b*1e6;
  LTs_aw_pg := (LTC4_aw_out/fup_LT*M_LTC + LTD4_aw/fup_LT*M_LTD + LTE4_aw/fup_LT*M_LTE)/1e3;
  LTD4_b_free := LTD4_b*fup_LT;
  ML_uM := ML_blood/1e6;
  LTD4_aw_pers := 1e2*LTD4_aw/2.0576e2;
  N_EO_perc := 1e2*N_EO/3.58758e5;
  Hn_aw_perc := 1e2*Hn_aw/1.4162e4;
  N_EO_aw_perc := 1e2*N_EO_aw_tot/8.18735e5;
  Ca_FEV_LTR1 := k_fev_eff*(R1_portion_FEV*(LTD4_aw/Kd_LTR1_FEV)/(1 + LTD4_aw/Kd_LTR1_FEV + ML_airways_conc/EC50_ML_FEV))/(Ca_FEV - Cao_FEV);
  Ca_FEV_LTR2 := k_fev_eff*(R2_portion_FEV*((LTD4_aw + LTC4_aw_out)/Kd_LTR2_FEV)/(1 + (LTD4_aw + LTC4_aw_out)/Kd_LTR2_FEV) + (1 - R1_portion_FEV - R2_portion_FEV)*(Hn_aw/Kd_Hn_FEV)/(1 + Hn_aw/Kd_Hn_FEV))/(Ca_FEV - Cao_FEV);
  OL_ASM := R1_portion_FEV*(LTD4_aw/Kd_LTR1_FEV)/(1 + LTD4_aw/Kd_LTR1_FEV + ML_airways_conc/EC50_ML_FEV) + R2_portion_FEV*((LTD4_aw + LTC4_aw_out)/Kd_LTR2_FEV)/(1 + (LTD4_aw + LTC4_aw_out)/Kd_LTR2_FEV) + (1 - R1_portion_FEV - R2_portion_FEV)*(Hn_aw/Kd_Hn_FEV)/(1 + Hn_aw/Kd_Hn_FEV);

  // Reactions:
  v1: => AA_b; Default*(Vmax_PLA2*PLA2_Ca*PL/(Km_PLA2_APC + PL) - V_CoA*AA_b/(Km_CoA_AA + AA_b));  // fast
  v2: AA_b => ; Default*(k_lo*AA_b*FLO3t_b/K_AA);  // fast
  v3: => HPETE_b; Default*(k_3*FLO5HP_b - k3*FLO3t_b*HPETE_b)*(1 + AA_b/Ki_AA);  // modifiers: AA_b; fast
  v4: HPETE_b => HETE_b; Default*r1*(HPETE_b*FLO2_b - HETE_b*FLO3_b/Ke_ox);  // fast
  v5: HPETE_b => HETE_b; Default*(GPx*B_b/A_b);  // fast
  v6: => LTA4_b; Default*k_lta_syn*FLO5HP_b;  // fast
  v7: LTA4_b => LTC4_b; Default*(nom_LTCs_b/den_LTCs_b);  // fast
  v8: HETE_b => ; Default*(HEDH5*B_hedh_b/A_hedh_b);  // fast
  v9: LTA4_b => ; Default*Kd12*LTA4_b;  // fast
  v10in: LTC4_b => ; Default*Kd50*LTC4_b;  // fast
  v10out: => LTC4_b_out; Default*Kd50*LTC4_b*V_LTC_CB*1e1^6;  // modifiers: LTC4_b; fast
  v11: LTC4_b_out => LTD4_b; Vd_LTC*k_ggt*fup_LT*LTC4_b_out;  // fast
  v12: LTD4_b => LTE4_b; Vd_LTD*k_dp*fup_LT*LTD4_b;  // fast
  v13: LTC4_b_out => ; Vd_LTC*k_ltc_ltd_el*fup_LT*LTC4_b_out;  // fast
  v14: LTD4_b => ; Vd_LTD*k_ltc_ltd_el*fup_LT*LTD4_b;  // fast
  v15: LTE4_b => ; Vd_LTE*(k_lte_el + k_acet)*fup_LT*LTE4_b;  // fast
  v16: EO_b => EO_i_b; ca*V_B*(ka*EO_b*OL_b^h_act/(EC50_act^h_act + OL_b^h_act));  // fast
  v17: EO_i_b => EO_a_b; ca*V_B*k_EO_m*EO_i_b;  // fast
  v18: EO_a_b => EO_b; ca*V_B*kia*EO_a_b;  // fast
  v19: EO_b => ; V_B*k_EO_d*EO_b;  // fast
  v20: EO_a_b => ; V_B*k_EO_a_d*EO_a_b;  // fast
  v21: EO_i_b => EO_i_aw; V_B*(k_EO_t_baw*EO_i_b*Rec_occup_migr^h_migr/(EC50_migr^h_migr + Rec_occup_migr^h_migr));  // fast
  v22: EO_a_b => EO_a_aw; V_B*(k_EO_t_baw*EO_a_b*Rec_occup_migr^h_migr/(EC50_migr^h_migr + Rec_occup_migr^h_migr));  // fast
  v23: EO_b => EO_aw; V_B*(k_EO_t_baw*EO_b*Rec_occup_migr^h_migr/(EC50_migr^h_migr + Rec_occup_migr^h_migr));  // fast
  v24: => Hn_b; V_B*k_Hn_p*(EO_b + EO_i_b + EO_a_b);  // modifiers: EO_b, EO_i_b, EO_a_b; fast
  v25: Hn_b => ; Vd_Hn*k_Hn_d*fup_Hn*Hn_b;  // fast
  v26: => IL_b; V_B*k_IL_p*EO_a_b;  // modifiers: EO_a_b; fast
  v27: IL_b => ; Vd_IL5*k_IL_d*IL_b;  // fast
  v28: IL_b => IL_bm; k_IL_t_bbm*(IL_b - IL_bm) - J_BM_lymfl*IL_bm;  // fast
  v29: => EO_bm; V_BM*(k1*IL_bm^h_matur/(Km_1^h_matur + IL_bm^h_matur) + k1_min);  // modifiers: IL_bm; fast
  v30: EO_bm => EO_b; ca*V_BM*k_EO_t_bmb*EO_bm;  // fast
  v31: => AA_aw; Default*(Vmax_PLA2*PLA2_Ca*PL/(Km_PLA2_APC + PL) - V_CoA*AA_aw/(Km_CoA_AA + AA_aw));  // fast
  v32: AA_aw => ; Default*(k_lo*AA_aw*FLO3t_aw/K_AA);  // fast
  v33: => HPETE_aw; Default*(k_3*FLO5HP_aw - k3*FLO3t_aw*HPETE_aw)*(1 + AA_aw/Ki_AA);  // modifiers: AA_aw; fast
  v34: HPETE_aw => HETE_aw; Default*r1*(HPETE_aw*FLO2_aw - HETE_aw*FLO3_aw/Ke_ox);  // fast
  v35: HPETE_aw => HETE_aw; Default*(GPx*B_aw/A_aw);  // fast
  v36: => LTA4_aw; Default*k_lta_syn*FLO5HP_aw;  // fast
  v37: LTA4_aw => LTC4_aw; Default*(nom_LTCs_aw/den_LTCs_aw);  // fast
  v38: HETE_aw => ; Default*(HEDH5*B_hedh_aw/A_hedh_aw);  // fast
  v39: LTA4_aw => ; Default*Kd12*LTA4_aw;  // fast
  v40in: LTC4_aw => ; Default*Kd50*LTC4_aw;  // fast
  v40out: => LTC4_aw_out; Default*Kd50*LTC4_aw*V_LTC_CAW*1e1^6;  // modifiers: LTC4_aw; fast
  v41: LTC4_aw_out => LTD4_aw; Vd_AW_LTC*k_ggt*LTC4_aw_out;  // fast
  v42: LTD4_aw => LTE4_aw; Vd_AW_LTD*k_dp*LTD4_aw;  // fast
  v43: LTE4_aw => LTE4_b; Q_AW_blf*R_LTE_B*(LTE4_aw*R_LTE_AW/Kp_LTE_AW - LTE4_b);  // fast
  v44: LTD4_aw => LTD4_b; Q_AW_blf*R_LTD_B*(LTD4_aw*R_LTD_AW/Kp_LTD_AW - LTD4_b);  // fast
  v45: LTC4_aw_out => LTC4_b_out; Q_AW_blf*R_LTC_B*(LTC4_aw_out*R_LTC_AW/Kp_LTC_AW - LTC4_b_out);  // fast
  v46: EO_aw => EO_i_aw; ca*V_AW*(ka*EO_aw*OL_aw^h_act/(EC50_act^h_act + OL_aw^h_act));  // fast
  v47: EO_i_aw => EO_a_aw; ca*V_AW*k_EO_m*EO_i_aw;  // fast
  v48: EO_a_aw => EO_aw; ca*V_AW*kia*EO_a_aw;  // fast
  v49: EO_aw => ; V_AW*k_EO_d*EO_aw;  // fast
  v50: EO_a_aw => ; V_AW*k_EO_a_d*EO_a_aw;  // fast
  v51: => Hn_aw; V_AW*k_Hn_p*(EO_a_aw + EO_i_aw + EO_aw);  // modifiers: EO_a_aw, EO_i_aw, EO_aw; fast
  v52: Hn_aw => Hn_b; Q_AW_blf*R_Hn_B*(Hn_aw*R_Hn_AW/Kp_Hn_AW - Hn_b);  // fast
  v53: => IL_aw; V_AW*k_IL_p*EO_a_aw;  // modifiers: EO_a_aw; fast
  v54: IL_aw => IL_b; k_IL_t_awb*(IL_aw - IL_b) + J_AW_lymfl*IL_aw;  // fast
  v55: LTE4_aw => ; Vd_AW_LTE*(k_lte_el + k_acet)*LTE4_aw;  // fast
  v56: LTD4_aw => ; Vd_AW_LTD*k_ltc_ltd_el*LTD4_aw;  // fast
  v57: LTC4_aw_out => ; Vd_AW_LTC*k_ltc_ltd_el*LTC4_aw_out;  // fast
  v58: IL_aw => ; V_AW*k_IL_d*IL_aw;  // fast
  v59: Hn_aw => ; Vd_AW_Hn*k_Hn_d*Hn_aw;  // fast
  v60: ZF_intes => ZF_blood; Default*k_abs_zf*(ZF_intes + oral*F_zf*(a*ft_zf + (1 - a))*DOSE_zf*1e3/M_ZF);  // fast
  v61: ZF_blood => ZF_airways; Q_AW_blf*R_ZF_B*(ZF_blood - ZF_airways*R_ZF_AW/Kp_ZF_AW);  // fast
  v62: ZF_blood => ; Vd_ZF*k_elim_zf*ZF_blood;  // fast
  v63: ML_intes => ML_blood; Default*k_abs_ml*(ML_intes + oral*F_ml*(a*ft_ml + (1 - a))*DOSE_ml*1e9/M_ML);  // fast
  v64: ML_blood => ; Vd_ML*k_elim_ml*ML_blood;  // fast
end
