// SBML level 2 version 4

model MODEL1501300000()
  // Nishio2008 - Design of the phosphotransferase system for enhanced glucose uptake in E. coli.
  // This model is described in the article:
  // Computer-aided rational design of the phosphotransferase system for enhanced glucose uptake in Escherichia coli.
  // Nishio Y, Usuda Y, Matsui K, Kurata H.
  // Mol. Syst. Biol. 2008; 4: 160
  // Abstract:
  // The phosphotransferase system (PTS) is the sugar transportation machinery that is widely distributed in prokaryotes and is critical for enhanced production of useful metabolites. To increase the glucose uptake rate, we propose a rational strategy for designing the molecular architecture of the Escherichia coli glucose PTS by using a computer-aided design (CAD) system and verified the simulated results with biological experiments. CAD supports construction of a biochemical map, mathematical modeling, simulation, and system analysis. Assuming that the PTS aims at controlling the glucose uptake rate, the PTS was decomposed into hierarchical modules, functional and flux modules, and the effect of changes in gene expression on the glucose uptake rate was simulated to make a rational strategy of how the gene regulatory network is engineered. Such design and analysis predicted that the mlc knockout mutant with ptsI gene overexpression would greatly increase the specific glucose uptake rate. By using biological experiments, we validated the prediction and the presented strategy, thereby enhancing the specific glucose uptake rate.
  // This model is hosted on BioModels Database and identified by: BIOMD0000000571.
  // To cite BioModels Database, please use: BioModels Database: An enhanced, curated and annotated resource for published quantitative kinetic models.
  // To the extent possible under law, all copyright and related or neighbouring rights to this encoded model have been dedicated to the public domain worldwide. Please refer to CC0 Public Domain Dedication for more information.
  // biomodels.db:MODEL1501300000
  // biomodels.db:BIOMD0000000571
  // isDescribedBy pubmed:18197177
  // isDerivedFrom biomodels.db:BIOMD0000000051
  // hasTaxon taxonomy:83333
  // isVersionOf GO:0008982

  // Compartments:
  compartment cyt = 1;  // GO:0005737

  // Species:
  species CRP in cyt = 5.4207e-6;  // uniprot:P0ACJ8
  species CRPsiteI_crp in cyt = 7.4368e-11;  // isVersionOf uniprot:P0ACJ8
  species CRPsiteII_crp in cyt = 1.9047e-10;  // isVersionOf uniprot:P0ACJ8
  species CRPsite_cyaA in cyt = 3.1103e-11;  // isVersionOf uniprot:P0ACJ8; isPartOf uniprot:P00936
  species CRPsite_genome in cyt = 3.6756e-9;  // isVersionOf uniprot:P0ACJ8
  species CRPsite_ptsGp1 in cyt = 1.2021e-10;  // isVersionOf uniprot:P0ACJ8; hasPart uniprot:C3TDU2
  species CRPsite_ptsGp2 in cyt = 1.2021e-10;  // isVersionOf uniprot:P0ACJ8; hasPart uniprot:C3TDU2
  species CRPsite_ptsHp0 in cyt = 1.2021e-10;  // isVersionOf uniprot:P0ACJ8; hasPart uniprot:P0AA04
  species CRPsite_ptsHp1 in cyt = 1.2021e-10;  // isVersionOf uniprot:P0ACJ8; hasPart uniprot:P0AA04
  species CRPsite_ptsIp0 in cyt = 1.2021e-10;  // isVersionOf uniprot:P0ACJ8; hasPart uniprot:P08839
  species CRPsite_ptsIp1 in cyt = 1.2021e-10;  // isVersionOf uniprot:P0ACJ8; hasPart uniprot:P08839
  species CRPsite_mlcp1 in cyt = 1.2021e-10;  // isVersionOf uniprot:P0ACJ8; hasPart uniprot:P50456
  species CRPsite_mlcp2 in cyt = 1.2021e-10;  // isVersionOf uniprot:P0ACJ8; hasPart uniprot:P50456
  species Mlc in cyt = 5.5172e-10;  // uniprot:P50456
  species Mlcsite_mlcp1 in cyt = 2.4267e-10;  // isVersionOf uniprot:P50456
  species Mlcsite_mlcp2 in cyt = 2.4282e-10;  // isVersionOf uniprot:P50456
  species Mlcsite_ptsGp1 in cyt = 2.1885e-10;  // isVersionOf uniprot:P50456; hasPart uniprot:C3TDU2
  species Mlcsite_ptsGp2 in cyt = 2.1885e-10;  // isVersionOf uniprot:P50456; hasPart uniprot:C3TDU2
  species Mlcsite_ptsHp0 in cyt = 2.1885e-10;  // isVersionOf uniprot:P50456; hasPart uniprot:P0AA04
  species Mlcsite_ptsIp0 in cyt = 2.1885e-10;  // isVersionOf uniprot:P50456; hasPart uniprot:P08839
  species CRP_cAMP in cyt = 1.0214e-7;  // isVersionOf uniprot:P0ACJ8; hasPart CHEBI:17489
  species CRP_cAMP_CRPsiteI_crp in cyt = 1.6863e-10;  // isVersionOf uniprot:P0ACJ8; hasPart CHEBI:17489
  species CRP_cAMP_CRPsiteII_crp in cyt = 5.2529e-11;  // isVersionOf uniprot:P0ACJ8; hasPart CHEBI:17489
  species CRP_cAMP_CRPsite_cyaA in cyt = 2.119e-10;  // isVersionOf uniprot:P0ACJ8; hasPart CHEBI:17489
  species CRP_cAMP_CRPsite_genome in cyt = 3.7544e-9;  // isVersionOf uniprot:P0ACJ8; hasPart CHEBI:17489
  species CRP_cAMP_CRPsite_ptsGp1 in cyt = 1.2279e-10;  // isVersionOf uniprot:P0ACJ8; hasPart CHEBI:17489
  species CRP_cAMP_CRPsite_ptsGp2 in cyt = 1.2279e-10;  // isVersionOf uniprot:P0ACJ8; hasPart CHEBI:17489
  species CRP_cAMP_CRPsite_ptsHp0 in cyt = 1.2279e-10;  // isVersionOf uniprot:P0ACJ8; hasPart CHEBI:17489
  species CRP_cAMP_CRPsite_ptsHp1 in cyt = 1.2279e-10;  // isVersionOf uniprot:P0ACJ8; hasPart CHEBI:17489
  species CRP_cAMP_CRPsite_ptsIp0 in cyt = 1.2279e-10;  // isVersionOf uniprot:P0ACJ8; hasPart CHEBI:17489
  species CRP_cAMP_CRPsite_ptsIp1 in cyt = 1.2279e-10;  // isVersionOf uniprot:P0ACJ8; hasPart CHEBI:17489
  species CRP_cAMP_CRPsite_mlcp1 in cyt = 1.2279e-10;  // isVersionOf uniprot:P0ACJ8; hasPart CHEBI:17489
  species CRP_cAMP_CRPsite_mlcp2 in cyt = 1.2279e-10;  // isVersionOf uniprot:P0ACJ8; hasPart CHEBI:17489
  species Mlc_Mlcsite_ptsGp1 in cyt = 2.4149e-11;  // isVersionOf uniprot:P50456; hasPart uniprot:P50456
  species Mlc_Mlcsite_ptsGp2 in cyt = 2.4149e-11;  // isVersionOf uniprot:P50456; hasPart uniprot:P50456
  species Mlc_Mlcsite_ptsIp0 in cyt = 2.4149e-11;  // isVersionOf uniprot:P50456; hasPart uniprot:P50456
  species Mlc_Mlcsite_ptsHp0 in cyt = 2.4149e-11;  // isVersionOf uniprot:P50456; hasPart uniprot:P50456
  species Mlc_Mlcsite_mlcp1 in cyt = 3.2535e-13;  // isVersionOf uniprot:P50456; hasPart uniprot:P50456
  species Mlc_Mlcsite_mlcp2 in cyt = 1.8086e-13;  // isVersionOf uniprot:P50456; hasPart uniprot:P50456
  species IICB in cyt = 4.2844e-5;  // uniprot:C3TDU2
  species IICB_Mlc in cyt = 1.6546e-7;  // isVersionOf uniprot:C3TDU2; hasPart uniprot:P50456
  species CYA in cyt = 1.4934e-6;  // uniprot:P00936
  species IIA_P in cyt = 7.0094e-6;  // uniprot:P69783
  species IIA_P_CYA in cyt = 7.3371e-9;  // isVersionOf uniprot:P69783; hasPart uniprot:P00936
  species mRNA_cyaA in cyt = 1.3643e-8;  // isVersionOf CHEBI:33699
  species mRNA_crp in cyt = 5.0254e-8;  // isVersionOf CHEBI:33699
  species mRNA_ptsG in cyt = 4.5559e-7;  // isVersionOf CHEBI:33699
  species mRNA_ptsH in cyt = 1.1411e-7;  // isVersionOf CHEBI:33699
  species mRNA_ptsI in cyt = 1.0038e-8;  // isVersionOf CHEBI:33699
  species mRNA_crr in cyt = 9.3861e-7;  // isVersionOf CHEBI:33699
  species mRNA_mlc in cyt = 1.5101e-9;  // isVersionOf CHEBI:33699
  species IICB_P in cyt = 7.1055e-6;  // isVersionOf uniprot:C3TDU2
  species IIA in cyt = 9.623e-5;  // isVersionOf uniprot:P69783
  species HPr_P in cyt = 7.5867e-7;  // isVersionOf uniprot:P0AA04
  species HPr in cyt = 1.1793e-5;  // uniprot:P0AA04
  species EI_P in cyt = 2.4319e-7;  // isVersionOf uniprot:P08839
  species EI in cyt = 8.6098e-7;  // uniprot:P08839
  species cAMP in cyt = 4.7107e-7;  // CHEBI:17489
  species $cyaA in cyt = 2.43e-10;  // uniprot:P00936
  species $cyaA_basal in cyt = 2.43e-10;  // isVersionOf uniprot:P00936
  species $crp in cyt = 2.43e-10;  // isVersionOf uniprot:P0ACJ8
  species $crp_basal in cyt = 2.43e-10;  // isVersionOf uniprot:P0ACJ8
  species $ptsGp1 in cyt = 2.43e-10;  // isVersionOf uniprot:C3TDU2
  species $ptsGp2 in cyt = 2.43e-10;  // isVersionOf uniprot:C3TDU2
  species $ptsHp0 in cyt = 2.43e-10;  // isVersionOf uniprot:C3TDU2
  species $ptsHp1 in cyt = 2.43e-10;  // isVersionOf uniprot:C3TDU2
  species $ptsIp0 in cyt = 2.43e-10;  // isVersionOf uniprot:C3TDU2
  species $ptsIp1 in cyt = 2.43e-10;  // isVersionOf uniprot:C3TDU2
  species $crr in cyt = 2.43e-10;  // uniprot:P69783
  species $mlcp1 in cyt = 2.43e-10;  // isVersionOf uniprot:P50456
  species $mlcp2 in cyt = 2.43e-10;  // isVersionOf uniprot:P50456
  species $Pyr in cyt = 0.00267;  // CHEBI:32816
  species $PEP in cyt = 0.00267;  // CHEBI:44897
  species $Glc6P in cyt = 0.00148;  // CHEBI:4170
  species $Glucose in cyt = 0.2;  // CHEBI:4167
  species $ATP in cyt = 0.0069942;  // CHEBI:15422

  // Parameters:
  fast = 1000000000 per_min;
  TCRPsite_cyaA has M;
  TCRPsiteI_crp has M;
  TCRPsiteII_crp has M;
  TCRPsite_ptsGp1 has M;
  TMlcsite_ptsGp1 has M;
  TCRPsite_ptsGp2 has M;
  TMlcsite_ptsGp2 has M;
  TCRPsite_ptsHp0 has M;
  TMlcsite_ptsHp0 has M;
  TCRPsite_ptsHp1 has M;
  TCRPsite_ptsIp0 has M;
  TMlcsite_ptsIp0 has M;
  TCRPsite_ptsIp1 has M;
  TCRPsite_mlcp1 has M;
  TMlcsite_mlcp1 has M;
  TCRPsite_mlcp2 has M;
  TMlcsite_mlcp2 has M;

  // Assignment rules:
  TCRPsite_cyaA := CRPsite_cyaA + CRP_cAMP_CRPsite_cyaA;
  TCRPsiteI_crp := CRPsiteI_crp + CRP_cAMP_CRPsiteI_crp;
  TCRPsiteII_crp := CRPsiteII_crp + CRP_cAMP_CRPsiteII_crp;
  TCRPsite_ptsGp1 := CRPsite_ptsGp1 + CRP_cAMP_CRPsite_ptsGp1;
  TMlcsite_ptsGp1 := Mlcsite_ptsGp1 + Mlc_Mlcsite_ptsGp1;
  TCRPsite_ptsGp2 := CRPsite_ptsGp2 + CRP_cAMP_CRPsite_ptsGp2;
  TMlcsite_ptsGp2 := Mlcsite_ptsGp2 + Mlc_Mlcsite_ptsGp2;
  TCRPsite_ptsHp0 := CRPsite_ptsHp0 + CRP_cAMP_CRPsite_ptsHp0;
  TMlcsite_ptsHp0 := Mlcsite_ptsHp0 + Mlc_Mlcsite_ptsHp0;
  TCRPsite_ptsHp1 := CRPsite_ptsHp1 + CRP_cAMP_CRPsite_ptsHp1;
  TCRPsite_ptsIp0 := CRPsite_ptsIp0 + CRP_cAMP_CRPsite_ptsIp0;
  TMlcsite_ptsIp0 := Mlcsite_ptsIp0 + Mlc_Mlcsite_ptsIp0;
  TCRPsite_ptsIp1 := CRPsite_ptsIp1 + CRP_cAMP_CRPsite_ptsIp1;
  TCRPsite_mlcp1 := CRPsite_mlcp1 + CRP_cAMP_CRPsite_mlcp1;
  TMlcsite_mlcp1 := Mlcsite_mlcp1 + Mlc_Mlcsite_mlcp1;
  TCRPsite_mlcp2 := CRPsite_mlcp2 + CRP_cAMP_CRPsite_mlcp2;
  TMlcsite_mlcp2 := Mlcsite_mlcp2 + Mlc_Mlcsite_mlcp2;

  // Reactions:
  binding_CRP_cAMP: CRP + cAMP -> CRP_cAMP; cyt*fast*one_per_M*(binding_CRP_cAMP_Kb^2*(CRP*cAMP)^2 - CRP_cAMP^2);
    binding_CRP_cAMP_Kb = 40000 per_M; one_per_M = 1 per_M;
  binding_CRP_cAMP_CRPsite_cyaA: CRP_cAMP + CRPsite_cyaA -> CRP_cAMP_CRPsite_cyaA; cyt*fast*(binding_CRP_cAMP_CRPsite_cyaA_Kb*CRP_cAMP*CRPsite_cyaA - CRP_cAMP_CRPsite_cyaA);
    binding_CRP_cAMP_CRPsite_cyaA_Kb = 66700000 per_M;
  binding_CRP_cAMP_CRPsiteI_crp: CRP_cAMP + CRPsiteI_crp -> CRP_cAMP_CRPsiteI_crp; cyt*fast*(binding_CRP_cAMP_CRPsiteI_crp_Kb*CRP_cAMP*CRPsiteI_crp - CRP_cAMP_CRPsiteI_crp);
    binding_CRP_cAMP_CRPsiteI_crp_Kb = 22200000 per_M;
  binding_CRP_cAMP_CRPsiteII_crp: CRP_cAMP + CRPsiteII_crp -> CRP_cAMP_CRPsiteII_crp; cyt*fast*(binding_CRP_cAMP_CRPsiteII_crp_Kb*CRP_cAMP*CRPsiteII_crp - CRP_cAMP_CRPsiteII_crp);
    binding_CRP_cAMP_CRPsiteII_crp_Kb = 2700000 per_M;
  binding_CRP_cAMP_CRPsite_ptsGp1: CRP_cAMP + CRPsite_ptsGp1 -> CRP_cAMP_CRPsite_ptsGp1; cyt*fast*(binding_CRP_cAMP_CRPsite_ptsGp1_Kb*CRP_cAMP*CRPsite_ptsGp1 - CRP_cAMP_CRPsite_ptsGp1);
    binding_CRP_cAMP_CRPsite_ptsGp1_Kb = 10000000 per_M;
  binding_CRP_cAMP_CRPsite_ptsGp2: CRP_cAMP + CRPsite_ptsGp2 -> CRP_cAMP_CRPsite_ptsGp2; cyt*fast*(binding_CRP_cAMP_CRPsite_ptsGp2_Kb*CRP_cAMP*CRPsite_ptsGp2 - CRP_cAMP_CRPsite_ptsGp2);
    binding_CRP_cAMP_CRPsite_ptsGp2_Kb = 10000000 per_M;
  binding_CRP_cAMP_CRPsite_ptsHp0: CRP_cAMP + CRPsite_ptsHp0 -> CRP_cAMP_CRPsite_ptsHp0; cyt*fast*(binding_CRP_cAMP_CRPsite_ptsHp0_Kb*CRP_cAMP*CRPsite_ptsHp0 - CRP_cAMP_CRPsite_ptsHp0);
    binding_CRP_cAMP_CRPsite_ptsHp0_Kb = 10000000 per_M;
  binding_CRP_cAMP_CRPsite_ptsHp1: CRP_cAMP + CRPsite_ptsHp1 -> CRP_cAMP_CRPsite_ptsHp1; cyt*fast*(binding_CRP_cAMP_CRPsite_ptsHp1_Kb*CRP_cAMP*CRPsite_ptsHp1 - CRP_cAMP_CRPsite_ptsHp1);
    binding_CRP_cAMP_CRPsite_ptsHp1_Kb = 10000000 per_M;
  binding_CRP_cAMP_CRPsite_ptsIp0: CRP_cAMP + CRPsite_ptsIp0 -> CRP_cAMP_CRPsite_ptsIp0; cyt*fast*(binding_CRP_cAMP_CRPsite_ptsIp0_Kb*CRP_cAMP*CRPsite_ptsIp0 - CRP_cAMP_CRPsite_ptsIp0);
    binding_CRP_cAMP_CRPsite_ptsIp0_Kb = 10000000 per_M;
  binding_CRP_cAMP_CRPsite_ptsIp1: CRP_cAMP + CRPsite_ptsIp1 -> CRP_cAMP_CRPsite_ptsIp1; cyt*fast*(binding_CRP_cAMP_CRPsite_ptsIp1_Kb*CRP_cAMP*CRPsite_ptsIp1 - CRP_cAMP_CRPsite_ptsIp1);
    binding_CRP_cAMP_CRPsite_ptsIp1_Kb = 10000000 per_M;
  binding_CRP_cAMP_CRPsite_mlcp1: CRP_cAMP + CRPsite_mlcp1 -> CRP_cAMP_CRPsite_mlcp1; cyt*fast*(binding_CRP_cAMP_CRPsite_mlcp1_Kb*CRP_cAMP*CRPsite_mlcp1 - CRP_cAMP_CRPsite_mlcp1);
    binding_CRP_cAMP_CRPsite_mlcp1_Kb = 10000000 per_M;
  binding_CRP_cAMP_CRPsite_mlcp2: CRP_cAMP + CRPsite_mlcp2 -> CRP_cAMP_CRPsite_mlcp2; cyt*fast*(binding_CRP_cAMP_CRPsite_mlcp2_Kb*CRP_cAMP*CRPsite_mlcp2 - CRP_cAMP_CRPsite_mlcp2);
    binding_CRP_cAMP_CRPsite_mlcp2_Kb = 10000000 per_M;
  binding_CRP_cAMP_CRPsite_genome: CRP_cAMP + CRPsite_genome -> CRP_cAMP_CRPsite_genome; cyt*fast*(binding_CRP_cAMP_CRPsite_genome_Kb*CRP_cAMP*CRPsite_genome - CRP_cAMP_CRPsite_genome);
    binding_CRP_cAMP_CRPsite_genome_Kb = 10000000 per_M;
  binding_Mlc_Mlcsite_ptsGp1: Mlc + Mlcsite_ptsGp1 -> Mlc_Mlcsite_ptsGp1; cyt*fast*(binding_Mlc_Mlcsite_ptsGp1_Kb*Mlc*Mlcsite_ptsGp1 - Mlc_Mlcsite_ptsGp1);
    binding_Mlc_Mlcsite_ptsGp1_Kb = 200000000 per_M;
  binding_Mlc_Mlcsite_ptsGp2: Mlc + Mlcsite_ptsGp2 -> Mlc_Mlcsite_ptsGp2; cyt*fast*(binding_Mlc_Mlcsite_ptsGp2_Kb*Mlc*Mlcsite_ptsGp2 - Mlc_Mlcsite_ptsGp2);
    binding_Mlc_Mlcsite_ptsGp2_Kb = 200000000 per_M;
  binding_Mlc_Mlcsite_ptsHp0: Mlc + Mlcsite_ptsHp0 -> Mlc_Mlcsite_ptsHp0; cyt*fast*(binding_Mlc_Mlcsite_ptsHp0_Kb*Mlc*Mlcsite_ptsHp0 - Mlc_Mlcsite_ptsHp0);
    binding_Mlc_Mlcsite_ptsHp0_Kb = 200000000 per_M;
  binding_Mlc_Mlcsite_ptsIp0: Mlc + Mlcsite_ptsIp0 -> Mlc_Mlcsite_ptsIp0; cyt*fast*(binding_Mlc_Mlcsite_ptsIp0_Kb*Mlc*Mlcsite_ptsIp0 - Mlc_Mlcsite_ptsIp0);
    binding_Mlc_Mlcsite_ptsIp0_Kb = 200000000 per_M;
  binding_Mlc_Mlcsite_mlcp1: Mlc + Mlcsite_mlcp1 -> Mlc_Mlcsite_mlcp1; cyt*fast*(binding_Mlc_Mlcsite_mlcp1_Kb*Mlc*Mlcsite_mlcp1 - Mlc_Mlcsite_mlcp1);
    binding_Mlc_Mlcsite_mlcp1_Kb = 2430000 per_M;
  binding_Mlc_Mlcsite_mlcp2: Mlc + Mlcsite_mlcp2 -> Mlc_Mlcsite_mlcp2; cyt*fast*(binding_Mlc_Mlcsite_mlcp2_Kb*Mlc*Mlcsite_mlcp2 - Mlc_Mlcsite_mlcp2);
    binding_Mlc_Mlcsite_mlcp2_Kb = 1350000 per_M;
  binding_IICB_Mlc: IICB + Mlc -> IICB_Mlc; cyt*fast*(binding_IICB_Mlc_Kb*IICB*Mlc - IICB_Mlc);
    binding_IICB_Mlc_Kb = 7000000 per_M;
  binding_IIA_P_CYA: CYA + IIA_P -> IIA_P_CYA; cyt*fast*(binding_IIA_P_CYA_Kb*CYA*IIA_P^2 - IIA_P_CYA);
    binding_IIA_P_CYA_Kb = 100000000 per_M_squared;
  transcription_CRP_cAMP_CRPsite_cyaA_cyaA: -> mRNA_cyaA; cyt*transcription_CRP_cAMP_CRPsite_cyaA_cyaA_km*(1 - CRP_cAMP_CRPsite_cyaA/TCRPsite_cyaA)*cyaA;  // modifiers: CRP_cAMP_CRPsite_cyaA, cyaA
    transcription_CRP_cAMP_CRPsite_cyaA_cyaA_km = 45.26 per_min;
  transcription_cyaA_basal: -> mRNA_cyaA; cyt*transcription_cyaA_basal_km*cyaA_basal;  // modifiers: cyaA_basal
    transcription_cyaA_basal_km = 1.281 per_min;
  transcription_CRP_cAMP_CRPsiteI_crp_CRP_cAMP_CRPsiteII_crp_crp: -> mRNA_crp; cyt*transcription_CRP_cAMP_CRPsiteI_crp_CRP_cAMP_CRPsiteII_crp_crp_km*(1 + RelativeactivityatTCRPsiteII_crp*CRP_cAMP_CRPsiteII_crp/TCRPsiteII_crp - CRP_cAMP_CRPsiteI_crp/TCRPsiteI_crp)*crp;  // modifiers: CRP_cAMP_CRPsiteI_crp, CRP_cAMP_CRPsiteII_crp, crp
    transcription_CRP_cAMP_CRPsiteI_crp_CRP_cAMP_CRPsiteII_crp_crp_km = 20 per_min; RelativeactivityatTCRPsiteII_crp = 5 dimensionless;
  transcription_crp_basal: -> mRNA_crp; cyt*transcription_crp_basal_km*crp_basal;  // modifiers: crp_basal
    transcription_crp_basal_km = 1.00886 per_min;
  transcription_CRP_cAMP_CRPsite_ptsGp1_Mlc_Mlcsite_ptsGp1_ptsGp1: -> mRNA_ptsG; cyt*transcription_CRP_cAMP_CRPsite_ptsGp1_Mlc_Mlcsite_ptsGp1_ptsGp1_km*(CRP_cAMP_CRPsite_ptsGp1/TCRPsite_ptsGp1)*(1 - Mlc_Mlcsite_ptsGp1/TMlcsite_ptsGp1)*ptsGp1;  // modifiers: CRP_cAMP_CRPsite_ptsGp1, Mlc_Mlcsite_ptsGp1, ptsGp1
    transcription_CRP_cAMP_CRPsite_ptsGp1_Mlc_Mlcsite_ptsGp1_ptsGp1_km = 892 per_min;
  transcription_CRP_cAMP_CRPsite_ptsGp2_Mlc_Mlcsite_ptsGp2_ptsGp2: -> mRNA_ptsG; cyt*transcription_CRP_cAMP_CRPsite_ptsGp2_Mlc_Mlcsite_ptsGp2_ptsGp2_km*(CRP_cAMP_CRPsite_ptsGp2/TCRPsite_ptsGp2)*(1 - Mlc_Mlcsite_ptsGp2/TMlcsite_ptsGp2)*ptsGp2;  // modifiers: CRP_cAMP_CRPsite_ptsGp2, Mlc_Mlcsite_ptsGp2, ptsGp2
    transcription_CRP_cAMP_CRPsite_ptsGp2_Mlc_Mlcsite_ptsGp2_ptsGp2_km = 2 per_min;
  transcription_CRP_cAMP_CRPsite_ptsHp0_Mlc_Mlcsite_ptsHp0_ptsHp0: -> mRNA_ptsH; cyt*transcription_CRP_cAMP_CRPsite_ptsHp0_Mlc_Mlcsite_ptsHp0_ptsHp0_km*(CRP_cAMP_CRPsite_ptsHp0/TCRPsite_ptsHp0)*(1 - Mlc_Mlcsite_ptsHp0/TMlcsite_ptsHp0)*ptsHp0;  // modifiers: CRP_cAMP_CRPsite_ptsHp0, Mlc_Mlcsite_ptsHp0, ptsHp0
    transcription_CRP_cAMP_CRPsite_ptsHp0_Mlc_Mlcsite_ptsHp0_ptsHp0_km = 71.8 per_min;
  transcription_CRP_cAMP_CRPsite_ptsHp1_ptsHp1: -> mRNA_ptsH; cyt*transcription_CRP_cAMP_CRPsite_ptsHp1_ptsHp1_km*(CRP_cAMP_CRPsite_ptsHp1/TCRPsite_ptsHp1)*ptsHp1;  // modifiers: CRP_cAMP_CRPsite_ptsHp1, ptsHp1
    transcription_CRP_cAMP_CRPsite_ptsHp1_ptsHp1_km = 17.95 per_min;
  transcription_CRP_cAMP_CRPsite_ptsIp0_Mlc_Mlcsite_ptsIp0_ptsIp0: -> mRNA_ptsI; cyt*transcription_CRP_cAMP_CRPsite_ptsIp0_Mlc_Mlcsite_ptsIp0_ptsIp0_km*(CRP_cAMP_CRPsite_ptsIp0/TCRPsite_ptsIp0)*(1 - Mlc_Mlcsite_ptsIp0/TMlcsite_ptsIp0)*ptsIp0;  // modifiers: CRP_cAMP_CRPsite_ptsIp0, Mlc_Mlcsite_ptsIp0, ptsIp0
    transcription_CRP_cAMP_CRPsite_ptsIp0_Mlc_Mlcsite_ptsIp0_ptsIp0_km = 6.244 per_min;
  transcription_CRP_cAMP_CRPsite_ptsIp1_ptsIp1: -> mRNA_ptsI; cyt*transcription_CRP_cAMP_CRPsite_ptsIp1_ptsIp1_km*(CRP_cAMP_CRPsite_ptsIp1/TCRPsite_ptsIp1)*ptsIp1;  // modifiers: CRP_cAMP_CRPsite_ptsIp1, ptsIp1
    transcription_CRP_cAMP_CRPsite_ptsIp1_ptsIp1_km = 0.892 per_min;
  transcription_crr: -> mRNA_crr; cyt*transcription_crr_km*crr;  // modifiers: crr
    transcription_crr_km = 334.5 per_min;
  transcription_CRP_cAMP_CRPsite_mlcp1_Mlc_Mlcsite_mlcp1_mlcp1: -> mRNA_mlc; cyt*transcription_CRP_cAMP_CRPsite_mlcp1_Mlc_Mlcsite_mlcp1_mlcp1_km*(1 - CRP_cAMP_CRPsite_mlcp1/TCRPsite_mlcp1)*(1 - Mlc_Mlcsite_mlcp1/TMlcsite_mlcp1)*mlcp1;  // modifiers: CRP_cAMP_CRPsite_mlcp1, Mlc_Mlcsite_mlcp1, mlcp1
    transcription_CRP_cAMP_CRPsite_mlcp1_Mlc_Mlcsite_mlcp1_mlcp1_km = 1.875 per_min;
  transcription_CRP_cAMP_CRPsite_mlcp2_Mlc_Mlcsite_mlcp2_mlcp2: -> mRNA_mlc; cyt*transcription_CRP_cAMP_CRPsite_mlcp2_Mlc_Mlcsite_mlcp2_mlcp2_km*(CRP_cAMP_CRPsite_mlcp2/TCRPsite_mlcp2)*(1 - Mlc_Mlcsite_mlcp2/TMlcsite_mlcp2)*mlcp2;  // modifiers: CRP_cAMP_CRPsite_mlcp2, Mlc_Mlcsite_mlcp2, mlcp2
    transcription_CRP_cAMP_CRPsite_mlcp2_Mlc_Mlcsite_mlcp2_mlcp2_km = 1.875 per_min;
  decomposition_mRNA_cyaA: mRNA_cyaA -> ; cyt*decomposition_mRNA_cyaA_kmd*mRNA_cyaA;
    decomposition_mRNA_cyaA_kmd = 0.126 per_min;
  decomposition_mRNA_crp: mRNA_crp -> ; cyt*decomposition_mRNA_crp_kmd*mRNA_crp;
    decomposition_mRNA_crp_kmd = 0.139 per_min;
  decomposition_mRNA_ptsG: mRNA_ptsG -> ; cyt*decomposition_mRNA_ptsG_kmd*mRNA_ptsG;
    decomposition_mRNA_ptsG_kmd = 0.217 per_min;
  decomposition_mRNA_ptsH: mRNA_ptsH -> ; cyt*decomposition_mRNA_ptsH_kmd*mRNA_ptsH;
    decomposition_mRNA_ptsH_kmd = 0.0889 per_min;
  decomposition_mRNA_ptsI: mRNA_ptsI -> ; cyt*decomposition_mRNA_ptsI_kmd*mRNA_ptsI;
    decomposition_mRNA_ptsI_kmd = 0.0797 per_min;
  decomposition_mRNA_crr: mRNA_crr -> ; cyt*decomposition_mRNA_crr_kmd*mRNA_crr;
    decomposition_mRNA_crr_kmd = 0.0866 per_min;
  decomposition_mRNA_mlc: mRNA_mlc -> ; cyt*decomposition_mRNA_mlc_kmd*mRNA_mlc;
    decomposition_mRNA_mlc_kmd = 0.3014 per_min;
  translation_mRNA_cyaA: -> CYA; cyt*translation_mRNA_cyaA_kp*mRNA_cyaA;  // modifiers: mRNA_cyaA
    translation_mRNA_cyaA_kp = 11 per_min;
  translation_mRNA_crp: -> CRP; cyt*translation_mRNA_crp_kp*mRNA_crp;  // modifiers: mRNA_crp
    translation_mRNA_crp_kp = 11 per_min;
  translation_mRNA_ptsG: -> IICB; cyt*translation_mRNA_ptsG_kp*mRNA_ptsG;  // modifiers: mRNA_ptsG
    translation_mRNA_ptsG_kp = 11 per_min;
  translation_mRNA_ptsH: -> HPr; cyt*translation_mRNA_ptsH_kp*mRNA_ptsH;  // modifiers: mRNA_ptsH
    translation_mRNA_ptsH_kp = 11 per_min;
  translation_mRNA_ptsI: -> EI; cyt*translation_mRNA_ptsI_kp*mRNA_ptsI;  // modifiers: mRNA_ptsI
    translation_mRNA_ptsI_kp = 11 per_min;
  translation_mRNA_crr: -> IIA; cyt*translation_mRNA_crr_kp*mRNA_crr;  // modifiers: mRNA_crr
    translation_mRNA_crr_kp = 11 per_min;
  translation_mlc: -> Mlc; cyt*translation_mlc_kp*mRNA_mlc;  // modifiers: mRNA_mlc
    translation_mlc_kp = 11 per_min;
  decomposition_CYA: CYA -> ; cyt*decomposition_CYA_kpd*CYA;
    decomposition_CYA_kpd = 0.1 per_min;
  decomposition_CRP: CRP -> ; cyt*decomposition_CRP_kpd*CRP;
    decomposition_CRP_kpd = 0.1 per_min;
  decomposition_Mlc: Mlc -> ; cyt*decomposition_Mlc_kpd*Mlc;
    decomposition_Mlc_kpd = 0.1 per_min;
  decomposition_cAMP: cAMP -> ; cyt*decomposition_cAMP_kpd*cAMP;
    decomposition_cAMP_kpd = 400 per_min;
  decomposition_CRP_cAMP: CRP_cAMP -> ; cyt*decomposition_CRP_cAMP_kpd*CRP_cAMP;
    decomposition_CRP_cAMP_kpd = 0.1 per_min;
  decomposition_CRP_cAMP_CRPsite_cyaA: CRP_cAMP_CRPsite_cyaA -> CRPsite_cyaA; cyt*decomposition_CRP_cAMP_CRPsite_cyaA_kpd*CRP_cAMP_CRPsite_cyaA;
    decomposition_CRP_cAMP_CRPsite_cyaA_kpd = 0.1 per_min;
  decomposition_CRP_cAMP_CRPsiteI_crp: CRP_cAMP_CRPsiteI_crp -> CRPsiteI_crp; cyt*decomposition_CRP_cAMP_CRPsiteI_crp_kpd*CRP_cAMP_CRPsiteI_crp;
    decomposition_CRP_cAMP_CRPsiteI_crp_kpd = 0.1 per_min;
  decomposition_CRP_cAMP_CRPsiteII_crp: CRP_cAMP_CRPsiteII_crp -> CRPsiteII_crp; cyt*decomposition_CRP_cAMP_CRPsiteII_crp_kpd*CRP_cAMP_CRPsiteII_crp;
    decomposition_CRP_cAMP_CRPsiteII_crp_kpd = 0.1 per_min;
  decomposition_CRP_cAMP_CRPsite_ptsGp1: CRP_cAMP_CRPsite_ptsGp1 -> CRPsite_ptsGp1; cyt*decomposition_CRP_cAMP_CRPsite_ptsGp1_kpd*CRP_cAMP_CRPsite_ptsGp1;
    decomposition_CRP_cAMP_CRPsite_ptsGp1_kpd = 0.1 per_min;
  decomposition_CRP_cAMP_CRPsite_ptsGp2: CRP_cAMP_CRPsite_ptsGp2 -> CRPsite_ptsGp2; cyt*decomposition_CRP_cAMP_CRPsite_ptsGp2_kpd*CRP_cAMP_CRPsite_ptsGp2;
    decomposition_CRP_cAMP_CRPsite_ptsGp2_kpd = 0.1 per_min;
  decomposition_CRP_cAMP_CRPsite_ptsHp0: CRP_cAMP_CRPsite_ptsHp0 -> CRPsite_ptsHp0; cyt*decomposition_CRP_cAMP_CRPsite_ptsHp0_kpd*CRP_cAMP_CRPsite_ptsHp0;
    decomposition_CRP_cAMP_CRPsite_ptsHp0_kpd = 0.1 per_min;
  decomposition_CRP_cAMP_CRPsite_ptsHp1: CRP_cAMP_CRPsite_ptsHp1 -> CRPsite_ptsHp1; cyt*decomposition_CRP_cAMP_CRPsite_ptsHp1_kpd*CRP_cAMP_CRPsite_ptsHp1;
    decomposition_CRP_cAMP_CRPsite_ptsHp1_kpd = 0.1 per_min;
  decomposition_CRP_cAMP_CRPsite_ptsIp0: CRP_cAMP_CRPsite_ptsIp0 -> CRPsite_ptsIp0; cyt*decomposition_CRP_cAMP_CRPsite_ptsIp0_kpd*CRP_cAMP_CRPsite_ptsIp0;
    decomposition_CRP_cAMP_CRPsite_ptsIp0_kpd = 0.1 per_min;
  decomposition_CRP_cAMP_CRPsite_ptsIp1: CRP_cAMP_CRPsite_ptsIp1 -> CRPsite_ptsIp1; cyt*decomposition_CRP_cAMP_CRPsite_ptsIp1_kpd*CRP_cAMP_CRPsite_ptsIp1;
    decomposition_CRP_cAMP_CRPsite_ptsIp1_kpd = 0.1 per_min;
  decomposition_CRP_cAMP_CRPsite_mlcp1: CRP_cAMP_CRPsite_mlcp1 -> CRPsite_mlcp1; cyt*decomposition_CRP_cAMP_CRPsite_mlcp1_kpd*CRP_cAMP_CRPsite_mlcp1;
    decomposition_CRP_cAMP_CRPsite_mlcp1_kpd = 0.1 per_min;
  decomposition_CRP_cAMP_CRPsite_mlcp2: CRP_cAMP_CRPsite_mlcp2 -> CRPsite_mlcp2; cyt*decomposition_CRP_cAMP_CRPsite_mlcp2_kpd*CRP_cAMP_CRPsite_mlcp2;
    decomposition_CRP_cAMP_CRPsite_mlcp2_kpd = 0.1 per_min;
  decomposition_CRP_cAMP_CRPsite_genome: CRP_cAMP_CRPsite_genome -> CRPsite_genome; cyt*decomposition_CRP_cAMP_CRPsite_genome_kpd*CRP_cAMP_CRPsite_genome;
    decomposition_CRP_cAMP_CRPsite_genome_kpd = 0.1 per_min;
  decomposition_Mlc_Mlcsite_ptsGp1: Mlc_Mlcsite_ptsGp1 -> Mlcsite_ptsGp1; cyt*decomposition_Mlc_Mlcsite_ptsGp1_kpd*Mlc_Mlcsite_ptsGp1;
    decomposition_Mlc_Mlcsite_ptsGp1_kpd = 0.1 per_min;
  decomposition_Mlc_Mlcsite_ptsGp2: Mlc_Mlcsite_ptsGp2 -> Mlcsite_ptsGp2; cyt*decomposition_Mlc_Mlcsite_ptsGp2_kpd*Mlc_Mlcsite_ptsGp2;
    decomposition_Mlc_Mlcsite_ptsGp2_kpd = 0.1 per_min;
  decomposition_Mlc_Mlcsite_ptsHp0: Mlc_Mlcsite_ptsHp0 -> Mlcsite_ptsHp0; cyt*decomposition_Mlc_Mlcsite_ptsHp0_kpd*Mlc_Mlcsite_ptsHp0;
    decomposition_Mlc_Mlcsite_ptsHp0_kpd = 0.1 per_min;
  decomposition_Mlc_Mlcsite_ptsIp0: Mlc_Mlcsite_ptsIp0 -> Mlcsite_ptsIp0; cyt*decomposition_Mlc_Mlcsite_ptsIp0_kpd*Mlc_Mlcsite_ptsIp0;
    decomposition_Mlc_Mlcsite_ptsIp0_kpd = 0.1 per_min;
  decomposition_Mlc_Mlcsite_mlcp1: Mlc_Mlcsite_mlcp1 -> Mlcsite_mlcp1; cyt*decomposition_Mlc_Mlcsite_mlcp1_kpd*Mlc_Mlcsite_mlcp1;
    decomposition_Mlc_Mlcsite_mlcp1_kpd = 0.1 per_min;
  decomposition_Mlc_Mlcsite_mlcp2: Mlc_Mlcsite_mlcp2 -> Mlcsite_mlcp2; cyt*decomposition_Mlc_Mlcsite_mlcp2_kpd*Mlc_Mlcsite_mlcp2;
    decomposition_Mlc_Mlcsite_mlcp2_kpd = 0.1 per_min;
  decomposition_IICB_Mlc: IICB_Mlc -> ; cyt*decomposition_IICB_Mlc_kpd*IICB_Mlc;
    decomposition_IICB_Mlc_kpd = 0.1 per_min;
  decomposition_EI_P: EI_P -> ; cyt*decomposition_EI_P_kpd*EI_P;
    decomposition_EI_P_kpd = 0.1 per_min;
  decomposition_EI: EI -> ; cyt*decomposition_EI_kpd*EI;
    decomposition_EI_kpd = 0.1 per_min;
  decomposition_HPr_P: HPr_P -> ; cyt*decomposition_HPr_P_kpd*HPr_P;
    decomposition_HPr_P_kpd = 0.1 per_min;
  decomposition_HPr: HPr -> ; cyt*decomposition_HPr_kpd*HPr;
    decomposition_HPr_kpd = 0.1 per_min;
  decomposition_IIA_P: IIA_P -> ; cyt*decomposition_IIA_P_kpd*IIA_P;
    decomposition_IIA_P_kpd = 0.1 per_min;
  decomposition_IIA: IIA -> ; cyt*decomposition_IIA_kpd*IIA;
    decomposition_IIA_kpd = 0.1 per_min;
  decomposition_IICB_P: IICB_P -> ; cyt*decomposition_IICB_P_kpd*IICB_P;
    decomposition_IICB_P_kpd = 0.1 per_min;
  decomposition_IICB: IICB -> ; cyt*decomposition_IICB_kpd*IICB;
    decomposition_IICB_kpd = 0.1 per_min;
  PTS2for: HPr + EI_P -> HPr_P + EI; cyt*PTS2for_kx*HPr*EI_P;
    PTS2for_kx = 12000000000 per_M_per_min;
  PTS2rev: HPr_P + EI -> HPr + EI_P; cyt*PTS2rev_kx*EI*HPr_P;
    PTS2rev_kx = 480000000 per_M_per_min;
  PTS3for: IIA + HPr_P -> IIA_P + HPr; cyt*PTS3for_kx*IIA*HPr_P;
    PTS3for_kx = 3660000000 per_M_per_min;
  PTS3rev: IIA_P + HPr -> IIA + HPr_P; cyt*PTS3rev_kx*HPr*IIA_P;
    PTS3rev_kx = 2820000000 per_M_per_min;
  PTS4for: IICB + IIA_P -> IICB_P + IIA; cyt*PTS4for_kx*IICB*IIA_P;
    PTS4for_kx = 660000000 per_M_per_min;
  PTS4rev: IICB_P + IIA -> IICB + IIA_P; cyt*PTS4rev_kx*IIA*IICB_P;
    PTS4rev_kx = 240000000 per_M_per_min;
  reaction_CYA_ATP: $ATP -> cAMP; cyt*(reaction_CYA_ATP_Q*CYA*ATP/(reaction_CYA_ATP_Kmich + ATP));  // modifiers: CYA
    reaction_CYA_ATP_Kmich = 0.001 M; reaction_CYA_ATP_Q = 100 per_min;
  reaction_IIA_P_CYA_ATP: $ATP -> cAMP; cyt*(reaction_IIA_P_CYA_ATP_Q*IIA_P_CYA*ATP/(reaction_IIA_P_CYA_ATP_Kmich + ATP));  // modifiers: IIA_P_CYA
    reaction_IIA_P_CYA_ATP_Kmich = 0.001 M; reaction_IIA_P_CYA_ATP_Q = 9000 per_min;
  reaction_EI_PEP: EI + $PEP -> EI_P + $Pyr; cyt*(2*reaction_EI_PEP_Q*EI*PEP^2/(reaction_EI_PEP_Kmich^2 + PEP^2));
    reaction_EI_PEP_Kmich = 0.0003 M; reaction_EI_PEP_Q = 108000 per_min;
  reaction_EIP_Pyr: EI_P + $Pyr -> EI + $PEP; cyt*(2*reaction_EIP_Pyr_Q*EI_P*Pyr^2/(reaction_EIP_Pyr_Kmich^2 + Pyr^2));
    reaction_EIP_Pyr_Kmich = 0.002 M; reaction_EIP_Pyr_Q = 480000 per_min;
  reaction_IICB_P_Glucose: IICB_P + $Glucose -> IICB + $Glc6P; cyt*(reaction_IICB_P_Glucose_Q*IICB_P*Glucose/(reaction_IICB_P_Glucose_Kmich + Glucose));
    reaction_IICB_P_Glucose_Kmich = 2e-5 M; reaction_IICB_P_Glucose_Q = 4800 per_min;
  reaction_IICB_Glc6P: IICB + $Glc6P -> IICB_P + $Glucose; cyt*(reaction_IICB_Glc6P_Q*IICB*Glc6P/(reaction_IICB_Glc6P_Kmich + Glc6P));
    reaction_IICB_Glc6P_Kmich = 9.61 M; reaction_IICB_Glc6P_Q = 389 per_min;

  // Events:
  at (time >= 500): Glucose = 2e-9;

  // Unit definitions:
  unit substance = mole;
  unit time = 60 second;
  unit volume = litre;
  unit M = mole / litre;
  unit per_min = 1 / (60 second);
  unit per_M = litre / mole;
  unit per_M_per_min = litre / (mole * 60 second);
  unit per_M_squared = litre^2 / mole^2;
end
