// SBML level 2 version 4

model ralser()
  // Ralser2007_Carbohydrate_Rerouting_ROS
  // This is the model with unfitted parameters described in the article
  // Dynamic rerouting of the carbohydrate flux is key to counteracting oxidative stress
  // Markus Ralser, Mirjam M Wamelink, Axel Kowald, Birgit Gerisch, Gino Heeren, Eduard A Struys, Edda Klipp, Cornelis Jakobs, Michael Breitenbach, Hans Lehrach and Sylvia Krobitsch, J Biol 2007 6(4):10; PMID: 18154684 , doi: 10.1186/jbiol61
  // Abstract:
  // BACKGROUND: Eukaryotic cells have evolved various response mechanisms to counteract the deleterious consequences of oxidative stress. Among these processes, metabolic alterations seem to play an important role.
  // RESULTS: We recently discovered that yeast cells with reduced activity of the key glycolytic enzyme triosephosphate isomerase exhibit an increased resistance to the thiol-oxidizing reagent diamide. Here we show that this phenotype is conserved in Caenorhabditis elegans and that the underlying mechanism is based on a redirection of the metabolic flux from glycolysis to the pentose phosphate pathway, altering the redox equilibrium of the cytoplasmic NADP(H) pool. Remarkably, another key glycolytic enzyme, glyceraldehyde-3-phosphate dehydrogenase (GAPDH), is known to be inactivated in response to various oxidant treatments, and we show that this provokes a similar redirection of the metabolic flux.
  // CONCLUSION: The naturally occurring inactivation of GAPDH functions as a metabolic switch for rerouting the carbohydrate flux to counteract oxidative stress. As a consequence, altering the homoeostasis of cytoplasmic metabolites is a fundamental mechanism for balancing the redox state of eukaryotic cells under stress conditions.
  // Different realtive enzyme velocities can be simulated by varying the parameters k_rel_TPI and k_rel_GAPDH .
  // This model originates from BioModels Database: A Database of Annotated Published Models. It is copyright (c) 2005-2010 The BioModels Team.
  // For more information see the terms of use .
  // To cite BioModels Database, please use Le Novère N., Bornstein B., Broicher A., Courtot M., Donizelli M., Dharuri H., Li L., Sauro H., Schilstra M., Shapiro B., Snoep J.L., Hucka M. (2006) BioModels Database: A Free, Centralized Database of Curated, Published, Quantitative Kinetic Models of Biochemical and Cellular Systems Nucleic Acids Res., 34: D689-D691.
  // biomodels.db:MODEL1003300000
  // biomodels.db:BIOMD0000000247
  // isDescribedBy pubmed:18154684
  // isDerivedFrom biomodels.db:BIOMD0000000064
  // hasVersion kegg.pathway:sce00030 kegg.pathway:sce00010
  // hasVersion GO:0006098 GO:0006096 GO:0006739

  // Compartments:
  compartment extracellular = 1;  // GO:0005576
  compartment cytoplasm in extracellular = 1;  // GO:0005829

  // Species:
  species P in cytoplasm = 5; P is "High energy phosphates";  // hasPart kegg.compound:C00008 kegg.compound:C00002 CHEBI:16761; hasPart CHEBI:16761 CHEBI:15422
  species G6P in cytoplasm = 1.39; G6P is "Glucose 6 Phosphate";  // CHEBI:17665 kegg.compound:C00668
  species F6P in cytoplasm = 0.28; F6P is "Fructose 6 Phosphate";  // CHEBI:15946 kegg.compound:C05345
  species F16P in cytoplasm = 0.1; F16P is "Fructose-1,6 bisphosphate";  // CHEBI:16905 kegg.compound:C00354
  species NADH in cytoplasm = 0.39;  // CHEBI:16908 kegg.compound:C00004
  species NAD in cytoplasm = 1.2;  // CHEBI:15846 kegg.compound:C00003
  species BPG in cytoplasm = 0.1; BPG is "1,3-bisphosphoglycerate";  // CHEBI:16001 kegg.compound:C00236
  species P3G in cytoplasm = 0.1; P3G is "3-phosphoglycerate";  // CHEBI:17794 kegg.compound:C00197
  species P2G in cytoplasm = 0.1; P2G is "2-phosphoglycerate";  // CHEBI:17835 kegg.compound:C00631
  species PEP in cytoplasm = 0.1; PEP is "Phosphoenolpyruvate";  // CHEBI:18021 kegg.compound:C00074
  species PYR in cytoplasm = 3.36; PYR is "Pyruvate";  // CHEBI:15361 kegg.compound:C00022
  species ACE in cytoplasm = 0.04; ACE is "Acetaldehyde";  // CHEBI:15343 kegg.compound:C00084
  species $CO2 in extracellular = 1;  // CHEBI:16526 kegg.compound:C00011
  species $ETOH in extracellular = 50; ETOH is "Ethanol";  // CHEBI:16236 kegg.compound:C00469
  species $SUCC in extracellular = 0.1; SUCC is "Succinate";  // CHEBI:30031
  species $X in cytoplasm = 0.1;
  species GA3P in cytoplasm = 0.05; GA3P is "glyceraldehyde 3-phosphate";  // CHEBI:17138
  species DHAP in cytoplasm = 1; DHAP is "dihydroxyacetone phosphate";  // CHEBI:16108
  species $GLY in extracellular = 0.15; GLY is "Glycerol";  // CHEBI:17754 kegg.compound:C00116
  species D6PGluconoLactone in cytoplasm = 0.1; D6PGluconoLactone is "D-6-phosphoglucono-delta-lactone";  // CHEBI:16938
  species D6PGluconate in cytoplasm = 0.1; D6PGluconate is "6-phosphogluconate";  // CHEBI:16863
  species NADP in cytoplasm = 0.4; NADP is "NADP+";  // CHEBI:18009
  species NADPH in cytoplasm = 1.6;  // CHEBI:16474
  species Ribulose5P in cytoplasm = 0.1; Ribulose5P is "ribulose 5-phosphate";  // CHEBI:17363
  species Ribose5P in cytoplasm = 0.1; Ribose5P is "ribose 5-phosphate";  // CHEBI:17797
  species Xyl5P in cytoplasm = 0.1; Xyl5P is "xylulose 5-phosphate";  // CHEBI:16332
  species Seduhept7P in cytoplasm = 0.1; Seduhept7P is "sedoheptulose 7-phosphate";  // CHEBI:15721
  species Erythrose4P in cytoplasm = 0; Erythrose4P is "erythrose 4-phosphate";  // CHEBI:48153
  species $GLCo in extracellular = 50; GLCo is "Extracellular Glucose";  // CHEBI:17234 kegg.compound:C00293
  species GLCi in cytoplasm = 0.087; GLCi is "Glucose in Cytosol";  // CHEBI:17234 kegg.compound:C00293
  species $F26BP in cytoplasm = 0.02; F26BP is "F2,6P";  // CHEBI:28602 kegg.compound:C00665

  // Parameters:
  k_rel_TPI = 1 dimensionless;
  k_rel_GAPDH = 1 dimensionless;
  ratio_NADPH_NADP has dimensionless;
  SUMAXP = 4.1; SUMAXP is "sum of AXP conc";  // hasPart kegg.compound:C00020 kegg.compound:C00008 kegg.compound:C00002; hasPart CHEBI:16027 CHEBI:16761 CHEBI:15422

  // Assignment rules:
  ratio_NADPH_NADP := NADPH/NADP;

  // Reactions:
  vGLK: GLCi + P -> G6P; cytoplasm*(VmGLK*(-(G6P*(SUMAXP - (SUMAXP^2 - 2*SUMAXP*P + 8*vGLK_KeqAK*SUMAXP*P + P^2 - 4*vGLK_KeqAK*P^2)^0.5)/((1 - 4*vGLK_KeqAK)*KeqGLK)) + GLCi*(-SUMAXP + P - 4*vGLK_KeqAK*P + (SUMAXP^2 - 2*SUMAXP*P + 8*vGLK_KeqAK*SUMAXP*P + P^2 - 4*vGLK_KeqAK*P^2)^0.5)/(2 - 8*vGLK_KeqAK))/(KmGLKATP*KmGLKGLCi*(1 + G6P/KmGLKG6P + GLCi/KmGLKGLCi)*(1 + (SUMAXP - (SUMAXP^2 - 2*SUMAXP*P + 8*vGLK_KeqAK*SUMAXP*P + P^2 - 4*vGLK_KeqAK*P^2)^0.5)/((1 - 4*vGLK_KeqAK)*KmGLKADP) + (-SUMAXP + P - 4*vGLK_KeqAK*P + (SUMAXP^2 - 2*SUMAXP*P + 8*vGLK_KeqAK*SUMAXP*P + P^2 - 4*vGLK_KeqAK*P^2)^0.5)/((2 - 8*vGLK_KeqAK)*KmGLKATP)))); vGLK is "Hexokinase";  // isHomologTo reactome:REACT_1318; ec-code:2.7.1.2 kegg.reaction:R00299
    VmGLK = 226.452 mMpermin; vGLK_KeqAK = 0.45 dimensionless; KeqGLK = 3800 dimensionless; KmGLKATP = 0.15 mM; KmGLKGLCi = 0.08 mM; KmGLKG6P = 30 mM; KmGLKADP = 0.23 mM;
  vPGI: G6P -> F6P; cytoplasm*(VmPGI/KmPGIG6P*(G6P - F6P/KeqPGI)/(1 + G6P/KmPGIG6P + F6P/KmPGIF6P)); vPGI is "Glucose-6-phosphate isomerase";  // isHomologTo reactome:REACT_116; ec-code:5.3.1.9 kegg.reaction:R00771
    VmPGI = 339.677 mMpermin; KmPGIG6P = 1.4 mM; KeqPGI = 0.314 dimensionless; KmPGIF6P = 0.3 mM;
  vPFK: F6P + P -> F16P; cytoplasm*(gR*VmPFK*F6P*(-SUMAXP + P - 4*vPFK_KeqAK*P + (SUMAXP^2 - 2*SUMAXP*P + 8*vPFK_KeqAK*SUMAXP*P + P^2 - 4*vPFK_KeqAK*P^2)^0.5)*(1 + F6P/KmPFKF6P + (-SUMAXP + P - 4*vPFK_KeqAK*P + (SUMAXP^2 - 2*SUMAXP*P + 8*vPFK_KeqAK*SUMAXP*P + P^2 - 4*vPFK_KeqAK*P^2)^0.5)/((2 - 8*vPFK_KeqAK)*KmPFKATP) + gR*F6P*(-SUMAXP + P - 4*vPFK_KeqAK*P + (SUMAXP^2 - 2*SUMAXP*P + 8*vPFK_KeqAK*SUMAXP*P + P^2 - 4*vPFK_KeqAK*P^2)^0.5)/((2 - 8*vPFK_KeqAK)*KmPFKATP*KmPFKF6P))/((2 - 8*vPFK_KeqAK)*KmPFKATP*KmPFKF6P*(L0*(1 + CPFKF26BP*F26BP/KPFKF26BP + CPFKF16BP*F16P/KPFKF16BP)^2*(1 + 2*CPFKAMP*vPFK_KeqAK*(SUMAXP - (SUMAXP^2 - 2*SUMAXP*P + 8*vPFK_KeqAK*SUMAXP*P + P^2 - 4*vPFK_KeqAK*P^2)^0.5)^2/((-1 + 4*vPFK_KeqAK)*KPFKAMP*(SUMAXP - P + 4*vPFK_KeqAK*P - (SUMAXP^2 - 2*SUMAXP*P + 8*vPFK_KeqAK*SUMAXP*P + P^2 - 4*vPFK_KeqAK*P^2)^0.5)))^2*(1 + CiPFKATP*(-SUMAXP + P - 4*vPFK_KeqAK*P + (SUMAXP^2 - 2*SUMAXP*P + 8*vPFK_KeqAK*SUMAXP*P + P^2 - 4*vPFK_KeqAK*P^2)^0.5)/((2 - 8*vPFK_KeqAK)*KiPFKATP))^2*(1 + CPFKATP*(-SUMAXP + P - 4*vPFK_KeqAK*P + (SUMAXP^2 - 2*SUMAXP*P + 8*vPFK_KeqAK*SUMAXP*P + P^2 - 4*vPFK_KeqAK*P^2)^0.5)/((2 - 8*vPFK_KeqAK)*KmPFKATP))^2/((1 + F26BP/KPFKF26BP + F16P/KPFKF16BP)^2*(1 + 2*vPFK_KeqAK*(SUMAXP - (SUMAXP^2 - 2*SUMAXP*P + 8*vPFK_KeqAK*SUMAXP*P + P^2 - 4*vPFK_KeqAK*P^2)^0.5)^2/((-1 + 4*vPFK_KeqAK)*KPFKAMP*(SUMAXP - P + 4*vPFK_KeqAK*P - (SUMAXP^2 - 2*SUMAXP*P + 8*vPFK_KeqAK*SUMAXP*P + P^2 - 4*vPFK_KeqAK*P^2)^0.5)))^2*(1 + (-SUMAXP + P - 4*vPFK_KeqAK*P + (SUMAXP^2 - 2*SUMAXP*P + 8*vPFK_KeqAK*SUMAXP*P + P^2 - 4*vPFK_KeqAK*P^2)^0.5)/((2 - 8*vPFK_KeqAK)*KiPFKATP))^2) + (1 + F6P/KmPFKF6P + (-SUMAXP + P - 4*vPFK_KeqAK*P + (SUMAXP^2 - 2*SUMAXP*P + 8*vPFK_KeqAK*SUMAXP*P + P^2 - 4*vPFK_KeqAK*P^2)^0.5)/((2 - 8*vPFK_KeqAK)*KmPFKATP) + gR*F6P*(-SUMAXP + P - 4*vPFK_KeqAK*P + (SUMAXP^2 - 2*SUMAXP*P + 8*vPFK_KeqAK*SUMAXP*P + P^2 - 4*vPFK_KeqAK*P^2)^0.5)/((2 - 8*vPFK_KeqAK)*KmPFKATP*KmPFKF6P))^2))); vPFK is "Phosphofructokinase";  // modifiers: F26BP; isHomologTo reactome:REACT_736; ec-code:2.7.1.11 kegg.reaction:R00756
    gR = 5.12 dimensionless; VmPFK = 182.903 mMpermin; vPFK_KeqAK = 0.45 dimensionless; KmPFKF6P = 0.1 mM; KmPFKATP = 0.71 mM; L0 = 0.66 dimensionless; CPFKF26BP = 0.0174 dimensionless; KPFKF26BP = 0.000682 mM; CPFKF16BP = 0.397 dimensionless; KPFKF16BP = 0.111 mM; CPFKAMP = 0.0845 dimensionless; KPFKAMP = 0.0995 mM; CiPFKATP = 100 dimensionless; KiPFKATP = 0.65 mM; CPFKATP = 3 dimensionless;
  vALD: F16P -> DHAP + GA3P; cytoplasm*(VmALD*F16P/KmALDF16P*(1 - DHAP*GA3P/(F16P*KeqALD))/(1 + F16P/KmALDF16P + DHAP/KmALDDHAP + GA3P/KmALDGAP + F16P*GA3P/(KmALDF16P*KmALDGAPi) + DHAP*GA3P/(KmALDDHAP*KmALDGAP))); vALD is "Aldolase";  // isHomologTo reactome:REACT_1602; ec-code:4.1.2.13 kegg.reaction:R01070
    VmALD = 322.258 mMpermin; vALD_KeqTPI = 0.045 dimensionless; KeqALD = 0.069 dimensionless; KmALDF16P = 0.3 mM; KmALDDHAP = 2.4 mM; KmALDGAP = 2 mM; KmALDGAPi = 10 mM;
  vG3PDH: DHAP + NADH -> $GLY + NAD; cytoplasm*(VmG3PDH*(-(GLY*NAD/KeqG3PDH) + NADH*DHAP/(1 + vG3PDH_KeqTPI))/(KmG3PDHDHAP*KmG3PDHNADH*(1 + NAD/KmG3PDHNAD + NADH/KmG3PDHNADH)*(1 + GLY/KmG3PDHGLY + DHAP/((1 + vG3PDH_KeqTPI)*KmG3PDHDHAP)))); vG3PDH is "Glycerol 3-phosphate dehydrogenase";  // isVersionOf ec-code:1.1.1.8
    VmG3PDH = 70.15 mMpermin; KeqG3PDH = 4300 dimensionless; vG3PDH_KeqTPI = 0.045 dimensionless; KmG3PDHDHAP = 0.4 mM; KmG3PDHNADH = 0.023 mM; KmG3PDHNAD = 0.93 mM; KmG3PDHGLY = 1 mM;
  vGAPDH: GA3P + NAD -> BPG + NADH; cytoplasm*(k_rel_GAPDH*VmGAPDHf*GA3P*NAD/(KmGAPDHGAP*KmGAPDHNAD)*(1 - BPG*NADH/(GA3P*NAD*KeqGAPDH))/((1 + GA3P/KmGAPDHGAP + BPG/KmGAPDHBPG)*(1 + NAD/KmGAPDHNAD + NADH/KmGAPDHNADH))); vGAPDH is "Glyceraldehyde 3-phosphate dehydrogenase";  // isHomologTo reactome:REACT_1847; ec-code:1.2.1.12 kegg.reaction:R01061
    VmGAPDHr = 6549.68 mMpermin; KmGAPDHBPG = 0.0098 mM; KmGAPDHNADH = 0.06 mM; vGAPDH_KeqTPI = 0.045 dimensionless; VmGAPDHf = 1184.52 mMpermin; KmGAPDHGAP = 0.21 mM; KmGAPDHNAD = 0.09 mM; KeqGAPDH = 0.005 dimensionless;
  vPGK: BPG -> P3G + P; cytoplasm*(VmPGK*(KeqPGK*BPG*(SUMAXP - (SUMAXP^2 - 2*SUMAXP*P + 8*vPGK_KeqAK*SUMAXP*P + P^2 - 4*vPGK_KeqAK*P^2)^0.5)/(1 - 4*vPGK_KeqAK) - (-SUMAXP + P - 4*vPGK_KeqAK*P + (SUMAXP^2 - 2*SUMAXP*P + 8*vPGK_KeqAK*SUMAXP*P + P^2 - 4*vPGK_KeqAK*P^2)^0.5)*P3G/(2 - 8*vPGK_KeqAK))/(KmPGKATP*KmPGKP3G*(1 + (SUMAXP - (SUMAXP^2 - 2*SUMAXP*P + 8*vPGK_KeqAK*SUMAXP*P + P^2 - 4*vPGK_KeqAK*P^2)^0.5)/((1 - 4*vPGK_KeqAK)*KmPGKADP) + (-SUMAXP + P - 4*vPGK_KeqAK*P + (SUMAXP^2 - 2*SUMAXP*P + 8*vPGK_KeqAK*SUMAXP*P + P^2 - 4*vPGK_KeqAK*P^2)^0.5)/((2 - 8*vPGK_KeqAK)*KmPGKATP))*(1 + BPG/KmPGKBPG + P3G/KmPGKP3G))); vPGK is "Phosphoglycerate kinase";  // isHomologTo reactome:REACT_1771; ec-code:2.7.2.3 kegg.reaction:R01512
    VmPGK = 1306.45 mMpermin; KeqPGK = 3200 dimensionless; vPGK_KeqAK = 0.45 dimensionless; KmPGKATP = 0.3 mM; KmPGKP3G = 0.53 mM; KmPGKADP = 0.2 mM; KmPGKBPG = 0.003 mM;
  vPGM: P3G -> P2G; cytoplasm*(VmPGM/KmPGMP3G*(P3G - P2G/KeqPGM)/(1 + P3G/KmPGMP3G + P2G/KmPGMP2G)); vPGM is "Phosphoglycerate mutase";  // isHomologTo reactome:REACT_576; ec-code:5.4.2.1 kegg.reaction:R01518
    VmPGM = 2525.81 mMpermin; KmPGMP3G = 1.2 mM; KeqPGM = 0.19 dimensionless; KmPGMP2G = 0.08 mM;
  vENO: P2G -> PEP; cytoplasm*(VmENO/KmENOP2G*(P2G - PEP/KeqENO)/(1 + P2G/KmENOP2G + PEP/KmENOPEP)); vENO is "Enolase";  // isHomologTo reactome:REACT_1400; ec-code:4.2.1.11 kegg.reaction:R00658
    VmENO = 365.806 mMpermin; KmENOP2G = 0.04 mM; KeqENO = 6.7 dimensionless; KmENOPEP = 0.5 mM;
  vPYK: PEP -> PYR + P; cytoplasm*(VmPYK/(KmPYKPEP*KmPYKADP)*(PEP*(SUMAXP - (P^2 - 4*vPYK_KeqAK*P^2 - 2*P*SUMAXP + 8*vPYK_KeqAK*P*SUMAXP + SUMAXP^2)^0.5)/(1 - 4*vPYK_KeqAK) - PYR*(P - 4*vPYK_KeqAK*P - SUMAXP + (P^2 - 4*vPYK_KeqAK*P^2 - 2*P*SUMAXP + 8*vPYK_KeqAK*P*SUMAXP + SUMAXP^2)^0.5)/(2 - 8*vPYK_KeqAK)/KeqPYK)/((1 + PEP/KmPYKPEP + PYR/KmPYKPYR)*(1 + (P - 4*vPYK_KeqAK*P - SUMAXP + (P^2 - 4*vPYK_KeqAK*P^2 - 2*P*SUMAXP + 8*vPYK_KeqAK*P*SUMAXP + SUMAXP^2)^0.5)/(2 - 8*vPYK_KeqAK)/KmPYKATP + (SUMAXP - (P^2 - 4*vPYK_KeqAK*P^2 - 2*P*SUMAXP + 8*vPYK_KeqAK*P*SUMAXP + SUMAXP^2)^0.5)/(1 - 4*vPYK_KeqAK)/KmPYKADP))); vPYK is "Pyruvate kinase";  // isHomologTo reactome:REACT_1911; ec-code:2.7.1.40 kegg.reaction:R00200
    VmPYK = 1088.71 mMpermin; KmPYKPEP = 0.14 mM; KmPYKADP = 0.53 mM; vPYK_KeqAK = 0.45 dimensionless; KeqPYK = 6500 dimensionless; KmPYKPYR = 21 mM; KmPYKATP = 1.5 mM;
  vPDC: PYR -> ACE + $CO2; cytoplasm*(VmPDC*PYR^nPDC/KmPDCPYR^nPDC/(1 + PYR^nPDC/KmPDCPYR^nPDC)); vPDC is "Pyruvate decarboxylase";  // ec-code:4.1.1.1 kegg.reaction:R00224
    VmPDC = 174.194 mMpermin; nPDC = 1.9 dimensionless; KmPDCPYR = 4.33 mM;
  vSUC: 2 ACE + 3 NAD -> 3 NADH + $SUCC; cytoplasm*KSUCC*ACE; vSUC is "Succinate synthesis";  // isVersionOf GO:0006105
    KSUCC = 21.4 permin;
  vADH: ACE + NADH -> $ETOH + NAD; cytoplasm*(-(VmADH/(KiADHNAD*KmADHETOH)*(NAD*ETOH - NADH*ACE/KeqADH)/(1 + NAD/KiADHNAD + KmADHNAD*ETOH/(KiADHNAD*KmADHETOH) + KmADHNADH*ACE/(KiADHNADH*KmADHACE) + NADH/KiADHNADH + NAD*ETOH/(KiADHNAD*KmADHETOH) + KmADHNADH*NAD*ACE/(KiADHNAD*KiADHNADH*KmADHACE) + KmADHNAD*ETOH*NADH/(KiADHNAD*KmADHETOH*KiADHNADH) + NADH*ACE/(KiADHNADH*KmADHACE) + NAD*ETOH*ACE/(KiADHNAD*KmADHETOH*KiADHACE) + ETOH*NADH*ACE/(KiADHETOH*KiADHNADH*KmADHACE)))); vADH is "Alcohol dehydrogenase";  // isHomologTo reactome:REACT_799; isVersionOf ec-code:1.1.1.2 kegg.reaction:R00746
    VmADH = 810 mMpermin; KiADHNAD = 0.92 mM; KmADHETOH = 17 mM; KeqADH = 6.9e-5 dimensionless; KmADHNAD = 0.17 mM; KmADHNADH = 0.11 mM; KiADHNADH = 0.031 mM; KmADHACE = 1.11 mM; KiADHACE = 1.1 mM; KiADHETOH = 90 mM;
  vATP: P -> $X; cytoplasm*(KATPASE*(P - 4*vATP_KeqAK*P - SUMAXP + (P^2 - 4*vATP_KeqAK*P^2 - 2*P*SUMAXP + 8*vATP_KeqAK*P*SUMAXP + SUMAXP^2)^0.5)/(2 - 8*vATP_KeqAK)); vATP is "ATPase activity";  // isVersionOf ec-code:3.6.1.3 GO:0016887
    KATPASE = 39.5 permin; vATP_KeqAK = 0.45 dimensionless;
  vTPI: GA3P -> DHAP; cytoplasm*(k_rel_TPI*(VmDHAP*GA3P/vTPI_KmGA3P - VmGA3P*DHAP/KmDHAP)/(1 + GA3P/vTPI_KmGA3P + DHAP/KmDHAP));  // isVersionOf kegg.reaction:R01015; isVersionOf GO:0004807; isVersionOf ec-code:5.3.1.1
    vTPI_KmGA3P = 1.27 mM; KmDHAP = 1.23 mM; VmDHAP = 10900 mMpermin; VmGA3P = 555 mMpermin;
  vG6PDH: G6P + NADP => D6PGluconoLactone + NADPH; cytoplasm*(VmG6PDH*G6P*NADP/(KmG6P*vG6PDH_KmNADP)/((1 + G6P/KmG6P + NADPH/vG6PDH_KiNADPH)*(1 + NADP/vG6PDH_KmNADP)));  // isVersionOf kegg.reaction:R00835; isVersionOf ec-code:1.1.1.49; isVersionOf GO:0004345
    VmG6PDH = 4 mMpermin; KmG6P = 0.04 mM; vG6PDH_KmNADP = 0.02 mM; vG6PDH_KiNADPH = 0.017 mM;
  v6PGL: D6PGluconoLactone => D6PGluconate; cytoplasm*(Vm6PGL*D6PGluconoLactone/(Km6PGL + D6PGluconoLactone));  // isVersionOf GO:0017057; isVersionOf kegg.reaction:R02035
    Vm6PGL = 4 mMpermin; Km6PGL = 0.8 mM;
  vGluDH: D6PGluconate + NADP => Ribulose5P + NADPH; cytoplasm*(VmGluDH*D6PGluconate*NADP/(KmGluconate*vGluDH_KmNADP)/((1 + D6PGluconate/KmGluconate + NADPH/vGluDH_KiNADPH)*(1 + NADP/vGluDH_KmNADP)));  // isVersionOf kegg.reaction:R01528; isVersionOf GO:0004616
    VmGluDH = 4 mMpermin; KmGluconate = 0.02 mM; vGluDH_KmNADP = 0.03 mM; vGluDH_KiNADPH = 0.03 mM;
  vPPI: Ribulose5P -> Ribose5P; cytoplasm*((VmPPIf*Ribulose5P/vPPI_KmRibu5P - VmPPIr*Ribose5P/KmRibo5P)/(1 + Ribulose5P/vPPI_KmRibu5P + Ribose5P/KmRibo5P));  // isVersionOf kegg.reaction:R01056; isVersionOf GO:0004751
    VmPPIf = 3458 mMpermin; VmPPIr = 3458 mMpermin; vPPI_KmRibu5P = 1.6 mM; KmRibo5P = 1.6 mM;
  vTransk1: Ribose5P + Xyl5P -> GA3P + Seduhept7P; cytoplasm*((VmTransk1f*Ribose5P*Xyl5P/(KmRibose5P*vTransk1_KmXyl5P) - VmTransk1r*GA3P*Seduhept7P/(vTransk1_KmGA3P*vTransk1_KmSeduhept))/((1 + Ribose5P/KmRibose5P + GA3P/vTransk1_KmGA3P)*(1 + Xyl5P/vTransk1_KmXyl5P + Seduhept7P/vTransk1_KmSeduhept)));  // isVersionOf GO:0004802; isVersionOf kegg.reaction:R01641
    VmTransk1f = 4 mMpermin; VmTransk1r = 2 mMpermin; KmRibose5P = 0.1 mM; vTransk1_KmXyl5P = 0.15 mM; vTransk1_KmGA3P = 0.1 mM; vTransk1_KmSeduhept = 0.15 mM;
  vR5PI: Ribulose5P -> Xyl5P; cytoplasm*((VmR5PIf*Ribulose5P/vR5PI_KmRibu5P - VmR5PIr*Xyl5P/KmXyl)/(1 + Ribulose5P/vR5PI_KmRibu5P + Xyl5P/KmXyl));
    VmR5PIf = 1039 mMpermin; VmR5PIr = 1039 mMpermin; vR5PI_KmRibu5P = 1.5 mM; KmXyl = 1.5 mM;
  vTransald: Seduhept7P + GA3P -> F6P + Erythrose4P; cytoplasm*((VmTransaldf*GA3P*Seduhept7P/(vTransald_KmGA3P*vTransald_KmSeduhept) - VmTransaldr*F6P*Erythrose4P/(vTransald_KmF6P*vTransald_KmEry4P))/((1 + GA3P/vTransald_KmGA3P + F6P/vTransald_KmF6P)*(1 + Seduhept7P/vTransald_KmSeduhept + Erythrose4P/vTransald_KmEry4P)));  // isVersionOf GO:0004801; isVersionOf kegg.reaction:R01827
    VmTransaldf = 55 mMpermin; VmTransaldr = 10 mMpermin; vTransald_KmGA3P = 0.22 mM; vTransald_KmSeduhept = 0.18 mM; vTransald_KmF6P = 0.32 mM; vTransald_KmEry4P = 0.018 mM;
  vTransk2: Xyl5P + Erythrose4P -> GA3P + F6P; cytoplasm*((VmTransk2f*Erythrose4P*Xyl5P/(vTransk2_KmEry4P*vTransk2_KmXyl5P) - VmTransk2r*F6P*GA3P/(vTransk2_KmF6P*vTransk2_KmGA3P))/((1 + Xyl5P/vTransk2_KmXyl5P + GA3P/vTransk2_KmGA3P)*(1 + Erythrose4P/vTransk2_KmEry4P + F6P/vTransk2_KmF6P)));  // isVersionOf kegg.reaction:R01830; isVersionOf GO:0004802
    VmTransk2f = 3.2 mMpermin; VmTransk2r = 43 mMpermin; vTransk2_KmXyl5P = 0.16 mM; vTransk2_KmEry4P = 0.09 mM; vTransk2_KmF6P = 1.1 mM; vTransk2_KmGA3P = 2.1 mM;
  vNADPH: NADPH => NADP; cytoplasm*kNADPH*NADPH;  // isVersionOf GO:0070995
    kNADPH = 2 permin;
  vGLT: $GLCo -> GLCi; cytoplasm*(VmGLT*(GLCo - GLCi/KeqGLT)/(KmGLTGLCo*(1 + GLCo/KmGLTGLCo + GLCi/KmGLTGLCi + 0.91*GLCo*GLCi/(KmGLTGLCi*KmGLTGLCo)))); vGLT is "Glucose transport";  // isVersionOf GO:0046323; isHomologTo reactome:REACT_2092
    VmGLT = 97.264 mMpermin; KeqGLT = 1 mM; KmGLTGLCo = 1.1918 mM; KmGLTGLCi = 1.1918 mM;

  // Unit definitions:
  unit substance = 1e-3 mole; substance is "millimole";
  unit time = 60 second; time is "minute";
  unit mMpermin = 1e-3 mole / (litre * 60 second);
  unit mM = 1e-3 mole / litre;
  unit permin = 1 / (60 second);
end
