// SBML level 2 version 4

model MODEL1402250000()
  // Ribba2012 - Low-grade gliomas, tumour growth inhibition model
  // Using longitudinal mean tumour diameter (MTD) data, this model describe the size evolution of low-grade glioma (LGG) in patients treated with chemotherapy or radiotherapy.
  // This model is described in the article:
  // A tumour growth inhibition model for low-grade glioma treated with chemotherapy or radiotherapy
  // Ribba B, Kaloshi G, Peyre M, Ricard D, Calvez V, Tod M, Cajavec-Bernard B, Idbaih A, Psimaras D, Dainese L, Pallud J, Cartalat-Carel S, Delattre JY, Honnorat J, Grenier E, Ducray F.
  // Clin. Cancer Res. 2012 Sep; 18(18): 5071-5080
  // Abstract:
  // PURPOSE: To develop a tumor growth inhibition model for adult diffuse low-grade gliomas (LGG) able to describe tumor size evolution in patients treated with chemotherapy or radiotherapy.
  // EXPERIMENTAL DESIGN: Using longitudinal mean tumor diameter (MTD) data from 21 patients treated with first-line procarbazine, 1-(2-chloroethyl)-3-cyclohexyl-l-nitrosourea, and vincristine (PCV) chemotherapy, we formulated a model consisting of a system of differential equations, incorporating tumor-specific and treatment-related parameters that reflect the response of proliferative and quiescent tumor tissue to treatment. The model was then applied to the analysis of longitudinal tumor size data in 24 patients treated with first-line temozolomide (TMZ) chemotherapy and in 25 patients treated with first-line radiotherapy.
  // RESULTS: The model successfully described the MTD dynamics of LGG before, during, and after PCV chemotherapy. Using the same model structure, we were also able to successfully describe the MTD dynamics in LGG patients treated with TMZ chemotherapy or radiotherapy. Tumor-specific parameters were found to be consistent across the three treatment modalities. The model is robust to sensitivity analysis, and preliminary results suggest that it can predict treatment response on the basis of pretreatment tumor size data.
  // CONCLUSIONS: Using MTD data, we propose a tumor growth inhibition model able to describe LGG tumor size evolution in patients treated with chemotherapy or radiotherapy. In the future, this model might be used to predict treatment efficacy in LGG patients and could constitute a rational tool to conceive more effective chemotherapy schedules.
  // This model is hosted on BioModels Database and identified by: BIOMD0000000521 .
  // To cite BioModels Database, please use: BioModels Database: An enhanced, curated and annotated resource for published quantitative kinetic models .
  // To the extent possible under law, all copyright and related or neighbouring rights to this encoded model have been dedicated to the public domain worldwide. Please refer to CC0 Public Domain Dedication for more information.
  // biomodels.db:MODEL1402250000
  // biomodels.db:BIOMD0000000521
  // isDescribedBy pubmed:22761472
  // hasProperty mamo:MAMO_0000046
  // hasTaxon taxonomy:9606
  // isVersionOf GO:0002357 DOID:0060101

  // Compartments:
  compartment plama = 1; plama is "plasma";  // isVersionOf BTO:0000131
  compartment tissue = 1;  // isVersionOf FMA:9637

  // Species:
  species C in plama = 1; C is "PCV_plasma";  // hasPart CHEBI:71417 CHEBI:28445 chembl.compound:CHEMBL514; occursIn BTO:0000131
  species P in tissue = 7.13; P is "Proliferative tissue";  // isVersionOf FMA:9637; hasProperty PATO:0002102
  species Q in tissue = 41.2; Q is "nonproliferative quiescent tissue";  // isVersionOf FMA:9637; hasProperty PATO:0002355
  species Qp in tissue = 0; Qp is "damaged quiescent cells";  // hasProperty PATO:0001020 PATO:0002355; isVersionOf FMA:9637

  // Parameters:
  P0 = 7.13;
  Q0 = 41.2;
  lambda_P = 0.121;
  k_PQ = 0.00295;
  k_Qp_P = 0.0031;
  delta_QP = 0.0087;
  gamma = 0.729;
  KDE = 0.24;
  K = 100;

  // Assignment rules:
  Pstar := P + Q + Qp;

  // Rate rules:
  C' = -KDE*C;
  P' = lambda_P*P*(1 - Pstar/K) + k_Qp_P*Qp - k_PQ*P - gamma*C*KDE*P;
  Q' = k_PQ - gamma*C*KDE*Q;
  Qp' = gamma*C*KDE*Q - k_Qp_P*Qp - delta_QP*Qp;
end
