// SBML level 2 version 4

model MODEL1511160000()
  // Nayak2015 - Blood Coagulation Network - Predicting the Effects of Various Therapies on Biomarkers
  // The SBML model is generated from SimBiology. The SimBiology (.sbproj) file is available for download from the curation tab.
  // This model is described in the article:
  // Using a Systems Pharmacology Model of the Blood Coagulation Network to Predict the Effects of Various Therapies on Biomarkers.
  // Nayak S, Lee D, Patel-Hett S, Pittman DD, Martin SW, Heatherington AC, Vicini P, Hua F.
  // CPT Pharmacometrics Syst Pharmacol. 2015 Jul;4(7):396-405.
  // Abstract:
  // A number of therapeutics have been developed or are under development aiming to modulate the coagulation network to treat various diseases. We used a systems model to better understand the effect of modulating various components on blood coagulation. A computational model of the coagulation network was built to match in-house in vitro thrombin generation and activated Partial Thromboplastin Time (aPTT) data with various concentrations of recombinant factor VIIa (FVIIa) or factor Xa added to normal human plasma or factor VIII-deficient plasma. Sensitivity analysis applied to the model revealed that lag time, peak thrombin concentration, area under the curve (AUC) of the thrombin generation profile, and aPTT show different sensitivity to changes in coagulation factors' concentrations and type of plasma used (normal or factor VIII-deficient). We also used the model to explore how variability in concentrations of the proteins in coagulation network can impact the response to FVIIa treatment.
  // This model is hosted on BioModels Database and identified by: MODEL1511160000.
  // To cite BioModels Database, please use: BioModels: Content, Features, Functionality and Use.
  // To the extent possible under law, all copyright and related or neighbouring rights to this encoded model have been dedicated to the public domain worldwide. Please refer to CC0 Public Domain Dedication for more information.
  // biomodels.db:MODEL1511160000
  // biomodels.db:BIOMD0000000611
  // isDescribedBy pubmed:26312163
  // isDerivedFrom biomodels.db:MODEL1108260014 biomodels.db:BIOMD0000000340 biomodels.db:BIOMD0000000338 biomodels.db:BIOMD0000000339 biomodels.db:BIOMD0000000335
  // isVersionOf GO:0007596
  // hasTaxon taxonomy:9606

  // Compartments:
  compartment blood = 1;

  // Species:
  species TF in blood = TF_ss/Dilution;
  species TF_VII in blood = 0;
  species VII in blood = VII_ss/Dilution;
  species TF_VIIa in blood = 0;
  species VIIa in blood = VIIa_ss/Dilution;
  species Xa in blood = Xa_ss/Dilution;
  species IIa in blood = 0;
  species TF_VIIa_X in blood = 0;
  species X in blood = X_ss/Dilution;
  species TF_VIIa_Xa in blood = 0;
  species IX in blood = IX_ss/Dilution;
  species TF_VIIa_IX in blood = 0;
  species IXa in blood = 0;
  species II in blood = II_ss/Dilution;
  species VIII in blood = VIII_ss/Dilution;
  species VIIIa in blood = 0;
  species IXa_VIIIa in blood = 0;
  species IXa_VIIIa_X in blood = 0;
  species VIIIa1_L in blood = 0;
  species VIIIa2 in blood = 0;
  species V in blood = V_ss/Dilution;
  species Va in blood = 0;
  species Xa_Va in blood = 0;
  species Xa_Va_II in blood = 0;
  species mIIa in blood = 0;
  species TFPI in blood = TFPI_ss/Dilution;
  species Xa_TFPI in blood = 0;
  species TF_VIIa_Xa_TFPI in blood = 0;
  species ATIII in blood = ATIII_ss/Dilution;
  species Xa_ATIII in blood = 0;
  species mIIa_ATIII in blood = 0;
  species IXa_ATIII in blood = 0;
  species IIa_ATIII in blood = 0;
  species TF_VIIa_ATIII in blood = 0;
  species CA in blood = 0;
  species XII in blood = XII_ss/Dilution;
  species XIIa in blood = 0;
  species PK in blood = PK_ss/Dilution;
  species XIIa_PK in blood = 0;
  species K in blood = 0;
  species XII_K in blood = 0;
  species XIIa_ATIII in blood = 0;
  species XI in blood = XI_ss/Dilution;
  species XIa in blood = 0;
  species XIIa_XI in blood = 0;
  species XIa_ATIII in blood = 0;
  species XIa_IX in blood = 0;
  species IXa_X in blood = 0;
  species VIIa_X in blood = 0;
  species IIa_12mIIa in blood;
  species Tmod in blood = Tmod_ss/Dilution;
  species IIa_Tmod in blood = 0;
  species PC in blood = PC_ss/Dilution;
  species IIa_Tmod_PC in blood = 0;
  species APC in blood = 0;
  species Fg in blood = Fg_ss/Dilution;
  species F in blood = 0;
  species APC_Va in blood = 0;
  species APC_VIIIa in blood = 0;
  species Va_deg in blood = 0;
  species VIIIa_deg in blood = 0;
  species APC_IXa_VIIIa in blood = 0;
  species APC_IXa_VIIIa_X in blood = 0;
  species Xa_VIII in blood = 0;
  species F12 in blood = 0;
  species F12_deg in blood = 0;

  // Parameters:
  k1 = 0.0043339901;
  k2 = 0.0041242451;
  k3 = 0.0019496187;
  k4 = 0.075680013;
  k5 = 0.00033894832;
  k6 = 0.009975373;
  k7 = 1.1527134e-5;
  k8 = 1.3800407;
  k9 = 0.036245656;
  k10 = 8.9987819;
  k11 = 9.5;
  k12 = 0.032999929;
  k13 = 20.6708;
  k14 = 0.010569458;
  k15 = 2.3887492;
  k16 = 3.764127e-5;
  k17 = 1.44895;
  k18 = 0.0050724996;
  k19 = 0.11749508;
  k20 = 0.0013766033;
  k21 = 0.048795021;
  k22 = 42.71401;
  k23 = 3.3e-5;
  k24 = 0.009;
  k25 = 0.0013357963;
  k26 = 0.0013946425; k26 is "k25_1";
  k27 = 0.00040233556; k27 is "k26";
  k29 = 149.91541;
  k30 = 0.10001522;
  k31 = 29.479266;
  k32 = 0.21872155;
  k33 = 0.0001801577;
  k34 = 0.00045;
  k35 = 0.00010062408;
  k36 = 0.25638864;
  k37 = 0.025386917;
  k38 = 1.0556718e-6;
  k39 = 3.55e-6;
  k40 = 2.8169728e-7;
  k41 = 3.917682e-6;
  k42 = 3.2905257e-7;
  k43 = 8.5153312e-6;
  k44 = 0.091852853;
  k45 = 1800;
  k46 = 47.928292;
  k47 = 0.15;
  k48 = 57.613526;
  k49 = 4.1832115;
  k50 = 1.08e-8;
  k54 = 4.8e-7;
  k55 = 0.13081564;
  k56 = 30.668349;
  k57 = 10.565569;
  k58 = 0.13304333;
  k59 = 83.206626;
  k60 = 0.0011427258;
  k61 = 0.059664002;
  k62 = 84.659935;
  k63 = 1.2943783e-5;
  k67 = 19.338228;
  k68 = 0.1857857;
  k70 = 1.0740276e4;
  k71 = 0.1043597;
  k72 = 2.0649128;
  k73 = 0.07934338;
  k74 = 1.9895374;
  k75 = 0.24027638;
  k76 = 0.032359973;
  k77 = 0.077518002;
  k78 = 2.0869571;
  k79 = 0.029887563;
  k80 = 0.1289308;
  k81 = 1.4001578;
  k82 = 0.013215482;
  k83 = 0.15;
  k84 = 3.15;
  k85 = 0.0345;
  ATIII_ss = 3400;
  Dilution = 1.7143;
  Fg_ss = 9000;
  II_ss = 1400;
  IX_ss = 90;
  PC_ss = 60;
  PK_ss = 450;
  TF_ss = 0.001743;
  TFPI_ss = 2.5;
  Tmod_ss = 0.5;
  V_ss = 20;
  VII_ss = 10;
  VIIa_ss = 0.1;
  VIII_ss = 0.7;
  X_ss = 160;
  Xa_ss = 0;
  XI_ss = 31;
  XII_ss = 340;
  k86 = 0.00010958881;
  k28 = 0.12914436;
  k66 = 0.10523968;
  k69 = 90.211653;
  k27_167 = 0.006;
  k51 = 0.13632245;
  k52 = 18.705029;
  k53 = 0.00035000006;
  k64 = 0.11573051;
  k65 = 0.050084768;
  n1 = 0.05;

  // Assignment rules:
  IIa_12mIIa := IIa + 1.2*mIIa;

  // Reactions:
  // Hockin - Mann, Blood Coagulation Kinetics
  R1: TF + VII -> TF_VII; k2*TF*VII - k1*TF_VII;
  // Hockin - Mann, Blood Coagulation Kinetics Reaction 2, k4 and k3 value taken as it is
  R2: TF + VIIa -> TF_VIIa; k4*TF*VIIa - k3*TF_VIIa;
  // Hockin - Mann, Blood Coagulation Kinetics Reaction 3, k5 value taken as it is
  R3: TF_VIIa + VII => TF_VIIa + VIIa; k5*TF_VIIa*VII;
  // Hockin - Mann, Blood Coagulation Kinetics Reaction 4, k6 value taken as it is
  R4: Xa + VII => Xa + VIIa; k6*Xa*VII;
  // Hockin - Mann, Blood Coagulation Kinetics Reaction 5, k7 value taken as it is
  R5: IIa + VII => IIa + VIIa; k7*IIa*VII;
  // Hockin - Mann, Blood Coagulation Kinetics Reaction 6, k10 and k9 and k8 value taken as it is
  R6: TF_VIIa + X -> TF_VIIa_X; k9*TF_VIIa*X - k8*TF_VIIa_X;
  // Hockin - Mann, Blood Coagulation Kinetics Reaction 6b, k10 value taken as it is
  R6b: TF_VIIa_X => TF_VIIa_Xa; k10*TF_VIIa_X;
  // Hockin - Mann, Blood Coagulation Kinetics Reaction 7, k12 and k11 - value taken as it is
  R7: TF_VIIa + Xa -> TF_VIIa_Xa; k12*TF_VIIa*Xa - k11*TF_VIIa_Xa;
  // Hockin - Mann, Blood Coagulation Kinetics Reaction 8, k14 and k13 value taken as it is
  R8: TF_VIIa + IX -> TF_VIIa_IX; k14*TF_VIIa*IX - k13*TF_VIIa_IX;
  // Hockin - Mann, Blood Coagulation Kinetics Reaction 8b, k15 value taken as it is
  R8b: TF_VIIa_IX => TF_VIIa + IXa; k15*TF_VIIa_IX;
  // Hockin - Mann, Blood Coagulation Kinetics Reaction 9, k16 value taken as it is
  R9: Xa + II => Xa + IIa + F12; k16*Xa*II;
  // Hockin - Mann, Blood Coagulation Kinetics Reaction 10, k17 value taken as it is
  R10: IIa + VIII => IIa + VIIIa; k17*IIa*VIII;
  // Hockin - Mann, Blood Coagulation Kinetics Reaction 11, k19 and k18 value taken as it is
  R11: IXa + VIIIa -> IXa_VIIIa; k19*IXa*VIIIa - k18*IXa_VIIIa;
  // Hockin - Mann, Blood Coagulation Kinetics Reaction 12, k21 and k20 value taken as it is
  R12: IXa_VIIIa + X -> IXa_VIIIa_X; k21*IXa_VIIIa*X - k20*IXa_VIIIa_X;
  // Hockin - Mann, Blood Coagulation Kinetics Reaction 12b, k22 value taken as it is
  R12b: IXa_VIIIa_X => IXa_VIIIa + Xa; k22*IXa_VIIIa_X;
  // Hockin - Mann, Blood Coagulation Kinetics Reaction 13, k24 and k23 value taken as it is
  R13: VIIIa -> VIIIa1_L + VIIIa2; k24*VIIIa - k23*VIIIa1_L*VIIIa2;
  // Hockin - Mann, Blood Coagulation Kinetics Reaction 14, k25 value taken as it is
  R14: IXa_VIIIa_X => VIIIa1_L + VIIIa2 + X + IXa; k25*IXa_VIIIa_X;
  // Hockin - Mann, Blood Coagulation Kinetics Reaction 15, k25_1 is same as k25 - value taken as it is
  R15: IXa_VIIIa => VIIIa1_L + VIIIa2 + IXa; k26*IXa_VIIIa;
  // Hockin - Mann, Blood Coagulation Kinetics Reaction 16, k26 value taken as it is
  R16: IIa + V => IIa + Va; k27*IIa*V;
  // Hockin - Mann, Blood Coagulation Kinetics Reaction 17, k28 value taken as it is
  R17: Xa + Va -> Xa_Va; k28*Xa*Va - k27_167*Xa_Va;
  // Hockin - Mann, Blood Coagulation Kinetics Reaction 18, k30 value taken as it is
  R18: Xa_Va + II -> Xa_Va_II; k30*Xa_Va*II - k29*Xa_Va_II;
  // Hockin - Mann, Blood Coagulation Kinetics Reaction 18b, k31 value taken as it is
  R18b: Xa_Va_II => Xa_Va + mIIa + F12; k31*Xa_Va_II;
  // Hockin - Mann, Blood Coagulation Kinetics Reaction 19, k32 value taken as it is
  R19: mIIa + Xa_Va => IIa + Xa_Va; k32*mIIa*Xa_Va;
  // Hockin - Mann, Blood Coagulation Kinetics Reaction 20, k34 and k33 value taken as it is
  R20: Xa + TFPI -> Xa_TFPI; k34*Xa*TFPI - k33*Xa_TFPI;
  // Hockin - Mann, Blood Coagulation Kinetics Reaction 21, k36 and k35 value taken as it is
  R21: TF_VIIa_Xa + TFPI -> TF_VIIa_Xa_TFPI; k36*TF_VIIa_Xa*TFPI - k35*TF_VIIa_Xa_TFPI;
  // Hockin - Mann, Blood Coagulation Kinetics Reaction 22, k36 and k35 value taken as it is
  R22: TF_VIIa + Xa_TFPI => TF_VIIa_Xa_TFPI; k37*TF_VIIa*Xa_TFPI;
  // Hockin - Mann, Blood Coagulation Kinetics Reaction 23, k38 value taken as it is
  R23: Xa + ATIII => Xa_ATIII; k38*Xa*ATIII;
  // Hockin - Mann, Blood Coagulation Kinetics Reaction 24, k39 value taken as it is
  R24: mIIa + ATIII => mIIa_ATIII; k39*mIIa*ATIII;
  // Hockin - Mann, Blood Coagulation Kinetics Reaction 25, k40 value taken as it is
  R25: IXa + ATIII => IXa_ATIII; k40*IXa*ATIII;
  // Hockin - Mann, Blood Coagulation Kinetics Reaction 26, k41 value taken as it is
  R26: IIa + ATIII => IIa_ATIII; k41*IIa*ATIII;
  // Hockin - Mann, Blood Coagulation Kinetics Reaction 27, k42 value taken as it is
  R27: TF_VIIa + ATIII => TF_VIIa_ATIII; k42*TF_VIIa*ATIII;
  // Butenas S and Mann KG 2004 paper - CA is contact activator
  R28: CA + XII => CA + XIIa; k43*CA*XII;
  // Diamond - Systems Biology of Coagulation Initiation Reaction 31, k1 and k-1, value taken as it is
  R31: XIIa + PK -> XIIa_PK; k44*XIIa*PK - k45*XIIa_PK;
  // Diamond - Systems Biology of Coagulation Initiation Reaction 31, kcat value taken as it is
  R31b: XIIa_PK => XIIa + K; k46*XIIa_PK;
  // Diamond - Systems Biology of Coagulation Initiation Reaction 32, k1 and k-1, value taken as it is
  R32: XII + K -> XII_K; k47*XII*K - k48*XII_K;
  // Diamond - Systems Biology of Coagulation Initiation Reaction 32, kcat, value taken as it is
  R32b: XII_K => XIIa + K; k49*XII_K;
  // Diamond - Systems Biology of Coagulation Initiation Reaction 37, k1, value taken as it is
  R37: XIIa + ATIII => XIIa_ATIII; k50*XIIa*ATIII;
  // Diamond - Systems Biology of Coagulation Initiation Reaction 39, k1 and k-1, value taken as it is
  R39: XIIa + XI -> XIIa_XI; k51*XIIa*XI - k52*XIIa_XI;
  // Diamond - Systems Biology of Coagulation Initiation Reaction 39, kcat
  R39b: XIIa_XI => XIIa + XIa; k53*XIIa_XI;
  // Diamond - Systems Biology of Coagulation Initiation Reaction 41, k1 value taken as it is
  R41: XIa + ATIII => XIa_ATIII; k54*XIa*ATIII;
  // Diamond - Systems Biology of Coagulation Initiation Reaction 45,k1 and k-1, value taken as it is
  R45: XIa + IX -> XIa_IX; k55*XIa*IX - k56*XIa_IX;
  // Diamond - Systems Biology of Coagulation Initiation Reaction 45, kcat value taken as it is
  R45b: XIa_IX => XIa + IXa; k57*XIa_IX;
  // Diamond - Systems Biology of Coagulation Initiation Reaction 46,k1 and k-1, value taken as it is
  R46: IXa + X -> IXa_X; k58*IXa*X - k59*IXa_X;
  // Diamond - Systems Biology of Coagulation Initiation Reaction 46, kcat value taken as it is
  R46b: IXa_X => IXa + Xa; k60*IXa_X;
  // Diamond - Systems Biology of Coagulation Initiation Reaction 49,k1 and k-1, value taken as it is
  R49: VIIa + X -> VIIa_X; k61*VIIa*X - k62*VIIa_X;
  // Diamond - Systems Biology of Coagulation Initiation Reaction 49, kcat value taken as it is
  R49b: VIIa_X => VIIa + Xa; k63*VIIa_X;
  // Reference http://www.ncbi.nlm.nih.gov/pmc/articles/PMC52171/pdf/pnas01065-0397.pdf Kd of the reaction is 7nM
  R50: IIa + Tmod -> IIa_Tmod; k64*IIa*Tmod - k65*IIa_Tmod;
  // Reference http://www.pnas.org/content/103/4/879.full Km = 7.7 microM Kcat = 19.8 (nM.min)^-1 nM^-1
  R51: IIa_Tmod + PC -> IIa_Tmod_PC; k66*IIa_Tmod*PC - k67*IIa_Tmod_PC;
  // Reference http://www.pnas.org/content/103/4/879.full Km = 7.7 microM Kcat = 19.8 (nM.min)^-1 nM^-1
  R052: IIa_Tmod_PC => IIa_Tmod + APC; k68*IIa_Tmod_PC;
  // Reference http://www.sciencedirect.com/science/article/pii/S0049384800004059 Km = 7.2 uM = 7200 nM Kcat = 5040 min^-1 = 84 s^-1
  R301: IIa + Fg => IIa + F; k69*IIa*Fg/(k70 + Fg);
  // Reference http://www.jbc.org/content/256/21/11128.full.pdf+html Kd = 1.4 * 10^-8 M
  R053: APC + Va -> APC_Va; k71*APC*Va - k72*APC_Va;
  // Assume the same binding charactersitics as Va binding (Reaction 51 in v9)
  R055: APC + VIIIa -> APC_VIIIa; k73*APC*VIIIa - k74*APC_VIIIa;
  // Reference http://www.jbc.org/content/263/29/14884.long kcat = 23.7 min^-1 = 0.395 s^-1
  R054: APC_Va => APC + Va_deg; k75*APC_Va;
  // Reference http://bloodjournal.hematologylibrary.org/content/95/5/1714.long kcat = 3 * 1.2 = 3.6 min^-1
  R056: APC_VIIIa => APC + VIIIa_deg; k76*APC_VIIIa;
  // Assume same binding characteristics as Reaction no. 52 (VIIIa binding to APC - which has been assume to be same as Reaction 51, Va binding to APC)
  R057: APC + IXa_VIIIa -> APC_IXa_VIIIa; k77*APC*IXa_VIIIa - k78*APC_IXa_VIIIa;
  // Reference http://bloodjournal.hematologylibrary.org/content/95/5/1714.long kcat = 1.2 min^-1 = 0.02 s^-1
  R058: APC_IXa_VIIIa => APC + IXa + VIIIa_deg; k79*APC_IXa_VIIIa;
  // Assume same binding charactersitics as Reaction 55.
  R059: APC + IXa_VIIIa_X -> APC_IXa_VIIIa_X; k80*APC*IXa_VIIIa_X - k81*APC_IXa_VIIIa_X;
  // Assume same reaction kinetics as Reaction 56. kcat = 0.02 s^-1
  R060: APC_IXa_VIIIa_X => APC + IXa + X + VIIIa_deg; k82*APC_IXa_VIIIa_X;
  // Diamond - Systems Biology of Coagulation Initiation Reaction 47,k1 and k-1, value taken as it is
  R47: Xa + VIII -> Xa_VIII; k83*Xa*VIII - k84*Xa_VIII;
  // Diamond - Systems Biology of Coagulation Initiation Reaction 47, kcat value taken as it is
  R47b: Xa_VIII => Xa + VIIIa; k85*Xa_VIII;
  // Assume F1+2 half-life of 2-4 hours based on clinical trials k = log(2)/(2 * 3600) = 9.627E-05 This value should be variable.
  reaction_234: F12 => F12_deg; k86*F12;
  N1: VIIa_X + XIa => VIIa + Xa + XIa; n1*VIIa_X*XIa;
end
