// SBML level 2 version 4

model Bhartiya2003_Tryptophan_operon()
  // SBML level 2 code originaly generated for the JWS Online project by Jacky Snoep using PySCeS
  // Run this model online at http://jjj.biochem.sun.ac.za
  // To cite JWS Online please refer to: Olivier, B.G. and Snoep, J.L. (2004) Web-based modelling using JWS Online , Bioinformatics, 20:2143-2144
  // BioModels Curation : The model reproduces Fig 3 of the publication. By substituting a value of 1.4 for Tex it is possible to reproduce Fig 3C and 3D(iii), Fig 3A and 3D(i), are obtained by setting Tex=0. Also, note that the tryptophan concentrations have been normalized by 82 micromolar in the figures; the normalized concetrations can be obtained via the parameters To/s/t_norm. The model was successfully tested on MathSBML and Copasi.
  // This model originates from BioModels Database: A Database of Annotated Published Models. It is copyright (c) 2005-2010 The BioModels Team.
  // For more information see the terms of use .
  // To cite BioModels Database, please use Le Novère N., Bornstein B., Broicher A., Courtot M., Donizelli M., Dharuri H., Li L., Sauro H., Schilstra M., Shapiro B., Snoep J.L., Hucka M. (2006) BioModels Database: A Free, Centralized Database of Curated, Published, Quantitative Kinetic Models of Biochemical and Cellular Systems Nucleic Acids Res., 34: D689-D691.
  // biomodels.db:MODEL6624111460
  // biomodels.db:BIOMD0000000062
  // isDescribedBy pubmed:12787031
  // isDerivedFrom pubmed:11171956
  // isVersionOf GO:0000162
  // hasTaxon taxonomy:562

  // Compartments:
  compartment compartment = 1; compartment is "cell";  // isVersionOf GO:0005623

  // Species:
  species Enz in compartment = 0; Enz is "Anthranilate synthase";  // uniprot:P00895
  species Ts in compartment = 0; Ts is "Synthesized tryptophan";  // CHEBI:27897 kegg.compound:C00806
  species Tt in compartment; Tt is "Total tryptophan";  // CHEBI:27897 kegg.compound:C00806
  species $To in compartment; To is "exog. Trp";

  // Parameters:
  Tomax = 100 concentration;
  Tex = 0.14 concentration;
  e_val = 0.9 concentration;
  f_val = 380 concentration;
  Ts_norm has dimensionless;
  To_norm has dimensionless;
  Tt_norm has dimensionless;
  Enz_norm has dimensionless;

  // Assignment rules:
  To := Tomax*Tex/(Tex*(1 + Ts/f_val) + e_val);
  Tt := To + Ts;
  Enz_norm := Enz/1;
  Ts_norm := Ts/82;
  Tt_norm := Tt/82;
  To_norm := To/82;

  // Reactions:
  Enzyme_synthesis: -> Enz; compartment*k1*ki1^nH*Ot/(ki1^nH + Tt^nH); Enzyme_synthesis is "Anthranilate synthase synthesis";  // modifiers: Tt; isVersionOf GO:0006417
    k1 = 65 time_inverse; ki1 = 3.53 concentration; nH = 1.92 dimensionless; Ot = 0.0033 concentration;
  Enzyme_dilution: Enz -> ; compartment*Enzyme_dilution_mu*Enz; Enzyme_dilution is "Enzyme dilution due to cell growth";
    Enzyme_dilution_mu = 0.01 time_inverse;
  tryptophan_synthesis: -> Ts; compartment*k2*Enz*Ki2/(Ki2 + Tt); tryptophan_synthesis is "Tryptophan synthesis";  // modifiers: Enz, Tt; isVersionOf GO:0000162
    k2 = 25 time_inverse; Ki2 = 810 concentration;
  tryptophan_consumption: Ts -> ; compartment*g*Ts/(Kg + Ts); tryptophan_consumption is "Tryptophan consumption for protein synthesis";  // isVersionOf GO:0006412
    g = 25 Concentration_per_time; Kg = 0.2 concentration;
  tryptophan_dilution: Ts -> ; compartment*tryptophan_dilution_mu*Ts; tryptophan_dilution is "Tryptophan dilution due to cell growth";
    tryptophan_dilution_mu = 0.01 time_inverse;

  // Unit definitions:
  unit substance = 1e-6 mole; substance is "micromole";
  unit time = 60 second; time is "minutes";
  unit concentration = 1e-6 mole / litre; concentration is "microM";
  unit Concentration_per_time = 1e-6 mole / (litre * 60 second); Concentration_per_time is "microM_per_min";
  unit time_inverse = 1 / (60 second); time_inverse is "per_min";
end
