// SBML level 2 version 1

model Suh2004_KCNQ_regulation()
  // Suh2004_KCNQ_Regulation
  // The model reproduces FIG 11A and FIG 11B of the paper. However, please note that FIG 11B is a plot of normalised amounts versus time. The "stoichiometry" field has been used to convert fluxes from membrane species to volume species. The value of 0.0009967 is a product of (Surface to Volume_M*(1/Avagadro's number)*1E21. 0.6 is the surface to volume ratio of the plasma membrane, 1E21 is required for a unit surface to volume ratio and the Avagadro's number is present in the denominator to convert molecules to moles. The model was successfully tested using MathSBML and SBML ODESolver.
  // All the kinetic laws have the unit items per second , which requires the one reaction taking place in the cytoplasm - IP3Phosphatase - to include an explicit conversion factor both in the kinetic law and the stoichiometry of IP3_C . The kinetic law is multiplied and the stoichiometry divided by the number of molecules per micro-mole. This conversion factor is only required for correct units and can be replaced by 1, if it should lead to numerical problems.
  // To the extent possible under law, all copyright and related or neighbouring rights to this encoded model have been dedicated to the public domain worldwide. Please refer to CC0 Public Domain Dedication for more information.
  // In summary, you are entitled to use this encoded model in absolutely any manner you deem suitable, verbatim, or with modification, alone or embedded it in a larger context, redistribute it, commercially or not, in a restricted way or not.
  // To cite BioModels Database, please use: Li C, Donizelli M, Rodriguez N, Dharuri H, Endler L, Chelliah V, Li L, He E, Henry A, Stefan MI, Snoep JL, Hucka M, Le Novère N, Laibe C (2010) BioModels Database: An enhanced, curated and annotated resource for published quantitative kinetic models. BMC Syst Biol., 4:92.
  // biomodels.db:MODEL4662889298
  // biomodels.db:BIOMD0000000081
  // isDescribedBy pubmed:15173220
  // hasTaxon taxonomy:9606
  // kegg.pathway:map04070 kegg.pathway:map04020
  // hasPart GO:0006629 GO:0007207

  // Compartments:
  compartment EX = 1 litre; EX is "Extracellular";  // GO:0005576
  compartment M in EX = 1 um2; M is "Membrane";  // 2-D; GO:0005886
  compartment Cytoplasm in M = 1 litre;  // GO:0005737

  // Species:
  species GTPgS_C in Cytoplasm = 0;  // substance in micromole; CHEBI:5235 kegg.compound:C01806
  species KCNQsites_M in M = 6.7;  // substance in molecules; hasPart uniprot:O88944 uniprot:O43526
  species PIP2_M in M = 5000;  // substance in molecules; CHEBI:18348 kegg.compound:C04637
  species GGDPbS_M in M = 0;  // substance in molecules; hasPart CHEBI:38309 GO:0005834
  species $Mg2_C in Cytoplasm = 2100;  // substance in micromole; CHEBI:25107 kegg.compound:C00305
  species ATP_C in Cytoplasm = 3000;  // substance in micromole; CHEBI:15422 kegg.compound:C00002
  species oxoM_EX in EX = 0;  // substance in micromole; CHEBI:38322
  species GDPbS_C in Cytoplasm = 0;  // substance in micromole; isVersionOf CHEBI:38309
  species GGTPMg_M in M = 0.1;  // substance in molecules; hasPart kegg.compound:C00305 kegg.compound:C00044 GO:0005834 CHEBI:18420; hasPart CHEBI:25107 CHEBI:15996 GO:0005834
  species GDP_C in Cytoplasm = 0;  // substance in micromole; CHEBI:17552 kegg.compound:C00035
  species GTP_C in Cytoplasm;  // substance in micromole; CHEBI:15996 kegg.compound:C00044
  species GGDPAlF4Mg_M in M = 0; GGDPAlF4Mg_M is "GGDPAIF4Mg_M";  // substance in molecules; hasPart CHEBI:17552 CHEBI:25107 CHEBI:30111 uniprot:P29992; hasPart CHEBI:30111 uniprot:P29992 kegg.compound:C00305 kegg.compound:C00035
  species ip3_C in Cytoplasm = 0.48; ip3_C is "IP3_C";  // substance in micromole; CHEBI:16595 kegg.compound:C01245
  species AlF4_C in Cytoplasm = 0; AlF4_C is "AIF4_C";  // substance in micromole; CHEBI:30111
  species G_M in M = 0.065;  // substance in molecules; GO:0005834
  species GGTP_M in M = 0.048;  // substance in molecules; hasPart kegg.compound:C00044 GO:0005834 CHEBI:15996; hasPart CHEBI:15996 GO:0005834
  species GGDPAlF4_M in M = 0; GGDPAlF4_M is "GGDPAIF4_M";  // substance in molecules; hasPart CHEBI:30111 kegg.compound:C00035 GO:0005834; hasPart CHEBI:30111 CHEBI:17552 GO:0005834
  species GGTPgS_M in M = 0;  // substance in molecules; hasPart CHEBI:5235 GO:0005834; hasPart kegg.compound:C01806 GO:0005834 CHEBI:43000
  species PI_M in M = 200000;  // substance in molecules; CHEBI:16749 kegg.compound:C01194
  species PIP_M in M = 1150;  // substance in molecules; CHEBI:17526 kegg.compound:C01277
  species PIP2xKCNQ_M in M = 33.3;  // substance in molecules; hasPart CHEBI:18348 uniprot:O88944 uniprot:O43526 kegg.compound:C04637
  species GGTPgSMg_M in M = 0;  // substance in molecules; hasPart kegg.compound:C00305 kegg.compound:C01806 GO:0005834 CHEBI:18420; hasPart CHEBI:5235 CHEBI:25107 GO:0005834
  species GGDP_M in M = 200;  // substance in molecules; hasPart kegg.compound:C00035 GO:0005834 CHEBI:17552; hasPart CHEBI:17552 GO:0005834

  // Parameters:
  MgSat20 has dimensionless;
  ATPSat300 has dimensionless;
  MgSat10 has dimensionless;
  OxoSat has dimensionless;
  Gactive has molecules_um_2;
  ATPSat1000 has dimensionless;
  KMgGTPase = 10 microMolar;
  Koxom = 8 microMolar;
  I_KCNQ has dimensionless;
  nHill = 1.8 dimensionless;
  fGactive has dimensionless;
  NA_micro = 6.022e17 items_per_micromole; NA_micro is "NA(micro)";

  // Assignment rules:
  MgSat20 := 1*(1/(1 + 20*(1/Mg2_C)));
  ATPSat1000 := 1*(1/(1 + 1000*(1/(0.5 + ATP_C))));
  MgSat10 := 0.2 + 0.8*1*(1/(1 + KMgGTPase*(1/Mg2_C)));
  OxoSat := 1*(1/(1 + Koxom*(1/(1e-5 + oxoM_EX))));
  fGactive := (GGTPMg_M + GGTPgSMg_M + GGDPAlF4Mg_M)/200;
  Gactive := GGTPMg_M + GGTPgSMg_M + GGDPAlF4Mg_M;
  ATPSat300 := 1*(1/(1 + 300*(1/(0.5 + ATP_C))));
  I_KCNQ := 1.33*(0.025*PIP2xKCNQ_M)^nHill;
  GTP_C := 100 - 50*exp(-(0.008333333*(290 + time)));

  // Reactions:
  PIP5kinase: 0.0009967 ATP_C + PIP_M -> PIP2_M; (0.2 + 0.8*MgSat20)*kPIP5Kinase*PIP_M*ATPSat300;  // kegg.reaction:R03469; isVersionOf ec-code:2.7.1.68 GO:0016308
    kPIP5Kinase = 0.06 s_1;
  IP3Phosphatase: 1.666111e-18 ip3_C -> ; ip3_C*kIP3ase*Cytoplasm*NA_micro;  // kegg.reaction:R03394; isVersionOf ec-code:3.1.3.56 GO:0004445
    kIP3ase = 0.3 s_1;
  PIP2binding: KCNQsites_M + PIP2_M -> PIP2xKCNQ_M; (kPIP2on*KCNQsites_M*PIP2_M + (-(kPIP2off*PIP2xKCNQ_M)))*M;  // isVersionOf GO:0005267; isVersionOf GO:0005546
    kPIP2on = 0.00025 um2_molecules_1_s_1; kPIP2off = 0.25 s_1;
  MgonGGTPgS: GGTPgS_M -> GGTPgSMg_M; kMg2onGTPgS*GGTPgS_M*Mg2_C*M;  // modifiers: Mg2_C; isPartOf GO:0031684
    kMg2onGTPgS = 0.002 uM_1_s_1;
  GGTPase: GGTPMg_M -> GGDP_M; kGGTPase*MgSat10*GGTPMg_M*M;  // isVersionOf GO:0003924
    kGGTPase = 1.8 s_1;
  GTPon: G_M -> GGTP_M; (kGTPon*G_M*GTP_C + (-(kGTPoff*GGTP_M)))*M;  // modifiers: GTP_C; isPartOf GO:0031684
    kGTPon = 0.45 uM_1_s_1; kGTPoff = 0.08 s_1;
  GTPgSon: 0.0009967 GTPgS_C + G_M -> GGTPgS_M; (kGTPgSon*G_M*GTPgS_C + (-(kGTPgSoff*GGTPgS_M)))*M;  // isPartOf GO:0031684
    kGTPgSon = 0.006 uM_1_s_1; kGTPgSoff = 0.005 s_1;
  GDPbSon: G_M + 0.0009967 GDPbS_C -> GGDPbS_M; (kGDPbSon*G_M*GDPbS_C + (-(kGGDPbSoff*(1 + 20*OxoSat)*GGDPbS_M)))*M;  // isPartOf GO:0031684
    kGDPbSon = 0.28 uM_1_s_1; kGGDPbSoff = 0.1 s_1;
  MgGTPon: GGTP_M -> GGTPMg_M; kMg2onGTP*GGTP_M*Mg2_C*M;  // modifiers: Mg2_C; isPartOf GO:0031684
    kMg2onGTP = 0.003 uM_1_s_1;
  GDPdissoc: GGDP_M -> 0.0009967 GDP_C + G_M; (kGDPoff*GGDP_M*(OxoSat + TonicAct) + (-(kGDPon*GDP_C*G_M)))*M;  // modifiers: oxoM_EX; isPartOf GO:0031684
    kGDPoff = 0.5 s_1; TonicAct = 0.002 dimensionless; kGDPon = 0.003 uM_1_s_1;
  PIP2_5Pase: PIP2_M -> PIP_M; MgSat20*kPIP2Pase*PIP2_M*M;  // kegg.reaction:R04404; isVersionOf ec-code:3.1.3.36 GO:0004439
    kPIP2Pase = 0.005 s_1;
  PLC: PIP2_M -> 0.0009967 ip3_C; kPLC*(fGactive + PLCspont)*PIP2_M*M;  // kegg.reaction:R03435; isVersionOf ec-code:3.1.4.11 GO:0004435 GO:0007200
    kPLC = 4.8 s_1; PLCspont = 0.00075 dimensionless;
  AlF4on: 0.0009967 AlF4_C + GGDP_M -> GGDPAlF4_M; (kAlF4on*AlF4_C*GGDP_M + (-(kAlF4off*GGDPAlF4_M)))*M; AlF4on is "AIF4on";  // isPartOf GO:0031684
    kAlF4on = 7e-6 uM_1_s_1; kAlF4off = 0.005 s_1;
  PI4Kinase: 0.0009967 ATP_C + PI_M -> PIP_M; (0.2 + 0.8*MgSat20)*kPI4Kinase*PI_M*ATPSat1000*M;  // kegg.reaction:R03361; isVersionOf ec-code:2.7.1.67 GO:0004430
    kPI4Kinase = 0.0001 s_1;
  MgonGDPAlF4: GGDPAlF4_M -> GGDPAlF4Mg_M; kMgonAlF4*GGDPAlF4_M*Mg2_C*M; MgonGDPAlF4 is "MgonGDPAIF4";  // modifiers: Mg2_C; isPartOf GO:0031684
    kMgonAlF4 = 0.002 uM_1_s_1;

  // Events:
  event_0000001: at (time >= 3): oxoM_EX = 10;  // GO:0031789
  event_0000002: at (time >= 8): oxoM_EX = 0;

  // Unit definitions:
  unit micromole = 1e-6 mole;
  unit substance = item; substance is "items";
  unit items_per_micromole = item / (1e-6 mole);
  unit molecules = item;
  unit um2 = (1e-6 metre)^2;
  unit molecules_um_2_s_1 = item / ((1e-6 metre)^2 * second);
  unit molecules_um_2 = item / (1e-6 metre)^2;
  unit uM_s_1 = 1e-6 mole / (litre * second);
  unit s_1 = 1 / second;
  unit um2_molecules_1_s_1 = (1e-6 metre)^2 / (item * second);
  unit uM_1_s_1 = litre / (1e-6 mole * second);
  unit uM_um_s_1 = 1e-6 metre * 1e-6 mole / (second * litre);
  unit microMolar = 1e-6 mole / litre;
end
