// SBML level 2 version 3

model Lebeda2008_BoTN_Paralysis_4stepModel()
  // Lebeda2008 - BoTN Paralysis (4 step model)
  // The onset of paralysis of skeletal muscles induced by BoNT/A at the isolated rat neuromuscular junction is described in this model. This model is the extended model of BIOMD0000000267 , which itself is the reduced form of the model developed by Simpson 1980; PMID 6243359
  // This model is described in the article:
  // Onset dynamics of type A botulinum neurotoxin-induced paralysis.
  // Lebeda FJ, Adler M, Erickson K, Chushak Y.
  // J Pharmacokinet Pharmacodyn 2008 Jun; 35(3): 251-267
  // Abstract:
  // Experimental studies have demonstrated that botulinum neurotoxin serotype A (BoNT/A) causes flaccid paralysis by a multi-step mechanism. Following its binding to specific receptors at peripheral cholinergic nerve endings, BoNT/A is internalized by receptor-mediated endocytosis. Subsequently its zinc-dependent catalytic domain translocates into the neuroplasm where it cleaves a vesicle-docking protein, SNAP-25, to block neurally evoked cholinergic neurotransmission. We tested the hypothesis that mathematical models having a minimal number of reactions and reactants can simulate published data concerning the onset of paralysis of skeletal muscles induced by BoNT/A at the isolated rat neuromuscular junction (NMJ) and in other systems. Experimental data from several laboratories were simulated with two different models that were represented by sets of coupled, first-order differential equations. In this study, the 3-step sequential model developed by Simpson (J Pharmacol Exp Ther 212:16-21,1980) was used to estimate upper limits of the times during which anti-toxins and other impermeable inhibitors of BoNT/A can exert an effect. The experimentally determined binding reaction rate was verified to be consistent with published estimates for the rate constants for BoNT/A binding to and dissociating from its receptors. Because this 3-step model was not designed to reproduce temporal changes in paralysis with different toxin concentrations, a new BoNT/A species and rate (k(S)) were added at the beginning of the reaction sequence to create a 4-step scheme. This unbound initial species is transformed at a rate determined by k(S) to a free species that is capable of binding. By systematically adjusting the values of k(S), the 4-step model simulated the rapid decline in NMJ function (k(S) >or= 0.01), the less rapid onset of paralysis in mice following i.m. injections (k (S) = 0.001), and the slow onset of the therapeutic effects of BoNT/A (k(S) < 0.001) in man. This minimal modeling approach was not only verified by simulating experimental results, it helped to quantitatively define the time available for an inhibitor to have some effect (t(inhib)) and the relation between this time and the rate of paralysis onset. The 4-step model predicted that as the rate of paralysis becomes slower, the estimated upper limits of (t(inhib)) for impermeable inhibitors become longer. More generally, this modeling approach may be useful in studying the kinetics of other toxins or viruses that invade host cells by similar mechanisms, e.g., receptor-mediated endocytosis.
  // This model is hosted on BioModels Database and identified by: BIOMD0000000178.
  // To cite BioModels Database, please use: BioModels Database: An enhanced, curated and annotated resource for published quantitative kinetic models.
  // To the extent possible under law, all copyright and related or neighbouring rights to this encoded model have been dedicated to the public domain worldwide. Please refer to CC0 Public Domain Dedication for more information.
  // biomodels.db:MODEL8472829123
  // biomodels.db:BIOMD0000000178
  // isDescribedBy pubmed:18551355
  // isDerivedFrom biomodels.db:BIOMD0000000267 pubmed:6243359
  // isVersionOf reactome:REACT_11184.1 GO:0032223 GO:0033264 GO:0006898 GO:0009405
  // hasTaxon taxonomy:9606 taxonomy:10116 taxonomy:10090

  // Compartments:
  compartment extracellular = 1;  // GO:0005615
  compartment endosome = 1;  // GO:0031904
  compartment neuroplasm = 1;  // isVersionOf GO:0005829 GO:0043679

  // Species:
  species $BoNT in extracellular; BoNT is "tot_free_BoNT/A";  // kegg.compound:C07946
  species bulk in extracellular = 1; bulk is "bulk_BoNT/A";  // kegg.compound:C07946
  species free in extracellular = 0; free is "free_BoNT/A";  // kegg.compound:C07946
  species bound in extracellular = 0; bound is "bound_BoNT/A";  // hasPart kegg.compound:C07946
  species translocate in endosome = 0; translocate is "transloc_BoNT/A";  // hasPart kegg.compound:C07946
  species lytic in neuroplasm = 0; lytic is "lytic_BoNT/A";  // isVersionOf kegg.compound:C07946

  // Assignment rules:
  tension := 1 - lytic;
  BoNT := bulk + free;

  // Reactions:
  endocytosis: bound => translocate; kT*bound*extracellular;  // isHomologTo reactome:REACT_11086.1
    kT = 0.141 pmin;
  translocation: translocate => lytic; kL*translocate*endosome;  // isVersionOf reactome:REACT_11085.1
    kL = 0.013 pmin;
  binding: free => bound; kB*free*extracellular;  // isVersionOf reactome:REACT_11084.1
    kB = 0.058 pmin;
  bulk_movement: bulk => free; kS*bulk*extracellular;  // isVersionOf GO:0006858
    kS = 0.00015 pmin;

  // Unit definitions:
  unit substance = dimensionless; substance is "relative concentration";
  unit volume = dimensionless; volume is "normalized volume";
  unit time = 60 second; time is "min";
  unit pmin = 1 / (60 second); pmin is "perminute";
end
