// SBML level 2 version 1

model Radulescu2008_NFkB_hierarchy_M_39_65_90()
  // NFkB model M(39,65,90) - most complex model
  // This is a model of NFkB pathway functioning from hierarchy of models of decreasing complexity, created to demonstrate application of model reduction methods proposed in
  // Robust simplifications of multiscale biochemical networks.
  // Radulescu O, Gorban A., Zinovyev A., Lilienbaum. A. BMC Syst Biol2008:2:86 18854041,
  // Abstract:
  // BACKGROUND: Cellular processes such as metabolism, decision making in development and differentiation, signalling, etc., can be modeled as large networks of biochemical reactions. In order to understand the functioning of these systems, there is a strong need for general model reduction techniques allowing to simplify models without loosing their main properties. In systems biology we also need to compare models or to couple them as parts of larger models. In these situations reduction to a common level of complexity is needed. RESULTS: We propose a systematic treatment of model reduction of multiscale biochemical networks. First, we consider linear kinetic models, which appear as "pseudo-monomolecular" subsystems of multiscale nonlinear reaction networks. For such linear models, we propose a reduction algorithm which is based on a generalized theory of the limiting step that we have developed in 1. Second, for non-linear systems we develop an algorithm based on dominant solutions of quasi-stationarity equations. For oscillating systems, quasi-stationarity and averaging are combined to eliminate time scales much faster and much slower than the period of the oscillations. In all cases, we obtain robust simplifications and also identify the critical parameters of the model. The methods are demonstrated for simple examples and for a more complex model of NF-kappaB pathway. CONCLUSION: Our approach allows critical parameter identification and produces hierarchies of models. Hierarchical modeling is important in "middle-out" approaches when there is need to zoom in and out several levels of complexity. Critical parameter identification is an important issue in systems biology withpotential applications to biological control and therapeutics. Our approach also deals naturally with the presence of multiple time scales, which is a general property of systems biology models.
  // The models are provided in CellDesigner v3.5 format. The name of the model M(x,y,z) should be deciphered as following:
  // x - number of species y - number of reactions z - number of parameters
  // Simulation protocol: The model can be simulated in CellDesigner directly, or in any simulator supporting events. The simulation period should be set up in 40 hours (t=144000 sec). The 'signal' event applies signal to the pathway at the moment t=20 hours=72000 sec. This model reproduces Figure 7c (M(39,65,90)) of the publication.
  // For additional information please contact Andrei.Zinovyev at curie.fr
  // This model originates from BioModels Database: A Database of Annotated Published Models. It is copyright (c) 2005-2009 The BioModels Team.
  // For more information see the terms of use.
  // To cite BioModels Database, please use Le Novère N., Bornstein B., Broicher A., Courtot M., Donizelli M., Dharuri H., Li L., Sauro H., Schilstra M., Shapiro B., Snoep J.L., Hucka M. (2006) BioModels Database: A Free, Centralized Database of Curated, Published, Quantitative Kinetic Models of Biochemical and Cellular Systems Nucleic Acids Res., 34: D689-D691.
  // biomodels.db:MODEL7743656488
  // biomodels.db:BIOMD0000000227
  // isDescribedBy pubmed:18854041
  // isDerivedFrom biomodels.db:BIOMD0000000139 biomodels.db:BIOMD0000000140 pubmed:15094015
  // hasTaxon taxonomy:10090
  // isPartOf kegg.pathway:mmu04660

  // Compartments:
  compartment default = 1;  // GO:0005829
  compartment nucleus in default = 1;  // isVersionOf GO:0005634

  // Species:
  species FTAx in nucleus = 0.0003333333/nucleus;  // isVersionOf uniprot:Q04863
  species FTAy in nucleus = 0.0003333333/nucleus;  // isVersionOf uniprot:Q04863
  species FTAz in nucleus = 0.0003333333/nucleus;  // isVersionOf uniprot:Q04863
  species IkB_alpha_nucleus in nucleus = 0;  // isVersionOf uniprot:Q9Z1E3
  species $csa17_degraded in nucleus = 0;
  species $sa4_degraded in default = 0;
  species p105 in default = 0;  // isVersionOf uniprot:P25799
  species $sa438_degraded in default = 0;
  species $sa3_degraded in default = 0;
  species mRNAp105 in default = 0;  // isVersionOf ensembl:ENSMUST00000029812
  species p50 in default = 0;  // isPartOf uniprot:P25799
  species mRNAp65 in default = 0;  // isVersionOf ensembl:ENSMUST00000025867
  species $sa8_degraded in default = 0;
  species p65 in default = 0;  // isVersionOf uniprot:Q04207
  species $sa9_degraded in default = 0;
  species $sa13_degraded in default = 0;
  species IkB_alpha_default in default = 0;  // isVersionOf uniprot:Q9Z1E3
  species sa12_degraded in default = 0;
  species A20_nucleus in nucleus = 0;  // isVersionOf uniprot:Q60769
  species mRNAA20 in default = 0;  // isVersionOf ensembl:ENSMUST00000019997
  species A20_default in default = 0;  // isVersionOf uniprot:Q60769
  species $sa444_degraded in default = 0;
  species IKKi in default = 0;  // hasPart uniprot:Q60680 uniprot:O88351 uniprot:O88522
  species $sa19_degraded in default = 0;
  species IKKa in default = 0;  // hasPart uniprot:Q60680 uniprot:O88351 uniprot:O88522
  species IKKn in default = 0;  // hasPart uniprot:Q60680 uniprot:O88351 uniprot:O88522
  species $sa20_degraded in default = 0;
  species IKK in nucleus = 0;  // hasPart uniprot:Q60680 uniprot:O88351 uniprot:O88522
  species $sa96_degraded in default = 0;
  species $sa97_degraded in default = 0;
  species $csa21_degraded in default = 0;
  species $csa18_degraded in default = 0;
  species $csa9_degraded in nucleus = 0;
  species InactivePRaseonp65 in nucleus = 0;
  species ActivePRaseonp65 in nucleus = 0;
  species InactivePRaseonp105 in nucleus = 0;
  species ActivePRaseonp105 in nucleus = 0;
  species mRNAIKB_alpha in default = 0;  // isVersionOf ensembl:ENSMUST00000021413
  species ActivePRaseonIkB_alpha in nucleus = 0;
  species NFkB_IkB_alpha_default in default = 0; NFkB_IkB_alpha_default is "NFkB:IkB_alpha";  // hasPart uniprot:P25799 uniprot:Q9Z1E3 uniprot:Q04207
  species NFkB_IKKa_Ikb_alpha in default = 0; NFkB_IKKa_Ikb_alpha is "NFkB:IKKa:Ikb_alpha";  // hasPart uniprot:P25799 uniprot:Q9Z1E3 uniprot:Q60680 uniprot:O88351
  species NFkB_default in default = 0;  // isVersionOf uniprot:P25799 uniprot:Q04207
  species IKKa_IKB_alpha in default = 0; IKKa_IKB_alpha is "IKKa:IKB_alpha";  // hasPart uniprot:Q60680 uniprot:O88351 uniprot:O88522 uniprot:Q9Z1E3
  species NFkB_IkB_alpha_nucleus in nucleus = 0; NFkB_IkB_alpha_nucleus is "NFkB:IkB_alpha";  // hasPart uniprot:P25799 uniprot:Q04207 uniprot:Q9Z1E3
  species Promp65_RNAP2 in nucleus = 6.666667e-6/nucleus; Promp65_RNAP2 is "Promp65:RNAP2";
  species Promp65_RNAP2_FTAy in nucleus = 0; Promp65_RNAP2_FTAy is "Promp65:RNAP2:FTAy";
  species NFkB_nucleus in nucleus = 0;  // hasPart uniprot:P25799 uniprot:Q04207
  species Promp105_RNAP1_p50p65 in nucleus = 0; Promp105_RNAP1_p50p65 is "Promp105:RNAP1:p50p65";
  species Promp105_RNAP1_p50p65_IkBa in nucleus = 0; Promp105_RNAP1_p50p65_IkBa is "Promp105:RNAP1:p50p65:IkBa";
  species Promp105_RNAP in nucleus = 6.666667e-6/nucleus; Promp105_RNAP is "Promp105:RNAP";
  species Promp105_RNAP_FTAX in nucleus = 0; Promp105_RNAP_FTAX is "Promp105:RNAP:FTAX";
  species Promp105_RNAP1_FTAx_p50p65 in nucleus = 0; Promp105_RNAP1_FTAx_p50p65 is "Promp105:RNAP1:FTAx:p50p65";
  species Promp105_RNAP1_FTAx_p50p65_IkBa in nucleus = 0; Promp105_RNAP1_FTAx_p50p65_IkBa is "Promp105:RNAP1:FTAx:p50p65:IkBa";
  species PromIkBa_RNAP3 in nucleus = 6.666667e-6/nucleus; PromIkBa_RNAP3 is "PromIkBa:RNAP3";
  species PromIkBa_RNAP3_FTAz in nucleus = 0; PromIkBa_RNAP3_FTAz is "PromIkBa:RNAP3:FTAz";
  species InactivePRaseonIkB_alpha in nucleus = 0;
  species PromIkBa_RNAP3_p50p65 in nucleus = 0; PromIkBa_RNAP3_p50p65 is "PromIkBa:RNAP3:p50p65";
  species PromIkBa_RNAP3_p50p65_IkBa in nucleus = 0; PromIkBa_RNAP3_p50p65_IkBa is "PromIkBa:RNAP3:p50p65:IkBa";
  species IkBa_RNAP3_FTAz_p50p65 in nucleus = 0; IkBa_RNAP3_FTAz_p50p65 is "IkBa:RNAP3:FTAz:p50p65";
  species s215 in nucleus = 0; s215 is "PromIkBa:RNAP3:FTAz:p50p65:IkB_alpha";

  // Parameters:
  k1 = 0;
  k2 = 0.000125;
  k3 = 1e-5;
  k4 = 0.1;
  k5 = 0.0015;
  k6 = 0.000125;
  k7 = 0.24;
  k8 = 0.1;
  k9 = 1.2;
  k10 = 0.1;
  k11 = 0.000125;
  k12 = 2e-5;
  kf13 = 0.5;
  kr13 = 0;
  kf14 = 0.5;
  kr14 = 0;
  kf15 = 0.0025;
  kr15 = 8e-5;
  k16 = 0.5;
  k17 = 0.0004;
  k18 = 0.0003;
  k20 = 5e-7;
  k19 = 0;
  k21 = 0.0001;
  k22 = 0.5;
  kf23 = 0.001;
  kr23 = 0.0005;
  k25 = 0;
  k27 = 0.0004;
  kf28 = 0.01;
  kr28 = 0;
  kf32 = 10;
  kr32 = 0.0001;
  k42 = 0.0005;
  k43 = 0.1;
  k33 = 0.0005;
  k34 = 0.1;
  k69 = 0.006;
  k70 = 0.06;
  k49 = 0.0005;
  k50 = 0.02;
  k61 = 0.06;
  k62 = 0.6;
  k35 = 0.01;
  k36 = 0.0041;
  k37 = 5e-5;
  k38 = 6e-5;
  k39 = 0.00013;
  k40 = 6.4e-5;
  kf41 = 10;
  kr41 = 0.0001;
  k44 = 0.016;
  k45 = 0.0053;
  k46 = 5e-5;
  k47 = 6.4e-5;
  kf48 = 10;
  kr48 = 0.0001;
  k51 = 0.025;
  kf52 = 0.003;
  kr52 = 0.001;
  k53 = 0.0002;
  k54 = 0.0002;
  kf55 = 0.62;
  kr55 = 0.00048;
  kf56 = 0.62;
  kr56 = 0.00048;
  kf57 = 18.4;
  kr57 = 0.055;
  kf58 = 18.4;
  kr58 = 0.055;
  kf59 = 0.0038;
  kr59 = 8e-13;
  kf60 = 0.0038;
  kr60 = 8e-13;
  kf63 = 0.62;
  kr63 = 0.00048;
  kf64 = 0.62;
  kr64 = 0.00048;
  kf65 = 18.4;
  kr65 = 0.055;
  kf66 = 18.4;
  kr66 = 0.055;
  kf67 = 0.0038;
  kr67 = 8e-13;
  kf68 = 0.0038;
  kr68 = 8e-13;
  k71 = 0.0002;
  k72 = 0.0002;

  // Reactions:
  re1: FTAx + Promp105_RNAP => Promp105_RNAP_FTAX; kf32*Promp105_RNAP*FTAx - kr32*Promp105_RNAP_FTAX;
  re8: Promp105_RNAP_FTAX + NFkB_nucleus => Promp105_RNAP1_FTAx_p50p65; kf64*NFkB_nucleus*Promp105_RNAP_FTAX - kr64*Promp105_RNAP1_FTAx_p50p65;
  re14: NFkB_nucleus + PromIkBa_RNAP3_FTAz => IkBa_RNAP3_FTAz_p50p65; kf56*NFkB_nucleus*PromIkBa_RNAP3_FTAz - kr56*IkBa_RNAP3_FTAz_p50p65;
  re15: IkB_alpha_nucleus + PromIkBa_RNAP3_p50p65 => PromIkBa_RNAP3_p50p65_IkBa; kf57*IkB_alpha_nucleus*PromIkBa_RNAP3_p50p65 - kr57*PromIkBa_RNAP3_p50p65_IkBa;
  re19: NFkB_nucleus + Promp105_RNAP => Promp105_RNAP1_p50p65; kf63*NFkB_nucleus*Promp105_RNAP - kr63*Promp105_RNAP1_p50p65;
  re20: Promp105_RNAP1_p50p65 + IkB_alpha_nucleus => Promp105_RNAP1_p50p65_IkBa; kf65*IkB_alpha_nucleus*Promp105_RNAP1_p50p65 - kr65*Promp105_RNAP1_p50p65_IkBa;
  re21: NFkB_nucleus + PromIkBa_RNAP3 => PromIkBa_RNAP3_p50p65; kf55*NFkB_nucleus*PromIkBa_RNAP3 - kr55*PromIkBa_RNAP3_p50p65;
  re22: Promp105_RNAP1_FTAx_p50p65 + IkB_alpha_nucleus => Promp105_RNAP1_FTAx_p50p65_IkBa; kf66*IkB_alpha_nucleus*Promp105_RNAP1_FTAx_p50p65 - kr66*Promp105_RNAP1_FTAx_p50p65_IkBa;
  re23: IkB_alpha_nucleus + IkBa_RNAP3_FTAz_p50p65 => s215; kf58*IkB_alpha_nucleus*IkBa_RNAP3_FTAz_p50p65 - kr58*s215;
  re24: FTAz + PromIkBa_RNAP3 => PromIkBa_RNAP3_FTAz; kf48*FTAz*PromIkBa_RNAP3 - kr48*PromIkBa_RNAP3_FTAz;
  re25: Promp105_RNAP1_p50p65_IkBa => Promp105_RNAP + NFkB_IkB_alpha_nucleus; kf67*Promp105_RNAP1_p50p65_IkBa - kr67*NFkB_IkB_alpha_nucleus*Promp105_RNAP;
  re26: Promp105_RNAP1_FTAx_p50p65_IkBa => Promp105_RNAP_FTAX + NFkB_IkB_alpha_nucleus; kf68*Promp105_RNAP1_FTAx_p50p65_IkBa - kr68*NFkB_IkB_alpha_nucleus*Promp105_RNAP_FTAX;
  re27: s215 => PromIkBa_RNAP3_FTAz + NFkB_IkB_alpha_nucleus; kf60*s215 - kr60*NFkB_IkB_alpha_nucleus*PromIkBa_RNAP3_FTAz;
  re28: PromIkBa_RNAP3_p50p65_IkBa => PromIkBa_RNAP3 + NFkB_IkB_alpha_nucleus; kf59*PromIkBa_RNAP3_p50p65_IkBa - kr59*NFkB_IkB_alpha_nucleus*PromIkBa_RNAP3;
  re29: Promp65_RNAP2 + FTAy => Promp65_RNAP2_FTAy; kf41*FTAy*Promp65_RNAP2 - kr41*Promp65_RNAP2_FTAy;
  re30: InactivePRaseonp65 => ActivePRaseonp65; k42*Promp65_RNAP2 + k43*Promp65_RNAP2_FTAy;  // modifiers: Promp65_RNAP2, Promp65_RNAP2_FTAy
  re31: InactivePRaseonp105 => ActivePRaseonp105; k33*Promp105_RNAP + k34*Promp105_RNAP_FTAX + k69*Promp105_RNAP1_p50p65 + k70*Promp105_RNAP1_FTAx_p50p65;  // modifiers: Promp105_RNAP1_FTAx_p50p65, Promp105_RNAP_FTAX, Promp105_RNAP, Promp105_RNAP1_p50p65
  re32: InactivePRaseonIkB_alpha => ActivePRaseonIkB_alpha; k49*PromIkBa_RNAP3 + k50*PromIkBa_RNAP3_FTAz + k62*IkBa_RNAP3_FTAz_p50p65 + k61*PromIkBa_RNAP3_p50p65;  // modifiers: IkBa_RNAP3_FTAz_p50p65, PromIkBa_RNAP3_p50p65, PromIkBa_RNAP3, PromIkBa_RNAP3_FTAz
  re33: NFkB_nucleus => $csa17_degraded; k54*NFkB_nucleus;
  re34: ActivePRaseonp105 => mRNAp105; k35*ActivePRaseonp105;
  re35: p105 => $sa4_degraded; k38*p105;
  re36: mRNAp105 => $sa3_degraded; k37*mRNAp105;
  re37: mRNAp105 => p105 + mRNAp105; k36*mRNAp105;
  re38: p105 => p50; k39*p105;
  re39: p50 => $sa438_degraded; k40*p50;
  re40: ActivePRaseonp65 => mRNAp65; k44*ActivePRaseonp65;
  re41: mRNAp65 => $sa8_degraded; k46*mRNAp65;
  re42: p65 => $sa9_degraded; k47*p65;
  re43: mRNAp65 => p65 + mRNAp65; k45*mRNAp65;
  re44: ActivePRaseonIkB_alpha => mRNAIKB_alpha; k51*ActivePRaseonIkB_alpha;
  re45: mRNAIKB_alpha => sa12_degraded; k27*mRNAIKB_alpha;
  re46: IkB_alpha_default => $sa13_degraded; k21*IkB_alpha_default;
  re47: mRNAIKB_alpha => IkB_alpha_default + mRNAIKB_alpha; k22*mRNAIKB_alpha;
  re48: A20_nucleus => mRNAA20; k19 + k20*NFkB_nucleus;  // modifiers: NFkB_nucleus
  re49: IKKn => IKKa; k1*IKKn;
  re52: NFkB_IkB_alpha_default => NFkB_default; k12*NFkB_IkB_alpha_default;
  re53: IKKn => $sa19_degraded; k2*IKKn;
  re56: IKKa => $sa20_degraded; k6*IKKa;
  re57: IKKa_IKB_alpha => IKKa; k8*IKKa_IKB_alpha;
  re58: IKKa + NFkB_IkB_alpha_default => NFkB_IKKa_Ikb_alpha; k9*IKKa*NFkB_IkB_alpha_default;
  re59: NFkB_IKKa_Ikb_alpha => NFkB_default + IKKa; k10*NFkB_IKKa_Ikb_alpha;
  re60: IKKi => $sa444_degraded; k11*IKKi;
  re61: mRNAA20 => A20_default + mRNAA20; k16*mRNAA20;
  re62: p50 + p65 => NFkB_default; kf52*p50*p65 - kr52*NFkB_default;
  re63: IKKa => IKKi; k5*IKKa + k4*IKKa*A20_default;  // modifiers: A20_default
  re64: IKK => IKKn; k3;
  re65: IkB_alpha_default + NFkB_default => NFkB_IkB_alpha_default; kf13*NFkB_default*IkB_alpha_default - kr13*NFkB_IkB_alpha_default;
  re66: IkB_alpha_default + IKKa => IKKa_IKB_alpha; k7*IKKa*IkB_alpha_default;
  re67: NFkB_default => 5 NFkB_nucleus; kf15*NFkB_default - kr15*NFkB_nucleus;
  re68: 5 NFkB_IkB_alpha_nucleus => NFkB_IkB_alpha_default; kf28*NFkB_IkB_alpha_nucleus - kr28*NFkB_IkB_alpha_default;
  re69: NFkB_nucleus + IkB_alpha_nucleus => NFkB_IkB_alpha_nucleus; kf14*NFkB_nucleus*IkB_alpha_nucleus - kr14*NFkB_IkB_alpha_nucleus;
  re70: mRNAA20 => $sa96_degraded; k17*mRNAA20;
  re71: A20_default => $sa97_degraded; k18*A20_default;
  re72: IkB_alpha_default => 5 IkB_alpha_nucleus; kf23*IkB_alpha_default - kr23*IkB_alpha_nucleus;
  re74: NFkB_default => $csa21_degraded; k53*NFkB_default;
  re75: NFkB_IkB_alpha_default => $csa18_degraded; k71*NFkB_IkB_alpha_default;
  re76: NFkB_IkB_alpha_nucleus => $csa9_degraded; k72*NFkB_IkB_alpha_nucleus;

  // Events:
  signal: at (time > 72000): k1 = 0.0025;
end
