// SBML level 2 version 4

model Westermark2003_Pancreatic_GlycOsc_extended()
  // This is the extended model described in eq. 2 of the article:
  // A model of phosphofructokinase and glycolytic oscillations in the pancreatic beta-cell.
  // Westermark PO and Lansner A. Biophys J. 2003 Jul;85(1):126-39. PMID: 12829470, doi:10.1016/S0006-3495(03)74460-9
  // Abstract:
  // We have constructed a model of the upper part of the glycolysis in the pancreatic beta-cell. The model comprises the enzymatic reactions from glucokinase to glyceraldehyde-3-phosphate dehydrogenase (GAPD). Our results show, for a substantial part of the parameter space, an oscillatory behavior of the glycolysis for a large range of glucose concentrations. We show how the occurrence of oscillations depends on glucokinase, aldolase and/or GAPD activities, and how the oscillation period depends on the phosphofructokinase activity. We propose that the ratio of glucokinase and aldolase and/or GAPD activities are adequate as characteristics of the glucose responsiveness, rather than only the glucokinase activity. We also propose that the rapid equilibrium between different oligomeric forms of phosphofructokinase may reduce the oscillation period sensitivity to phosphofructokinase activity. Methodologically, we show that a satisfying description of phosphofructokinase kinetics can be achieved using the irreversible Hill equation with allosteric modifiers. We emphasize the use of parameter ranges rather than fixed values, and the use of operationally well-defined parameters in order for this methodology to be feasible. The theoretical results presented in this study apply to the study of insulin secretion mechanisms, since glycolytic oscillations have been proposed as a cause of oscillations in the ATP/ADP ratio which is linked to insulin secretion.
  // This model originates from BioModels Database: A Database of Annotated Published Models. It is copyright (c) 2005-2009 The BioModels Team.
  // For more information see the terms of use.
  // To cite BioModels Database, please use Le Novère N., Bornstein B., Broicher A., Courtot M., Donizelli M., Dharuri H., Li L., Sauro H., Schilstra M., Shapiro B., Snoep J.L., Hucka M. (2006) BioModels Database: A Free, Centralized Database of Curated, Published, Quantitative Kinetic Models of Biochemical and Cellular Systems Nucleic Acids Res., 34: D689-D691.
  // biomodels.db:MODEL9574422639
  // biomodels.db:BIOMD0000000236
  // isDescribedBy pubmed:12829470
  // isDerivedFrom pubmed:6271617
  // isVersionOf GO:0006096
  // isPartOf kegg.pathway:map00010

  // Compartments:
  compartment cell = 1;  // isVersionOf FMA:70586; isVersionOf GO:0005623

  // Species:
  species $GLC in cell = 10; GLC is "intracellular glucose";  // isVersionOf CHEBI:17234 kegg.compound:C00293
  species G6P_F6P in cell = 3.71728;  // hasPart kegg.compound:C00092 kegg.compound:C00085 CHEBI:4170; hasPart CHEBI:14314 CHEBI:15946
  species $F6P in cell; F6P is "fructose-6-phosphate";  // isVersionOf CHEBI:15946 kegg.compound:C00085
  species FBP in cell = 0.00063612; FBP is "fructose-1,6-biphosphate";  // isVersionOf CHEBI:16905 kegg.compound:C00354
  species $G3P in cell; G3P is "glyceraldehyde--phosphate";  // isVersionOf CHEBI:29052 kegg.compound:C00118
  species $DHAP in cell; DHAP is "dihydroxyacetone-phosphate";  // isVersionOf CHEBI:16108 kegg.compound:C00111
  species DHAP_G3P in cell = 0.00262966; DHAP_G3P is "DHAP-G3P pool";  // hasPart CHEBI:16108 CHEBI:29052; hasPart kegg.compound:C00111 kegg.compound:C00118 CHEBI:16108

  // Parameters:
  Vgk has mM_per_s;
  hGK = 1.7 dimensionless;
  KeqGPI = 0.3 dimensionless;
  KeqTPI = 0.045455 dimensionless;
  Vpfk has mM_per_s;
  Vfba has mM_per_s;
  Vgapdh has mM_per_s;
  Sgk = 8 mM;
  Spfk = 4 mM;
  Sfba = 0.005 mM;
  Sgapdh = 0.005 mM;
  Xpfk = 0.01 mM;
  alpha = 5 dimensionless;
  hx = 2.5 dimensionless;
  hpfk = 2.5 dimensionless;
  hact = 1 dimensionless;
  dw_per_ml = 0.3333 g_per_ml;
  min_to_sec = 60 dimensionless;
  Vgk_min = 10 mmole_per_min_g;
  Vpfk_min = 100 mmole_per_min_g;
  Vfba_min = 25 mmole_per_min_g;
  Vgapdh_min = 250 mmole_per_min_g;
  Pfba = 0.5 mM;
  Qfba = 0.275 mM;
  KeqFBA = 0.1 mM;

  // Assignment rules:
  sigma := F6P/Spfk;
  Vgk := Vgk_min*dw_per_ml/min_to_sec;
  Vpfk := Vpfk_min*dw_per_ml/min_to_sec;
  Vfba := Vfba_min*dw_per_ml/min_to_sec;
  Vgapdh := Vgapdh_min*dw_per_ml/min_to_sec;
  F6P := G6P_F6P*KeqGPI/(1 + KeqGPI);
  G3P := DHAP_G3P*KeqTPI/(1 + KeqTPI);
  DHAP := DHAP_G3P - G3P;

  // Reactions:
  vgk: $GLC -> G6P_F6P; cell*Vgk*(GLC/Sgk)^hGK/(1 + (GLC/Sgk)^hGK);  // hasVersion kegg.reaction:R00725 kegg.reaction:R00771; hasVersion GO:0004347 GO:0004396; hasVersion ec-code:5.3.1.9 ec-code:2.7.1.1
  vpfk: G6P_F6P -> FBP; cell*Vpfk*(F6P/Spfk)^(hpfk - (hpfk - hact)*(FBP/Sfba/(1 + FBP/Sfba)))/((F6P/Spfk)^(hpfk - (hpfk - hact)*(FBP/Sfba/(1 + FBP/Sfba))) + (1 + (FBP/Xpfk)^hx)/(1 + alpha^(hpfk - (hpfk - hact)*(FBP/Sfba/(1 + FBP/Sfba)))*(FBP/Xpfk)^hx));  // modifiers: F6P; isVersionOf kegg.reaction:R00756; isVersionOf GO:0003872; isVersionOf ec-code:2.7.1.11
  vfba: FBP -> 2 DHAP_G3P; cell*Vfba*(FBP/Sfba - G3P*DHAP/(Pfba*Qfba*KeqFBA))/(1 + FBP/Sfba + DHAP/Qfba + G3P*DHAP/(Pfba*Qfba));  // modifiers: G3P, DHAP; isVersionOf kegg.reaction:R01068; isVersionOf ec-code:4.1.2.13; isVersionOf GO:0004332
  vgapdh: DHAP_G3P => ; cell*Vgapdh*G3P/(Sgapdh + G3P);  // modifiers: G3P; isVersionOf kegg.reaction:R01061; isVersionOf GO:0004365; isVersionOf ec-code:1.2.1.12

  // Unit definitions:
  unit substance = 1e-3 mole; substance is "mmole";
  unit time = second; time is "seconds";
  unit mM = 1e-3 mole / litre;
  unit g_per_ml = 1e-3 kilogram / (1e-3 litre); g_per_ml is "gramm per ml";
  unit mM_per_s = 1e-3 mole / (second * litre); mM_per_s is "mM per sec";
  unit mmole_per_min_g = 1e-3 mole / (60 second * kilogram); mmole_per_min_g is "mmole per (min kg)";
end
