// SBML level 2 version 4

model Alexander2010_Tcell_Regulation_Sys2()
  // This is system 2, the model with Michelis Menten type antigen uptake by pAPCs, described in the article:
  // Self-tolerance and Autoimmunity in a Regulatory T Cell Model.
  // Alexander HK, Wahl LM. Bull Math Biol. 2010 Mar 2. PMID: 20195912 , doi: 10.1007/s11538-010-9519-2 ;
  // Abstract:
  // The class of immunosuppressive lymphocytes known as regulatory T cells (Tregs) has been identified as a key component in preventing autoimmune diseases. Although Tregs have been incorporated previously in mathematical models of autoimmunity, we take a novel approach which emphasizes the importance of professional antigen presenting cells (pAPCs). We examine three possible mechanisms of Treg action (each in isolation) through ordinary differential equation (ODE) models. The immune response against a particular autoantigen is suppressed both by Tregs specific for that antigen and by Tregs of arbitrary specificities, through their action on either maturing or already mature pAPCs or on autoreactive effector T cells. In this deterministic approach, we find that qualitative long-term behaviour is predicted by the basic reproductive ratio R (0) for each system. When R (0) < 1, only the trivial equilibrium exists and is stable; when R (0)>1, this equilibrium loses its stability and a stable non-trivial equilibrium appears. We interpret the absence of self-damaging populations at the trivial equilibrium to imply a state of self-tolerance, and their presence at the non-trivial equilibrium to imply a state of chronic autoimmunity. Irrespective of mechanism, our model predicts that Tregs specific for the autoantigen in question play no role in the system's qualitative long-term behaviour, but have quantitative effects that could potentially reduce an autoimmune response to sub-clinical levels. Our results also suggest an important role for Tregs of arbitrary specificities in modulating the qualitative outcome. A stochastic treatment of the same model demonstrates that the probability of developing a chronic autoimmune response increases with the initial exposure to self antigen or autoreactive effector T cells. The three different mechanisms we consider, while leading to a number of similar predictions, also exhibit key differences in both transient dynamics (ODE approach) and the probability of chronic autoimmunity (stochastic approach).
  // Originally created by libAntimony v1.4 (using libSBML 3.4.1)
  // biomodels.db:MODEL1012220001
  // biomodels.db:BIOMD0000000290
  // isDescribedBy pubmed:20195912
  // isVersionOf GO:0002667 DOID:417
  // hasTaxon taxonomy:33208
  // hasProperty mamo:MAMO_0000046

  // Compartments:
  compartment body = 1;

  // Species:
  substanceOnly species A in body = 1;  // isVersionOf CL:0000145
  substanceOnly species R in body = 0;  // isVersionOf CL:0000903
  substanceOnly species E in body = 0;  // isVersionOf CL:0000911
  substanceOnly species G in body = 100000000;  // isVersionOf CHEBI:59132
  substanceOnly species $A_im in body = 0;  // isVersionOf CL:0000473

  // Parameters:
  v_max = 125000 items_per_day;
  k = 50000000 substance;
  f = 0.0001 dimensionless;
  gamma = 2000 per_day;
  beta = 200 per_day;
  pi1 = 0.016 per_day_per_item;
  lambdaE = 1000 per_day;
  muA = 0.25 per_day;
  muR = 0.25 per_day;
  muE = 0.25 per_day;
  muG = 5 per_day;
  b1 = 0.25 per_day;
  sigma1 = 3e-6 per_day_per_item;
  mA has per_day;
  mG has per_day;
  R0 has dimensionless;

  // Assignment rules:
  mA := b1 + muA;
  mG := muG + v_max/k;
  R0 := f*(v_max/k)*lambdaE*gamma/(mG*mA*muE);

  // Reactions:
  r1a: G => ; v_max/(k + G)*G; r1a is "r1a: self-antigen uptake";
  r1b: $A_im => A; f*(v_max/(k + G))*G; r1b is "r1b: pAPC maturation";  // modifiers: G
  r2: => G; gamma*E; r2 is "r2: self-antigen release triggered by E";  // modifiers: E
  r3_R_activation_by_A: => R; beta*A; r3_R_activation_by_A is "r3: R activation by A";  // modifiers: A
  r4_R_activation_by_A_and_E: => R; pi1*E*A; r4_R_activation_by_A_and_E is "r4: R activation by A and E";  // modifiers: A, E
  r5_E_generation_by_A: => E; lambdaE*A; r5_E_generation_by_A is "r5: E generation by A";  // modifiers: A
  r6_A_death: A => ; muA*A; r6_A_death is "r6: A death";
  r7_R_death: R => ; muR*R; r7_R_death is "r7: R death";
  r8_E_death: E => ; muE*E; r8_E_death is "r8: E death";
  r9_G_clearance: G => ; muG*G; r9_G_clearance is "r9: G clearance";
  r10: A => ; b1*A; r10 is "r10: A suppression by Tregs of other specificity";
  r11_A_suppression_by_R: A => ; sigma1*A*R; r11_A_suppression_by_R is "r11: A suppression by R";  // modifiers: R

  // Unit definitions:
  unit substance = item; substance is "number";
  unit time = 86400 second; time is "days";
  unit per_day = 1 / (86400 second);
  unit per_day_per_item = 1 / (86400 second * item);
  unit items_per_day = item / (86400 second);
end
