// SBML level 2 version 4

model Plant1981_BurstingNerveCells()
  // This a model from the article:
  // Bifurcation and resonance in a model for bursting nerve cells.
  // Plant RE J Math Biol1981 Jan; 11(1): 15-32 7252375,
  // Abstract:
  // In this paper we consider a model for the phenomenon of bursting in nerve cells. Experimental evidence indicates that this phenomenon is due to the interaction of multiple conductances with very different kinetics, and the model incorporates this evidence. As a parameter is varied the model undergoes a transition between two oscillatory waveforms; a corresponding transition is observed experimentally. After establishing the periodicity of the subcritical oscillatory solution, the nature of the transition is studied. It is found to be a resonance bifurcation, with the solution branching at the critical point to another periodic solution of the same period. Using this result a comparison is made between the model and experimental observations. The model is found to predict and allow an interpretation of these observations.
  // Also, look at http://www.scholarpedia.org/article/Plant_model
  // This model originates from BioModels Database: A Database of Annotated Published Models (http://www.ebi.ac.uk/biomodels/). It is copyright (c) 2005-2011 The BioModels.net Team.
  // For more information see the terms of use.
  // To cite BioModels Database, please use: Li C, Donizelli M, Rodriguez N, Dharuri H, Endler L, Chelliah V, Li L, He E, Henry A, Stefan MI, Snoep JL, Hucka M, Le Novère N, Laibe C (2010) BioModels Database: An enhanced, curated and annotated resource for published quantitative kinetic models. BMC Syst Biol., 4:92.
  // biomodels.db:MODEL6762427183
  // biomodels.db:BIOMD0000000304
  // isDescribedBy pubmed:7252375
  // hasTaxon taxonomy:6499 BTO:0000022 BTO:0000938
  // isVersionOf GO:0006816 GO:0006814 GO:0006813 GO:0019228
  // hasProperty mamo:MAMO_0000046

  // Compartments:
  compartment COMpartment = 1;

  // Species:
  species V_membrane in COMpartment = -55;  // isVersionOf PATO:0001462
  species h1 in COMpartment = 0.9;  // isVersionOf CHEBI:29101
  species x1 in COMpartment = 0.27;  // isVersionOf CHEBI:29108
  species n1 in COMpartment = 0.03;  // isVersionOf CHEBI:29103
  species c in COMpartment = 0.4;  // isVersionOf CHEBI:29108

  // Parameters:
  V_I = 30;
  V_K = -75;
  V_L = -40;
  V_Ca = 140;
  g_I = 4;
  g_K = 0.3;
  g_T = 0.01;
  g_K_Ca = 0.03;
  g_L = 0.003;
  K_p = 0.5;
  K_c = 0.0085;
  f = 0.0003;
  tau_x = 235;
  a = 1.209;
  b = 78.714;
  g_Ca = 0.004;

  // Assignment rules:
  Vs := a*V_membrane + b;
  alpha_m := 0.1*(50 - Vs)/(exp((50 - Vs)/10) - 1);
  beta_m := 4*exp((25 - Vs)/18);
  m_infinity := alpha_m/(alpha_m + beta_m);
  alpha_h := 0.07*exp((25 - Vs)/20);
  beta_h := 1/(exp((55 - Vs)/10) + 1);
  h_infinity := alpha_h/(alpha_h + beta_h);
  tau_h := 12.5/(alpha_h + beta_h);
  i_Na := g_I*m_infinity^3*h1*(V_I - V_membrane);
  x_infinity := 1/(exp(0.15*(-V_membrane - 50)) + 1);
  i_Ca := g_T*x1*(V_I - V_membrane);
  alpha_n := 0.01*(55 - Vs)/(exp((55 - Vs)/10) - 1);
  beta_n := 0.125*exp((45 - Vs)/80);
  n_infinity := alpha_n/(alpha_n + beta_n);
  tau_n := 12.5/(alpha_n + beta_n);
  i_K := g_K*n1^4*(V_K - V_membrane);
  i_K_Ca := g_K_Ca*c/(K_p + c)*(V_K - V_membrane);
  i_L := g_L*(V_L - V_membrane);

  // Rate rules:
  h1' = (h_infinity - h1)/tau_h;
  x1' = (x_infinity - x1)/tau_x;
  n1' = (n_infinity - n1)/tau_n;
  c' = f*(K_c*x1*(V_Ca - V_membrane) - c);
  V_membrane' = i_Na + i_Ca + i_K + i_K_Ca + i_L;
end
