// SBML level 2 version 3

model Cooling2007_IP3transients_CardiacMyocyte()
  // This a model from the article:
  // Modeling hypertrophic IP3 transients in the cardiac myocyte.
  // Cooling M, Hunter P, Crampin EJ. Biophys J2007 Nov 15;93(10):3421-33 17693463,
  // Abstract:
  // Cardiac hypertrophy is a known risk factor for heart disease, and at the cellular level is caused by a complex interaction of signal transduction pathways. The IP3-calcineurin pathway plays an important role in stimulating the transcription factor NFAT which binds to DNA cooperatively with other hypertrophic transcription factors. Using available kinetic data, we construct a mathematical model of the IP3 signal production system after stimulation by a hypertrophic alpha-adrenergic agonist (endothelin-1) in the mouse atrial cardiac myocyte. We use a global sensitivity analysis to identify key controlling parameters with respect to the resultant IP3 transient, including the phosphorylation of cell-membrane receptors, the ligand strength and binding kinetics to precoupled (with G(alpha)GDP) receptor, and the kinetics associated with precoupling the receptors. We show that the kinetics associated with the receptor system contribute to the behavior of the system to a great extent, with precoupled receptors driving the response to extracellular ligand. Finally, by reparameterizing for a second hypertrophic alpha-adrenergic agonist, angiotensin-II, we show that differences in key receptor kinetic and membrane density parameters are sufficient to explain different observed IP3 transients in essentially the same pathway.
  // This model was taken from the CellML repository and automatically converted to SBML.
  // The original model was: Cooling M, Hunter P, Crampin EJ. (2007) - version02
  // The original CellML model was created by:
  // Cooling, Mike,
  // m.cooling@aukland.ac.nz
  // The University of Auckland
  // The Bioengineering Institute
  // This model originates from BioModels Database: A Database of Annotated Published Models (http://www.ebi.ac.uk/biomodels/). It is copyright (c) 2005-2012 The BioModels.net Team.
  // For more information see the terms of use.
  // To cite BioModels Database, please use: Li C, Donizelli M, Rodriguez N, Dharuri H, Endler L, Chelliah V, Li L, He E, Henry A, Stefan MI, Snoep JL, Hucka M, Le Novère N, Laibe C (2010) BioModels Database: An enhanced, curated and annotated resource for published quantitative kinetic models. BMC Syst Biol., 4:92.
  // biomodels.db:MODEL0913194523
  // biomodels.db:BIOMD0000000400
  // isDescribedBy pubmed:17693463
  // hasTaxon taxonomy:10090
  // isVersionOf FMA:83108
  // isVersionOf GO:0003300 GO:0048016 GO:0003015

  // Compartments:
  compartment Compartment = 1;  // GO:0005623

  // Species:
  species Gd in Compartment = 10000;  // hasPart CHEBI:17552 uniprot:P27600
  species Gt in Compartment = 0;  // hasPart CHEBI:15996 uniprot:P27600
  species R in Compartment = 13.9;  // isVersionOf uniprot:P35412
  species Rl in Compartment = 0;  // hasPart uniprot:P35412 CCO:F0001633
  species Rg in Compartment = 5.06;  // hasPart CHEBI:17552 uniprot:P35412 uniprot:P27600
  species Rlg in Compartment = 0;  // hasPart CHEBI:17552 uniprot:P35412 uniprot:P27600 CCO:F0001633
  species Rlgp in Compartment = 0;  // hasPart CHEBI:17552 uniprot:P35412 uniprot:P27600 CCO:F0001633; isVersionOf MOD:00696
  species IP3 in Compartment = 0.015;  // isVersionOf uniprot:Q8R071
  species Pc in Compartment = 9.09;  // hasPart CHEBI:29108 uniprot:Q9Z1B3
  species Pcg in Compartment = 0;  // hasPart CHEBI:29108 CHEBI:15996 uniprot:Q9Z1B3 uniprot:P27600
  species P in Compartment = 90.9;  // isVersionOf uniprot:Q9Z1B3
  species Pg in Compartment = 0;  // hasPart CHEBI:15996 uniprot:Q9Z1B3 uniprot:P27600
  species Ca in Compartment = 0.1;  // isVersionOf CHEBI:29108

  // Parameters:
  Ls = 0.1;
  ts = 30;
  PIP2 = 4000;
  kf1 = 0.0003;
  Kd1 = 3e-5;
  kf2 = 0.000275;
  Kd2 = 27500;
  kf3 = 1;
  kr3 = 0.001;
  kf4 = 0.3;
  Kd4 = 3e-5;
  kf5 = 0.0004;
  kf6 = 1;
  kf7 = 0.15;
  kf8 = 0.0167;
  kr8 = 0.0167;
  kf9 = 0.0042;
  kr9 = 1;
  kf10 = 0.042;
  kr10 = 1;
  kf11 = 0.0334;
  Kd11 = 0.1;
  kf12 = 6;
  kf13 = 6;
  kf14 = 0.444;
  Km14 = 19.8;
  kf15 = 3.8;
  Km15 = 5;
  kf16 = 1.25;
  Vc = 2550;
  Rpc = 4.61;

  // Assignment rules:
  Cc := 1/(Vc*602.2);
  Cp := 1/(Vc*Rpc);
  Cpc := Cc/Cp;
  J13 := kf13*Pg;
  J12 := kf12*Pcg;
  kr11 := kf11*Kd11;
  J11 := kf11*Pg*Ca - kr11*Pcg;
  J10 := kf10*Pc*Gt - kr10*Pcg;
  J8 := kf8*P*Ca - kr8*Pc;
  J9 := kf9*P*Gt - kr9*Pg;
  J16 := kf16*IP3;
  J14 := kf14*Pc*PIP2/(Km14/Cpc + PIP2);
  J15 := kf15*Pcg*PIP2/(Km15/Cpc + PIP2);
  J7 := kf7*Gt;
  L := piecewise(Ls/(1 + exp(-80*(time - ts - 0.05))), (time < ts + 0.15) && (time >= ts), Ls, time >= ts + 0.15, 0);
  kr1 := kf1*Kd1;
  J1 := kf1*R*L - kr1*Rl;
  kr2 := kf2*Kd2;
  J2 := kf2*R*Gd - kr2*Rg;
  J3 := kf3*Rl*Gd - kr3*Rlg;
  kr4 := kf4*Kd4;
  J4 := kf4*L*Rg - kr4*Rlg;
  J5 := kf5*Rlg;
  J6 := kf6*Rlg;

  // Rate rules:
  P' = J13 - (J9 + J8);
  Pg' = J9 - (J11 + J13);
  Pc' = J8 + J12 - J10;
  Pcg' = J10 + J11 - J12;
  IP3' = Cpc*(J14 + J15) - J16;
  Gd' = J7 + J13 + J12 - (J2 + J3);
  Gt' = J6 - (J7 + J9 + J10);
  Ca' = Cpc*(-1)*(J8 + J11);
  R' = -1*(J1 + J2);
  Rl' = J1 + J6 - J3;
  Rg' = J2 - J4;
  Rlgp' = J5;
  Rlg' = J3 - J5 + J4 - J6;
end
