// SBML level 2 version 4

model Muraro2011_CytokininAuxin_CrossRegulation()
  // Muraro2011_Cytokinin-Auxin_CrossRegulation
  // This model is from the article:
  // The influence of cytokinin-auxin cross-regulation on cell-fate determination in Arabidopsis thaliana root development
  // Muraro D, Byrne H, King J, Voss U, Kieber J, Bennett M. J Theor Biol.2011 Aug 21;283(1):152-67. PMID: 21640126,
  // Abstract:
  // Root growth and development in Arabidopsis thaliana are sustained by a specialised zone termed the meristem, which contains a population of dividing and differentiating cells that are functionally analogous to a stem cell niche in animals. The hormones auxin and cytokinin control meristem size antagonistically. Local accumulation of auxin promotes cell division and the initiation of a lateral root primordium. By contrast, high cytokinin concentrations disrupt the regular pattern of divisions that characterises lateral root development, and promote differentiation. The way in which the hormones interact is controlled by a genetic regulatory network. In this paper, we propose a deterministic mathematical model to describe this network and present model simulations that reproduce the experimentally observed effects of cytokinin on the expression of auxin regulated genes. We show how auxin response genes and auxin efflux transporters may be affected by the presence of cytokinin. We also analyse and compare the responses of the hormones auxin and cytokinin to changes in their supply with the responses obtained by genetic mutations of SHY2, which encodes a protein that plays a key role in balancing cytokinin and auxin regulation of meristem size. We show that although shy2 mutations can qualitatively reproduce the effect of varying auxin and cytokinin supply on their response genes, some elements of the network respond differently to changes in hormonal supply and to genetic mutations, implying a different, general response of the network. We conclude that an analysis based on the ratio between these two hormones may be misleading and that a mathematical model can serve as a useful tool for stimulate further experimental work by predicting the response of the network to changes in hormone levels and to other genetic mutations.
  // biomodels.db:MODEL1203080000
  // biomodels.db:BIOMD0000000416
  // isDescribedBy pubmed:21640126
  // isDerivedFrom pubmed:20135237
  // hasTaxon taxonomy:3702
  // hasProperty mamo:MAMO_0000046

  // Compartments:
  compartment cell = 1;  // isVersionOf GO:0005623

  // Species:
  species IAAm in cell = 0;  // encodes uniprot:P49677; isVersionOf CHEBI:33699
  species IAAp in cell = 0;  // isVersionOf uniprot:P49677
  species AuxTIR1 in cell = 0;  // hasPart CHEBI:22676 uniprot:Q570C0
  species AuxTIAA in cell = 0;  // hasPart CHEBI:22676 uniprot:Q570C0 uniprot:P49677
  species IAAs in cell = 0;  // isVersionOf uniprot:P49677
  species ARFIAA in cell = 0;  // isVersionOf uniprot:Q94JM3 uniprot:P49677
  species ARF2 in cell = 0;  // isVersionOf uniprot:Q94JM3
  species Aux in cell = 1;  // isVersionOf CHEBI:22676
  species PINm in cell = 0;  // encodes uniprot:Q9SL42
  species PINp in cell = 0;  // isVersionOf uniprot:Q9SL42
  species ARm in cell = 0;  // encodes uniprot:Q9FZ33
  species ARp in cell = 0;  // isVersionOf uniprot:Q9FZ33
  species TIR1 in cell;  // isVersionOf uniprot:Q570C0
  species ARF in cell;  // isVersionOf uniprot:Q94JM3
  species CRm in cell = 0;  // encodes uniprot:O82503
  species CRp in cell = 0;  // isVersionOf uniprot:O82503
  species AHKph in cell = 1;  // isVersionOf uniprot:Q9C5U0 kegg.compound:C00562
  species Ck in cell = 1;  // isVersionOf CHEBI:23530
  species ARRBph in cell = 0;  // isVersionOf uniprot:Q940D0 kegg.compound:C00562
  species ARRAph in cell = 0;  // isVersionOf uniprot:Q9ZWJ9 kegg.compound:C00562
  species ARRAm in cell = 0;  // encodes uniprot:Q940D0
  species ARRAp in cell = 0;  // isVersionOf uniprot:Q940D0
  species ARRBp in cell;  // isVersionOf uniprot:Q940D0
  species CkAHKph in cell;  // hasPart CHEBI:23530 uniprot:Q9C5U0
  species CkAHK in cell;  // hasPart CHEBI:23530 uniprot:Q9C5U0
  species F1 in cell;
  species F2 in cell;
  species F3 in cell;
  species F4 in cell;
  species F5a in cell;
  species F5b in cell;
  species F6 in cell;

  // Parameters:
  eps = 0.01;
  lambda1 = 0.1;
  lambda3 = 0.02;
  alphaAux = 1;
  alphaTIR1 = 1;
  alphaARF = 1;
  phiIAAp = 100;
  phiARp = 2;
  phiPINp = 100;
  deltaIAAp = 1;
  deltaARp = 1;
  deltaPINp = 1;
  muAux = 0.1;
  muIAAs = 1;
  etaAuxTIR1 = 10;
  etaARFIAA = 1;
  la = 0.5;
  ld = 0.1;
  pa = 10;
  pd = 10;
  ka = 100;
  kd = 1;
  qa = 1;
  qd = 1;
  thetaARF = 0.1;
  thetaARF2 = 0.01;
  thARFIAA = 0.1;
  thetaIAAp = 0.1;
  thetaARp = 0.1;
  psiARFIAA = 0.1;
  psiARF = 0.1;
  alphaCk = 1;
  alphaARRB = 2;
  alphaAHK = 1;
  alphaPH = 1;
  phiCRp = 2;
  phiARRAp = 100;
  deltaCRp = 1;
  deltaARRAp = 1;
  muCk = 0.1;
  etaAHKph = 1;
  etaCkPh = 1;
  ra = 1;
  rd = 1;
  ua = 1;
  ud = 1;
  sa = 1;
  sd = 1;
  thARRAph = 0.1;
  thARRBph = 0.1;

  // Assignment rules:
  TIR1 := alphaTIR1 - AuxTIR1 - AuxTIAA;
  ARF := alphaARF - 2*ARF2 - ARFIAA;
  ARRBp := alphaARRB - etaAHKph*ARRBph;
  CkAHKph := alphaPH - AHKph - ARRAph - ARRBph;
  CkAHK := alphaAHK - etaAHKph*(AHKph + CkAHKph);
  F1 := ARF/thetaARF/(1 + ARF/thetaARF + ARF2/thetaARF2 + ARFIAA/thARFIAA + ARF*IAAp/psiARFIAA + ARF^2/psiARF + ARRBph/thARRBph);
  F2 := (ARF2/thetaARF2 + ARF^2/psiARF)/(1 + ARF/thetaARF + ARF2/thetaARF2 + ARFIAA/thARFIAA + ARF*IAAp/psiARFIAA + ARF^2/psiARF + ARRBph/thARRBph);
  F3 := ARRBph/thARRBph/(1 + ARF/thetaARF + ARF2/thetaARF2 + ARFIAA/thARFIAA + ARF*IAAp/psiARFIAA + ARF^2/psiARF + ARRBph/thARRBph);
  F4 := ARRBph/thARRBph/(1 + ARRAph/thARRAph + ARRBph/thARRBph);
  F5a := ARF/thetaARF/(1 + ARF/thetaARF + ARF2/thetaARF2 + ARFIAA/thARFIAA + ARF*IAAp/psiARFIAA + ARF^2/psiARF);
  F5b := (ARF2/thetaARF2 + ARF^2/psiARF)/(1 + ARF/thetaARF + ARF2/thetaARF2 + ARFIAA/thARFIAA + ARF*IAAp/psiARFIAA + ARF^2/psiARF);
  F6 := ARp/thetaARp/(1 + ARp/thetaARp);

  // Reactions:
  r1: => IAAm; phiIAAp*(lambda1*F1 + F2 + lambda3*F3) - IAAm;  // modifiers: F1, F2, F3; isVersionOf GO:0009299
  r2: => IAAp; 1/eps*(deltaIAAp*IAAm - la*IAAp*AuxTIR1 + ld*AuxTIAA) + etaARFIAA*(pd*ARFIAA - pa*IAAp*ARF);  // modifiers: IAAm, AuxTIR1, AuxTIAA, ARFIAA, ARF; isVersionOf GO:0006412
  r3: => AuxTIR1; 1/eps*(ka*Aux*TIR1 - kd*AuxTIR1 + (ld + 1)*AuxTIAA - la*AuxTIR1*IAAp);  // modifiers: Aux, TIR1, AuxTIAA, IAAp; isVersionOf GO:0006461
  r4: => AuxTIAA; 1/eps*(la*IAAp*AuxTIR1 - (ld + 1)*AuxTIAA);  // modifiers: IAAp, AuxTIR1; isVersionOf GO:0006461
  r5: => IAAs; 1/eps*(AuxTIAA - muIAAs*IAAs);  // modifiers: AuxTIAA; isVersionOf GO:0043241
  r6: => ARFIAA; pa*ARF*IAAp - pd*ARFIAA;  // modifiers: ARF, IAAp; isVersionOf GO:0006461
  r7: => ARF2; qa*ARF^2 - qd*ARF2;  // modifiers: ARF; isVersionOf GO:0006412
  r8: => Aux; muAux*(alphaAux - Aux) - 1/eps*etaAuxTIR1*(ka*Aux*TIR1 - kd*AuxTIR1);  // modifiers: TIR1, AuxTIR1; isVersionOf GO:0009851
  r9: => PINm; phiPINp*(lambda1*F5a + F5b) - PINm;  // modifiers: F5a, F5b; isVersionOf GO:0009299
  r10: => PINp; 1/eps*(deltaPINp*PINm - PINp);  // modifiers: PINm; isVersionOf GO:0006412
  r11: => ARm; phiARp*(lambda1*F5a + F5b) - ARm;  // modifiers: F5a, F5b; isVersionOf GO:0009299
  r12: => ARp; 1/eps*(deltaARp*ARm - ARp);  // modifiers: ARm; isVersionOf GO:0006412
  r13: => CRm; phiCRp*F4 - CRm;  // modifiers: F4; isVersionOf GO:0009299
  r14: => CRp; 1/eps*(deltaCRp*CRm - CRp);  // modifiers: CRm; isVersionOf GO:0006412
  r15: => AHKph; 1/eps*(rd*CkAHKph - ra*AHKph*Ck);  // modifiers: CkAHKph, Ck; isVersionOf GO:0016310
  r16: => Ck; muCk*(alphaCk - Ck) - etaCkPh/eps*(ra*AHKph*Ck - rd*CkAHKph);  // modifiers: AHKph, CkAHKph; isVersionOf GO:0009691
  r17: => ARRBph; 1/eps*(ua*CkAHKph*ARRBp - ud*CkAHK*ARRBph);  // modifiers: CkAHKph, CkAHK, ARRBp; isVersionOf GO:0016310
  r18: => ARRAph; 1/eps*(sa*CkAHKph*ARRAp - sd*CkAHK*ARRAph);  // modifiers: CkAHKph, ARRAp, CkAHK; isVersionOf GO:0016310
  r19: => ARRAm; phiARRAp*F6 - ARRAm;  // modifiers: F6; isVersionOf GO:0009299
  r20: => ARRAp; 1/eps*(deltaARRAp*ARRAm - ARRAp + etaAHKph*(sd*CkAHK*ARRAph - sa*CkAHKph*ARRAp));  // modifiers: ARRAm, CkAHK, ARRAph, CkAHKph; isVersionOf GO:0006412
end
