// SBML level 2 version 4
// dcterms:bibliographicCitation: Reduction of serum hepcidin by hemodialysis in pediatric and adult patients. http://identifiers.org/doi/10.2215/CJN.08161109
// dcterms:bibliographicCitation: Role of iron and ferritin in TNFα-induced apoptosis in HeLa cells http://identifiers.org/doi/10.1016/S0014-5793(03)00114-5
// dcterms:bibliographicCitation: Serum heme oxygenase-1 levels are increased in Parkinson's disease but not in Alzheimer's disease. http://identifiers.org/doi/10.1111/j.1600-0404.2009.01261.x
// dcterms:bibliographicCitation: Fluorescence Analysis of the Labile Iron Pool of Mammalian Cells http://identifiers.org/doi/10.1006/abio.1997.2126
// dcterms:bibliographicCitation: Molecular control of vertebrate iron metabolism: mRNA-based regulatory circuits operated by iron, nitric oxide, and oxidative stress. http://identifiers.org/doi/10.1073/pnas.93.16.8175
// dcterms:bibliographicCitation: Diferric transferrin regulates transferrin receptor 2 protein stability http://identifiers.org/doi/10.1182/blood-2004-06-2477
// dcterms:bibliographicCitation: Stoichiometries of transferrin receptors 1 and 2 in human liver. http://identifiers.org/doi/10.1016/j.bcmd.2009.09.004
// dcterms:bibliographicCitation: 1 DOI 10.1016/j.bcmd.2009.09.004 http://identifiers.org/doi/10.1016/j.bcmd.2009.09.004
// dcterms:bibliographicCitation: Stoichiometries of transferrin receptors 1 and 2 in human liver http://identifiers.org/doi/10.1016/j.bcmd.2009.09.004
// dcterms:bibliographicCitation: Why Heme Needs to Be Degraded to Iron, Biliverdin IXα, and Carbon Monoxide? http://identifiers.org/doi/10.1089/ars.2004.6.819
// dcterms:bibliographicCitation: Differential regulation of two related RNA-binding proteins, iron regulatory protein (IRP) and IRPB. http://identifiers.org/pubmed/7585245
// dcterms:bibliographicCitation: The haemochromatosis protein HFE induces an apparent iron-deficient phenotype in H1299 cells that is not corrected by co-expression of beta 2-microglobulin. http://identifiers.org/doi/10.1042/BJ20021607
// dcterms:bibliographicCitation: Reduction of Serum Hepcidin by Hemodialysis in Pediatric and Adult Patients http://identifiers.org/doi/10.2215/CJN.08161109
// dcterms:bibliographicCitation: Synthetic hepcidin causes rapid dose-dependent hypoferremia and is concentrated in ferroportin-containing organs http://identifiers.org/doi/10.1182/blood-2005-04-1766
// dcterms:bibliographicCitation: Comparison of the Interactions of Transferrin Receptor and Transferrin Receptor 2 with Transferrin and the Hereditary Hemochromatosis Protein HFE http://identifiers.org/doi/10.1074/jbc.C000664200
// dcterms:bibliographicCitation: Comparison of the Interactions of Transferrin Receptor and Transferrin Receptor 2 with Transferrin and the Hereditary Hemochromatosis Protein HFE http://identifiers.org/unknown/10.1074/jbc.C000664200
// dcterms:bibliographicCitation: Mathematical modeling of the dynamic storage of iron in ferritin http://identifiers.org/doi/10.1186/1752-0509-4-147
// dcterms:bibliographicCitation: Role of iron
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
function Constant_flux_irreversible(v)
  v;
end
Constant_flux_irreversible is "Constant flux (irreversible)";

function function_10(substrate, Km, V)
  V*substrate/(Km + substrate);
end
function_10 is "Henri-Michaelis-Menten (irreversible)";

function function_3(a, M, n, K)
  a*(1 - M^n/(K^n + M^n));
end
function_3 is "Hill Function -|";

function function_2(a, n, K, M)
  a*M^n/(K^n + M^n);
end
function_2 is "Hill Function ->";

function function_7(a, M, n, K, L)
  a*(M^n/(K^n + M^n))*L;
end
function_7 is "Biochemical Hill Function -> (workaround)";

function function_4(a, M, n, K, L)
  a*(1 - M^n/(K^n + M^n))*L;
end
function_4 is "Biochemical Hill Function -| (workaround)";

function Hill_expression(a, M, K)
  a*(M/(K + M));
end

function Kloss_Hill_1(S, kloss, FT1, FT)
  S*kloss*(1 + 0.048*(FT1/FT)/(1 + FT1/FT));
end
Kloss_Hill_1 is "Kloss Hill [1]";

function Mass_Action_Ferritin_2(K, FT1, FT, S)
  K*(FT1/FT)*S;
end
Mass_Action_Ferritin_2 is "Mass Action Ferritin [2]";

function function_1(a, M, n, K, S)
  a*(M^n/(K^n + M^n))*S;
end
function_1 is "Biochemical Hill Function General";

function function_6(E, C, S, K)
  E*C*S/(K + S);
end
function_6 is "Henri-Michaelis-Menten kcat (irreversible) [1]";

function Hepc_Expression_7_1(basal, a, M, n, K, a1, M1, K1)
  basal + a*M^n/(K^n + M^n) + a1*M1/(K1 + M1);
end
Hepc_Expression_7_1 is "Hepc Expression 7 [1]";

model MODEL1302260000()
  // Mitchell2013 - Liver Iron Metabolism
  // The model includes the core regulatory components of human liver iron metabolism.
  // This model is described in the article:
  // A computational model of liver iron metabolism.
  // Mitchell S, Mendes P.
  // PLoS Comput. Biol. 2013 Nov; 9(11): e1003299
  // Abstract:
  // Iron is essential for all known life due to its redox properties; however, these same properties can also lead to its toxicity in overload through the production of reactive oxygen species. Robust systemic and cellular control are required to maintain safe levels of iron, and the liver seems to be where this regulation is mainly located. Iron misregulation is implicated in many diseases, and as our understanding of iron metabolism improves, the list of iron-related disorders grows. Recent developments have resulted in greater knowledge of the fate of iron in the body and have led to a detailed map of its metabolism; however, a quantitative understanding at the systems level of how its components interact to produce tight regulation remains elusive. A mechanistic computational model of human liver iron metabolism, which includes the core regulatory components, is presented here. It was constructed based on known mechanisms of regulation and on their kinetic properties, obtained from several publications. The model was then quantitatively validated by comparing its results with previously published physiological data, and it is able to reproduce multiple experimental findings. A time course simulation following an oral dose of iron was compared to a clinical time course study and the simulation was found to recreate the dynamics and time scale of the systems response to iron challenge. A disease state simulation of haemochromatosis was created by altering a single reaction parameter that mimics a human haemochromatosis gene (HFE) mutation. The simulation provides a quantitative understanding of the liver iron overload that arises in this disease. This model supports and supplements understanding of the role of the liver as an iron sensor and provides a framework for further modelling, including simulations to identify valuable drug targets and design of experiments to improve further our knowledge of this system.
  // This model is hosted on BioModels Database and identified by: BIOMD0000000498 .
  // biomodels.db:MODEL1302260000
  // biomodels.db:BIOMD0000000498
  // isDescribedBy pubmed:24244122
  // hasTaxon taxonomy:9606
  // isPartOf GO:0036333
  // hasProperty mamo:MAMO_0000046

  // Compartments:
  compartment LiverCell = 1;  // isPartOf GO:0036333
  compartment intercell = 1;  // isVersionOf GO:0005615

  // Species:
  species Hamp in LiverCell = 5e-9;  // uniprot:P81172
  species Fe_FT in LiverCell = 0; Fe_FT is "Fe-FT";  // hasPart uniprot:P02792 kegg.compound:C00023 CHEBI:18248
  species FT in LiverCell = 1.66e-10;  // uniprot:P02792
  species FT1 in LiverCell = 0;  // kegg.compound:C00023 CHEBI:18248
  species HO_1 in LiverCell = 3.56e-11; HO_1 is "HO-1";  // uniprot:P09601
  species Heme in LiverCell = 1e-9;  // kegg.compound:C00032 CHEBI:17627
  species LIP in LiverCell = 1.3e-6;  // kegg.compound:C00023 CHEBI:18248
  species Fpn in LiverCell = 1e-9;  // uniprot:Q9NP59
  species IRP in LiverCell = 1.16e-6;  // uniprot:P21399
  species $Tf_Fe_intercell in intercell = 5e-6; Tf_Fe_intercell is "Tf-Fe_intercell";  // hasPart uniprot:P02787 kegg.compound:C00023 CHEBI:18248
  species TfR in intercell = 4e-7;  // uniprot:P02786
  species Tf_Fe_TfR1 in intercell = 0; Tf_Fe_TfR1 is "Tf-Fe-TfR1";  // hasPart uniprot:P02787 uniprot:Q9UP52 kegg.compound:C00023 CHEBI:18248
  species HFE in intercell = 2e-7;  // uniprot:Q30201
  species HFE_TfR in intercell = 0; HFE_TfR is "HFE-TfR";  // hasPart uniprot:P02786 uniprot:Q30201
  species Tf_Fe_TfR2 in intercell = 0; Tf_Fe_TfR2 is "Tf-Fe-TfR2";  // hasPart uniprot:P02787 uniprot:Q9UP52 kegg.compound:C00023 CHEBI:18248
  species _2_Tf_Fe_TfR1 in intercell = 0; _2_Tf_Fe_TfR1 is "2(Tf-Fe)-TfR1";  // hasPart uniprot:P02787 uniprot:P02786 kegg.compound:C00023 CHEBI:18248
  species _2HFE_TfR in intercell = 0; _2HFE_TfR is "2HFE-TfR";  // hasPart uniprot:P02786 uniprot:Q30201
  species _2HFE_TfR2 in intercell = 0; _2HFE_TfR2 is "2HFE-TfR2";  // hasPart uniprot:Q30201 uniprot:Q9UP52
  species _2_Tf_Fe_TfR2 in intercell = 0; _2_Tf_Fe_TfR2 is "2(Tf-Fe)-TfR2";  // hasPart uniprot:Q9UP52 uniprot:P02787 kegg.compound:C00023 CHEBI:18248
  species TfR2 in intercell = 3e-6;  // uniprot:Q9UP52
  species $Heme_intercell in intercell = 1e-7;  // kegg.compound:C00032 CHEBI:17627

  // Parameters:
  var Fe2GutQUant;

  // Assignment rules:
  Fe2GutQUant := piecewise(1e-7, -5e-13*(time - 40000)^2 + 0.0001 < 1e-7, -5e-13*(time - 40000)^2 + 0.0001);

  // Reactions:
  Fpn_Export: 2 LIP => $Tf_Fe_intercell; function_1(Fpn_Export_a, Fpn, Fpn_Export_n, Fpn_Export_K, LIP);  // modifiers: Fpn
    Fpn_Export_a = 2; Fpn_Export_n = 1; Fpn_Export_K = 3e-6;
  TfR1_expression: => TfR; intercell*function_2(TfR1_expression_a, TfR1_expression_n, TfR1_expression_K, IRP);  // modifiers: IRP
    TfR1_expression_a = 6e-12; TfR1_expression_n = 1; TfR1_expression_K = 1e-6;
  TfR1_degradation: TfR => ; intercell*TfR1_degradation_k1*TfR;
    TfR1_degradation_k1 = 8.37e-6;
  Ferroportin_Expression: => Fpn; LiverCell*function_3(Ferroportin_Expression_a, IRP, Ferroportin_Expression_n, Ferroportin_Expression_K);  // modifiers: IRP
    Ferroportin_Expression_a = 1e-9; Ferroportin_Expression_n = 1; Ferroportin_Expression_K = 5e-6;
  IRP_expresion: => IRP; LiverCell*function_3(IRP_expresion_a, LIP, IRP_expresion_n, IRP_expresion_K);  // modifiers: LIP
    IRP_expresion_a = 4e-11; IRP_expresion_n = 1; IRP_expresion_K = 1e-6;
  IRP_degradation: IRP => ; LiverCell*IRP_degradation_k1*IRP;
    IRP_degradation_k1 = 1.597e-5;
  Fpn_degradation: Fpn => ; LiverCell*function_7(Fpn_degradation_a, Hamp, Fpn_degradation_n, Fpn_degradation_K, Fpn);  // modifiers: Hamp
    Fpn_degradation_a = 0.0002315; Fpn_degradation_n = 5; Fpn_degradation_K = 5e-9;
  HFE_degradation: HFE => ; intercell*HFE_degradation_k1*HFE;
    HFE_degradation_k1 = 6.418e-5;
  HFE_expression: => HFE; intercell*Constant_flux_irreversible(HFE_expression_v);
    HFE_expression_v = 2.3469e-11;
  TfR2_expression: => TfR2; intercell*Constant_flux_irreversible(TfR2_expression_v);
    TfR2_expression_v = 3e-11;
  TfR2_degradation: TfR2 => ; intercell*function_4(TfR2_degradation_a, Tf_Fe_intercell, TfR2_degradation_n, TfR2_degradation_K, TfR2);  // modifiers: Tf_Fe_intercell
    TfR2_degradation_a = 3.2e-5; TfR2_degradation_n = 1; TfR2_degradation_K = 2.5e-6;
  Hepcidin_expression: => Hamp; LiverCell*Hepc_Expression_7_1(basal, Hepcidin_expression_a, _2HFE_TfR2, Hepcidin_expression_n, Hepcidin_expression_K, a1, _2_Tf_Fe_TfR2, K1);  // modifiers: _2HFE_TfR2, _2_Tf_Fe_TfR2
    basal = 0; Hepcidin_expression_a = 5e-12; Hepcidin_expression_n = 5; Hepcidin_expression_K = 1.35e-7; a1 = 5e-12; K1 = 6e-7;
  Hepcidin_degradation: Hamp => ; LiverCell*Hepcidin_degradation_k1*Hamp;
    Hepcidin_degradation_k1 = 0.00056;
  HFE_TfR1_binding: HFE + TfR => HFE_TfR; intercell*HFE_TfR1_binding_k1*HFE*TfR;
    HFE_TfR1_binding_k1 = 1102000;
  HFE_TfR1_release: HFE_TfR => HFE + TfR; intercell*HFE_TfR1_release_k1*HFE_TfR;
    HFE_TfR1_release_k1 = 0.08;
  TfR1_binding: $Tf_Fe_intercell + TfR => Tf_Fe_TfR1; intercell*TfR1_binding_k1*Tf_Fe_intercell*TfR;
    TfR1_binding_k1 = 837400;
  TfR1_release: Tf_Fe_TfR1 => $Tf_Fe_intercell + TfR; intercell*TfR1_release_k1*Tf_Fe_TfR1;
    TfR1_release_k1 = 0.0009142;
  HFE_TfR2_binding: 2 HFE + TfR2 => _2HFE_TfR2; intercell*HFE_TfR2_binding_k1*HFE^2*TfR2;
    HFE_TfR2_binding_k1 = 394380000000;
  HFE_TfR2_release: _2HFE_TfR2 => 2 HFE + TfR2; intercell*HFE_TfR2_release_k1*_2HFE_TfR2;
    HFE_TfR2_release_k1 = 0.0018;
  TfR2_binding: $Tf_Fe_intercell + TfR2 => Tf_Fe_TfR2; intercell*TfR2_binding_k1*Tf_Fe_intercell*TfR2;
    TfR2_binding_k1 = 222390;
  TfR2_release: Tf_Fe_TfR2 => $Tf_Fe_intercell + TfR2; intercell*TfR2_release_k1*Tf_Fe_TfR2;
    TfR2_release_k1 = 0.0061;
  TfR1_binding_2: Tf_Fe_TfR1 + $Tf_Fe_intercell => _2_Tf_Fe_TfR1; intercell*TfR1_binding_2_k1*Tf_Fe_TfR1*Tf_Fe_intercell;
    TfR1_binding_2_k1 = 121400;
  TfR1_release_2: _2_Tf_Fe_TfR1 => Tf_Fe_TfR1 + $Tf_Fe_intercell; intercell*TfR1_release_2_k1*_2_Tf_Fe_TfR1;
    TfR1_release_2_k1 = 0.003535;
  HFE_TfR1_binding_2: HFE_TfR + HFE => _2HFE_TfR; intercell*HFE_TfR1_binding_2_k1*HFE_TfR*HFE;
    HFE_TfR1_binding_2_k1 = 1102000;
  HFE_TfR1_release_2: _2HFE_TfR => HFE_TfR + HFE; intercell*HFE_TfR1_release_2_k1*_2HFE_TfR;
    HFE_TfR1_release_2_k1 = 0.08;
  TfR2_binding_2: Tf_Fe_TfR2 + $Tf_Fe_intercell => _2_Tf_Fe_TfR2; intercell*TfR2_binding_2_k1*Tf_Fe_TfR2*Tf_Fe_intercell;
    TfR2_binding_2_k1 = 69600;
  TfR2_release_2: _2_Tf_Fe_TfR2 => Tf_Fe_TfR2 + $Tf_Fe_intercell; intercell*TfR2_release_2_k1*_2_Tf_Fe_TfR2;
    TfR2_release_2_k1 = 0.024;
  TfR1_iron_internalisation: _2_Tf_Fe_TfR1 => 4 LIP + TfR; TfR1_iron_internalisation_k1*_2_Tf_Fe_TfR1;
    TfR1_iron_internalisation_k1 = 0.8333;
  TfR2_iron_internalisation: _2_Tf_Fe_TfR2 => 4 LIP + TfR2; TfR2_iron_internalisation_k1*_2_Tf_Fe_TfR2;
    TfR2_iron_internalisation_k1 = 0.8333;
  outFlow: LIP => ; LiverCell*outFlow_k1*LIP;
    outFlow_k1 = 0.0004;
  Ferritin_Iron_binding: LIP + FT => Fe_FT; LiverCell*Ferritin_Iron_binding_k1*LIP*FT;
    Ferritin_Iron_binding_k1 = 47100000000;
  Ferritin_Iron_release: Fe_FT => LIP + FT; LiverCell*Ferritin_Iron_release_k1*Fe_FT;
    Ferritin_Iron_release_k1 = 22922;
  Ferritin_Iron_internalisation: Fe_FT => FT1 + FT; LiverCell*Ferritin_Iron_internalisation_k1*Fe_FT;
    Ferritin_Iron_internalisation_k1 = 108000;
  reaction_48: FT1 => LIP; LiverCell*Kloss_Hill_1(FT1, kloss, FT1, FT); reaction_48 is "Ferritin internalised iron release";  // modifiers: FT
    kloss = 13.112;
  ferritin_expression: => FT; LiverCell*function_3(ferritin_expression_a, IRP, ferritin_expression_n, ferritin_expression_K);  // modifiers: IRP
    ferritin_expression_a = 2.312e-13; ferritin_expression_n = 1; ferritin_expression_K = 1e-6;
  Ferritin_Degredation_Full: FT => ; LiverCell*Ferritin_Degredation_Full_k1*FT;
    Ferritin_Degredation_Full_k1 = 1.203e-5;
  reaction_73: FT1 => LIP; LiverCell*Mass_Action_Ferritin_2(reaction_73_K, FT1, FT, FT); reaction_73 is "Ferritin Degredation Full Iron Release";  // modifiers: FT
    reaction_73_K = 1.203e-5;
  HFETfR_degradation: _2HFE_TfR => ; intercell*HFETfR_degradation_k1*_2HFE_TfR;
    HFETfR_degradation_k1 = 8.37e-7;
  HFETfR2_degradation: _2HFE_TfR2 => ; intercell*HFETfR2_degradation_k1*_2HFE_TfR2;
    HFETfR2_degradation_k1 = 8.37e-5;
  Heme_uptake: $Heme_intercell => Heme; function_10(Heme_intercell, Heme_uptake_Km, Heme_uptake_V);
    Heme_uptake_Km = 0.000125; Heme_uptake_V = 1.034e-5;
  Heme_export: Heme => $Heme_intercell; function_10(Heme, Heme_export_Km, Heme_export_V);
    Heme_export_Km = 1.78e-5; Heme_export_V = 2.18e-5;
  HO1_exp: => HO_1; LiverCell*Hill_expression(HO1_exp_a, Heme, HO1_exp_K);  // modifiers: Heme
    HO1_exp_a = 2.1432e-15; HO1_exp_K = 1e-9;
  HO1_Deg: HO_1 => ; LiverCell*HO1_Deg_k1*HO_1;
    HO1_Deg_k1 = 3.209e-5;
  Heme_oxygenation: Heme => LIP; LiverCell*function_6(HO_1, C, Heme, Heme_oxygenation_K);  // modifiers: HO_1; subtiwiki:BSU0000201
    C = 17777.7; Heme_oxygenation_K = 2e-6;
end
