// SBML level 2 version 4

function function_4_DNA1(DNA_000, DNA_100, Koff_NG1, Kon_NG1, S1, nucleus)
  (Kon_NG1*DNA_000*S1 - Koff_NG1*DNA_100)/nucleus;
end

function function_4_DNA50(DNA_011, DNA_01B1, Koff_P1, Kon_P1, nucleus)
  (Kon_P1*DNA_011 - Koff_P1*DNA_01B1)/nucleus;
end

function function_4_DNA3(DNA_000, DNA_001, Koff_NG1, Kon_NG1, S1, nucleus)
  (Kon_NG1*DNA_000*S1 - Koff_NG1*DNA_001)/nucleus;
end

function function_4_DNA53(DNA_11B1, DNA_1B1B1, Koff_P1, Kon_P1, nucleus)
  (Kon_P1*DNA_11B1 - Koff_P1*DNA_1B1B1)/nucleus;
end

function function_4_DNA54(DNA_1B11, DNA_1B1B1, Koff_P1, Kon_P1, nucleus)
  (Kon_P1*DNA_1B11 - Koff_P1*DNA_1B1B1)/nucleus;
end

function function_4_DNA2(DNA_000, DNA_010, Koff_G1, Kon_G1, S1, nucleus)
  (Kon_G1*DNA_000*S1 - Koff_G1*DNA_010)/nucleus;
end

function function_4_DNA4(DNA_100, DNA_110, Koff_G1, Kon_G1, S1, nucleus)
  (Kon_G1*DNA_100*S1 - Koff_G1*DNA_110)/nucleus;
end

function function_4_DNA51(DNA_111, DNA_11B1, Koff_P1, Kon_P1, nucleus)
  (Kon_P1*DNA_111 - Koff_P1*DNA_11B1)/nucleus;
end

function function_4_DNA12(DNA_011, DNA_111, Koff_NG1, Kon_NG1, S1, nucleus)
  (Kon_NG1*DNA_011*S1 - Koff_NG1*DNA_111)/nucleus;
end

function function_4_DNA9(DNA_001, DNA_011, Koff_G1, Kon_G1, S1, nucleus)
  (Kon_G1*DNA_001*S1 - Koff_G1*DNA_011)/nucleus;
end

function function_4_DNA52(DNA_111, DNA_1B11, Koff_P1, Kon_P1, nucleus)
  (Kon_P1*DNA_111 - Koff_P1*DNA_1B11)/nucleus;
end

function function_4_DNA6(DNA_010, DNA_110, Koff_NG1, Kon_NG1, S1, nucleus)
  (Kon_NG1*DNA_010*S1 - Koff_NG1*DNA_110)/nucleus;
end

function function_4_DNA49(DNA_110, DNA_1B10, Koff_P1, Kon_P1, nucleus)
  (Kon_P1*DNA_110 - Koff_P1*DNA_1B10)/nucleus;
end

function function_4_DNA8(DNA_001, DNA_101, Koff_NG1, Kon_NG1, S1, nucleus)
  (Kon_NG1*DNA_001*S1 - Koff_NG1*DNA_101)/nucleus;
end

function function_4_DNA7(DNA_010, DNA_011, Koff_NG1, Kon_NG1, S1, nucleus)
  (Kon_NG1*DNA_010*S1 - Koff_NG1*DNA_011)/nucleus;
end

function function_4_DNA10(DNA_110, DNA_111, Koff_NG1, Kon_NG1, S1, nucleus)
  (Kon_NG1*DNA_110*S1 - Koff_NG1*DNA_111)/nucleus;
end

function function_4_DNA11(DNA_101, DNA_111, Koff_G1, Kon_G1, S1, nucleus)
  (Kon_G1*DNA_101*S1 - Koff_G1*DNA_111)/nucleus;
end

function function_4_DNA5(DNA_100, DNA_101, Koff_NG1, Kon_NG1, S1, nucleus)
  (Kon_NG1*DNA_100*S1 - Koff_NG1*DNA_101)/nucleus;
end

model MODEL1311130001()
  // Begitt2014 - STAT1 cooperative DNA binding - single GAS polymer model
  // The importance of STAT1-cooperative DNA binding in type 1 and type 2 interferon signalling has been studies using experimental and modelling approaches. The authors have developed two ODE models to describe STAT1 binding to short promoter regions of DNA, namely "single GAS polymer model" and "double GAS polymer model" considering binding to single or double GAS sites, respectively. The length of DNA in the single GAS model was three sites and four sites in double GAS model. This model correspond to the "single GAS polymer model".
  // This model is described in the article:
  // STAT1-cooperative DNA binding distinguishes type 1 from type 2 interferon signaling.
  // Begitt A, Droescher M, Meyer T, Schmid CD, Baker M, Antunes F, Owen MR, Naumann R, Decker T, Vinkemeier U
  // Nat Immunol. 2014 Feb;15(2):168-76.
  // Abstract:
  // STAT1 is an indispensable component of a heterotrimer (ISGF3) and a STAT1 homodimer (GAF) that function as transcription regulators in type 1 and type 2 interferon signaling, respectively. To investigate the importance of STAT1-cooperative DNA binding, we generated gene-targeted mice expressing cooperativity-deficient STAT1 with alanine substituted for Phe77. Neither ISGF3 nor GAF bound DNA cooperatively in the STAT1F77A mouse strain, but type 1 and type 2 interferon responses were affected differently. Type 2 interferon-mediated transcription and antibacterial immunity essentially disappeared owing to defective promoter recruitment of GAF. In contrast, STAT1 recruitment to ISGF3 binding sites and type 1 interferon-dependent responses, including antiviral protection, remained intact. We conclude that STAT1 cooperativity is essential for its biological activity and underlies the cellular responses to type 2, but not type 1 interferon.
  // This model is hosted on BioModels Database and identified by: BIOMD0000000500 .
  // To cite BioModels Database, please use: BioModels Database: An enhanced, curated and annotated resource for published quantitative kinetic models .
  // To the extent possible under law, all copyright and related or neighbouring rights to this encoded model have been dedicated to the public domain worldwide. Please refer to CC0 Public Domain Dedication for more information.
  // biomodels.db:MODEL1311130001
  // biomodels.db:BIOMD0000000500
  // isDescribedBy pubmed:24413774
  // hasProperty mamo:MAMO_0000046
  // hasTaxon taxonomy:10090
  // isVersionOf GO:0060333

  // Compartments:
  compartment default = 1;  // isVersionOf GO:0005623
  compartment nucleus = 1;  // isVersionOf GO:0005634

  // Species:
  species S1 in nucleus = 1e-10;  // isVersionOf uniprot:P42225
  species DNA_000 in nucleus = 1e-10;
  species DNA_100 in nucleus = 0;
  species DNA_010 in nucleus = 0;
  species DNA_001 in nucleus = 0;
  species DNA_110 in nucleus = 0;
  species DNA_101 in nucleus = 0;
  species DNA_011 in nucleus = 0;
  species DNA_111 in nucleus = 0;
  species DNA_1B10 in nucleus = 0;
  species DNA_01B1 in nucleus = 0;
  species DNA_1B11 in nucleus = 0;
  species DNA_11B1 in nucleus = 0;
  species DNA_1B1B1 in nucleus = 0;

  // Parameters:
  Kon_P1 = 60000;
  Koff_P1 = 100;
  Kon_G1 = 20000000000;
  Koff_G1 = 100;
  Kon_NG1 = 20000000000;
  Koff_NG1 = 20000;
  var GAS_siteOccupancy;

  // Assignment rules:
  GAS_siteOccupancy := DNA_010 + DNA_011 + DNA_110 + DNA_111 + DNA_01B1 + DNA_1B10 + DNA_1B11 + DNA_11B1 + DNA_1B1B1;

  // Reactions:
  DNA1: DNA_000 + S1 -> DNA_100; nucleus*function_4_DNA1(DNA_000, DNA_100, Koff_NG1, Kon_NG1, S1, nucleus);
  DNA2: DNA_000 + S1 -> DNA_010; nucleus*function_4_DNA2(DNA_000, DNA_010, Koff_G1, Kon_G1, S1, nucleus);
  DNA3: DNA_000 + S1 -> DNA_001; nucleus*function_4_DNA3(DNA_000, DNA_001, Koff_NG1, Kon_NG1, S1, nucleus);
  DNA4: DNA_100 + S1 -> DNA_110; nucleus*function_4_DNA4(DNA_100, DNA_110, Koff_G1, Kon_G1, S1, nucleus);
  DNA5: DNA_100 + S1 -> DNA_101; nucleus*function_4_DNA5(DNA_100, DNA_101, Koff_NG1, Kon_NG1, S1, nucleus);
  DNA6: DNA_010 + S1 -> DNA_110; nucleus*function_4_DNA6(DNA_010, DNA_110, Koff_NG1, Kon_NG1, S1, nucleus);
  DNA7: DNA_010 + S1 -> DNA_011; nucleus*function_4_DNA7(DNA_010, DNA_011, Koff_NG1, Kon_NG1, S1, nucleus);
  DNA8: DNA_001 + S1 -> DNA_101; nucleus*function_4_DNA8(DNA_001, DNA_101, Koff_NG1, Kon_NG1, S1, nucleus);
  DNA9: DNA_001 + S1 -> DNA_011; nucleus*function_4_DNA9(DNA_001, DNA_011, Koff_G1, Kon_G1, S1, nucleus);
  DNA10: DNA_110 + S1 -> DNA_111; nucleus*function_4_DNA10(DNA_110, DNA_111, Koff_NG1, Kon_NG1, S1, nucleus);
  DNA11: DNA_101 + S1 -> DNA_111; nucleus*function_4_DNA11(DNA_101, DNA_111, Koff_G1, Kon_G1, S1, nucleus);
  DNA12: DNA_011 + S1 -> DNA_111; nucleus*function_4_DNA12(DNA_011, DNA_111, Koff_NG1, Kon_NG1, S1, nucleus);
  DNA49: DNA_110 -> DNA_1B10; nucleus*function_4_DNA49(DNA_110, DNA_1B10, Koff_P1, Kon_P1, nucleus);
  DNA50: DNA_011 -> DNA_01B1; nucleus*function_4_DNA50(DNA_011, DNA_01B1, Koff_P1, Kon_P1, nucleus);
  DNA51: DNA_111 -> DNA_11B1; nucleus*function_4_DNA51(DNA_111, DNA_11B1, Koff_P1, Kon_P1, nucleus);
  DNA52: DNA_111 -> DNA_1B11; nucleus*function_4_DNA52(DNA_111, DNA_1B11, Koff_P1, Kon_P1, nucleus);
  DNA53: DNA_11B1 -> DNA_1B1B1; nucleus*function_4_DNA53(DNA_11B1, DNA_1B1B1, Koff_P1, Kon_P1, nucleus);
  DNA54: DNA_1B11 -> DNA_1B1B1; nucleus*function_4_DNA54(DNA_1B11, DNA_1B1B1, Koff_P1, Kon_P1, nucleus);
end
