// SBML level 2 version 4

function function_4_DNA4_1(DNA0010, DNA0011, Koff_NG1, Kon_NG1, S1, nucleus)
  (Kon_NG1*DNA0010*S1 - Koff_NG1*DNA0011)/nucleus;
end

function function_4_DNA5_1(DNA0000, DNA0100, Koff_G1, Kon_G1, S1, nucleus)
  (Kon_G1*DNA0000*S1 - Koff_G1*DNA0100)/nucleus;
end

function function_4_DNA6_1(DNA0100, DNA0101, Koff_NG1, Kon_NG1, S1, nucleus)
  (Kon_NG1*DNA0100*S1 - Koff_NG1*DNA0101)/nucleus;
end

function function_4_DNA23_1(DNA0101, DNA1101, Koff_NG1, Kon_NG1, S1, nucleus)
  (Kon_NG1*DNA0101*S1 - Koff_NG1*DNA1101)/nucleus;
end

function function_4_DNA15_1(DNA1000, DNA1001, Koff_NG1, Kon_NG1, S1, nucleus)
  (Kon_NG1*DNA1000*S1 - Koff_NG1*DNA1001)/nucleus;
end

function function_4_DNA13_1(DNA0000, DNA1000, Koff_NG1, Kon_NG1, S1, nucleus)
  (Kon_NG1*DNA0000*S1 - Koff_NG1*DNA1000)/nucleus;
end

function function_4_DNA19_1(DNA1001, DNA1011, Koff_NG1, Kon_NG1, S1, nucleus)
  (Kon_NG1*DNA1001*S1 - Koff_NG1*DNA1011)/nucleus;
end

function function_4_DNA11_1(DNA0101, DNA0111, Koff_NG1, Kon_NG1, S1, nucleus)
  (Kon_NG1*DNA0101*S1 - Koff_NG1*DNA0111)/nucleus;
end

function function_4_DNA8_1(DNA0010, DNA0110, Koff_G1, Kon_G1, S1, nucleus)
  (Kon_G1*DNA0010*S1 - Koff_G1*DNA0110)/nucleus;
end

function function_4_DNA22_1(DNA0100, DNA1100, Koff_NG1, Kon_NG1, S1, nucleus)
  (Kon_NG1*DNA0100*S1 - Koff_NG1*DNA1100)/nucleus;
end

function function_4_DNA10_1(DNA0011, DNA0111, Koff_G1, Kon_G1, S1, nucleus)
  (Kon_G1*DNA0011*S1 - Koff_G1*DNA0111)/nucleus;
end

function function_4_DNA17_1(DNA0010, DNA1010, Koff_NG1, Kon_NG1, S1, nucleus)
  (Kon_NG1*DNA0010*S1 - Koff_NG1*DNA1010)/nucleus;
end

function function_4_DNA24_1(DNA1001, DNA1101, Koff_G1, Kon_G1, S1, nucleus)
  (Kon_G1*DNA1001*S1 - Koff_G1*DNA1101)/nucleus;
end

function function_4_DNA18_1(DNA0011, DNA1011, Koff_NG1, Kon_NG1, S1, nucleus)
  (Kon_NG1*DNA0011*S1 - Koff_NG1*DNA1011)/nucleus;
end

function function_4_DNA21_1(DNA1000, DNA1100, Koff_G1, Kon_G1, S1, nucleus)
  (Kon_G1*DNA1000*S1 - Koff_G1*DNA1100)/nucleus;
end

function function_4_DNA1_1(DNA0000, DNA0001, Koff_NG1, Kon_NG1, S1, nucleus)
  (Kon_NG1*DNA0000*S1 - Koff_NG1*DNA0001)/nucleus;
end

function function_4_DNA2_1(DNA0000, DNA0010, Koff_NG1, Kon_NG1, S1, nucleus)
  (Kon_NG1*DNA0000*S1 - Koff_NG1*DNA0010)/nucleus;
end

function function_4_DNA3_1(DNA0001, DNA0011, Koff_NG1, Kon_NG1, S1, nucleus)
  (Kon_NG1*DNA0001*S1 - Koff_NG1*DNA0011)/nucleus;
end

function function_4_DNA26_1(DNA0110, DNA1110, Koff_NG1, Kon_NG1, S1, nucleus)
  (Kon_NG1*DNA0110*S1 - Koff_NG1*DNA1110)/nucleus;
end

function function_4_DNA9_1(DNA0100, DNA0110, Koff_NG1, Kon_NG1, S1, nucleus)
  (Kon_NG1*DNA0100*S1 - Koff_NG1*DNA0110)/nucleus;
end

function function_4_DNA16_1(DNA1000, DNA1010, Koff_NG1, Kon_NG1, S1, nucleus)
  (Kon_NG1*DNA1000*S1 - Koff_NG1*DNA1010)/nucleus;
end

function function_4_DNA20_1(DNA1010, DNA1011, Koff_NG1, Kon_NG1, S1, nucleus)
  (Kon_NG1*DNA1010*S1 - Koff_NG1*DNA1011)/nucleus;
end

function function_4_DNA12_1(DNA0110, DNA0111, Koff_NG1, Kon_NG1, S1, nucleus)
  (Kon_NG1*DNA0110*S1 - Koff_NG1*DNA0111)/nucleus;
end

function function_4_DNA25_1(DNA1100, DNA1101, Koff_NG1, Kon_NG1, S1, nucleus)
  (Kon_NG1*DNA1100*S1 - Koff_NG1*DNA1101)/nucleus;
end

function function_4_DNA7_1(DNA0001, DNA0101, Koff_G1, Kon_G1, S1, nucleus)
  (Kon_G1*DNA0001*S1 - Koff_G1*DNA0101)/nucleus;
end

function function_4_DNA27_1(DNA1010, DNA1110, Koff_G1, Kon_G1, S1, nucleus)
  (Kon_G1*DNA1010*S1 - Koff_G1*DNA1110)/nucleus;
end

function function_4_DNA28_1(DNA1100, DNA1110, Koff_NG1, Kon_NG1, S1, nucleus)
  (Kon_NG1*DNA1100*S1 - Koff_NG1*DNA1110)/nucleus;
end

function function_4_DNA29_1(DNA0111, DNA1111, Koff_NG1, Kon_NG1, S1, nucleus)
  (Kon_NG1*DNA0111*S1 - Koff_NG1*DNA1111)/nucleus;
end

function function_4_DNA30_1(DNA1011, DNA1111, Koff_G1, Kon_G1, S1, nucleus)
  (Kon_G1*DNA1011*S1 - Koff_G1*DNA1111)/nucleus;
end

function function_4_DNA31_1(DNA1101, DNA1111, Koff_NG1, Kon_NG1, S1, nucleus)
  (Kon_NG1*DNA1101*S1 - Koff_NG1*DNA1111)/nucleus;
end

function function_4_DNA32_1(DNA1110, DNA1111, Koff_NG1, Kon_NG1, S1, nucleus)
  (Kon_NG1*DNA1110*S1 - Koff_NG1*DNA1111)/nucleus;
end

function function_4_DNA33_1(DNA0011, DNA001_1, Koff_P1, Kon_P1, nucleus)
  (Kon_P1*DNA0011 - Koff_P1*DNA001_1)/nucleus;
end

function function_4_DNA34_1(DNA0110, DNA01_10, Koff_P1, Kon_P1, nucleus)
  (Kon_P1*DNA0110 - Koff_P1*DNA01_10)/nucleus;
end

function function_4_DNA42_1(DNA1110, DNA11_10, Koff_P1, Kon_P1, nucleus)
  (Kon_P1*DNA1110 - Koff_P1*DNA11_10)/nucleus;
end

function function_4_DNA35_1(DNA0111, DNA01_11, Koff_P1, Kon_P1, nucleus)
  (Kon_P1*DNA0111 - Koff_P1*DNA01_11)/nucleus;
end

function function_4_DNA36_1(DNA0111, DNA011_1, Koff_P1, Kon_P1, nucleus)
  (Kon_P1*DNA0111 - Koff_P1*DNA011_1)/nucleus;
end

function function_4_DNA37_1(DNA01_11, DNA01_1_1, Koff_P1, Kon_P1, nucleus)
  (Kon_P1*DNA01_11 - Koff_P1*DNA01_1_1)/nucleus;
end

function function_4_DNA38_1(DNA011_1, DNA01_1_1, Koff_P1, Kon_P1, nucleus)
  (Kon_P1*DNA011_1 - Koff_P1*DNA01_1_1)/nucleus;
end

function function_4_DNA39_1(DNA1100, DNA1_100, Koff_P1, Kon_P1, nucleus)
  (Kon_P1*DNA1100 - Koff_P1*DNA1_100)/nucleus;
end

function function_4_DNA40_1(DNA1101, DNA1_101, Koff_P1, Kon_P1, nucleus)
  (Kon_P1*DNA1101 - Koff_P1*DNA1_101)/nucleus;
end

function function_4_DNA41_1(DNA1110, DNA1_110, Koff_P1, Kon_P1, nucleus)
  (Kon_P1*DNA1110 - Koff_P1*DNA1_110)/nucleus;
end

function function_4_DNA14_1(DNA0001, DNA1001, Koff_NG1, Kon_NG1, S1, nucleus)
  (Kon_NG1*DNA0001*S1 - Koff_NG1*DNA1001)/nucleus;
end

function function_4_DNA50_1(DNA1_111, DNA1_1_11, Koff_P1, Kon_P1, nucleus)
  (Kon_P1*DNA1_111 - Koff_P1*DNA1_1_11)/nucleus;
end

function function_4_DNA43_1(DNA1_110, DNA1_1_10, Koff_P1, Kon_P1, nucleus)
  (Kon_P1*DNA1_110 - Koff_P1*DNA1_1_10)/nucleus;
end

function function_4_DNA44_1(DNA11_10, DNA1_1_10, Koff_P1, Kon_P1, nucleus)
  (Kon_P1*DNA11_10 - Koff_P1*DNA1_1_10)/nucleus;
end

function function_4_DNA45_1(DNA1111, DNA1_111, Koff_P1, Kon_P1, nucleus)
  (Kon_P1*DNA1111 - Koff_P1*DNA1_111)/nucleus;
end

function function_4_DNA46_1(DNA1111, DNA11_11, Koff_P1, Kon_P1, nucleus)
  (Kon_P1*DNA1111 - Koff_P1*DNA11_11)/nucleus;
end

function function_4_DNA47_1(DNA1111, DNA111_1, Koff_P1, Kon_P1, nucleus)
  (Kon_P1*DNA1111 - Koff_P1*DNA111_1)/nucleus;
end

function function_4_DNA48_1(DNA1_111, DNA1_11_1, Koff_P1, Kon_P1, nucleus)
  (Kon_P1*DNA1_111 - Koff_P1*DNA1_11_1)/nucleus;
end

function function_4_DNA49_1(DNA111_1, DNA1_11_1, Koff_P1, Kon_P1, nucleus)
  (Kon_P1*DNA111_1 - Koff_P1*DNA1_11_1)/nucleus;
end

function function_4_DNA52_1(DNA11_11, DNA11_1_1, Koff_P1, Kon_P1, nucleus)
  (Kon_P1*DNA11_11 - Koff_P1*DNA11_1_1)/nucleus;
end

function function_4_DNA53_1(DNA111_1, DNA11_1_1, Koff_P1, Kon_P1, nucleus)
  (Kon_P1*DNA111_1 - Koff_P1*DNA11_1_1)/nucleus;
end

function function_4_DNA54_1(DNA1_1_11, DNA1_1_1_1, Koff_P1, Kon_P1, nucleus)
  (Kon_P1*DNA1_1_11 - Koff_P1*DNA1_1_1_1)/nucleus;
end

function function_4_DNA55_1(DNA1_11_1, DNA1_1_1_1, Koff_P1, Kon_P1, nucleus)
  (Kon_P1*DNA1_11_1 - Koff_P1*DNA1_1_1_1)/nucleus;
end

function function_4_DNA56_1(DNA11_1_1, DNA1_1_1_1, Koff_P1, Kon_P1, nucleus)
  (Kon_P1*DNA11_1_1 - Koff_P1*DNA1_1_1_1)/nucleus;
end

function function_4_DNA57(DNA1011, DNA101_1, Koff_P1, Kon_P1, nucleus)
  (Kon_P1*DNA1011 - Koff_P1*DNA101_1)/nucleus;
end

function function_4_DNA51_1(DNA11_11, DNA1_1_11, Koff_P1, Kon_P1, nucleus)
  (Kon_P1*DNA11_11 - Koff_P1*DNA1_1_11)/nucleus;
end

model MODEL1311130000()
  // Begitt2014 - STAT1 cooperative DNA binding - double GAS polymer model
  // The importance of STAT1-cooperative DNA binding in type 1 and type 2 interferon signalling has been studies using experimental and modelling approaches. The authors have developed two ODE models to describe STAT1 binding to short promoter regions of DNA, namely "single GAS polymer model" and "double GAS polymer model" considering binding to single or double GAS sites, respectively. The length of DNA in the single GAS model was three sites and four sites in double GAS model. This model correspond to the "double GAS polymer model".
  // This model is described in the article:
  // STAT1-cooperative DNA binding distinguishes type 1 from type 2 interferon signaling.
  // Begitt A, Droescher M, Meyer T, Schmid CD, Baker M, Antunes F, Owen MR, Naumann R, Decker T, Vinkemeier U
  // Nat Immunol. 2014 Feb;15(2):168-76.
  // Abstract:
  // STAT1 is an indispensable component of a heterotrimer (ISGF3) and a STAT1 homodimer (GAF) that function as transcription regulators in type 1 and type 2 interferon signaling, respectively. To investigate the importance of STAT1-cooperative DNA binding, we generated gene-targeted mice expressing cooperativity-deficient STAT1 with alanine substituted for Phe77. Neither ISGF3 nor GAF bound DNA cooperatively in the STAT1F77A mouse strain, but type 1 and type 2 interferon responses were affected differently. Type 2 interferon-mediated transcription and antibacterial immunity essentially disappeared owing to defective promoter recruitment of GAF. In contrast, STAT1 recruitment to ISGF3 binding sites and type 1 interferon-dependent responses, including antiviral protection, remained intact. We conclude that STAT1 cooperativity is essential for its biological activity and underlies the cellular responses to type 2, but not type 1 interferon.
  // This model is hosted on BioModels Database and identified by: BIOMD0000000501 .
  // To cite BioModels Database, please use: BioModels Database: An enhanced, curated and annotated resource for published quantitative kinetic models .
  // To the extent possible under law, all copyright and related or neighbouring rights to this encoded model have been dedicated to the public domain worldwide. Please refer to CC0 Public Domain Dedication for more information.
  // biomodels.db:MODEL1311130000
  // biomodels.db:BIOMD0000000501
  // isDescribedBy pubmed:24413774
  // isVersionOf GO:0060333
  // hasProperty mamo:MAMO_0000046
  // hasTaxon taxonomy:10090

  // Compartments:
  compartment nucleus = 1;  // isVersionOf GO:0005634

  // Species:
  species S1 in nucleus = 1.09648e-11;  // isVersionOf uniprot:P42225
  species DNA0000 in nucleus = 1e-10;
  species DNA0001 in nucleus = 0;
  species DNA0010 in nucleus = 0;
  species DNA0100 in nucleus = 0;
  species DNA1000 in nucleus = 0;
  species DNA1100 in nucleus = 0;
  species DNA1010 in nucleus = 0;
  species DNA1001 in nucleus = 0;
  species DNA0110 in nucleus = 0;
  species DNA0101 in nucleus = 0;
  species DNA0011 in nucleus = 0;
  species DNA1110 in nucleus = 0;
  species DNA1011 in nucleus = 0;
  species DNA1101 in nucleus = 0;
  species DNA0111 in nucleus = 0;
  species DNA1111 in nucleus = 0;
  species DNA001_1 in nucleus = 0;
  species DNA01_10 in nucleus = 0;
  species DNA01_11 in nucleus = 0;
  species DNA011_1 in nucleus = 0;
  species DNA01_1_1 in nucleus = 0;
  species DNA101_1 in nucleus = 0;
  species DNA1_100 in nucleus = 0;
  species DNA1_101 in nucleus = 0;
  species DNA1_110 in nucleus = 0;
  species DNA11_10 in nucleus = 0;
  species DNA1_1_10 in nucleus = 0;
  species DNA1_111 in nucleus = 0;
  species DNA11_11 in nucleus = 0;
  species DNA111_1 in nucleus = 0;
  species DNA1_1_11 in nucleus = 0;
  species DNA1_11_1 in nucleus = 0;
  species DNA11_1_1 in nucleus = 0;
  species DNA1_1_1_1 in nucleus = 0;

  // Parameters:
  Kon_P1 = 60000;
  Koff_P1 = 100;
  Kon_G1 = 20000000000;
  Koff_G1 = 100;
  Kon_NG1 = 20000000000;
  Koff_NG1 = 5000;
  var DoubleGasOccupancy;

  // Assignment rules:
  DoubleGasOccupancy := DNA0100 + DNA1100 + DNA0110 + DNA0101 + DNA1110 + DNA1101 + DNA0111 + DNA1111 + DNA1_100 + DNA01_10 + DNA1_110 + DNA11_10 + DNA1_1_10 + DNA1_101 + DNA01_11 + DNA011_1 + DNA01_1_1 + DNA1_111 + DNA11_11 + DNA111_1 + DNA1_1_11 + DNA1_11_1 + DNA11_1_1 + DNA1_1_1_1;

  // Reactions:
  DNA1: DNA0000 + S1 -> DNA0001; nucleus*function_4_DNA1_1(DNA0000, DNA0001, Koff_NG1, Kon_NG1, S1, nucleus);
  DNA2: DNA0000 + S1 -> DNA0010; nucleus*function_4_DNA2_1(DNA0000, DNA0010, Koff_G1, Kon_G1, S1, nucleus);
  DNA3: DNA0001 + S1 -> DNA0011; nucleus*function_4_DNA3_1(DNA0001, DNA0011, Koff_G1, Kon_G1, S1, nucleus);
  DNA4: DNA0010 + S1 -> DNA0011; nucleus*function_4_DNA4_1(DNA0010, DNA0011, Koff_NG1, Kon_NG1, S1, nucleus);
  DNA5: DNA0000 + S1 -> DNA0100; nucleus*function_4_DNA5_1(DNA0000, DNA0100, Koff_G1, Kon_G1, S1, nucleus);
  DNA6: DNA0100 + S1 -> DNA0101; nucleus*function_4_DNA6_1(DNA0100, DNA0101, Koff_NG1, Kon_NG1, S1, nucleus);
  DNA7: DNA0001 + S1 -> DNA0101; nucleus*function_4_DNA7_1(DNA0001, DNA0101, Koff_G1, Kon_G1, S1, nucleus);
  DNA8: DNA0010 + S1 -> DNA0110; nucleus*function_4_DNA8_1(DNA0010, DNA0110, Koff_G1, Kon_G1, S1, nucleus);
  DNA9: DNA0100 + S1 -> DNA0110; nucleus*function_4_DNA9_1(DNA0100, DNA0110, Koff_G1, Kon_G1, S1, nucleus);
  DNA10: DNA0011 + S1 -> DNA0111; nucleus*function_4_DNA10_1(DNA0011, DNA0111, Koff_G1, Kon_G1, S1, nucleus);
  DNA11: DNA0101 + S1 -> DNA0111; nucleus*function_4_DNA11_1(DNA0101, DNA0111, Koff_G1, Kon_G1, S1, nucleus);
  DNA12: DNA0110 + S1 -> DNA0111; nucleus*function_4_DNA12_1(DNA0110, DNA0111, Koff_NG1, Kon_NG1, S1, nucleus);
  DNA13: DNA0000 + S1 -> DNA1000; nucleus*function_4_DNA13_1(DNA0000, DNA1000, Koff_NG1, Kon_NG1, S1, nucleus);
  DNA14: DNA0001 + S1 -> DNA1001; nucleus*function_4_DNA14_1(DNA0001, DNA1001, Koff_NG1, Kon_NG1, S1, nucleus);
  DNA15: DNA1000 + S1 -> DNA1001; nucleus*function_4_DNA15_1(DNA1000, DNA1001, Koff_NG1, Kon_NG1, S1, nucleus);
  DNA16: DNA1000 + S1 -> DNA1010; nucleus*function_4_DNA16_1(DNA1000, DNA1010, Koff_G1, Kon_G1, S1, nucleus);
  DNA17: DNA0010 + S1 -> DNA1010; nucleus*function_4_DNA17_1(DNA0010, DNA1010, Koff_NG1, Kon_NG1, S1, nucleus);
  DNA18: DNA0011 + S1 -> DNA1011; nucleus*function_4_DNA18_1(DNA0011, DNA1011, Koff_NG1, Kon_NG1, S1, nucleus);
  DNA19: DNA1001 + S1 -> DNA1011; nucleus*function_4_DNA19_1(DNA1001, DNA1011, Koff_G1, Kon_G1, S1, nucleus);
  DNA20: DNA1010 + S1 -> DNA1011; nucleus*function_4_DNA20_1(DNA1010, DNA1011, Koff_NG1, Kon_NG1, S1, nucleus);
  DNA21: DNA1000 + S1 -> DNA1100; nucleus*function_4_DNA21_1(DNA1000, DNA1100, Koff_G1, Kon_G1, S1, nucleus);
  DNA22: DNA0100 + S1 -> DNA1100; nucleus*function_4_DNA22_1(DNA0100, DNA1100, Koff_NG1, Kon_NG1, S1, nucleus);
  DNA23: DNA0101 + S1 -> DNA1101; nucleus*function_4_DNA23_1(DNA0101, DNA1101, Koff_NG1, Kon_NG1, S1, nucleus);
  DNA24: DNA1001 + S1 -> DNA1101; nucleus*function_4_DNA24_1(DNA1001, DNA1101, Koff_G1, Kon_G1, S1, nucleus);
  DNA25: DNA1100 + S1 -> DNA1101; nucleus*function_4_DNA25_1(DNA1100, DNA1101, Koff_NG1, Kon_NG1, S1, nucleus);
  DNA26: DNA0110 + S1 -> DNA1110; nucleus*function_4_DNA26_1(DNA0110, DNA1110, Koff_NG1, Kon_NG1, S1, nucleus);
  DNA27: DNA1010 + S1 -> DNA1110; nucleus*function_4_DNA27_1(DNA1010, DNA1110, Koff_G1, Kon_G1, S1, nucleus);
  DNA28: DNA1100 + S1 -> DNA1110; nucleus*function_4_DNA28_1(DNA1100, DNA1110, Koff_G1, Kon_G1, S1, nucleus);
  DNA29: DNA0111 + S1 -> DNA1111; nucleus*function_4_DNA29_1(DNA0111, DNA1111, Koff_NG1, Kon_NG1, S1, nucleus);
  DNA30: DNA1011 + S1 -> DNA1111; nucleus*function_4_DNA30_1(DNA1011, DNA1111, Koff_G1, Kon_G1, S1, nucleus);
  DNA31: DNA1101 + S1 -> DNA1111; nucleus*function_4_DNA31_1(DNA1101, DNA1111, Koff_G1, Kon_G1, S1, nucleus);
  DNA32: DNA1110 + S1 -> DNA1111; nucleus*function_4_DNA32_1(DNA1110, DNA1111, Koff_NG1, Kon_NG1, S1, nucleus);
  DNA33: DNA0011 -> DNA001_1; nucleus*function_4_DNA33_1(DNA0011, DNA001_1, Koff_P1, Kon_P1, nucleus);
  DNA34: DNA0110 -> DNA01_10; nucleus*function_4_DNA34_1(DNA0110, DNA01_10, Koff_P1, Kon_P1, nucleus);
  DNA35: DNA0111 -> DNA01_11; nucleus*function_4_DNA35_1(DNA0111, DNA01_11, Koff_P1, Kon_P1, nucleus);
  DNA36: DNA0111 -> DNA011_1; nucleus*function_4_DNA36_1(DNA0111, DNA011_1, Koff_P1, Kon_P1, nucleus);
  DNA37: DNA01_11 -> DNA01_1_1; nucleus*function_4_DNA37_1(DNA01_11, DNA01_1_1, Koff_P1, Kon_P1, nucleus);
  DNA38: DNA011_1 -> DNA01_1_1; nucleus*function_4_DNA38_1(DNA011_1, DNA01_1_1, Koff_P1, Kon_P1, nucleus);
  DNA39: DNA1100 -> DNA1_100; nucleus*function_4_DNA39_1(DNA1100, DNA1_100, Koff_P1, Kon_P1, nucleus);
  DNA40: DNA1101 -> DNA1_101; nucleus*function_4_DNA40_1(DNA1101, DNA1_101, Koff_P1, Kon_P1, nucleus);
  DNA41: DNA1110 -> DNA1_110; nucleus*function_4_DNA41_1(DNA1110, DNA1_110, Koff_P1, Kon_P1, nucleus);
  DNA42: DNA1110 -> DNA11_10; nucleus*function_4_DNA42_1(DNA1110, DNA11_10, Koff_P1, Kon_P1, nucleus);
  DNA43: DNA1_110 -> DNA1_1_10; nucleus*function_4_DNA43_1(DNA1_110, DNA1_1_10, Koff_P1, Kon_P1, nucleus);
  DNA44: DNA11_10 -> DNA1_1_10; nucleus*function_4_DNA44_1(DNA11_10, DNA1_1_10, Koff_P1, Kon_P1, nucleus);
  DNA45: DNA1111 -> DNA1_111; nucleus*function_4_DNA45_1(DNA1111, DNA1_111, Koff_P1, Kon_P1, nucleus);
  DNA46: DNA1111 -> DNA11_11; nucleus*function_4_DNA46_1(DNA1111, DNA11_11, Koff_P1, Kon_P1, nucleus);
  DNA47: DNA1111 -> DNA111_1; nucleus*function_4_DNA47_1(DNA1111, DNA111_1, Koff_P1, Kon_P1, nucleus);
  DNA48: DNA1_111 -> DNA1_11_1; nucleus*function_4_DNA48_1(DNA1_111, DNA1_11_1, Koff_P1, Kon_P1, nucleus);
  DNA49: DNA111_1 -> DNA1_11_1; nucleus*function_4_DNA49_1(DNA111_1, DNA1_11_1, Koff_P1, Kon_P1, nucleus);
  DNA50: DNA1_111 -> DNA1_1_11; nucleus*function_4_DNA50_1(DNA1_111, DNA1_1_11, Koff_P1, Kon_P1, nucleus);
  DNA51: DNA11_11 -> DNA1_1_11; nucleus*function_4_DNA51_1(DNA11_11, DNA1_1_11, Koff_P1, Kon_P1, nucleus);
  DNA52: DNA11_11 -> DNA11_1_1; nucleus*function_4_DNA52_1(DNA11_11, DNA11_1_1, Koff_P1, Kon_P1, nucleus);
  DNA53: DNA111_1 -> DNA11_1_1; nucleus*function_4_DNA53_1(DNA111_1, DNA11_1_1, Koff_P1, Kon_P1, nucleus);
  DNA54: DNA1_1_11 -> DNA1_1_1_1; nucleus*function_4_DNA54_1(DNA1_1_11, DNA1_1_1_1, Koff_P1, Kon_P1, nucleus);
  DNA55: DNA1_11_1 -> DNA1_1_1_1; nucleus*function_4_DNA55_1(DNA1_11_1, DNA1_1_1_1, Koff_P1, Kon_P1, nucleus);
  DNA56: DNA11_1_1 -> DNA1_1_1_1; nucleus*function_4_DNA56_1(DNA11_1_1, DNA1_1_1_1, Koff_P1, Kon_P1, nucleus);
  DNA57: DNA1011 -> DNA101_1; nucleus*function_4_DNA57(DNA1011, DNA101_1, Koff_P1, Kon_P1, nucleus);
end
