// SBML level 3 version 1

model MODEL1312170001()
  // Kaiser2014 - Salmonella persistence after ciprofloxacin treatment
  // The model describes the bacterial tolerance to antibiotics. Using a mouse model for Salmonella diarrhea, the authors have found that bacterial persistence occurs in the presence of the antibiotic ciprofloxacin because Salmonella can exist in two different states. One, the fast-growing population that spreads in the host's tissues and the other, slow-growing "persister" population that hide out inside dendritic cells of the host's immune system and cannot be attacked by the antibiotics. However, this can be killed by adding agents that directly stimulate the host's immune defense.
  // This model is described in the article:
  // Cecum lymph node dendritic cells harbor slow-growing bacteria phenotypically tolerant to antibiotic treatment.
  // Kaiser P, Regoes RR, Dolowschiak T, Wotzka SY, Lengefeld J, Slack E, Grant AJ, Ackermann M, Hardt WD.
  // PLoS Biol. 2014 Feb 18;12(2):e1001793.
  // Abstract:
  // In vivo, antibiotics are often much less efficient than ex vivo and relapses can occur. The reasons for poor in vivo activity are still not completely understood. We have studied the fluoroquinolone antibiotic ciprofloxacin in an animal model for complicated Salmonellosis. High-dose ciprofloxacin treatment efficiently reduced pathogen loads in feces and most organs. However, the cecum draining lymph node (cLN), the gut tissue, and the spleen retained surviving bacteria. In cLN, approximately 10%-20% of the bacteria remained viable. These phenotypically tolerant bacteria lodged mostly within CD103⁺CX₃CR1⁻CD11c⁺ dendritic cells, remained genetically susceptible to ciprofloxacin, were sufficient to reinitiate infection after the end of the therapy, and displayed an extremely slow growth rate, as shown by mathematical analysis of infections with mixed inocula and segregative plasmid experiments. The slow growth was sufficient to explain recalcitrance to antibiotics treatment. Therefore, slow-growing antibiotic-tolerant bacteria lodged within dendritic cells can explain poor in vivo antibiotic activity and relapse. Administration of LPS or CpG, known elicitors of innate immune defense, reduced the loads of tolerant bacteria. Thus, manipulating innate immunity may augment the in vivo activity of antibiotics.
  // This model is hosted on BioModels Database and identified by: MODEL1312170001.
  // To cite BioModels Database, please use: BioModels Database: An enhanced, curated and annotated resource for published quantitative kinetic models.
  // To the extent possible under law, all copyright and related or neighbouring rights to this encoded model have been dedicated to the public domain worldwide. Please refer to CC0 Public Domain Dedication for more information.
  // biomodels.db:MODEL1312170001
  // biomodels.db:BIOMD0000000527
  // isDescribedBy pubmed:24558351
  // biomodels.db:MODEL1312170001
  // hasTaxon taxonomy:10090 taxonomy:85569
  // isVersionOf GO:0046677

  // Compartments:
  compartment LN = 1 dimensionless; LN is "Lymph node";  // isVersionOf BTO:0000784

  // Species:
  substanceOnly species L in LN = 0;  // substance in dimensionless; isVersionOf taxonomy:85569

  // Parameters:
  mu1 = 297.78957 per_day;
  r1 = 2.8195198 per_day;
  c1 = 0 per_day;
  t1 = 1 day;
  mu3 = 0 per_day;
  r3 = 4.5867007 per_day;
  c3 = 5.042901 per_day;
  t3 = 3 day;
  mu5 = 0 per_day;
  r5 = 1.8812956 per_day;
  c5 = 2.497735 per_day;
  t5 = 5 day;
  mu10 = 0 per_day;
  r10 = 0.3757764 per_day;
  c10 = 2.43e-7 per_day;
  t10 = 10 day;

  // Rate rules:
  L' = piecewise(mu1 + (r1 - c1)*L, (time >= 0) && (time <= t1), mu3 + (r3 - c3)*L, (time > t1) && (time <= t3), mu5 + (r5 - c5)*L, (time > t3) && (time <= t5), mu10 + (r10 - c10)*L, (time > t5) && (time <= t10));

  // Unit definitions:
  unit day = 864000 second;
  unit per_day = 1 / (864000 second);
end
