// SBML level 2 version 4

function CWP_Logistic(k, r, s)
  r*s*(1 - s/k);
end

function CWP_hill(vmax, s, shalve, n)
  vmax*s^n/(shalve^n + s^n);
end

function CWP_Hill_Inhibitor(n, i, ki, ka, a)
  ka*a*(1/(1 + (i/ki)^n));
end

function _1_2_MA(k, A)
  k*A/2;
end
_1_2_MA is "1/2 MA";

model MODEL1508180000()
  // Philipson2015 - Innate immune response modulated by NLRX1
  // biomodels.db:MODEL1508180000
  // biomodels.db:BIOMD0000000596
  // isDescribedBy pubmed:26367386
  // hasTaxon taxonomy:10090 taxonomy:210
  // isVersionOf GO:0044403 GO:0009617 GO:0045087
  // occursIn BTO:0000141

  // Compartments:
  compartment default = 1;

  // Species:
  species HP in default = 4.4;
  species NLRX1 in default = 0.9;
  species CytoL in default = 1;
  species MyD88 in default = 0.9;
  species TRAF6 in default = 0.9;
  species NFkB in default = 0.9;
  species IFN in default = 1;
  species NOD1 in default = 0.9;
  species RIG in default = 0.9;
  species MAVS in default = 0.6;
  species IRF in default = 1;
  species TFa in default = 1;
  species CytoE in default = 1;
  species TFi in default = 1;
  species X in default = 1;

  // Parameters:
  n = 1;

  // Reactions:
  MyD88_a_HP: => MyD88; default*CWP_hill(MyD88_a_HP_vmax, HP, MyD88_a_HP_shalve, n);  // modifiers: HP
    MyD88_a_HP_vmax = 0.002118223; MyD88_a_HP_shalve = 0.00167454;
  MyD88_d: MyD88 => ; default*MyD88_d_k1*MyD88;
    MyD88_d_k1 = 0.00123453;
  TRAF_d: TRAF6 => ; default*TRAF_d_k1*TRAF6;
    TRAF_d_k1 = 0.0103771276;
  NFkB_a1: => NFkB; default*CWP_Hill_Inhibitor(n, NLRX1, NFkB_a1_ki, NFkB_a1_ka, TRAF6);  // modifiers: NLRX1, TRAF6
    NFkB_a1_ki = 0.04779118; NFkB_a1_ka = 1.167638;
  NFkB_d: NFkB => ; default*NFkB_d_k1*NFkB;
    NFkB_d_k1 = 0.07507043;
  CytoL_a: => CytoL; default*CWP_hill(CytoL_a_vmax, NFkB, CytoL_a_shalve, n);  // modifiers: NFkB
    CytoL_a_vmax = 0.096005; CytoL_a_shalve = 0.00405;
  CytoL_d: CytoL => ; default*CytoL_d_k1*CytoL;
    CytoL_d_k1 = 0.00608;
  NLRX1_d: NLRX1 => ; default*NLRX1_d_k1*NLRX1;
    NLRX1_d_k1 = 0.00593;
  MyD88_a: => MyD88; default*CWP_hill(MyD88_a_vmax, CytoL, MyD88_a_shalve, n);  // modifiers: CytoL
    MyD88_a_vmax = 0.002837985; MyD88_a_shalve = 0.001549765;
  HP_a: => HP; default*CWP_Logistic(HP_a_k, r, HP);
    HP_a_k = 6.477541; r = 0.0231262309;
  HP_CytoL: HP => ; default*_1_2_MA(HP_CytoL_k, CytoL);  // modifiers: CytoL
    HP_CytoL_k = 0.004576967;
  NLRX1_TF: => NLRX1; default*CWP_Hill_Inhibitor(n, TFi, NLRX1_TF_ki, NLRX1_TF_ka, TFa);  // modifiers: TFi, TFa
    NLRX1_TF_ki = 0.008882001; NLRX1_TF_ka = 0.42313;
  NFkB_a2: => NFkB; default*CWP_hill(NFkB_a2_vmax, NOD1, NFkB_a2_shalve, n);  // modifiers: NOD1
    NFkB_a2_vmax = 0.6347384; NFkB_a2_shalve = 1.884616;
  RIG_a_HP: => RIG; default*CWP_hill(RIG_a_HP_vmax, HP, RIG_a_HP_shalve, n);  // modifiers: HP
    RIG_a_HP_vmax = 0.01181739; RIG_a_HP_shalve = 0.001431402;
  RIG_d: RIG => ; default*RIG_d_k1*RIG;
    RIG_d_k1 = 0.001037723;
  MAVS_a: => MAVS; default*CWP_Hill_Inhibitor(n, NLRX1, MAVS_a_ki, MAVS_a_ka, RIG);  // modifiers: NLRX1, RIG
    MAVS_a_ki = 0.03349687; MAVS_a_ka = 0.007477723;
  MAVS_d: MAVS => ; default*MAVS_d_k1*MAVS;
    MAVS_d_k1 = 0.001592;
  IRF_a1: => IRF; default*CWP_hill(IRF_a1_vmax, MAVS, IRF_a1_shalve, n);  // modifiers: MAVS
    IRF_a1_vmax = 0.0062174; IRF_a1_shalve = 1.44358;
  IRF_a2: => IRF; default*CWP_hill(IRF_a2_vmax, NOD1, IRF_a2_shalve, n);  // modifiers: NOD1
    IRF_a2_vmax = 0.0980062665; IRF_a2_shalve = 9.649901;
  IRF_a3: => IRF; default*CWP_hill(IRF_a3_vmax, IFN, IRF_a3_shalve, n);  // modifiers: IFN
    IRF_a3_vmax = 0.3013741; IRF_a3_shalve = 44.76741;
  IRF_d: IRF => ; default*IRF_d_k1*IRF;
    IRF_d_k1 = 0.004789221;
  IFN_a: => IFN; default*CWP_hill(IFN_a_vmax, IRF, IFN_a_shalve, n);  // modifiers: IRF
    IFN_a_vmax = 0.4898378; IFN_a_shalve = 49.92878;
  IFN_d: IFN => ; default*IFN_d_k1*IFN;
    IFN_d_k1 = 0.005238557;
  NOD_a: => NOD1; default*CWP_hill(NOD_a_vmax, HP, NOD_a_shalve, n);  // modifiers: HP
    NOD_a_vmax = 0.006623396; NOD_a_shalve = 0.001785308;
  NOD_d: NOD1 => ; default*NOD_d_k1*NOD1;
    NOD_d_k1 = 0.001226372;
  HP_IFN: HP => ; default*_1_2_MA(HP_IFN_k, IFN);  // modifiers: IFN
    HP_IFN_k = 1e-5;
  TRAF_a: => TRAF6; default*CWP_Hill_Inhibitor(n, X, TRAF_a_ki, TRAF_a_ka, MyD88);  // modifiers: X, MyD88
    TRAF_a_ki = 0.08812845; TRAF_a_ka = 0.7391785;
  TFa_a: => TFa; default*CWP_hill(TFa_a_vmax, CytoL, TFa_a_shalve, n);  // modifiers: CytoL
    TFa_a_vmax = 0.02051633; TFa_a_shalve = 0.7984541;
  TFa_d: TFa => ; default*TFa_d_k1*TFa;
    TFa_d_k1 = 0.00830409028;
  TFi_a: => TFi; default*CWP_hill(TFi_a_vmax, CytoE, TFi_a_shalve, n);  // modifiers: CytoE
    TFi_a_vmax = 0.09027782; TFi_a_shalve = 3.083541;
  TFi_d: TFi => ; default*TFi_d_k1*TFi;
    TFi_d_k1 = 0.03246196;
  CytoE_a: => CytoE; default*CWP_Hill_Inhibitor(n, X, CytoE_a_ki, CytoE_a_ka, NFkB);  // modifiers: X, NFkB
    CytoE_a_ki = 0.04806833; CytoE_a_ka = 12.20282;
  CytoE_d: CytoE => ; default*CytoE_d_k1*CytoE;
    CytoE_d_k1 = 0.03676294;
  X_a: => X; default*CWP_hill(X_a_vmax, NFkB, X_a_shalve, n);  // modifiers: NFkB
    X_a_vmax = 0.046393325; X_a_shalve = 0.003976;
  X_d: X => ; default*X_d_k1*X;
    X_d_k1 = 0.002227925;
  HP_CytoE: HP => ; default*_1_2_MA(HP_CytoE_k, CytoE);  // modifiers: CytoE
    HP_CytoE_k = 0.00015;

  // Unit definitions:
  unit time = 60 second;
  unit substance = dimensionless;
end
