// SBML level 3 version 1

model MODEL1604270004()
  // Peterson2010 - Integrated calcium homeostasis and bone remodelling
  // Peterson2010 - integrated calcium homeostasis and bone remodelling
  // The original R code, obtained from the author can be downloaded from the link below: [ odm_CaBone_v1_2011_04_April.zip].
  // This model is described in the article:
  // A physiologically based mathematical model of integrated calcium homeostasis and bone remodeling.
  // Peterson MC, Riggs MM.
  // Bone 2010 Jan; 46(1): 49-63
  // Abstract:
  // Bone biology is physiologically complex and intimately linked to calcium homeostasis. The literature provides a wealth of qualitative and/or quantitative descriptions of cellular mechanisms, bone dynamics, associated organ dynamics, related disease sequela, and results of therapeutic interventions. We present a physiologically based mathematical model of integrated calcium homeostasis and bone biology constructed from literature data. The model includes relevant cellular aspects with major controlling mechanisms for bone remodeling and calcium homeostasis and appropriately describes a broad range of clinical and therapeutic conditions. These include changes in plasma parathyroid hormone (PTH), calcitriol, calcium and phosphate (PO4), and bone-remodeling markers as manifested by hypoparathyroidism and hyperparathyroidism, renal insufficiency, daily PTH 1-34 administration, and receptor activator of NF-kappaB ligand (RANKL) inhibition. This model highlights the utility of systems approaches to physiologic modeling in the bone field. The presented bone and calcium homeostasis model provides an integrated mathematical construct to conduct hypothesis testing of influential system aspects, to visualize elements of this complex endocrine system, and to continue to build upon iteratively with the results of ongoing scientific research.
  // This model is hosted on BioModels Database and identified by: BIOMD0000000613.
  // To cite BioModels Database, please use: BioModels Database: An enhanced, curated and annotated resource for published quantitative kinetic models.
  // To the extent possible under law, all copyright and related or neighbouring rights to this encoded model have been dedicated to the public domain worldwide. Please refer to CC0 Public Domain Dedication for more information.
  // biomodels.db:MODEL1604270004
  // biomodels.db:BIOMD0000000613
  // isDescribedBy pubmed:19732857
  // isVersionOf GO:0046849 GO:0055074 GO:2000828
  // hasTaxon taxonomy:9606
  // hasProperty DOID:11199 DOID:13543

  // Compartments:
  compartment Gut = 1;  // isVersionOf BTO:0000545
  compartment Vasculature = 1;  // isVersionOf BTO:0003718
  compartment Bone = 1;  // isVersionOf BTO:0000140
  compartment PTH_Gland = 1;
  compartment Kidney = 1;
  compartment Intracellular = 1;
  compartment Osteoblast_Intracellular = 1;

  // Species:
  // from README file
  // CMT: PTH
  // DESCR: circulating PTH
  // UNIT: pmol
  // SITE: vasculature
  // PUB.EQN: 7
  // MODEL.EQN: 1
  species PTH in Vasculature = 53.9;  // isVersionOf uniprot:P01270
  // from README file
  // CMT: S
  // DESCR: PTH gland pool
  // UNIT: NA
  // SITE: PT gland
  // PUB.EQN: 10
  // MODEL.EQN: 2
  species S in PTH_Gland = 0.5;  // isVersionOf uniprot:P01270
  // from README file
  // CMT: PTmax
  // DESCR: PT gland max capacity
  // UNIT: NA
  // SITE: PT gland
  // PUB.EQN: 11
  // MODEL.EQN: 3
  species PTmax in PTH_Gland = 1;  // isVersionOf uniprot:P01270
  // from README file
  // CMT: B
  // DESCR: circulating calcitriol
  // UNIT: pmol
  // SITE: vasculature
  // PUB.EQN: 6
  // MODEL.EQN: 4
  species B in Vasculature = 1260;  // isVersionOf CHEBI:17823
  // from README file
  // CMT: SC
  // DESCR: subcutaneous PTH compartment
  // UNIT: pmol
  // SITE: subcutaneous
  // PUB.EQN: NA
  // MODEL.EQN: 5
  species SC in Vasculature = 0;  // occursIn BTO:0004042; isVersionOf uniprot:P01270; hasProperty CHEBI:52217
  // from README file
  // CMT: P
  // DESCR: extracellular calcium
  // UNIT: mmol
  // SITE: vasculature
  // PUB.EQN: 4
  // MODEL.EQN: 7
  species P in Vasculature = 32.9;  // isVersionOf CHEBI:29108
  // from README file
  // CMT: ECCPhos
  // DESCR: extracellular phosphate
  // UNIT: mmol
  // SITE: vasculature
  // PUB.EQN: 5
  // MODEL.EQN: 8
  species ECCPhos in Vasculature = 16.8;  // isVersionOf CHEBI:35780
  // from README file
  // CMT: T
  // DESCR: oral calcium
  // UNIT: mmol
  // SITE: gut
  // PUB.EQN: 1
  // MODEL.EQN: 9
  species T in Gut = 1.2375;  // isVersionOf CHEBI:29108
  // from README file
  // CMT: R
  // DESCR: calcitriol dependent ca absorption
  // UNIT: NA
  // SITE: gut
  // PUB.EQN: 2
  // MODEL.EQN: 10
  species R in Gut = 0.5;  // occursIn BTO:0000648; isVersionOf CHEBI:29108
  // from README file
  // CMT: HAp
  // DESCR: hydroxyapatite
  // UNIT: NA
  // SITE: bone
  // PUB.EQN: NA
  // MODEL.EQN: 11
  species HAp in Bone = 1;  // isVersionOf CHEBI:52254
  // A(17) The total pool of osteoblasts from README file
  species OB in Bone = 0.00501324;  // isVersionOf BTO:0001593
  // from README file
  // CMT: PhosGut
  // DESCR: oral phosphate
  // UNIT: mmol
  // SITE: gut
  // PUB.EQN: 3
  // MODEL.EQN: 14
  species PhosGut in Gut = 0.839;  // isVersionOf CHEBI:35780
  // from README file
  // CMT: IntraPO
  // DESCR: intracellular phosphate
  // UNIT: mmol
  // SITE: intracellular
  // PUB.EQN: 8
  // MODEL.EQN: 15
  species IntraPO in Intracellular = 3226;  // isVersionOf CHEBI:35780
  // from README file
  // CMT: OC
  // DESCR: osteoclast
  // UNIT: NA
  // SITE: bone
  // PUB.EQN: 18
  // MODEL.EQN: 16
  species OC in Bone = 0.00115398;  // isVersionOf BTO:0000968
  // from README file
  // CMT: ROB1
  // DESCR: responding osteoblast
  // UNIT: NA
  // SITE: bone
  // PUB.EQN: 16
  // MODEL.EQN: 17
  species ROB1 in Bone = 0.00104122;  // isVersionOf BTO:0000968; hasProperty PATO:0000487+
  // from README file
  // CMT: L
  // DESCR: RANKL
  // UNIT: NA
  // SITE: bone
  // PUB.EQN: 22
  // MODEL.EQN: 20
  species L in Bone = 0.4;  // isVersionOf uniprot:O14788
  // from README file
  // CMT: RNK
  // DESCR: RANK
  // UNIT: NA
  // SITE: bone
  // PUB.EQN: 21
  // MODEL.EQN: 21
  species RNK in Bone = 10;  // isVersionOf uniprot:Q9Y6Q6
  // from README file
  // CMT: O
  // DESCR: OPG
  // UNIT: NA
  // SITE: bone
  // PUB.EQN: 23
  // MODEL.EQN: 24
  species O in Bone = 4;  // isVersionOf uniprot:O00300
  // from README file
  // CMT: Q
  // DESCR: bone calcium - immediately exchangeable
  // UNIT: mmol
  // SITE: bone
  // PUB.EQN: 12
  // MODEL.EQN: 25
  species Q in Bone = 100;  // isVersionOf CHEBI:29108; occursIn GO:0005622
  // from README file
  // CMT: Qbone
  // DESCR: bone calcium - non-immediately exchangeable
  // UNIT: mmol
  // SITE: bone
  // PUB.EQN: 13
  // MODEL.EQN: 26
  species Qbone in Bone = 24900;  // isVersionOf CHEBI:29108; occursIn GO:0005576
  // from README file
  // CMT: RX2
  // DESCR: RunX2
  // UNIT: NA
  // SITE: osteoblast
  // PUB.EQN: 26
  // MODEL.EQN: 27
  species RX2 in Osteoblast_Intracellular = 10;  // isVersionOf uniprot:Q13950
  // from README file
  // CMT: CREB
  // DESCR: CREB
  // UNIT: NA
  // SITE: osteoblast
  // PUB.EQN: 27
  // MODEL.EQN: 28
  species CREB in Osteoblast_Intracellular = 10;  // isVersionOf uniprot:P16220
  // from README file
  // CMT: BCL2
  // DESCR: Bcl-2
  // UNIT: NA
  // SITE: osteoblast
  // PUB.EQN: 28
  // MODEL.EQN: 29
  species BCL2 in Osteoblast_Intracellular = 100;  // isVersionOf uniprot:P10415
  // from README file
  // CMT: TERISC
  // DESCR: teriparatide subcutaneous dosing compartment
  // UNIT: pmol
  // SITE: subcutaneous
  // PUB.EQN: NA
  // MODEL.EQN: 30
  species TERISC in Vasculature = 0;  // isVersionOf pubchem.compound:16132393
  // from README file
  // CMT: A
  // DESCR: 1-alpha hydroxylase
  // UNIT: mmol/h
  // SITE: kidney
  // PUB.EQN: 9
  // MODEL.EQN: 6
  species A in Kidney = B/10;  // isVersionOf uniprot:O15528
  // from README file
  // CMT: TGFB
  // DESCR: latent TGF beta
  // UNIT: NA
  // SITE: bone
  // PUB.EQN: 19
  // MODEL.EQN: 18
  species TGFB in Bone = Pic0*1000;  // isVersionOf uniprot:P01137
  // from README file
  // CMT: TGFBact
  // DESCR: active TGFbeta
  // UNIT: NA
  // SITE: bone
  // PUB.EQN: 20
  // MODEL.EQN: 19
  species TGFBact in Bone = Pic0;  // isVersionOf uniprot:P01137; hasProperty PATO:0002354
  // from README file
  // CMT: OBfast
  // DESCR: osteoblast - slow
  // UNIT: NA
  // SITE: bone
  // PUB.EQN: 17a
  // MODEL.EQN: 12
  species OBfast in Bone = OB*FracOBfast;  // isVersionOf BTO:0001593
  // from README file
  // CMT: OBslow
  // DESCR: osteoblast - fast
  // UNIT: NA
  // SITE: bone
  // PUB.EQN: 17b
  // MODEL.EQN: 13
  species OBslow in Bone = OB*(1 - FracOBfast);  // isVersionOf BTO:0001593
  // from README file
  // CMT: M
  // DESCR: RANK-RANKL complex
  // UNIT: NA
  // SITE: bone
  // PUB.EQN: 24
  // MODEL.EQN: 22
  species M in Bone = k3*RNK*L/k4;  // hasProperty GO:0043234; hasPart uniprot:O14788 uniprot:Q9Y6Q6
  // from README file
  // CMT: N
  // DESCR: OPG-RANKL complex
  // UNIT: NA
  // SITE: bone
  // PUB.EQN: 25
  // MODEL.EQN: 23
  species N in Bone = k1*O*L/k2;  // hasProperty GO:0043234; hasPart uniprot:O14788 uniprot:O00300

  // Parameters:
  // πc0 in paper
  Pic0 = 0.228142;
  // φ17a in paper
  // Fraction of OB with fast decay kinetics
  FracOBfast = 0.797629;
  // k21-24 in paper
  // Assocation rate constant for RANK and RANKL
  k3 = 6.24e-6;
  // k24-21 in paper
  // Dissocation rate constant for RANK-RANKL
  k4 = 0.112013;
  // k21-24 in paper
  // Assocation rate constant for OPG and RANKL
  k1 = 6.24e-6;
  // k24-21 in paper
  // Dissocation rate constant for OPG-RANKL
  k2 = 0.112013;
  // Vvasc in paper
  // Vasculature volume: 14 l
  V1 = 14;
  // Daily Ca intake
  CaDay = 88;
  // φ12–4 in paper
  FracJ14 = 0.107763;
  // Hyperbolic parameter
  J14OCmax = 0.543488;
  // γ18,12–4 in paper
  J14OCgam = 1.6971;
  // φ4–12 in paper
  FracJ15 = 0.114376;
  // α20,21 in paper
  // RNK production constant
  kinRNKgam = 0.151825;
  // k21D in paper
  // RNK degradation constant
  koutRNK = 0.00323667;
  // γ24,12–4 in paper
  MOCratioGam = 0.603754;
  // Basal osteoclast maturation and apoptosis rate? Given as 0.7/24 in model.
  Da = 0.7/24;
  // α17,19S in paper
  OBtgfGAM = 0.0111319;
  // k19-20 in paper
  koutTGF0 = 2.98449e-5;
  // γ19–20 in paper
  koutTGFGam = 0.919131;
  // γ18,19–20 in paper
  OCtgfGAM = 0.593891;
  // Hyperbolic parameter
  EmaxPicROB = 3.9745;
  // H+20,16 γ in paper
  // Hyperbolic parameter
  PicROBgam = 1.80968;
  FracPicROB = 0.883824;
  // H+20,17 γ in paper
  // Hyperbolic parameter
  PicOBgam = 0.122313;
  FracPicOB = 0.000244818;
  // H+20,17 α in paper
  // Hyperbolic parameter
  EmaxPicOB = 0.251636;
  // H+24,18S ρ in paper
  // Hyperbolic parameter
  E0Meff = 0.388267;
  EmaxMeffOC = 3.15667;
  // H+24,18S γ in paper
  // Hyperbolic parameter
  kinOCgam = 8.53065;
  EmaxPicOC = 1.9746;
  FracPicOC = 0.878215;
  // H+20,18D γ in paper
  // Hyperbolic parameter
  PicOCgam = 1.0168;
  // H-22,18D α in paper
  // Hyperbolic parameter
  E0RANKL = 3.80338;
  // H-22,18D ρ in paper
  // Hyperbolic parameter
  EmaxL = 0.469779;
  // Glomerular Filtration rate
  GFR = 100/16.667;
  // H7,4-u α in paper
  // Hyperbolic parameter
  T16 = 1.06147;
  // k9D in paper
  // 1-alpha hydroxylase degradation constant
  T64 = 0.05;
  // k9S in paper
  // 1-alpha hydroxylase production constant
  T65 = 6.3;
  // H7,9 δ in paper
  // Hyperbolic parameter
  T67 = 1.54865;
  // H7,9 γ in paper
  // Hyperbolic parameter
  AlphOHgam = 0.111241;
  // k15-14 in paper
  // transfer between phos IC and phos EC in the bone
  k14a = 2.44437e-5;
  HApMRT = 3.60609;
  // k22D in paper
  // Degradation constant of RANKL
  koutL = 0.00293273;
  // α17,22 in paper
  OsteoEffectGam = 0.173833;
  TESTPOWER = 1;
  // δ7,23 in paper
  opgPTH50 = 3.85;
  IO = 0;
  // k28D in paper
  RX2Kout0 = 0.693;
  // H+7,26D ρ in paper
  // Hyperbolic parameter
  E0rx2Kout = 0.125;
  EmaxPTHRX2x = 5;
  // H+7,27S ρ in paper
  // Hyperbolic parameter
  E0crebKin = 0.5;
  EmaxPTHcreb = 3.39745;
  // k27D in paper
  // CREB degradation constant
  crebKout = 0.00279513;
  // k28D in paper
  // BLC2 degradation constant
  bcl2Kout = 0.693;
  // H1–4 α in paper
  // Hyperbolic Parameter
  ScaEffGam = 0.9;
  // H-5,9 α in paper
  // Hyperbolic Parameter
  PhosEff0 = 1.52493;
  // H-5,9 δ in paper
  // Hyperbolic Parameter
  PhosEff50 = 1.3021;
  // H-5,9 γ in paper
  // Hyperbolic Parameter
  PhosEffGam = 8.25229;
  PO4inhPTHgam = 0;
  // k6D in paper
  // Calcitriol degradation constant
  T69 = 0.1;
  // H4-u δ in paper
  // Hyperbolic parameter Reabsorption EC50
  Reabs50 = 1.57322;
  // H6,4 α in paper
  // Hyperbolic parameter
  T7 = 2;
  // H6,4 δ in paper
  // Hyperbolic parameter
  T9 = 90;
  // α10 in paper
  T70 = 0.01;
  // bT6'4 in paper
  T71 = 0.03;
  // H±6,2 ρ in paper
  // Hyperbolic parameter
  T33 = 0.003;
  // H±6,2 α in paper
  // Hyperbolic parameter
  T34 = 0.037;
  // H±6,2 δ in paper
  // Hyperbolic parameter
  T35 = 90;
  CaPOgam = 1;
  // φ5-u in paper
  T46 = 1.142;
  // k3–5 in paper
  T52 = 0.365;
  // Hourly phosphate intake
  OralPhos = 10.5/24;
  // F3 in paper
  // Bioavailability of phosphate?
  F12 = 0.7;
  // k5–8 in paper
  T49 = 51.8;
  // k8–5 in paper
  T55 = 0.019268;
  // H-20,17D γ in paper
  // Hyperbolic parameter
  PicOBgamkb = 2.92375;
  MultPicOBkb = 3.11842;
  FracPic0kb = 0.764028;
  // φ28,k17D in paper
  E0RUNX2kbEffFACT = 1.01;
  RUNkbGAM = 3.67798;
  RUNkbMaxFact = 0.638114;
  // RunX2 initial value
  RUNX20 = 10;
  // φk17D in paper
  Frackb = 0.313186;
  // H+2,1 δ in paper
  // OR δ2,1 in paper
  T81 = 0.75;
  // k1–4 in paper
  T87 = 0.0495;
  T0 = 1.58471;
  // H1–4 α in paper
  // Hyperbolic parameter
  T28 = 0.9;
  // Hourly calcium intake
  OralCa = 24.055/24;
  T77 = 0.909359;
  // H+2,1 γ in paper
  // Hyperbolic parameter
  T80 = 4;
  // H-6,11 γ in paper
  // Hyperbolic parameter
  CtriolPTgam = 12.5033;
  // H-6,11 α in paper
  // Hyperbolic parameter
  CtriolMax = 4.1029;
  // H-6,11 ρ in paper
  // Hyperbolic parameter
  CtriolMin = 0.9;
  // k11 in paper
  PTout = 0.0001604;
  T57 = 100;
  // H-4,10–7 ρ in paper
  // Hyperbolic parameter
  T58 = 6249.09;
  // H-4,10–7 γ in paper
  // Hyperbolic parameter
  T59 = 11.7387;
  // H-4,10–7 α in paper
  // Hyperbolic parameter
  T61 = 96.25;
  IPTHint = 0;
  IPTHinf = 0;
  // H-22,18D γ in paper
  // Hyperbolic parameter
  LsurvOCCgam = 3.0923;
  // α7,22 in paper
  EmaxLpth = 1.30721;
  // k23D in paper
  kO = 15.8885;
  // k17D in paper
  kb = 0.000605516;
  LsurvOCgam = 3.09023;
  TERIVC = 133;
  TERICL = 94.3;
  TERIKA = 16.4;
  // initial Ca bone IC value
  Q0 = Q;
  // Osteoclast initial value
  OC0 = OC;
  // RANK initial value
  RNK0 = RNK;
  // RANKL initial value
  RANKL0 = L;
  // RANKL initial value
  RNKL0 = L;
  // Osteoblast initial value
  OB0 = OB;
  // Responding Oteoblast initial value
  ROB0 = ROB1;
  // Ca EC bone initial value
  QboneInit = Qbone;
  // OPG initial value
  OPG0 = O;
  // RunX2 initial value
  RX20 = RX2;
  // CREB initial value
  CREB0 = CREB;
  // RANK-RANKL initial value
  M0 = M;
  // Active TGF beta initial value
  TGFBact0 = TGFBact;
  // TGF beta initial value
  TGFB0 = TGFB;
  // Counter for dose events -VKS
  event_counter = 0;
  // Time between doses (hours) -VKS
  teri_times_interval = 24;
  // Time of first dose (hours) -VKS
  teri_times_initial = 12;
  // The number of doses or events -VKS
  teri_number_of_doses = 3;
  // The dose in micrograms -VKS
  teri_dose_mcg = 20;

  // Assignment rules:
  T13 := CaDay/24/Q0;
  T15 := CaDay/(2.35*14*24);
  T17 := 3.85*T16 - 3.85;
  Osteoclast := OC;
  J14OC50 := exp(ln(J14OCmax*OC0^J14OCgam/T13 - OC0^J14OCgam)/J14OCgam);
  OCeqn := J14OCmax*Osteoclast^J14OCgam/(Osteoclast^J14OCgam + J14OC50^J14OCgam);
  kinRNK := (koutRNK*RNK0 + k3*RNK0*RANKL0 - k4*M0)/TGFBact0^kinRNKgam;
  MOCratio := M/Osteoclast;
  MOCratio0 := M0/OC0;
  MOCratioEff := (MOCratio/MOCratio0)^MOCratioGam;
  J14OCdepend := OCeqn*Q0*FracJ14*MOCratioEff;
  J14 := T13*Q0*(1 - FracJ14) + J14OCdepend;
  J41 := 0.464*J14;
  PicOCkin := Pic0;
  bigDb := kb*OB0*Pic0/ROB0;
  kinTGF := koutTGF0*TGFB0;
  koutTGF := koutTGF0;
  koutTGFact := koutTGF0*1000;
  koutTGFeqn := koutTGF*TGFB*(Osteoclast/OC0)^OCtgfGAM;
  E0PicROB := FracPicROB*Pic0;
  EC50PicROBparen := EmaxPicROB*TGFBact0^PicROBgam/(Pic0 - E0PicROB) - TGFBact0^PicROBgam;
  EC50PicROB := exp(ln(EC50PicROBparen)/PicROBgam);
  Dr := kb*OB0/Pic0;
  PicROB := E0PicROB + EmaxPicROB*TGFBact^PicROBgam/(TGFBact^PicROBgam + EC50PicROB^PicROBgam);
  ROBin2 := Dr*PicROB;
  ROBin := ROBin2;
  E0PicOB := FracPicOB*Pic0;
  EC50PicOBparen := EmaxPicOB*TGFBact0^PicOBgam/(Pic0 - E0PicOB) - TGFBact0^PicOBgam;
  EC50PicOB := exp(ln(EC50PicOBparen)/PicOBgam);
  PicOB := E0PicOB + EmaxPicOB*TGFBact^PicOBgam/(TGFBact^PicOBgam + EC50PicOB^PicOBgam);
  KPT := 1*(bigDb/PicOB);
  D := ROB1;
  EC50MeffOC := exp(ln(M0^kinOCgam*EmaxMeffOC/(1 - E0Meff) - M0^kinOCgam)/kinOCgam);
  MeffOC := E0Meff + EmaxMeffOC*M^kinOCgam/(M^kinOCgam + EC50MeffOC^kinOCgam);
  kinOC2 := Da*PicOCkin*MeffOC*OC0;
  E0PicOC := FracPicOC*Pic0;
  EC50PicOCparen := EmaxPicOC*TGFBact0^PicOCgam/(Pic0 - E0PicOC) - TGFBact0^PicOCgam;
  EC50PicOC := exp(ln(EC50PicOCparen)/PicOCgam);
  PicOC := E0PicOC + EmaxPicOC*TGFBact^PicOCgam/(TGFBact^PicOCgam + EC50PicOC^PicOCgam);
  PiL0 := k3/k4*RANKL0;
  PiL := M/10;
  EC50survInPar := (E0RANKL - EmaxL)*(PiL0^LsurvOCgam/(E0RANKL - 1)) - PiL0^LsurvOCgam;
  EC50surv := exp(ln(EC50survInPar)/LsurvOCgam);
  LsurvOC := E0RANKL - (E0RANKL - EmaxL)*(PiL^LsurvOCgam/(PiL^LsurvOCgam + EC50surv^LsurvOCgam));
  KLSoc := Da*PicOC*LsurvOC;
  C4 := PTH/V1;
  T66 := (T67^AlphOHgam + 3.85^AlphOHgam)/3.85^AlphOHgam;
  k15a := k14a*QboneInit/Q0;
  J14a := k14a*Qbone;
  J15a := k15a*Q;
  kLShap := 1/HApMRT;
  kHApIn := kLShap/OB0;
  J15 := T15*P*(1 - FracJ15) + T15*P*FracJ15*HAp;
  J42 := 0.464*J15;
  OBfast0 := OB0*FracOBfast;
  Osteoblast := OBfast + OBslow;
  kinLbase := koutL*RANKL0;
  OsteoEffect := (Osteoblast/OB0)^OsteoEffectGam;
  PTH50 := EmaxLpth*3.85 - 3.85;
  PTHconc := C4;
  LpthEff := EmaxLpth*PTHconc/(PTH50*OsteoEffect^TESTPOWER + PTHconc);
  kinL := kinLbase*OsteoEffect*LpthEff;
  pObase := kO*OPG0;
  pO := pObase*(D/ROB0)*((PTHconc + opgPTH50*(D/ROB0))/(2*PTHconc)) + IO;
  RX2Kin := RX2Kout0*RX20;
  EC50PTHRX2x := EmaxPTHRX2x*3.85/(RX2Kout0 - E0rx2Kout) - 3.85;
  RX2Kout := E0rx2Kout + EmaxPTHRX2x*PTHconc/(PTHconc + EC50PTHRX2x);
  EC50PTHcreb := EmaxPTHcreb*3.85/(1 - E0crebKin) - 3.85;
  crebKin0 := crebKout*CREB0;
  crebKin := crebKin0*(E0crebKin + EmaxPTHcreb*PTHconc/(PTHconc + EC50PTHcreb));
  bcl2Kin := RX2*CREB*0.693;
  CaConc := P/14;
  C2 := ECCPhos/V1;
  PO4inhPTH := (C2/1.2)^PO4inhPTHgam;
  PhosEffTop := (PhosEff0 - 1)*(1.2^PhosEffGam + PhosEff50^PhosEffGam);
  PhosEffBot := PhosEff0*1.2^PhosEffGam;
  PhosEffMax := PhosEffTop/PhosEffBot;
  PhosEff := PhosEff0 - PhosEffMax*PhosEff0*C2^PhosEffGam/(C2^PhosEffGam + PhosEff50^PhosEffGam);
  PhosEffect := piecewise(PhosEff, C2 > 1.2, 1);
  T68 := T66*C4^AlphOHgam/(T67^AlphOHgam*PO4inhPTH + C4^AlphOHgam);
  SE := T65*T68*PhosEffect;
  C8 := B/V1;
  C1 := P/V1;
  T36 := T33 + (T34 - T33)*(C8^CaPOgam/(T35^CaPOgam + C8^CaPOgam));
  T37 := T34 - (T34 - T33)*(C8^CaPOgam/(T35^CaPOgam + C8^CaPOgam));
  CaFilt := 0.6*0.5*GFR*C1;
  ReabsMax := (0.3*GFR*2.35 - 0.149997)*(Reabs50 + 2.35)/2.35;
  ReabsPTHeff := T16*C4/(C4 + T17);
  CaReabsActive := ReabsMax*C1/(Reabs50 + C1)*ReabsPTHeff;
  T20 := CaFilt - CaReabsActive;
  T10 := T7*C8/(C8 + T9);
  J27a := (2 - T10)*T20;
  J27 := piecewise(0, J27a < 0, J27a);
  ScaEff := (2.35/CaConc)^ScaEffGam;
  T72 := 90*ScaEff;
  T73 := T71*(C8 - T72);
  T74 := (exp(T73) - exp(-T73))/(exp(T73) + exp(-T73));
  T75 := T70*(0.85*(1 + T74) + 0.15);
  T76 := T70*(0.85*(1 - T74) + 0.15);
  T47 := T46*0.88*GFR;
  J48a := 0.88*GFR*C2 - T47;
  J48 := piecewise(0, J48a < 0, J48a);
  J53 := T52*PhosGut;
  J54 := T49*C2;
  J56 := T55*IntraPO;
  E0PicOBkb := MultPicOBkb*Pic0;
  EmaxPicOBkb := FracPic0kb*Pic0;
  EC50PicOBparenKb := (E0PicOBkb - EmaxPicOBkb)*TGFBact0^PicOBgamkb/(E0PicOBkb - Pic0) - TGFBact0^PicOBgamkb;
  EC50PicOBkb := exp(ln(EC50PicOBparenKb)/PicOBgamkb);
  PicOBkb := E0PicOBkb - (E0PicOBkb - EmaxPicOBkb)*TGFBact^PicOBgamkb/(TGFBact^PicOBgamkb + EC50PicOBkb^PicOBgamkb);
  PicOBkbEff := PicOBkb/Pic0;
  E0RUNX2kbEff := E0RUNX2kbEffFACT*kb;
  RUNX2 := piecewise(BCL2 - 90, BCL2 > 105, 10);
  RUNkbMax := E0RUNX2kbEff*RUNkbMaxFact;
  INparen := RUNkbMax*RUNX20^RUNkbGAM/(E0RUNX2kbEff - kb) - RUNX20^RUNkbGAM;
  RUNkb50 := exp(ln(INparen)/RUNkbGAM);
  RUNX2kbPrimeEff := RUNkbMax*RUNX2^RUNkbGAM/(RUNX2^RUNkbGAM + RUNkb50^RUNkbGAM);
  kbprime := E0RUNX2kbEff*PicOBkbEff - RUNX2kbPrimeEff;
  kbslow := kbprime*Frackb;
  kbfast := (kb*OB0 + kbslow*OBfast0 - kbslow*OB0)/OBfast0;
  Frackb2 := kbfast/kbprime;
  T29 := (T28*T0 - 0.17533*T0)/0.17533;
  T31 := T28*T/(T + T29);
  T83 := R/0.5;
  J40 := T31*T*T83/(T + T81) + T87*T;
  T85Rpart := R^T80/(R^T80 + T81^T80);
  T85 := T77*T85Rpart;
  F11 := T85;
  INparenCtriol := (CtriolMax - CtriolMin)*C8^CtriolPTgam/(CtriolMax - 1) - C8^CtriolPTgam;
  Ctriol50 := exp(ln(INparenCtriol)/CtriolPTgam);
  CtriolPTeff := CtriolMax - (CtriolMax - CtriolMin)*C8^CtriolPTgam/(C8^CtriolPTgam + Ctriol50^CtriolPTgam);
  PTin := PTout*CtriolPTeff;
  INparenCa := (T58 - T61)*2.35^T59/(T58 - 385) - 2.35^T59;
  T60 := exp(ln(INparenCa)/T59);
  FCTD := S/0.5*PTmax;
  T63 := T58 - (T58 - T61)*CaConc^T59/(CaConc^T59 + T60^T59);
  EPTH := T63*FCTD;
  IPTH := 0.693*SC + IPTHinf;
  SPTH := EPTH + IPTH;
  kout := T57/14;
  TERIPK := TERISC*TERICL/TERIVC;

  // Reactions:
  PTH_production: => PTH; SPTH;
  PTH_administration: TERISC => PTH; TERIPK;
  PTH_degradation: PTH => ; kout*PTH;
  PTH_gland_pool_production: => S; (1 - S)*T76;
  PTH_gland_pool_degradation: S => ; S*T75;
  PTH_max_capacity_increase: => PTmax; PTin;
  PTH_max_capacity_decrease: PTmax => ; PTout*PTmax;
  Calcitriol_production: => B; A;  // modifiers: A
  Calcitriol_degradation: B => ; T69*B;
  SC_in: => SC; IPTHint;
  SC_out: SC => ; 0.693*SC;
  alpha_hydroxylase_production: => A; SE;
  alpha_hydroxylase_degradation: A => ; T64*A;
  Ca_flux_from_Bone: Q => P; J14;
  Ca_absorption: T => P; J40;
  Ca_flux_to_Bone: P => Q; J15;
  Ca_filtration: P => ; J27;
  Ca_oral_intake: => T; OralCa*F11;
  PO4_transfer_from_bone: => ECCPhos; J41;
  PO4_absorption: PhosGut => ECCPhos; J53;
  PO4_flux_from_intracellular: IntraPO => ECCPhos; J56;
  PO4_transfer_to_bone: ECCPhos => ; J42;
  PO4_filtration: ECCPhos => ; J48;
  PO4_flux_to_intracellular: ECCPhos => IntraPO; J54;
  PO4_oral_intake: => PhosGut; OralPhos*F12;
  Intestinal_calcium_in: => R; T36*(1 - R);
  Intestinal_calcium_out: R => ; T37*R;
  HAp_prouction: => HAp; kHApIn*Osteoblast;
  HAp_out: HAp => ; kLShap*HAp;
  OBfast_fraction: => OBfast; bigDb/PicOB*D*FracOBfast*Frackb2;
  OBfast_degradation: OBfast => ; kbfast*OBfast;
  OBslow_fraction: => OBslow; bigDb/PicOB*D*(1 - FracOBfast)*Frackb;
  OBslow_degradation: OBslow => ; kbslow*OBslow;
  Osteoclast_production: => OC; kinOC2;
  Osteoclast_degradation: OC => ; KLSoc*OC;
  Responding_Osteoblast_production: => ROB1; ROBin;
  Responding_Osteoblast_degradation: ROB1 => ; KPT*ROB1;
  TGFB_production: => TGFB; kinTGF*(Osteoblast/OB0)^OBtgfGAM;
  TGFB_activation: TGFB => TGFBact; koutTGFeqn;
  TGFB_degradation: TGFBact => ; koutTGFact*TGFBact;
  RANKL_production: => L; kinL;
  RANKL_degradation: L => ; koutL*L;
  RANK_production: => RNK; kinRNK*TGFBact^kinRNKgam;  // modifiers: TGFBact
  RANK_degradation: RNK => ; koutRNK*RNK;
  OPG_production: => O; pO;
  OPG_degradation: O => ; kO*O;
  RANKLRANKL_association: L + RNK => M; k3*RNK*L;
  RANKLRANKL_dissociation: M => L + RNK; k4*M;
  OPGRANKL_association: => N; k1*O*L;  // modifiers: O, L
  OPGRANKL_dissociation: N => ; k2*N;
  Ca_to_intracellular_transfer: Qbone => Q; J14a;
  Ca_to_extracellular_transfer: Q => Qbone; J15a;
  RunX2_production: => RX2; RX2Kin;
  RunX2_degradation: RX2 => ; RX2Kout*RX2;
  CREB_production: => CREB; crebKin;
  CREB_degradation: CREB => ; crebKout*CREB;
  Bcl2_production: => BCL2; bcl2Kin;
  Bcl2_degradation: BCL2 => ; bcl2Kout*BCL2;

  // Events:
  Event: at ((time == teri_times_initial) || ((time == event_counter + teri_times_initial) && (time < teri_times_interval*teri_number_of_doses + teri_times_initial))), fromTrigger=false: event_counter = event_counter + teri_times_interval, TERISC = teri_dose_mcg*1000000/4117.8;

  // Unit definitions:
  unit time = 3600 second;
  unit volume = 10 litre;
  unit substance = 1e-3 mole;
end
