// SBML level 2 version 4

model BIOMD0000000633()
  // Bulik2016 - Regulation of hepatic glucose metabolism
  // This model is described in the article:
  // The relative importance of kinetic mechanisms and variable enzyme abundances for the regulation of hepatic glucose metabolism--insights from mathematical modeling.
  // Bulik S, Holzhütter HG, Berndt N.
  // BMC Biol. 2016 Mar; 14: 15
  // Abstract:
  // Adaptation of the cellular metabolism to varying external conditions is brought about by regulated changes in the activity of enzymes and transporters. Hormone-dependent reversible enzyme phosphorylation and concentration changes of reactants and allosteric effectors are the major types of rapid kinetic enzyme regulation, whereas on longer time scales changes in protein abundance may also become operative. Here, we used a comprehensive mathematical model of the hepatic glucose metabolism of rat hepatocytes to decipher the relative importance of different regulatory modes and their mutual interdependencies in the hepatic control of plasma glucose homeostasis.Model simulations reveal significant differences in the capability of liver metabolism to counteract variations of plasma glucose in different physiological settings (starvation, ad libitum nutrient supply, diabetes). Changes in enzyme abundances adjust the metabolic output to the anticipated physiological demand but may turn into a regulatory disadvantage if sudden unexpected changes of the external conditions occur. Allosteric and hormonal control of enzyme activities allow the liver to assume a broad range of metabolic states and may even fully reverse flux changes resulting from changes of enzyme abundances alone. Metabolic control analysis reveals that control of the hepatic glucose metabolism is mainly exerted by enzymes alone, which are differently controlled by alterations in enzyme abundance, reversible phosphorylation, and allosteric effects.In hepatic glucose metabolism, regulation of enzyme activities by changes of reactants, allosteric effects, and reversible phosphorylation is equally important as changes in protein abundance of key regulatory enzymes.
  // This model is hosted on BioModels Database and identified by: BIOMD0000000633.
  // To cite BioModels Database, please use: BioModels Database: An enhanced, curated and annotated resource for published quantitative kinetic models.
  // To the extent possible under law, all copyright and related or neighbouring rights to this encoded model have been dedicated to the public domain worldwide. Please refer to CC0 Public Domain Dedication for more information.
  // biomodels.db:MODEL1603030000
  // biomodels.db:BIOMD0000000633
  // isDescribedBy pubmed:26935066
  // hasProperty GO:0055085 GO:0006468 GO:0010906 mamo:MAMO_0000009
  // hasTaxon taxonomy:10116

  // Compartments:
  compartment ext = 1;  // hasProperty GO:0005576
  compartment cyto = 1;  // hasProperty GO:0005829
  compartment er = 1;  // hasProperty GO:0005783
  compartment mito = 1;  // hasProperty GO:0005739

  // Species:
  species glc_ext in ext = 4;  // CHEBI:17234; CHEBI:17234
  species lac_ext in ext = 1;  // CHEBI:24996; CHEBI:24996
  species glc in cyto = 4.922562;  // CHEBI:17234; CHEBI:17234
  species glc6p in cyto = 0.1899299;  // kegg.compound:C00092
  species glc1p in cyto = 0.01172407;  // kegg.compound:C00103
  species udpglc in cyto = 0.3407242;  // kegg.compound:C00029
  // This is referred to as Glyc in the paper but glyglc in the model.
  species glyglc in cyto = 17.63326;  // kegg.compound:C00369
  species fru6p in cyto = 0.05697905;  // kegg.compound:C00085
  species fru16bp in cyto = 0.0008081718;  // kegg.compound:C00354
  species fru26bp in cyto = 0.0005402141;  // kegg.compound:C00665
  species gap in cyto = 0.001907055;  // kegg.compound:C00118
  species dhap in cyto = 0.04195909;  // kegg.compound:C00111
  // This is referred to as bpg13 in the model but 13P2G in the paper.
  species bpg13 in cyto = 0.001088057;  // CHEBI:89363; CHEBI:89363
  // 3-phosphoglycerate is referred to as pg3 in the model and 3PG in the paper.
  species pg3 in cyto = 0.3063935;  // kegg.compound:C00197
  // 2-phosphoglycerate is referred to as pg2 in the model and 2PG in the paper.
  species pg2 in cyto = 0.02937617;  // kegg.compound:C00631
  species pep in cyto = 0.04993951;  // kegg.compound:C00074
  species pyr in cyto = 0.08521492;  // kegg.compound:C00022
  species oa in cyto = 0.02439633;  // kegg.compound:C00036
  species lac in cyto = 0.6787718;  // CHEBI:24996; CHEBI:24996
  species mal in cyto = 0.7196566;  // kegg.compound:C00149
  species cit in cyto = 0.75;  // kegg.compound:C00158
  species h in cyto = 0.0001;  // kegg.compound:C00080
  species co2_mito in mito = 5;  // kegg.compound:C00011
  species oa_mito in mito = 0.0004647312;  // kegg.compound:C00036
  species pep_mito in mito = 0.0001111919;  // kegg.compound:C00074
  species pyr_mito in mito = 0.1322282;  // kegg.compound:C00022
  species mal_mito in mito = 1.303594;  // kegg.compound:C00149
  species p_mito in mito = 8;  // kegg.compound:C00009
  species h_mito in mito = 6e-5;  // kegg.compound:C00080
  species glc_er in er = 4.922562;  // CHEBI:17234; CHEBI:17234
  species glc6p_er in er = 0.1899299;  // kegg.compound:C00092
  species atp in cyto = 3.25;  // kegg.compound:C00002
  species adp in cyto = 0.5;  // kegg.compound:C00008
  species amp in cyto = 0.16;  // kegg.compound:C00020
  species utp in cyto = 0.7447012;  // kegg.compound:C00075
  species udp in cyto = 0.1145706;  // kegg.compound:C00015
  species gtp in cyto = 0.6933394;  // kegg.compound:C00044
  species gdp in cyto = 0.1066676;  // kegg.compound:C00035
  species pp in cyto = 0.008;  // kegg.compound:C00013
  species p in cyto = 5;  // kegg.compound:C00009
  species p_er in cyto = 5;  // kegg.compound:C00009
  species co2 in cyto = 5;  // kegg.compound:C00011
  species nad in cyto = 1.13;  // kegg.compound:C00003
  species nadh in cyto = 0.001;  // kegg.compound:C00004
  species atp_mito in mito = 17.5;  // kegg.compound:C00002
  species adp_mito in mito = 7.5;  // kegg.compound:C00008
  species gtp_mito in mito = 0.5599957;  // kegg.compound:C00044
  species gdp_mito in mito = 0.2400043;  // kegg.compound:C00035
  species nadh_mito in mito = 0.004;  // kegg.compound:C00004
  species nad_mito in mito = 0.046;  // kegg.compound:C00003

  // Parameters:
  Vmm = -0.155 V;
  ONE = 1 dimensionless;
  O5 = 0.5 dimensionless;
  M1 = -1 dimensionless;
  O1 = 0.1 dimensionless;
  F = 96490 J_per_V_per_mol;
  R = 8.3 J_per_K_per_mol;
  T = 293 K;
  vmax_ald = 778000000 per_h;
  keq_ald = 0.099 mM;
  km_fru16bp_ald = 0.004 mM;
  km_gap_ald = 0.48 mM;
  km_dhap_ald = 0.38 mM;
  vmax_en = 19400000000 per_h;
  keq_en = 1.7 dimensionless;
  km_pg2_en = 0.14 mM;
  km_pep_en = 0.31 mM;
  vmax_fbp1 = 29200 mM_per_h;
  km_fru16bp_fbp1_native = 0.0029 mM;
  ki_fru26bp_fbp1 = 0.00113 mM;
  n_fbp1 = 1.26 dimensionless;
  ki_amp_fbp1 = 0.023 mM;
  n_amp_fbp1 = 2.43 dimensionless;
  km_fru16bp_fbp1_phospho = 0.0019 mM;
  vmax_gapdh = 292000000 per_h_per_mMmM;
  keq_gapdh = 0.0001 per_mM;
  km_nad_gapdh = 0.01 mM;
  km_gap_gapdh = 0.035;
  km_p_gapdh = 3.8 mM;
  km_nadh_gapdh = 0.006 mM;
  km_bpg13_gapdh = 0.01 mM;
  v0_gk = 10500 mM_per_h;
  n_gk = 1.5 dimensionless;
  ka_glc_gk = 15.9 mM;
  f_gk = 0.75 dimensionless;
  ki_fru6p_gk = 0.005 mM;
  n2_gk = 3.7 dimensionless;
  km_glc_gk = 9 mM;
  km_atp_gk = 0.55 mM;
  vmax_glct_er = 19400000000 per_h;
  km_glc_glct_er = 1.37 mM;
  km_glc_er_glct = 1.22 mM;
  vmax_glut2 = 90.9 per_h;
  km_glc_ext_glut2 = 17.3 mM;
  km_glc_glut2 = 17.3 mM;
  v0_gp = 129 mM_per_h;
  store = 300 mM;
  keq_gp = 0.21 per_mM;
  km_glyglc_gp_native = 2.5 mM;
  km_p_gp_native = 500 mM;
  ka_amp_gp_native = 0.36 mM;
  ka_amp_glc1p_gp = 0.5 mM;
  k0_glc1p_gp = 250 mM;
  km_glyglc_gp_phospho = 1.8 mM;
  km_p_gp_phospho = 2.1 mM;
  km_glc1p_gp_phospho = 0.7 mM;
  ka_amp_gp_phospho = 0.017 mM;
  vmax_g6p_er = 457 mM_per_h;
  km_glc6p_er_g6p_er = 1.84 mM;
  vmax_gpi = 1070000000 per_h;
  keq_gpi = 0.3 dimensionless;
  km_glc6p_gpi = 0.055 mM;
  km_fru6p_gpi = 0.12 mM;
  vmax_g1pi = 77800000 per_h;
  keq_g1pi = 16.2 dimensionless;
  km_glc6p_g1pi = 0.045 mM;
  km_glc1p_g1pi = 0.67 mM;
  vmax_g6pt_er = 19400000000 per_h;
  km_glc6p_g6pt_er = 1.12 mM;
  km_glc6p_er_g6pt_er = 1.12 mM;
  v0_gs = 116 mM_per_h;
  kb_udpglc_gs_native = 0.2 mM;
  k0_udpglc_gs_native = 1.4 mM;
  ka_glc6p_gs_native = 0.007 mM;
  kb_udpglc_gs_phospho = 0.3 mM;
  k0_udpglc_gs_phospho = 32 mM;
  ka_glc6p_gs_phospho = 0.09 mM;
  vmax_lact = 583 per_h;
  km_lac_lact = 2.42 mM;
  km_lac_ext_lact = 2.42 mM;
  vmax_ldh = 156000000000 per_h_per_mM;
  keq_ldh = 9000 dimensionless;
  km_lac_ldh = 36 mM;
  km_nad_ldh = 0.11 mM;
  km_pyr_ldh = 0.15 mM;
  km_nadh_ldh = 0.015 mM;
  km_p_mito_malt = 1.41 mM;
  km_mal_malt = 0.49 mM;
  km_p_malt = 1.41 mM;
  km_mal_mito_malt = 0.49 mM;
  vmax_malt = 1940 per_h_per_mM;
  km_oa_mdh = 0.088 mM;
  km_nadh_mdh = 0.026 mM;
  km_nad_mdh = 0.114 mM;
  km_mal_mdh = 1.1 mM;
  keq_mdh = 3e-5 dimensionless;
  vmax_mdh = 1940000000 per_h_per_mM;
  km_oa_mito_mdh_mito = 0.017 mM;
  km_nadh_mito_mdh_mito = 0.044 mM;
  km_nad_mito_mdh_mito = 0.06 mM;
  km_mal_mito_mdh_mito = 0.33 mM;
  keq_mdh_mito = 3.1e-5 dimensionless;
  vmax_mdh_mito = 697000000000 per_h_per_mM;
  vmax_ndk_gtp = 194000000000 per_h_per_mM;
  keq_ndk = 1 dimensionless;
  km_atp_ndk = 1.33 mM;
  km_gdp_ndk = 0.031 mM;
  km_adp_ndk = 0.042 mM;
  km_gtp_ndk = 0.15 mM;
  vmax_ndk_utp = 19400000 per_h_per_mM;
  km_udp_ndk = 0.19 mM;
  km_utp_ndk = 16 mM;
  vmax_ndk_gtp_mito = 19400000 per_h_per_mM;
  km_atp_mito_ndk = 1.66 mM;
  km_gdp_mito_ndk = 0.036 mM;
  km_adp_mito_ndk = 0.073 mM;
  km_gtp_mito_ndk = 0.15 mM;
  vmax_PC = 3590 mM_per_h;
  keq_pc = 6.55 dimensionless;
  km_atp_mito_pc = 0.14 mM;
  km_pyr_mito_pc = 0.33 mM;
  km_co2_mito_pc = 4.2 mM;
  vmax_pepck = 1000000 per_h_per_mM;
  keq_pepck = 110 mM;
  km_oa_pepck = 0.024 mM;
  km_gtp_pepck = 0.021 mM;
  km_pep_pepck = 0.4 mM;
  km_gdp_pepck = 0.02 mM;
  km_co2_pepck = 1.194 mM;
  vmax_pepck_mito = 1410000 per_h_per_mM;
  keq_pepck_mito = 160 mM;
  km_oa_mito_pepck_mito = 0.0085 mM;
  km_gtp_mito_pepck_mito = 0.022 mM;
  km_pep_mito_pepck_mito = 0.4 mM;
  km_gdp_mito_pepck_mito = 0.02 mM;
  km_co2_mito_pepck_mito = 1.06 mM;
  vmax_pept = 194000 per_h;
  km_pep_pept = 0.1 mM;
  km_pep_mito_pept = 0.1 mM;
  vmax_pfk1 = 76800 mM_per_h;
  ni_pfk1 = 4 dimensionless;
  ka_fru26bp_pfk1_km_atp = 0.0027 mM;
  k0_atp_pfk1_km_atp = 0.2 mM;
  ki0_atp_pfk1 = 0.7 mM;
  f_fru26bp_pfk1_ki_atp = 9 dimensionless;
  ka_fru26bp_pfk1_ki_atp = 0.54 mM;
  k0_fru6p_pfk1_km_fru6p = 1.14 mM;
  ki_atp_pfk1_km_fru6p = 0.6 mM;
  ki_cit_pfk1_km_fru6p = 3.27 mM;
  f_amp_pfk1_km_fru6p = 0.77 dimensionless;
  n_amp_pfk1_km_fru6p = 1.84 dimensionless;
  ka_amp_pfk1_km_fru6p = 0.1 mM;
  f_p_pfk1_km_fru6p = 0.85 dimensionless;
  ka_p_pfk1_km_fru6p = 0.69 mM;
  f_fru26bp_pfk1_km_fru6p = 0.92 dimensionless;
  n_fru26bp_pfk1_km_fru6p = 1.2 dimensionless;
  ka_fru26bp_pfk1_km_fru6p = 0.0045 mM;
  n0_pfk1_n_fru6p = 3.67 dimensionless;
  n_atp_pfk1_n_fru6p = 1.59 dimensionless;
  ki_atp_pfk1_n_fru6p = 0.13 mM;
  f_amp_pfk1_n_fru6p = 0.4 dimensionless;
  n_amp_pfk1_n_fru6p = 2.22 dimensionless;
  ka_amp_pfk1_n_fru6p = 0.086 mM;
  f_cit_pfk1_n_fru6p = 0.1 dimensionless;
  n_cit_pfk1_n_fru6p = 4 dimensionless;
  ki_cit_pfk1_n_fru6p = 0.18 mM;
  f_p_pfk1_n_fru6p = 0.28 dimensionless;
  n_p_pfk1_n_fru6p = 4 dimensionless;
  ka_p_pfk1_n_fru6p = 0.53 mM;
  f_fru26bp_pfk1_n_fru6p = 0.37 dimensionless;
  n_fru26bp_pfk1_n_fru6p = 4 dimensionless;
  ka_fru26bp_pfk1_n_fru6p = 0.0021 mM;
  vmax_pfk2 = 151 mM_per_h;
  n_fru6p_pfk2_native = 1.3 dimensionless;
  km_fru6p_pfk2_native = 0.015 mM;
  km_atp_pfk2_native = 0.25 mM;
  n0_pfk2 = 0.85 dimensionless;
  ki_pep_pfk2 = 0.25 mM;
  n_fru6p_pfk2_phospho = 2 dimensionless;
  km_fru6p_pfk2_phospho = 0.05 mM;
  km_atp_pfk2_phospho = 0.5 mM;
  vmax_fbp2 = 549 mM_per_h;
  km_fru26bp_fbp2_native = 0.01 mM;
  ki_fru6p_fbp2_native = 0.0035 mM;
  f_fbp2_phospho = 1 dimensionless;
  km_fru26bp_fbp2_phospho = 0.0005 mM;
  ki_fru6p_fbp2_phospho = 0.01 mM;
  vmax_pgk = 19400000000 per_h_per_mM;
  keq_pgk = 1830 dimensionless;
  km_adp_pgk = 0.35 mM;
  km_bpg13_pgk = 0.0022 mM;
  km_atp_pgk = 0.24 mM;
  km_pg3_pgk = 1.65 mM;
  vmax_pgm = 19400000000 per_h;
  keq_pgm = 0.096 dimensionless;
  km_pg3_pgm = 0.52 mM;
  km_pg2_pgm = 0.24 mM;
  vmax_pk = 12800 mM_per_h;
  km_pep_pk_native = 0.13 mM;
  ki_atp_pk_native = 1 mM;
  ka_fru16bp_pk_native = 0.0078 mM;
  km_adp_pk_native = 0.25 mM;
  km_pep_pk_phospho = 5.8 mM;
  ki_atp_pk_phospho = 0.32 mM;
  ka_fru16bp_pk_phospho = 0.0095 mM;
  km_adp_pk_phospho = 0.33 mM;
  n_pk_phospho = 2.9 dimensionless;
  vmax_pyrmalt = 19400 per_h_per_mM;
  km_mal_mito_pyrmalt = 0.7 mM;
  km_pyr_pyrmalt = 0.84 mM;
  km_mal_pyrmalt = 0.7 mM;
  km_pyr_mito_pyrmalt = 0.84 mM;
  vmax_pyrt = 194000000 per_h_per_mM;
  km_pyr_pyrt = 0.15 mM;
  km_pyr_mito_pyrt = 0.15 mM;
  vmax_tpi = 194000000 per_h;
  keq_tpi = 0.04545 dimensionless;
  km_dhap_tpi = 0.59 mM;
  km_gap_tpi = 0.415 mM;
  vmax_ugt = 7780000000 per_h_per_mM;
  keq_ugt = 0.3122 dimensionless;
  km_utp_ugt = 0.2 mM;
  km_glc1p_ugt = 0.055 mM;
  km_udpglc_ugt = 0.06 mM;
  km_pp_ugt = 0.084 mM;
  ins0 = 3.1e-6 mM;
  n_ins = 5.7 dimensionless;
  km_glc_ext_ins = 7.7 mM;
  glucagon0 = 5.06e-7 mM;
  n_glucagon = 5.65 dimensionless;
  km_glc_ext_glucagon = 4.7 mM;
  glucagonb = 4e-8 mM;
  n_ins_gamma = 1.75 dimensionless;
  km_ins_gamma = 7e-7 mM;
  n_glucagon_gamma = 3.6 dimensionless;
  km_glucagon_gamma = 8e-8 mM;
  ins has mM;
  glucagon has mM;
  gamma has dimensionless;
  gamma_fbp1 has dimensionless;
  gamma_gp has dimensionless;
  gamma_gs has dimensionless;
  gamma_pfk2 has dimensionless;
  gamma_fbp2 has dimensionless;
  gamma_pk has dimensionless;
  v_ALD has mM_per_h;
  v_EN has mM_per_h;
  v_fbp1_native has dimensionless;
  v_fbp1_phospho has dimensionless;
  v_FBP1 has mM_per_h;
  v_GAPDH has mM_per_h;
  vmax_gk has mM_per_h;
  v_GK has dimensionless;
  v_GLUT2 has mM_per_h;
  v_GLCT_ER has mM_per_h;
  vmax_gp has mM_per_h;
  vmax_gp_native has per_mMmM;
  km_glc1p_gp_native has mM;
  vmax_gp_phospho has per_mMmM;
  v_gp_native has dimensionless;
  v_gp_phospho has dimensionless;
  v_GP has mM_per_h;
  v_G6P_ER has mM_per_h;
  v_GPI has mM_per_h;
  v_G1PI has mM_per_h;
  v_G6PT_ER has mM_per_h;
  vmax_gs has mM_per_h;
  km_udpglc_gs_native has mM;
  km_udpglc_gs_phospho has mM;
  v_gs_native has dimensionless;
  v_gs_phospho has dimensionless;
  v_GS has mM_per_h;
  v_LACT has mM_per_h;
  v_LDH has mM_per_h;
  v_MALT has mM_per_h;
  v_MDH has mM_per_h;
  v_MDH_mito has mM_per_h;
  v_NDK_GTP has mM_per_h;
  v_NDK_UTP has mM_per_h;
  v_NDK_GTP_mito has mM_per_h;
  v_PC has mM_per_h;
  v_PEPCK has mM_per_h;
  v_PEPCK_mito has mM_per_h;
  keq_pept has dimensionless;
  v_PEPT has mM_per_h;
  km_atp_pfk1 has mM;
  ki_atp_pfk1 has mM;
  km_fru6p_pfk1 has mM;
  n_fru6p_pfk1 has dimensionless;
  v_PFK1 has mM_per_h;
  v_pfk2_native has mM_per_h;
  v_pfk2_phospho has mM_per_h;
  v_PFK2 has mM_per_h;
  v_fbp2_native has mM_per_h;
  v_fbp2_phospho has mM_per_h;
  v_FBP2 has mM_per_h;
  v_PGK has mM_per_h;
  v_PGM has mM_per_h;
  v_pk_native has dimensionless;
  v_pk_phospho has dimensionless;
  v_PK has mM_per_h;
  v_PyrMalT has mM_per_h;
  v_PyrT has mM_per_h;
  v_TPI has mM_per_h;
  v_UGT has mM_per_h;

  // Assignment rules:
  ins := ins0*(glc_ext^n_ins/(glc_ext^n_ins + km_glc_ext_ins^n_ins));
  glucagon := glucagon0*(ONE - glc_ext^n_glucagon/(glc_ext^n_glucagon + km_glc_ext_glucagon^n_glucagon)) + glucagonb;
  gamma := O5*(ONE + (glucagon^n_glucagon_gamma/(glucagon^n_glucagon_gamma + km_glucagon_gamma^n_glucagon_gamma) - ins^n_ins_gamma/(ins^n_ins_gamma + km_ins_gamma^n_ins_gamma)));
  gamma_fbp1 := gamma;
  gamma_gp := gamma;
  gamma_gs := gamma;
  gamma_pfk2 := gamma;
  gamma_fbp2 := gamma;
  gamma_pk := gamma;
  v_ALD := vmax_ald*((fru16bp - gap*dhap/keq_ald)/(ONE + fru16bp/km_fru16bp_ald + (ONE + gap/km_gap_ald)*(ONE + dhap/km_dhap_ald) - ONE));
  v_EN := vmax_en*((pg2 - pep/keq_en)/(ONE + pg2/km_pg2_en + pep/km_pep_en));
  v_fbp1_native := fru16bp/(fru16bp + km_fru16bp_fbp1_native)/((ONE + (fru26bp/ki_fru26bp_fbp1)^n_fbp1)*(ONE + (amp/ki_amp_fbp1)^n_amp_fbp1));
  v_fbp1_phospho := fru16bp/(fru16bp + km_fru16bp_fbp1_phospho)/((ONE + (fru26bp/ki_fru26bp_fbp1)^n_fbp1)*(ONE + (amp/ki_amp_fbp1)^n_amp_fbp1));
  v_FBP1 := vmax_fbp1*((ONE - gamma_fbp1)*v_fbp1_native + gamma_fbp1*v_fbp1_phospho);
  v_GAPDH := vmax_gapdh*((nad*gap*p - bpg13*(nadh/keq_gapdh))/((ONE + nad/km_nad_gapdh)*(ONE + gap/km_gap_gapdh)*(ONE + p/km_p_gapdh) + (ONE + nadh/km_nadh_gapdh)*(ONE + bpg13/km_bpg13_gapdh) - ONE));
  vmax_gk := v0_gk*(glc^n2_gk/(glc^n2_gk + ka_glc_gk^n2_gk))*(ONE - f_gk*(fru6p/(fru6p + ki_fru6p_gk)));
  v_GK := vmax_gk*(atp/(atp + km_atp_gk))*(glc^n_gk/(glc^n_gk + km_glc_gk^n_gk));
  v_GLUT2 := vmax_glut2*((glc_ext - glc)/(ONE + glc_ext/km_glc_ext_glut2 + glc/km_glc_glut2));
  v_GLCT_ER := vmax_glct_er*((glc - glc_er)/(ONE + glc/km_glc_glct_er + glc_er/km_glc_er_glct));
  vmax_gp := v0_gp*(glyglc/store);
  vmax_gp_native := amp/(amp + ka_amp_gp_native)/(km_glyglc_gp_native*km_p_gp_native);
  km_glc1p_gp_native := k0_glc1p_gp*(ONE - amp/(amp + ka_amp_glc1p_gp));
  vmax_gp_phospho := amp/(amp + ka_amp_gp_phospho)/(km_glyglc_gp_phospho*km_p_gp_phospho);
  v_gp_native := vmax_gp_native*((glyglc*p - glc1p/keq_gp)/((ONE + glyglc/km_glyglc_gp_native)*(ONE + p/km_p_gp_native) + ONE + glc1p/km_glc1p_gp_native - ONE));
  v_gp_phospho := vmax_gp_phospho*((glyglc*p - glc1p/keq_gp)/((ONE + glyglc/km_glyglc_gp_phospho)*(ONE + p/km_p_gp_phospho) + ONE + glc1p/km_glc1p_gp_phospho - ONE));
  v_GP := vmax_gp*((ONE - gamma_gp)*v_gp_native + gamma_gp*v_gp_phospho);
  v_G6P_ER := vmax_g6p_er*(glc6p_er/(glc6p_er + km_glc6p_er_g6p_er));
  v_GPI := vmax_gpi*((glc6p - fru6p/keq_gpi)/(ONE + glc6p/km_glc6p_gpi + fru6p/km_fru6p_gpi));
  v_G1PI := vmax_g1pi*((glc1p - glc6p/keq_g1pi)/(ONE + glc6p/km_glc6p_g1pi + glc1p/km_glc1p_g1pi));
  v_G6PT_ER := vmax_g6pt_er*((glc6p - glc6p_er)/(ONE + glc6p/km_glc6p_g6pt_er + glc6p_er/km_glc6p_er_g6pt_er));
  vmax_gs := v0_gs*((store - glyglc)/(store - glyglc + store*O1));
  km_udpglc_gs_native := kb_udpglc_gs_native + k0_udpglc_gs_native*(ONE - glc6p/(glc6p + ka_glc6p_gs_native));
  km_udpglc_gs_phospho := kb_udpglc_gs_phospho + k0_udpglc_gs_phospho*(ONE - glc6p/(glc6p + ka_glc6p_gs_phospho));
  v_gs_native := udpglc/(udpglc + km_udpglc_gs_native);
  v_gs_phospho := udpglc/(udpglc + km_udpglc_gs_phospho);
  v_GS := vmax_gs*((ONE - gamma_gs)*v_gs_native + gamma_gs*v_gs_phospho);
  v_LACT := vmax_lact*((lac_ext - lac)/(ONE + lac/km_lac_lact + lac_ext/km_lac_ext_lact));
  v_LDH := vmax_ldh*((pyr*nadh - lac*(nad/keq_ldh))/((ONE + nadh/km_nadh_ldh)*(ONE + pyr/km_pyr_ldh) + (ONE + nad/km_nad_ldh)*(ONE + lac/km_lac_ldh) - ONE));
  v_MALT := vmax_malt*((mal_mito*p - mal*p_mito)/((ONE + mal_mito/km_mal_mito_malt)*(ONE + p/km_p_malt) + (ONE + mal/km_mal_malt)*(ONE + p_mito/km_p_mito_malt) - ONE));
  v_MDH := vmax_mdh*((mal*nad - oa*(nadh/keq_mdh))/((ONE + mal/km_mal_mdh)*(ONE + nad/km_nad_mdh) + (ONE + nadh/km_nadh_mdh)*(ONE + oa/km_oa_mdh) - ONE));
  v_MDH_mito := vmax_mdh_mito*((mal_mito*nad_mito - oa_mito*(nadh_mito/keq_mdh_mito))/((ONE + mal_mito/km_mal_mito_mdh_mito)*(ONE + nad_mito/km_nad_mito_mdh_mito) + (ONE + nadh_mito/km_nadh_mito_mdh_mito)*(ONE + oa_mito/km_oa_mito_mdh_mito) - ONE));
  v_NDK_GTP := vmax_ndk_gtp*((atp*gdp - gtp*(adp/keq_ndk))/((ONE + atp/km_atp_ndk)*(ONE + gdp/km_gdp_ndk) + (ONE + adp/km_adp_ndk)*(ONE + gtp/km_gtp_ndk) - ONE));
  v_NDK_UTP := vmax_ndk_utp*((atp*udp - utp*(adp/keq_ndk))/((ONE + atp/km_atp_ndk)*(ONE + udp/km_udp_ndk) + (ONE + adp/km_adp_ndk)*(ONE + utp/km_utp_ndk) - ONE));
  v_NDK_GTP_mito := vmax_ndk_gtp_mito*((atp_mito*gdp_mito - gtp_mito*(adp_mito/keq_ndk))/((ONE + atp_mito/km_atp_mito_ndk)*(ONE + gdp_mito/km_gdp_mito_ndk) + (ONE + adp_mito/km_adp_mito_ndk)*(ONE + gtp_mito/km_gtp_mito_ndk) - ONE));
  v_PC := vmax_PC*((atp_mito*pyr_mito*co2_mito - oa_mito*adp_mito*(p_mito/keq_pc))/((atp_mito + km_atp_mito_pc)*(pyr_mito + km_pyr_mito_pc)*(co2_mito + km_co2_mito_pc)));
  v_PEPCK := vmax_pepck*((oa*gtp - pep*gdp*(co2/keq_pepck))/((ONE + oa/km_oa_pepck)*(ONE + gtp/km_gtp_pepck) + (ONE + pep/km_pep_pepck)*(ONE + gdp/km_gdp_pepck)*(ONE + co2/km_co2_pepck) - ONE));
  v_PEPCK_mito := vmax_pepck_mito*((oa_mito*gtp_mito - pep_mito*gdp_mito*(co2_mito/keq_pepck_mito))/((ONE + oa_mito/km_oa_mito_pepck_mito)*(ONE + gtp_mito/km_gtp_mito_pepck_mito) + (ONE + pep_mito/km_pep_mito_pepck_mito)*(ONE + gdp_mito/km_gdp_mito_pepck_mito)*(ONE + co2_mito/km_co2_mito_pepck_mito) - ONE));
  keq_pept := exp(M1*(Vmm*F/(R*T)));
  v_PEPT := vmax_pept*((pep_mito - pep/keq_pept)/(ONE + pep/km_pep_pept + pep_mito/km_pep_mito_pept));
  km_atp_pfk1 := k0_atp_pfk1_km_atp*(fru26bp/(fru26bp + ka_fru26bp_pfk1_km_atp));
  ki_atp_pfk1 := ki0_atp_pfk1*(ONE + f_fru26bp_pfk1_ki_atp*(fru26bp/(fru26bp + ka_fru26bp_pfk1_ki_atp)));
  km_fru6p_pfk1 := k0_fru6p_pfk1_km_fru6p*(ONE + atp/ki_atp_pfk1_km_fru6p)*(ONE + cit/ki_cit_pfk1_km_fru6p)*(ONE - f_amp_pfk1_km_fru6p*(amp^n_amp_pfk1_km_fru6p/(amp^n_amp_pfk1_km_fru6p + ka_amp_pfk1_km_fru6p^n_amp_pfk1_km_fru6p)))*(ONE - f_p_pfk1_km_fru6p*(p/(p + ka_p_pfk1_km_fru6p)))*(ONE - f_fru26bp_pfk1_km_fru6p*(fru26bp^n_fru26bp_pfk1_km_fru6p/(fru26bp^n_fru26bp_pfk1_km_fru6p + ka_fru26bp_pfk1_km_fru6p^n_fru26bp_pfk1_km_fru6p)));
  n_fru6p_pfk1 := (n0_pfk1_n_fru6p + atp^n_atp_pfk1_n_fru6p/(atp^n_atp_pfk1_n_fru6p + ki_atp_pfk1_n_fru6p^n_atp_pfk1_n_fru6p))*(ONE - f_amp_pfk1_n_fru6p*(amp^n_amp_pfk1_n_fru6p/(amp^n_amp_pfk1_n_fru6p + ka_amp_pfk1_n_fru6p^n_amp_pfk1_n_fru6p)))*(ONE + f_cit_pfk1_n_fru6p*(cit^n_cit_pfk1_n_fru6p/(cit^n_cit_pfk1_n_fru6p + ki_cit_pfk1_n_fru6p^n_cit_pfk1_n_fru6p)))*(ONE - f_p_pfk1_n_fru6p*(p^n_p_pfk1_n_fru6p/(p^n_p_pfk1_n_fru6p + ka_p_pfk1_n_fru6p^n_p_pfk1_n_fru6p)))*(ONE - f_fru26bp_pfk1_n_fru6p*(fru26bp^n_fru26bp_pfk1_n_fru6p/(fru26bp^n_fru26bp_pfk1_n_fru6p + ka_fru26bp_pfk1_n_fru6p^n_fru26bp_pfk1_n_fru6p)));
  v_PFK1 := vmax_pfk1*(atp/(atp + km_atp_pfk1))*(ONE - atp^ni_pfk1/(atp^ni_pfk1 + ki_atp_pfk1^ni_pfk1))*(fru6p^n_fru6p_pfk1/(fru6p^n_fru6p_pfk1 + km_fru6p_pfk1^n_fru6p_pfk1));
  v_pfk2_native := fru6p^n_fru6p_pfk2_native/(fru6p^n_fru6p_pfk2_native + km_fru6p_pfk2_native^n_fru6p_pfk2_native)*(atp/(atp + km_atp_pfk2_native))*(ONE - n0_pfk2*(pep/(pep + ki_pep_pfk2)));
  v_pfk2_phospho := fru6p^n_fru6p_pfk2_phospho/(fru6p^n_fru6p_pfk2_phospho + km_fru6p_pfk2_phospho^n_fru6p_pfk2_phospho)*(atp/(atp + km_atp_pfk2_phospho))*(ONE - n0_pfk2*(pep/(pep + ki_pep_pfk2)));
  v_PFK2 := vmax_pfk2*((ONE - gamma_pfk2)*v_pfk2_native + gamma_pfk2*v_pfk2_phospho);
  v_fbp2_native := fru26bp/(fru26bp + km_fru26bp_fbp2_native)/(ONE + fru6p/ki_fru6p_fbp2_native);
  v_fbp2_phospho := f_fbp2_phospho*(fru26bp/(fru26bp + km_fru26bp_fbp2_phospho)/(ONE + fru6p/ki_fru6p_fbp2_phospho));
  v_FBP2 := vmax_fbp2*((ONE - gamma_fbp2)*v_fbp2_native + gamma_fbp2*v_fbp2_phospho);
  v_PGK := vmax_pgk*((adp*bpg13 - atp*(pg3/keq_pgk))/((ONE + adp/km_adp_pgk)*(ONE + bpg13/km_bpg13_pgk) + (ONE + atp/km_atp_pgk)*(ONE + pg3/km_pg3_pgk) - ONE));
  v_PGM := vmax_pgm*((pg3 - pg2/keq_pgm)/(ONE + pg3/km_pg3_pgm + pg2/km_pg2_pgm));
  v_pk_native := pep/(pep + km_pep_pk_native*(ONE + atp/ki_atp_pk_native)*(ONE - fru16bp/(fru16bp + ka_fru16bp_pk_native)))*(adp/(adp + km_adp_pk_native));
  v_pk_phospho := pep^n_pk_phospho/(pep^n_pk_phospho + (km_pep_pk_phospho*(ONE + atp/ki_atp_pk_phospho)*(ONE - fru16bp/(fru16bp + ka_fru16bp_pk_phospho)))^n_pk_phospho)*(adp/(adp + km_adp_pk_phospho));
  v_PK := vmax_pk*((ONE - gamma_pk)*v_pk_native + gamma_pk*v_pk_phospho);
  v_PyrMalT := vmax_pyrmalt*((mal_mito*pyr - mal*pyr_mito)/((ONE + mal_mito/km_mal_mito_pyrmalt)*(ONE + pyr/km_pyr_pyrmalt) + (ONE + mal/km_mal_pyrmalt)*(ONE + pyr_mito/km_pyr_mito_pyrmalt) - ONE));
  v_PyrT := vmax_pyrt*((pyr*h - pyr_mito*h_mito)/(ONE + pyr/km_pyr_pyrt + pyr_mito/km_pyr_mito_pyrt));
  v_TPI := vmax_tpi*((dhap - gap/keq_tpi)/(ONE + dhap/km_dhap_tpi + gap/km_gap_tpi));
  v_UGT := vmax_ugt*((utp*glc1p - udpglc*(pp/keq_ugt))/((ONE + utp/km_utp_ugt)*(ONE + glc1p/km_glc1p_ugt) + (ONE + udpglc/km_udpglc_ugt)*(ONE + pp/km_pp_ugt) - ONE));

  // Reactions:
  // carried out by aldolase
  ALD: fru16bp -> gap + dhap; v_ALD;  // isVersionOf kegg.reaction:R01068
  // carried out by enolase complex (phosphopyruvate hydratase complex)
  EN: pg2 -> pep; v_EN;  // isVersionOf kegg.reaction:R00658
  // carried out by fructose-1-6-bisphosphatase 1
  FBP1: fru16bp -> fru6p; v_FBP1;  // kegg.reaction:R00762
  // carried out by glyceraldehyde-3-phosphate dehydrogenase
  GAPDH: gap -> bpg13; v_GAPDH;  // isVersionOf kegg.reaction:R01061
  // carried out by glucokinase
  GK: glc -> glc6p; v_GK;  // isVersionOf kegg.reaction:R00299
  // glucose membrane transporter for endoplasmic reticulum
  GLCT_ER: glc -> glc_er; v_GLCT_ER;  // isVersionOf GO:1904659
  // glucose membrane transporter
  GLUT2: -> glc; v_GLUT2;  // isVersionOf GO:1904659
  // carried out by glycogen phosphorylase
  GP: glyglc -> glc1p; v_GP;  // isVersionOf kegg.reaction:R02111
  // glucose-6-phosphatase
  G6P_ER: glc6p_er -> glc_er; v_G6P_ER;  // isVersionOf kegg.reaction:R00303
  // carried out by glucose-6-phosphate isomerase
  GPI: glc6p -> fru6p; v_GPI;  // isVersionOf kegg.reaction:R00771
  // carried out by glucose-1-phosphate isomerase. In the paper, this is the name given to the enzyme that transfers a phosphate between carbons 1 and 6, although this enzyme is usually referred to as glucose phosphomutase.
  G1PI: glc1p -> glc6p; v_G1PI;  // isVersionOf kegg.reaction:R08639
  // glucose-6-phosphate transmembrane transport
  G6PT_ER: glc6p -> glc6p_er; v_G6PT_ER;  // isVersionOf GO:0015152
  // carried out by glycogen synthase
  GS: udpglc -> glyglc + udp; v_GS;  // isVersionOf kegg.reaction:R00292
  // transport lactate through the membrane
  LACT: -> lac; v_LACT;  // isVersionOf GO:0035873
  // carried out by lactate dehydrogenase
  LDH: pyr -> lac; v_LDH;  // isVersionOf kegg.reaction:R00703
  // carried out by malate transporter
  MALT: 6 mal_mito -> mal; v_MALT;  // isVersionOf GO:0071423
  // carried out by malate dehydrogenase outside of the mitochondria
  MDH: mal -> oa; v_MDH;  // isVersionOf kegg.reaction:R00342
  // carried out by malate dehydrogenase in the mitochondria
  MDH_mito: mal_mito -> oa_mito; v_MDH_mito;  // isVersionOf kegg.reaction:R00342
  // carried out by nucleoside diphosphate kinase to make GTP from ATP
  NDK_GTP: gdp -> gtp; v_NDK_GTP;  // isVersionOf kegg.reaction:R00330
  // carried out by nucleoside diphosphate kinase to make UTP from ATP.
  NDK_UTP: udp -> utp; v_NDK_UTP;  // isVersionOf kegg.reaction:R00156
  // carried out by nucleoside diphosphate kinase to make GTP from ATP in the mitochondria
  NDK_GTP_mito: gdp_mito -> gtp_mito; v_NDK_GTP_mito;  // isVersionOf kegg.reaction:R00330
  // carried out by pyruvate carboxylyase
  PC: pyr_mito -> oa_mito; v_PC;  // isVersionOf kegg.reaction:R00344
  // carried out by phosphoenolpyruvate carboxykinase
  PEPCK: oa + gtp -> pep + gdp; v_PEPCK;  // isVersionOf kegg.reaction:R00431
  // carried out by phosphoenolpyruvate carboxykinase in mitochondria
  PEPCK_mito: oa_mito + gtp_mito -> pep_mito + gdp_mito; v_PEPCK_mito;  // isVersionOf kegg.reaction:R00431
  // phosphoenolpyruvate transporter
  PEPT: 6 pep_mito -> pep; v_PEPT;  // GO:0089722
  // phosphofructokinase 1
  PFK1: fru6p -> fru16bp; v_PFK1;  // isVersionOf kegg.reaction:R00756
  // phosphofructokinase 2
  PFK2: fru6p -> fru26bp; v_PFK2;  // isVersionOf kegg.reaction:R02732
  // fructose -2-6-bisphosphatase
  FBP2: fru26bp -> fru6p; v_FBP2;  // kegg.reaction:R00763
  // phosphoglycerate kinase 13p2g to 3pg
  PGK: bpg13 -> pg3; v_PGK;  // kegg.reaction:R01512
  // phosphoglycerate mutase 2 pg to 3 pg
  PGM: pg3 -> pg2; v_PGM;  // kegg.reaction:R01518
  // carried out by pyruvate kinase
  PK: pep -> pyr; v_PK;  // kegg.reaction:R00200
  // mitochondrial pyruvate-malate transmembrane antiporter
  PyrMalT: 6 mal_mito + pyr -> 6 pyr_mito + mal; v_PyrMalT;  // hasPart GO:1902361 GO:0071423
  // carried out by pyruvate transmembrane transport
  PyrT: pyr -> 6 pyr_mito; v_PyrT;  // isVersionOf GO:1901475
  // carried out by triose phosphate isomerase
  TPI: dhap -> gap; v_TPI;  // kegg.reaction:R01015
  // carried out by uridine diphospho-glucuronosyltransferase
  UGT: utp + glc1p -> udpglc; v_UGT;  // isVersionOf kegg.reaction:R00289

  // Unit definitions:
  unit mM = mole / metre^3;
  unit V = volt;
  unit K = kelvin;
  unit J_per_V_per_mol = joule / (volt * mole);
  unit J_per_K_per_mol = joule / (kelvin * mole);
  unit per_h = 1 / (3600 second);
  unit mM_per_h = mole / (metre^3 * 3600 second);
  unit per_h_per_mMmM = metre^6 / (3600 second * mole^2);
  unit per_h_per_mM = metre^3 / (3600 second * mole);
  unit per_mM = metre^3 / mole;
  unit per_mMmM = metre^6 / mole^2;
end
