// SBML level 3 version 1

function max(x, y)
  piecewise(x, x > y, y);
end
max is "minimum";

function min(x, y)
  piecewise(x, x < y, y);
end
min is "maximum";

function heav(x)
  piecewise(0, x < 0, 0.5, x == 0, 1, x > 0, 0);
end
heav is "heavyside";

function mod(x, y)
  piecewise(x - y*ceil(x/y), xor(x < 0, y < 0), x - y*floor(x/y));
end
mod is "modulo";

function alp(Vm, abar, c, d1, k1)
  abar/(1 + k1*exp(-2*d1*96.485*Vm/8.313424/310)/c);
end

function beta(Vm, bbar, c, d2, k2)
  bbar/(1 + c/(k2*exp(-2*d2*96.485*Vm/8.313424/310)));
end

function tau(Vm, abar, bbar, c, d1, d2, k1, k2)
  1/(alp(Vm, abar, d1, k1, c) + beta(Vm, k2, bbar, c, d2));
end

function ooinf(Vm, abar, bbar, c, d1, d2, k1, k2)
  alp(Vm, abar, d1, k1, c)*tau(Vm, abar, bbar, c, d1, d2, k1, k2);
end

model main()
  // XPP model
  // This model was converted from XPP ode format to SBML using sbmlutils-0.4.10.
  // % SkM_AP_KCa.ode
  // % Simulations for skeletal muscle fiber
  // %
  // % ICa(S) and IK(Ca) were incorporated to simulate AP for human skeletal muscle cells.
  // %
  // % "Wang YJ, Lin MW, Lin AA, Wu SN. Riluzole-induced block of voltage-gated Na(+)
  // % current and activation of BK(Ca) channels in cultured differentiated human
  // % skeletal muscle cell. Life Sci 2007;82:11-20."
  // % UNITS: millivolts, milliseconds, nanosiemens, microfarads
  // % INITIAL VALUES
  // Initial Vm=-75, m=0.0, h=1.0, n=0.0, Vt=-70, c=0.15, o=0.15, cer=200
  // % VALUES OF THE MODEL PARAMETERS
  // Parm gNa_max=0.9, gcabar=0.05, gK_max=0.415, gL_max=0.0024, gkca=0.5
  // Parm ENa=50.0, EK=-70.0, EL=-75.0, ECa=50
  // Parm En=-40.0, Em=-42.0, Eh=-41.0
  // Parm Ct=0.04, Cm=0.0090, Rs=15.0, Am=200.0
  // Parm alpha_n_max=0.0229, beta_n_max=0.09616
  // Parm v_alpha_m=10.0, v_alpha_n=7.0, v_alpha_h=14.7
  // Parm alpha_m_max=0.208, beta_m_max=2.081
  // Parm v_beta_n=40.0, v_beta_m=18.0, v_beta_h=7.6
  // Parm alpha_h_max=0.0156, beta_h_max=3.382
  // Parm kd=0.18, alpha=4.5e-6, kpmca=0.2, pleak=0.0005, kserca=0.4
  // Parm d1=0.84, d2=1.0, k1=0.18, k2=0.011, bbar=0.28, abar=0.48
  // Parm fer=0.01, vcytver=5, fcyt=0.01
  // % STIMULUS
  // Parm period=50, iStim_mag=2, iStim_beg=5, iStim_dur=1
  // iStim= iStim_mag * heav(mod(t,period)-iStim_beg) * heav(iStim_beg+iStim_dur-mod(t,period))
  // beta_n= (beta_n_max * exp(((En - Vm) / v_beta_n)))
  // beta_m= (beta_m_max * exp(((Em - Vm) / v_beta_m)))
  // beta_h= (beta_h_max / (1.0 + exp(((Eh - Vm) / v_beta_h))))
  // alpha_n= (alpha_n_max * (Vm - En) / (1.0 - exp(((En - Vm) / v_alpha_n))))
  // alpha_m= (alpha_m_max * (Vm - Em) / (1.0 - exp(((Em - Vm) / v_alpha_m))))
  // alpha_h= (alpha_h_max * exp(((Eh - Vm) / v_alpha_h)))
  // % IK(Ca) PARAMETERS
  // alp(Vm) = abar/(1+k1*exp(-2*d1*96.485*Vm/8.313424/(310))/c)
  // beta(Vm) = bbar/(1+c/(k2*exp(-2*d2*96.485*Vm/8.313424/310)))
  // tau(Vm) = 1/(alp(Vm)+beta(Vm))
  // ooinf(Vm) = alp(Vm)*tau(Vm)
  // dinf = 1/(1 + exp((-24.6-Vm)/11.3))
  // taud = 80*(1/(cosh(-0.031*(Vm+37.1))))
  // alphad = dinf/taud
  // betad = (1-dinf)/taud
  // gca = -gcabar*Vm/(exp(0.117*Vm)-1)
  // % CA HANDLING MECHANISMS
  // w=c^5/(c^5+kd^5)
  // jmem=-(alpha*ICa+kpmca*c)
  // jleak=pleak*(cer-c)
  // jserca=kserca*c
  // jer=jleak-jserca
  // % IONIC CURRENTS
  // INa= (gNa_max * m**3 * h * (Vm - ENa))
  // IT= ((Vm - Vt) / Rs)
  // IKCa=gkca*o*w*(Vm-EK)
  // ICa= gca*d^2
  // IL= (gL_max * (Vm - EL))
  // IK= (gK_max * n * n * n * n * (Vm - EK))
  // % DIFFERENTIAL EQUATIONS
  // dVm/dt = ((iStim - (INa + ICa + IK + IL + IT + IKCa)) / Cm)
  // dm/dt = ((alpha_m * (1.0 - m)) - (beta_m * m))
  // dh/dt = ((alpha_h * (1.0 - h)) - (beta_h * h))
  // dn/dt = ((alpha_n * (1.0 - n)) - (beta_n * n))
  // dVt/dt = ((Vm - Vt) / (Rs * Ct))
  // dd/dt = (1-d)*alphad - d*betad
  // do/dt = (ooinf(Vm)-o)/tau(Vm)
  // dc/dt = fcyt*(jmem+jer)
  // dcer/dt =-fer*(vcytver)*jer
  // % AUXILLARY FUNCTIONS
  // aux i_na=INa
  // aux i_kca=IKCa
  // % NUMERICAL AND PLOTTING PARAMETERS FOR XPP
  // @ METH=Euler, DT=0.01, TOTAL=150, MAXSTOR=50000
  // @ YP=vm, YHI=50, YLO=-90, XLO=0, XHI=150, BOUND=5000
  // done
  // This file has been produced by sbmlutils.
  // Terms of use
  // Copyright © 2017 Matthias Koenig
  // Redistribution and use of any part of this model, with or without modification, are permitted provided that the following conditions are met:
  // Redistributions of this SBML file must retain the above copyright notice, this list of conditions and the following disclaimer.
  // Redistributions in a different form must reproduce the above copyright notice, this list of conditions and the following disclaimer in the documentation and/or other materials provided with the distribution.
  // This model is distributed in the hope that it will be useful, but WITHOUT ANY WARRANTY; without even the implied warranty of MERCHANTABILITY or FITNESS FOR A PARTICULAR PURPOSE.

  // Parameters:
  Vm = -75; Vm is "Vm = -75";
  m = 0; m is "m = 0.0";
  h = 1; h is "h = 1.0";
  n = 0; n is "n = 0.0";
  Vt = -70; Vt is "Vt = -70";
  c = 0.15; c is "c = 0.15";
  o = 0.15; o is "o = 0.15";
  cer = 200; cer is "cer = 200";
  gNa_max = 0.9; gNa_max is "gNa_max = 0.9";
  gcabar = 0.05; gcabar is "gcabar = 0.05";
  gK_max = 0.415; gK_max is "gK_max = 0.415";
  gL_max = 0.0024; gL_max is "gL_max = 0.0024";
  gkca = 0.5; gkca is "gkca = 0.5";
  ENa = 50; ENa is "ENa = 50.0";
  EK = -70; EK is "EK = -70.0";
  EL = -75; EL is "EL = -75.0";
  ECa = 50; ECa is "ECa = 50";
  En = -40; En is "En = -40.0";
  Em = -42; Em is "Em = -42.0";
  Eh = -41; Eh is "Eh = -41.0";
  Ct = 0.04; Ct is "Ct = 0.04";
  Cm = 0.009; Cm is "Cm = 0.0090";
  Rs = 15; Rs is "Rs = 15.0";
  Am = 200; Am is "Am = 200.0";
  alpha_n_max = 0.0229; alpha_n_max is "alpha_n_max = 0.0229";
  beta_n_max = 0.09616; beta_n_max is "beta_n_max = 0.09616";
  v_alpha_m = 10; v_alpha_m is "v_alpha_m = 10.0";
  v_alpha_n = 7; v_alpha_n is "v_alpha_n = 7.0";
  v_alpha_h = 14.7; v_alpha_h is "v_alpha_h = 14.7";
  alpha_m_max = 0.208; alpha_m_max is "alpha_m_max = 0.208";
  beta_m_max = 2.081; beta_m_max is "beta_m_max = 2.081";
  v_beta_n = 40; v_beta_n is "v_beta_n = 40.0";
  v_beta_m = 18; v_beta_m is "v_beta_m = 18.0";
  v_beta_h = 7.6; v_beta_h is "v_beta_h = 7.6";
  alpha_h_max = 0.0156; alpha_h_max is "alpha_h_max = 0.0156";
  beta_h_max = 3.382; beta_h_max is "beta_h_max = 3.382";
  kd = 0.18; kd is "kd = 0.18";
  alpha = 4.5e-6; alpha is "alpha = 4.5e-6";
  kpmca = 0.2; kpmca is "kpmca = 0.2";
  pleak = 0.0005; pleak is "pleak = 0.0005";
  kserca = 0.4; kserca is "kserca = 0.4";
  d1 = 0.84; d1 is "d1 = 0.84";
  d2 = 1; d2 is "d2 = 1.0";
  k1 = 0.18; k1 is "k1 = 0.18";
  k2 = 0.011; k2 is "k2 = 0.011";
  bbar = 0.28; bbar is "bbar = 0.28";
  abar = 0.48; abar is "abar = 0.48";
  fer = 0.01; fer is "fer = 0.01";
  vcytver = 5; vcytver is "vcytver = 5";
  fcyt = 0.01; fcyt is "fcyt = 0.01";
  period = 50; period is "period = 50";
  iStim_mag = 2; iStim_mag is "iStim_mag = 2";
  iStim_beg = 5; iStim_beg is "iStim_beg = 5";
  iStim_dur = 1; iStim_dur is "iStim_dur = 1";
  d = NaN; d has dimensionless;
  iStim has dimensionless;
  beta_n has dimensionless;
  beta_m has dimensionless;
  beta_h has dimensionless;
  alpha_n has dimensionless;
  alpha_m has dimensionless;
  alpha_h has dimensionless;
  dinf has dimensionless;
  taud has dimensionless;
  alphad has dimensionless;
  betad has dimensionless;
  gca has dimensionless;
  w has dimensionless;
  jmem has dimensionless;
  jleak has dimensionless;
  jserca has dimensionless;
  jer has dimensionless;
  INa has dimensionless;
  IT has dimensionless;
  IKCa has dimensionless;
  ICa has dimensionless;
  IL has dimensionless;
  IK has dimensionless;
  i_na has dimensionless;
  i_kca has dimensionless;
  t has dimensionless; t is "model time";

  // Assignment rules:
  iStim := iStim_mag*heav(mod(t, period) - iStim_beg)*heav(iStim_beg + iStim_dur - mod(t, period));
  beta_n := beta_n_max*exp((En - Vm)/v_beta_n);
  beta_m := beta_m_max*exp((Em - Vm)/v_beta_m);
  beta_h := beta_h_max/(1 + exp((Eh - Vm)/v_beta_h));
  alpha_n := alpha_n_max*(Vm - En)/(1 - exp((En - Vm)/v_alpha_n));
  alpha_m := alpha_m_max*(Vm - Em)/(1 - exp((Em - Vm)/v_alpha_m));
  alpha_h := alpha_h_max*exp((Eh - Vm)/v_alpha_h);
  dinf := 1/(1 + exp((-24.6 - Vm)/11.3));
  taud := 80*(1/cosh(-0.031*(Vm + 37.1)));
  alphad := dinf/taud;
  betad := (1 - dinf)/taud;
  gca := -gcabar*Vm/(exp(0.117*Vm) - 1);
  w := c^5/(c^5 + kd^5);
  jmem := -(alpha*ICa + kpmca*c);
  jleak := pleak*(cer - c);
  jserca := kserca*c;
  jer := jleak - jserca;
  INa := gNa_max*m^3*h*(Vm - ENa);
  IT := (Vm - Vt)/Rs;
  IKCa := gkca*o*w*(Vm - EK);
  ICa := gca*d^2;
  IL := gL_max*(Vm - EL);
  IK := gK_max*n*n*n*n*(Vm - EK);
  i_na := INa;
  i_kca := IKCa;
  t := time;

  // Rate rules:
  Vm' = (iStim - (INa + ICa + IK + IL + IT + IKCa))/Cm;
  m' = alpha_m*(1 - m) - beta_m*m;
  h' = alpha_h*(1 - h) - beta_h*h;
  n' = alpha_n*(1 - n) - beta_n*n;
  Vt' = (Vm - Vt)/(Rs*Ct);
  d' = (1 - d)*alphad - d*betad;
  o' = (ooinf(Vm, abar, bbar, c, d1, d2, k1, k2) - o)/tau(Vm, abar, bbar, c, d1, d2, k1, k2);
  c' = fcyt*(jmem + jer);
  cer' = -fer*vcytver*jer;
end
