// SBML level 3 version 1

function max(x, y)
  piecewise(x, x > y, y);
end
max is "minimum";

function min(x, y)
  piecewise(x, x < y, y);
end
min is "maximum";

function heav(x)
  piecewise(0, x < 0, 0.5, x == 0, 1, x > 0, 0);
end
heav is "heavyside";

function mod(x, y)
  piecewise(x - y*ceil(x/y), xor(x < 0, y < 0), x - y*floor(x/y));
end
mod is "modulo";

model main()
  // XPP model
  // This model was converted from XPP ode format to SBML using sbmlutils-0.1.5a6.
  // # AP-sim-Ca.ode
  // " Ref: Brown AM (2003) Computer Methods and Programs in Biomedicine 71:25-31.
  // init v=-71, m=0.000734, h=0.726655, n=0.001932, mca=0.003016
  // param gnabar=20, gkbar=2.0, gkleak=0.007, gnaleak=0.00265, Cao=1, Cai=50e-6, Pca=0.08
  // param ena=45, ek=-105, Cm=1, z=2
  // number rgas=8.315, temp=298, faraday=96480
  // param ton=3, toff=4, ipulse=40
  // Io=ipulse*heav(t-ton)*heav(toff-t)
  // am = 0.091*(v+38)/(1-exp(-(v+38)/5))
  // bm = -0.062*(v+38)/(1-EXP((v+38)/5))
  // ah = 0.016*EXP((-55-v)/15)
  // bh = 2.07/(EXP((17-v)/21)+1)
  // an = 0.01*(-45-v)/(EXP((-45-v)/5)-1)
  // bn = 0.17*EXP((-50-v)/40)
  // amca = 1.6/(1+EXP(-0.072*(v-5)))
  // bmca = 0.02*(v-1.31)/(EXP((v-1.31)/5.36)-1)
  // ina = gnabar*(m*m*m)*h*(v-ena)
  // ik = gkbar*(n^4)*(v-ek)
  // ica = ((mca^2)*Pca*2e-3*2*v*(faraday^2)/(rgas*temp*1000))* \
  // (Cai-Cao*exp(-z*faraday*v/(rgas*temp*1000)))/(1-exp(-z*faraday*v/(rgas*temp*1000)))
  // ikleak = gkleak*(v-ek)
  // inaleak = gnaleak*(v-ena)
  // dm/dt = am*(1-m) - bm*m
  // dh/dt = ah*(1-h) - bh*h
  // dn/dt = an*(1-n) - bn*n
  // dmca/dt = amca*(1-mca) - bmca*mca
  // dv/dt = (-ina-ik-ica-ikleak-inaleak+Io)/Cm
  // aux ina=ina
  // aux ik=ik
  // aux ica=ica
  // # Numerical and plotting parameters for xpp
  // @ meth=Euler, dt=0.01, total=20, xlo=0, xhi=20, ylo=-80, yhi=60
  // @ bounds=100000
  // @ xp=t, yp=v
  // done
  // This file has been produced by sbmlutils.
  // Terms of use
  // Copyright © 2017 Matthias Koenig
  // Redistribution and use of any part of this model, with or without modification, are permitted provided that the following conditions are met:
  // Redistributions of this SBML file must retain the above copyright notice, this list of conditions and the following disclaimer.
  // Redistributions in a different form must reproduce the above copyright notice, this list of conditions and the following disclaimer in the documentation and/or other materials provided with the distribution.
  // This model is distributed in the hope that it will be useful, but WITHOUT ANY WARRANTY; without even the implied warranty of MERCHANTABILITY or FITNESS FOR A PARTICULAR PURPOSE.

  // Parameters:
  v = -71; v is "v = -71";
  m = 0.000734; m is "m = 0.000734";
  h = 0.726655; h is "h = 0.726655";
  n = 0.001932; n is "n = 0.001932";
  mca = 0.003016; mca is "mca = 0.003016";
  gnabar = 20; gnabar is "gnabar = 20";
  gkbar = 2; gkbar is "gkbar = 2.0";
  gkleak = 0.007; gkleak is "gkleak = 0.007";
  gnaleak = 0.00265; gnaleak is "gnaleak = 0.00265";
  cao = 1; cao is "cao = 1";
  cai = 5e-5; cai is "cai = 50e-6";
  pca = 0.08; pca is "pca = 0.08";
  ena = 45; ena is "ena = 45";
  ek = -105; ek is "ek = -105";
  cm = 1; cm is "cm = 1";
  z = 2; z is "z = 2";
  rgas = 8.315; rgas is "rgas = 8.315";
  temp = 298; temp is "temp = 298";
  faraday = 96480; faraday is "faraday = 96480";
  ton = 3; ton is "ton = 3";
  toff = 4; toff is "toff = 4";
  ipulse = 40; ipulse is "ipulse = 40";
  io has dimensionless;
  am has dimensionless;
  bm has dimensionless;
  ah has dimensionless;
  bh has dimensionless;
  an has dimensionless;
  bn has dimensionless;
  amca has dimensionless;
  bmca has dimensionless;
  ina has dimensionless;
  ik has dimensionless;
  ica has dimensionless;
  ikleak has dimensionless;
  inaleak has dimensionless;
  t has dimensionless; t is "model time";

  // Assignment rules:
  io := ipulse*heav(t - ton)*heav(toff - t);
  am := 0.091*(v + 38)/(1 - exp(-(v + 38)/5));
  bm := -0.062*(v + 38)/(1 - exp((v + 38)/5));
  ah := 0.016*exp((-55 - v)/15);
  bh := 2.07/(exp((17 - v)/21) + 1);
  an := 0.01*(-45 - v)/(exp((-45 - v)/5) - 1);
  bn := 0.17*exp((-50 - v)/40);
  amca := 1.6/(1 + exp(-0.072*(v - 5)));
  bmca := 0.02*(v - 1.31)/(exp((v - 1.31)/5.36) - 1);
  ina := gnabar*m*m*m*h*(v - ena);
  ik := gkbar*n^4*(v - ek);
  ica := mca^2*pca*2e-3*2*v*faraday^2/(rgas*temp*1000)*(cai - cao*exp(-z*faraday*v/(rgas*temp*1000)))/(1 - exp(-z*faraday*v/(rgas*temp*1000)));
  ikleak := gkleak*(v - ek);
  inaleak := gnaleak*(v - ena);
  t := time;

  // Rate rules:
  m' = am*(1 - m) - bm*m;
  h' = ah*(1 - h) - bh*h;
  n' = an*(1 - n) - bn*n;
  mca' = amca*(1 - mca) - bmca*mca;
  v' = (-ina - ik - ica - ikleak - inaleak + io)/cm;
end
