// SBML level 3 version 1

function max(x, y)
  piecewise(x, x > y, y);
end
max is "minimum";

function min(x, y)
  piecewise(x, x < y, y);
end
min is "maximum";

function heav(x)
  piecewise(0, x < 0, 0.5, x == 0, 1, x > 0, 0);
end
heav is "heavyside";

function mod(x, y)
  piecewise(x - y*ceil(x/y), xor(x < 0, y < 0), x - y*floor(x/y));
end
mod is "modulo";

model main()
  // XPP model
  // This model was converted from XPP ode format to SBML using sbmlutils-0.1.5a6.
  // % Signal-induced Ca(2+) oscillations
  // % Dupont G, Berridge MJ, Goldbeter A. Signal-induced Ca(2+) oscillations: properties of a model based
  // % on Ca(2+)-induced Ca(2+) release. Cell calcium 1991;12:73-85
  // % The result was shown on Figure 4A in the paper.
  // init z=0.1, y=1.4
  // par v0=1.0, v1=7.3, VM2=65, VM3=500, KR=2, KA=0.9, K2=1, kf=1, k=10, n=2, m=2, p=4
  // par tstim=4.0
  // beta=if(t<tstim)then(0)else(0.7671*exp(-0.2*(t-tstim)))
  // v2 = VM2 * z^n / (K2^n + z^n)
  // v3 = VM3 * (y^m/(KR^m + y^m)) *(z^p/(KA^p + z^p))
  // z' = v0 + v1*beta -v2 + v3 + kf*y - k*z
  // y' = v2 -v3 - kf*y
  // aux b=beta
  // % Numerical and plotting parameters for xpp
  // @ meth=Euler, dt=.005, total=20
  // @ yp=z, yhi=1.6, ylo=-0.0, xlo=0, xhi=20, bound=100
  // done
  // This file has been produced by sbmlutils.
  // Terms of use
  // Copyright © 2017 Matthias Koenig
  // Redistribution and use of any part of this model, with or without modification, are permitted provided that the following conditions are met:
  // Redistributions of this SBML file must retain the above copyright notice, this list of conditions and the following disclaimer.
  // Redistributions in a different form must reproduce the above copyright notice, this list of conditions and the following disclaimer in the documentation and/or other materials provided with the distribution.
  // This model is distributed in the hope that it will be useful, but WITHOUT ANY WARRANTY; without even the implied warranty of MERCHANTABILITY or FITNESS FOR A PARTICULAR PURPOSE.

  // Parameters:
  z = 0.1; z is "z = 0.1";
  y = 1.4; y is "y = 1.4";
  v0_1_0 = 1; v0_1_0 is "v0 = 1.0";
  v1_7_3 = 7.3; v1_7_3 is "v1 = 7.3";
  vm2 = 65; vm2 is "vm2 = 65";
  vm3 = 500; vm3 is "vm3 = 500";
  kr = 2; kr is "kr = 2";
  ka = 0.9; ka is "ka = 0.9";
  k2 = 1; k2 is "k2 = 1";
  kf = 1; kf is "kf = 1";
  k = 10; k is "k = 10";
  n = 2; n is "n = 2";
  m = 2; m is "m = 2";
  p = 4; p is "p = 4";
  tstim = 4; tstim is "tstim = 4.0";
  beta has dimensionless;
  v2 has dimensionless;
  v3 has dimensionless;
  b has dimensionless;
  t has dimensionless; t is "model time";

  // Assignment rules:
  beta := piecewise(0, t < tstim, 0.7671*exp(-0.2*(t - tstim)));
  v2 := vm2*z^n/(k2^n + z^n);
  v3 := vm3*(y^m/(kr^m + y^m))*(z^p/(ka^p + z^p));
  b := beta;
  t := time;

  // Rate rules:
  z' = v0_1_0 + v1_7_3*beta - v2 + v3 + kf*y - k*z;
  y' = v2 - v3 - kf*y;
end
