// SBML level 3 version 1

function max(x, y)
  piecewise(x, x > y, y);
end
max is "minimum";

function min(x, y)
  piecewise(x, x < y, y);
end
min is "maximum";

function heav(x)
  piecewise(0, x < 0, 0.5, x == 0, 1, x > 0, 0);
end
heav is "heavyside";

function mod(x, y)
  piecewise(x - y*ceil(x/y), xor(x < 0, y < 0), x - y*floor(x/y));
end
mod is "modulo";

function minf(v, v1_1_2, v2_18)
  0.5*(1 + tanh((v - v1_1_2)/v2_18));
end

function winf(v, v3_9, v4_10)
  0.5*(1 + tanh((v - v3_9)/v4_10));
end

function tauw(v, v3_9, v4_10)
  1/cosh((v - v3_9)/(2*v4_10));
end

function pinf(v, betap, gammap, vcl)
  1/(1 + exp((vcl - betap - v)/gammap));
end

function onexc(t, tstart_exc)
  heav(t >= tstart_exc)*1;
end

function offexc(t, t_run_exc, tstart_exc)
  heav(t > tstart_exc + t_run_exc)*(-1);
end

function oninh(t, tst_oninh)
  heav(t >= tst_oninh)*1;
end

function offinh(t, t_r_offinh, tst_oninh)
  heav(t > tst_oninh + t_r_offinh)*(-1);
end

function i1(t, i_stim1, t_start)
  heav(t >= t_start)*i_stim1;
end

function i2(t, i_stim1, t_run, t_start)
  heav(t > t_start + t_run)*(-i_stim1);
end

model main()
  // XPP model
  // This model was converted from XPP ode format to SBML using sbmlutils-0.1.5a6.
  // # ClC2-IClamp-Prescott
  // # Written by Steve Prescott, 2012
  // # from Ratte and Prescott (ClC-2 channels regulate neuronal excitability, not intracellular chloride levels. J Neurosci 2011; 31: 15838-15843)
  // # This is the code for Current clamp simulations
  // # Designed for XPPAUT
  // dv/dt = (Idc+I1(t)+I2(t)-gna*minf(V)*(V-Vna)-gk*w*(V-VK)-gl*(V-Vl)-(gexc*enorm+gexc_avg)*erect*(0+onexc(t)+offexc(t))*(V-Vexc)-(ginh_avg+ginh*inorm)*irect*(0+oninh(t)+offinh(t))*(V-Vgaba)-gclc*p*(V-Vcl)-gadapt*y*(V-Vk))/cap
  // dw/dt = phi*(winf(V)-w)/tauw(V)
  // V(0)=-70
  // w(0)=0.000025
  // minf(v)=.5*(1+tanh((v-v1)/v2))
  // winf(v)=.5*(1+tanh((v-v3)/v4))
  // tauw(v)=1/cosh((v-v3)/(2*v4))
  // param vk=-90,vl=-70,vna=45
  // param gk=20,gl=1,gna=20
  // param v1=-1.2,v2=18
  // # v1 and v2 correspond to beta_m and gamma_m in paper
  // param v3=-9,v4=10
  // # v3 and v4 correspond to beta_w and gamma_w in paper
  // param phi=.25,cap=2
  // # ClC-2
  // # parameters based on Staley 94 J Neurophysiol paper
  // # voltage-dependence is relative to Ecl, which is how you get rectification
  // dp/dt = (pinf(V)-p)/taup
  // pinf(V)=1/(1+exp((vcl-betap-v)/gammap))
  // param betap=15, gammap=-14
  // # v1/2 (i.e. betap) and vslope (gammaP) taken from Staley 94, tau is an estimate from that same paper.
  // param taup=300
  // # estimate (slow) tau from Zuniga et al. 2004 J Physiol, at body temp (which is what Staley used in 94)
  // p(0)=0
  // # instead of using original rectification strategy, you can get simple rectification with the following param
  // # betap=0 (centers curve on vcl), gammap=-0.0001 (makes the curve very steep), taup=0.1 (makes activation instantaneous)
  // aux Iclc2 = gclc*p*(V-Vcl)
  // param gclc=0
  // # SYNAPTIC EXCITATION
  // # Here is the first WIENER VARIABLE... gives Ornstein-Uhlenbeck process for synaptic excitation
  // wiener nz1
  // aux gexc_=(gexc*enorm+gexc_avg)*erect*(0+onexc(t)+offexc(t))
  // dgexc/dt=-gexc/tau_exc+scale_exc*nz1
  // # enorm makes noise amplitude independent of autocorrelatio time tau_exc
  // enorm=sqrt(2/tau_exc)
  // # erect prevents negative conductance
  // erect=heav((gexc*enorm+gexc_avg)>0)
  // par scale_exc=0.1
  // par tau_exc=2
  // par gexc_avg=0.4
  // param vexc=0
  // # Next three lines let you turn synaptic excitaion on and off
  // onexc(t)=heav(t>=tstart_exc)*1
  // offexc(t)=heav(t>(tstart_exc+t_run_exc))*(-1)
  // param tstart_exc=0,t_run_exc=100000
  // # currently set to be on throughout simulation
  // # SYNAPTIC INHIBITION
  // # Here is the second WIENER VARIABLE... gives Ornstein-Uhlenbeck process for synaptic inhibition
  // wiener nz2
  // aux ginh_=(ginh*inorm+ginh_avg)*irect*(0+oninh(t)+offinh(t))
  // dginh/dt=-ginh/tau_inh+scale_inh*nz2
  // inorm=sqrt(2/tau_inh)
  // irect=heav((ginh*inorm+ginh_avg)>0)
  // par scale_inh=0.1
  // par tau_inh=10
  // par ginh_avg=1
  // # See below for reversal potentials associated with chloride
  // oninh(t)=heav(t>=tst_oninh)*1
  // offinh(t)=heav(t>(tst_oninh+t_r_offinh))*(-1)
  // param tst_oninh=0,t_r_offinh=100000
  // # currently set to be on throughout simulation
  // # CURRENT INJECTION
  // param idc=0
  // # if you want time-dependent stim, turn on with I1 and off with I2
  // I1(t)=heav(t>=t_start)*I_stim1
  // I2(t)=heav(t>(t_start+t_run))*(-I_stim1)
  // param I_stim1=0,t_start=0,t_run=100000
  // # CHLORIDE HANDLING
  // # GHK equation, where 4 is for ratio of Cl to bicarb flux
  // Vgaba = 1000*R*Tem/F*ln((4*cli+bicarb*11.8)/(4*clo+bicarb*25))
  // # bicarb can be set to 1 or 0 to include or exclude bicarbonate component
  // param bicarb=1
  // # Nernst equations
  // vbicarb = 1000*R*Tem/F*ln((bicarb*11.8)/(bicarb*25))
  // Vcl = 1000*R*Tem/F*ln(cli/clo)
  // aux vcl_=vcl
  // aux vgaba_=vgaba
  // param F=96485, R=8.3, Tem=310
  // param clo=120
  // cli(0)=6
  // x = (Vbicarb-Vgaba)/(Vbicarb-Vcl)
  // # based on ginh(v-vgaba) = x*ginh(v-vcl) + (1-x)ginh(v-vbicarb), re-arrange to find x, which apportions to current (ion flux) attributable to each ion species
  // aux x_ = x
  // # Next line updates intracellular chloride concentration, but does not include intracellular dialysis from recording pipette (see voltage clamp code for that mechanism)
  // dcli/dt = SAvol*((ginh*inorm+ginh_avg)*irect*x*(0+oninh(t)+offinh(t))*(v-Vcl)+gkcc2*(Vk-Vcl)+gclc*p*(V-Vcl))/F
  // # note for gaba current that driving force is calculated as v-Vcl and is multiplied by x in order to isolate chloride component of the total current.
  // param gkcc2=.7
  // aux Ikcc2 = gkcc2*(Vk-Vcl)
  // # Note that kcc2 does not appear in current balance equation because it is electroneutral (i.e. Cl and K flux cancel each other out)
  // # if I wanted to simulate Cl loading, put gkcc2, gna, gk to 0 (blocked) and give strong gexc, could set r and shape to test in "dendrite" - akin to Brumback and Staley 2008 expt method
  // # SHAPE
  // # for sphere: vol=(4/3)*pi*(ra^3), SA=4*pi*(ra^2), SA/vol=3/ra
  // # for a cylinder: vol=pi*h*(ra^2), SA=2*pi*ra*(ra+h), SA/vol=(2/ra)+(2/h) -> Sa/vol=2/ra if you exlclude ends...assume it is connected to adjoining cylinders
  // # Therefore, shape = 3 for sphere; =2 for cylinder without ends
  // param shape=3
  // !SAvol=shape/(10*ra)
  // # note because of units, factor of 10 is applied to denominator (convert mm to cm to get cm^3 for dealing with volumes)
  // # Radius now specified in mm, 6.3 microns ->0.0063 mm,
  // param ra=.0063
  // # this radius gives surface area (of sphere) of 5x10^-6 cm^2
  // # Adjust to simulate cylindrical dendrite
  // # AHP current
  // # from Prescott and Sejnowski (J Neurosci 2008)
  // # note that adaptation was not included in most simulations
  // dy/dt = (1/(1+exp(-(V+betay)/gammay))-y)/tauy
  // param betay=0,gammay=5
  // param tauy=100
  // param gadapt=3
  // y(0)=0
  // # PRACTICAL DETAILS FOR XPP
  // @ total=20000,dt=.1,xlo=-100,xhi=60,ylo=-.125,yhi=.6,xp=v,yp=w
  // @ meth=Euler
  // # ALWAYS USE EULER METHOD WITH NOISE PROCESSES
  // @ dsmin=1e-5,dsmax=.1,parmin=0,parmax=80, autoxmin=0,autoxmax=80,autoymin=-80,autoymax=40
  // @ MAXSTOR=1000000
  // done
  // This file has been produced by sbmlutils.
  // Terms of use
  // Copyright © 2017 Matthias Koenig
  // Redistribution and use of any part of this model, with or without modification, are permitted provided that the following conditions are met:
  // Redistributions of this SBML file must retain the above copyright notice, this list of conditions and the following disclaimer.
  // Redistributions in a different form must reproduce the above copyright notice, this list of conditions and the following disclaimer in the documentation and/or other materials provided with the distribution.
  // This model is distributed in the hope that it will be useful, but WITHOUT ANY WARRANTY; without even the implied warranty of MERCHANTABILITY or FITNESS FOR A PARTICULAR PURPOSE.

  // Parameters:
  v = -70; v is "v = -70";
  w = 2.5e-5; w is "w = 0.000025";
  vk = -90; vk is "vk = -90";
  vl = -70; vl is "vl = -70";
  vna = 45; vna is "vna = 45";
  gk = 20; gk is "gk = 20";
  gl = 1; gl is "gl = 1";
  gna = 20; gna is "gna = 20";
  v1_1_2 = -1.2; v1_1_2 is "v1 = -1.2";
  v2_18 = 18; v2_18 is "v2 = 18";
  v3_9 = -9; v3_9 is "v3 = -9";
  v4_10 = 10; v4_10 is "v4 = 10";
  phi = 0.25; phi is "phi = .25";
  cap = 2; cap is "cap = 2";
  betap = 15; betap is "betap = 15";
  gammap = -14; gammap is "gammap = -14";
  taup = 300; taup is "taup = 300";
  p = 0; p is "p = 0";
  gclc = 0; gclc is "gclc = 0";
  nz1 = 0;
  scale_exc = 0.1; scale_exc is "scale_exc = 0.1";
  tau_exc = 2; tau_exc is "tau_exc = 2";
  gexc_avg = 0.4; gexc_avg is "gexc_avg = 0.4";
  vexc = 0; vexc is "vexc = 0";
  tstart_exc = 0; tstart_exc is "tstart_exc = 0";
  t_run_exc = 100000; t_run_exc is "t_run_exc = 100000";
  nz2 = 0;
  scale_inh = 0.1; scale_inh is "scale_inh = 0.1";
  tau_inh = 10; tau_inh is "tau_inh = 10";
  ginh_avg = 1; ginh_avg is "ginh_avg = 1";
  tst_oninh = 0; tst_oninh is "tst_oninh = 0";
  t_r_offinh = 100000; t_r_offinh is "t_r_offinh = 100000";
  idc = 0; idc is "idc = 0";
  i_stim1 = 0; i_stim1 is "i_stim1 = 0";
  t_start = 0; t_start is "t_start = 0";
  t_run = 100000; t_run is "t_run = 100000";
  bicarb = 1; bicarb is "bicarb = 1";
  f = 96485; f is "f = 96485";
  r = 8.3; r is "r = 8.3";
  tem = 310; tem is "tem = 310";
  clo = 120; clo is "clo = 120";
  cli = 6; cli is "cli = 6";
  gkcc2 = 0.7; gkcc2 is "gkcc2 = .7";
  shape = 3; shape is "shape = 3";
  ra = 0.0063; ra is "ra = .0063";
  betay = 0; betay is "betay = 0";
  gammay = 5; gammay is "gammay = 5";
  tauy = 100; tauy is "tauy = 100";
  gadapt = 3; gadapt is "gadapt = 3";
  y = 0; y is "y = 0";
  gexc = 0 dimensionless;
  ginh = 0 dimensionless;
  iclc2 has dimensionless;
  gexc_ has dimensionless;
  enorm has dimensionless;
  erect has dimensionless;
  ginh_ has dimensionless;
  inorm has dimensionless;
  irect has dimensionless;
  vgaba has dimensionless;
  vbicarb has dimensionless;
  vcl has dimensionless;
  vcl_ has dimensionless;
  vgaba_ has dimensionless;
  x has dimensionless;
  x_ has dimensionless;
  ikcc2 has dimensionless;
  t has dimensionless; t is "model time";

  // Assignment rules:
  iclc2 := gclc*p*(v - vcl);
  gexc_ := (gexc*enorm + gexc_avg)*erect*(0 + onexc(t, tstart_exc) + offexc(t, t_run_exc, tstart_exc));
  enorm := sqrt(2/tau_exc);
  erect := heav(gexc*enorm + gexc_avg > 0);
  ginh_ := (ginh*inorm + ginh_avg)*irect*(0 + oninh(t, tst_oninh) + offinh(t, t_r_offinh, tst_oninh));
  inorm := sqrt(2/tau_inh);
  irect := heav(ginh*inorm + ginh_avg > 0);
  vgaba := 1000*r*tem/f*ln((4*cli + bicarb*11.8)/(4*clo + bicarb*25));
  vbicarb := 1000*r*tem/f*ln(bicarb*11.8/(bicarb*25));
  vcl := 1000*r*tem/f*ln(cli/clo);
  vcl_ := vcl;
  vgaba_ := vgaba;
  x := (vbicarb - vgaba)/(vbicarb - vcl);
  x_ := x;
  ikcc2 := gkcc2*(vk - vcl);
  // (no variable named) := shape/(10*ra);
  t := time;

  // Rate rules:
  v' = (idc + i1(t, i_stim1, t_start) + i2(t, i_stim1, t_run, t_start) - gna*minf(v, v1_1_2, v2_18)*(v - vna) - gk*w*(v - vk) - gl*(v - vl) - (gexc*enorm + gexc_avg)*erect*(0 + onexc(t, tstart_exc) + offexc(t, t_run_exc, tstart_exc))*(v - vexc) - (ginh_avg + ginh*inorm)*irect*(0 + oninh(t, tst_oninh) + offinh(t, t_r_offinh, tst_oninh))*(v - vgaba) - gclc*p*(v - vcl) - gadapt*y*(v - vk))/cap;
  w' = phi*(winf(v, v3_9, v4_10) - w)/tauw(v, v3_9, v4_10);
  p' = (pinf(v, betap, gammap, vcl) - p)/taup;
  gexc' = -gexc/tau_exc + scale_exc*nz1;
  ginh' = -ginh/tau_inh + scale_inh*nz2;
  cli' = savol*((ginh*inorm + ginh_avg)*irect*x*(0 + oninh(t, tst_oninh) + offinh(t, t_r_offinh, tst_oninh))*(v - vcl) + gkcc2*(vk - vcl) + gclc*p*(v - vcl))/f;
  y' = (1/(1 + exp(-(v + betay)/gammay)) - y)/tauy;
end
