// SBML level 3 version 1

function max(x, y)
  piecewise(x, x > y, y);
end
max is "minimum";

function min(x, y)
  piecewise(x, x < y, y);
end
min is "maximum";

function heav(x)
  piecewise(0, x < 0, 0.5, x == 0, 1, x > 0, 0);
end
heav is "heavyside";

function mod(x, y)
  piecewise(x - y*ceil(x/y), xor(x < 0, y < 0), x - y*floor(x/y));
end
mod is "modulo";

function minf(v, v1, v2)
  0.5*(1 + tanh((v - v1)/v2));
end

function winf(v, v3, v4)
  0.5*(1 + tanh((v - v3)/v4));
end

function wfinf(v, v4, v5_20)
  0.5*(1 + tanh((v - v5_20)/v4));
end

function tauw(v, tauwfhi, tauwflo, v3, v4)
  tauwflo + (tauwfhi - tauwflo)*winf(v, v4, v3);
end

function hainf(v, kha, vha)
  1/(1 + exp((v - vha)/kha));
end

function mainf(v, kma, vma)
  1/(1 + exp(-(v - vma)/kma));
end

function tauha(v, k, kha, tauhhi, tauhlo, tauhmed, vha, vma)
  tauhhi + (tauhlo - tauhhi)*hainf(v, vha, kha) + (tauhmed - tauhhi)*(heav(v - vha) - heav(v - vma - k));
end

model main()
  // XPP model
  // This model was converted from XPP ode format to SBML using sbmlutils-0.1.5a6.
  // # This is a a morris-lecar system with IA and depression.
  // # The interesting phase plane for
  // # the "middle" branch is the v vs. ha. Note also that the v vs w phase plane
  // # can have a quintic v nullcline.
  // #dv/dt = ( I - gca*minf(V)*(V-Vca)-gk*w*(V-VK)-GL*(v-vL))/c
  // #dw/dt = (winf(V)-w)/(tauwleft +(tauwright - tauwleft)*Heav(v-0))
  // v=-50+50*heav(TA-mod(t,per))
  // dvf/dt = ( Ipost - gca*minf(Vf)*(Vf-Vca)-gk*wf*(Vf-VK)-ga*mainf(vf)*ha*(Vf-VK)-gl*(Vf-Vl)-ginh* s*(vf-Vsyn))/c1
  // dwf/dt = (wfinf(Vf)-wf)/tauw(Vf)
  // dha/dt = (hainf(vf) - ha)/tauha(vf)
  // d'=(1-d)*Heav(vtheta-v)/taua -d*Heav(v-vtheta)/taub
  // s'=-s*(Heav(vtheta-v)/tauk + Heav(v-vtheta)*sdecayup)
  // y'=1
  // tf'=0
  // period'=0
  // minf(v)=.5*(1+tanh((v-v1)/v2))
  // winf(v)=.5*(1+tanh((v-v3)/v4))
  // wfinf(v)=.5*(1+tanh((v-v5)/v4))
  // tauw(v)=tauwflo+(tauwfhi-tauwflo)*winf(v)
  // hainf(v)=1/(1+exp((v-vha)/kha))
  // mainf(v)=1/(1+exp(-(v-vma)/kma))
  // #tauha(v)=tauhhi+(tauhlo-tauhhi)*hainf(v)
  // tauha(v)=tauhhi+(tauhlo-tauhhi)*hainf(v) + (tauhmed-tauhhi)*(Heav(v-vha) - Heav(v-vma-k))
  // p ipost=45 v5=20 k=2
  // p ga=2 vma=-10 kma=0.5
  // p ginh=1.85
  // p vha=-15 kha=0.5
  // p tauhlo=465 tauhhi=10 tauhmed=1200
  // p tauwflo=15 tauwfhi=2
  // # p tauwleft=200 tauwright=100
  // p taua=400 taub=5 tauk=125 c1=2
  // p TA=5
  // p per=500
  // # flags
  // global 1 v-vtheta {s=d}
  // global 1 v-vtheta {y=0}
  // global 1 vf-0 {tf=y}
  // global 1 v+24.99 {period=y}
  // # auxilary functions
  // aux phase=tf/per
  // aux v=v
  // aux window=Heav(vf-vha) - Heav(vf-vma-k)
  // #ma=mainf(V)
  // v1=-1.2
  // v2=18
  // v3=0
  // v4=5
  // gk=8
  // gl=2
  // gca=4
  // vk=-84
  // vl=-60
  // vca=120
  // c=40
  // vsyn=-80
  // vtheta=-25
  // sdecayup=0
  // ha(0)=1
  // @ total=5000,dt=1,xlo=-60,xhi=60,ylo=-.125,yhi=.6,
  // # xp=vf,yp=wf
  // @ nmesh=200,maxstor=100000,bounds=10000
  // done
  // This file has been produced by sbmlutils.
  // Terms of use
  // Copyright © 2017 Matthias Koenig
  // Redistribution and use of any part of this model, with or without modification, are permitted provided that the following conditions are met:
  // Redistributions of this SBML file must retain the above copyright notice, this list of conditions and the following disclaimer.
  // Redistributions in a different form must reproduce the above copyright notice, this list of conditions and the following disclaimer in the documentation and/or other materials provided with the distribution.
  // This model is distributed in the hope that it will be useful, but WITHOUT ANY WARRANTY; without even the implied warranty of MERCHANTABILITY or FITNESS FOR A PARTICULAR PURPOSE.

  // Parameters:
  ipost = 45; ipost is "ipost = 45";
  v5_20 = 20; v5_20 is "v5 = 20";
  k = 2; k is "k = 2";
  ga = 2; ga is "ga = 2";
  vma = -10; vma is "vma = -10";
  kma = 0.5; kma is "kma = 0.5";
  ginh = 1.85; ginh is "ginh = 1.85";
  vha = -15; vha is "vha = -15";
  kha = 0.5; kha is "kha = 0.5";
  tauhlo = 465; tauhlo is "tauhlo = 465";
  tauhhi = 10; tauhhi is "tauhhi = 10";
  tauhmed = 1200; tauhmed is "tauhmed = 1200";
  tauwflo = 15; tauwflo is "tauwflo = 15";
  tauwfhi = 2; tauwfhi is "tauwfhi = 2";
  taua = 400; taua is "taua = 400";
  taub = 5; taub is "taub = 5";
  tauk = 125; tauk is "tauk = 125";
  c1_2 = 2; c1_2 is "c1 = 2";
  ta = 5; ta is "ta = 5";
  per = 500; per is "per = 500";
  ha = 1; ha is "ha = 1";
  vf = 0 dimensionless;
  wf = 0 dimensionless;
  d = 0 dimensionless;
  s = 0 dimensionless;
  y = 0 dimensionless;
  tf = 0 dimensionless;
  period = 0 dimensionless;
  v has dimensionless;
  phase has dimensionless;
  window has dimensionless;
  v1 has dimensionless;
  v2 has dimensionless;
  v3 has dimensionless;
  v4 has dimensionless;
  gk has dimensionless;
  gl has dimensionless;
  gca has dimensionless;
  vk has dimensionless;
  vl has dimensionless;
  vca has dimensionless;
  c has dimensionless;
  vsyn has dimensionless;
  vtheta has dimensionless;
  sdecayup has dimensionless;
  t has dimensionless; t is "model time";

  // Assignment rules:
  v := -50 + 50*heav(ta - mod(t, per));
  phase := tf/per;
  window := heav(vf - vha) - heav(vf - vma - k);
  v1 := -1.2;
  v2 := 18;
  v3 := 0;
  v4 := 5;
  gk := 8;
  gl := 2;
  gca := 4;
  vk := -84;
  vl := -60;
  vca := 120;
  c := 40;
  vsyn := -80;
  vtheta := -25;
  sdecayup := 0;
  t := time;

  // Rate rules:
  vf' = (ipost - gca*minf(vf, v1, v2)*(vf - vca) - gk*wf*(vf - vk) - ga*mainf(vf, kma, vma)*ha*(vf - vk) - gl*(vf - vl) - ginh*s*(vf - vsyn))/c1_2;
  wf' = (wfinf(vf, v4, v5_20) - wf)/tauw(vf, tauwfhi, tauwflo, v3, v4);
  ha' = (hainf(vf, kha, vha) - ha)/tauha(vf, k, kha, tauhhi, tauhlo, tauhmed, vha, vma);
  d' = (1 - d)*heav(vtheta - v)/taua - d*heav(v - vtheta)/taub;
  s' = -s*(heav(vtheta - v)/tauk + heav(v - vtheta)*sdecayup);
  y' = 1;
  tf' = 0;
  period' = 0;

  // Events:
  e0: at (v - vtheta >= 0), t0=false: s = d;
  e1: at (v - vtheta >= 0), t0=false: y = 0;
  e2: at (vf - 0 >= 0), t0=false: tf = y;
  e3: at (v + 24.99 >= 0), t0=false: period = y;
end
