// SBML level 3 version 1

function max(x, y)
  piecewise(x, x > y, y);
end
max is "minimum";

function min(x, y)
  piecewise(x, x < y, y);
end
min is "maximum";

function heav(x)
  piecewise(0, x < 0, 0.5, x == 0, 1, x > 0, 0);
end
heav is "heavyside";

function mod(x, y)
  piecewise(x - y*ceil(x/y), xor(x < 0, y < 0), x - y*floor(x/y));
end
mod is "modulo";

function cab(v)
  8*(v + 0.725)^2;
end

function mb(v)
  17.8 + 47.6*v + 33.8*v*v;
end

function rb(v)
  1.24 + 3.7*v + 3.2*v*v;
end

model main()
  // XPP model
  // This model was converted from XPP ode format to SBML using sbmlutils-0.1.5a6.
  // # Kuznetsova and Deth, JCN, 2007
  // # Model E cell
  // init V1=-0.70 R1=0.24 CA1=0.15 H1=0.37
  // par Ie=0.6
  // par GCA=0.1, GH=4.0
  // par GK=26.0
  // par TR1=4.2
  // par TS=14.0
  // par TH=45.0
  // V1'=-MB(V1)*(V1-0.5)-GK*R1*(V1+0.95)-GCA*CA1*(V1-1.2)-GH*H1*(V1+0.95)+Ie
  // R1'=(1./TR1)*(-R1+RB(V1))
  // CA1'=(1./TS)*(-CA1+CAB(V1))
  // H1'=(1./TH)*(-H1+3.*CA1)
  // CAB(V)=8.*(V+0.725)^2
  // MB(V)=17.8+47.6*V+33.8*V*V
  // RB(V)=1.24+3.7*V+3.2*V*V
  // @ METHOD=stiff, TOLERANCE=.00001
  // @ dt=.01, total=400, xplot=V1,yplot=CA1
  // @ xmin=-0.8,xmax=0.4,ymin=0.0,ymax=0.4
  // @ xlo=-0.8,ylo=0.0,xhi=0.4,yhi=0.4,bound=30000,MAXSTOR=400000
  // done
  // This file has been produced by sbmlutils.
  // Terms of use
  // Copyright © 2017 Matthias Koenig
  // Redistribution and use of any part of this model, with or without modification, are permitted provided that the following conditions are met:
  // Redistributions of this SBML file must retain the above copyright notice, this list of conditions and the following disclaimer.
  // Redistributions in a different form must reproduce the above copyright notice, this list of conditions and the following disclaimer in the documentation and/or other materials provided with the distribution.
  // This model is distributed in the hope that it will be useful, but WITHOUT ANY WARRANTY; without even the implied warranty of MERCHANTABILITY or FITNESS FOR A PARTICULAR PURPOSE.

  // Parameters:
  v1_0_70 = -0.7; v1_0_70 is "v1 = -0.70";
  r1_0_24 = 0.24; r1_0_24 is "r1 = 0.24";
  ca1_0_15 = 0.15; ca1_0_15 is "ca1 = 0.15";
  h1 = 0.37; h1 is "h1 = 0.37";
  ie = 0.6; ie is "ie = 0.6";
  gca = 0.1; gca is "gca = 0.1";
  gh = 4; gh is "gh = 4.0";
  gk = 26; gk is "gk = 26.0";
  tr1 = 4.2; tr1 is "tr1 = 4.2";
  ts = 14; ts is "ts = 14.0";
  th = 45; th is "th = 45.0";
  t has dimensionless; t is "model time";

  // Assignment rules:
  t := time;

  // Rate rules:
  v1_0_70' = -mb(v1_0_70)*(v1_0_70 - 0.5) - gk*r1_0_24*(v1_0_70 + 0.95) - gca*ca1_0_15*(v1_0_70 - 1.2) - gh*h1*(v1_0_70 + 0.95) + ie;
  r1_0_24' = 1/tr1*(-r1_0_24 + rb(v1_0_70));
  ca1_0_15' = 1/ts*(-ca1_0_15 + cab(v1_0_70));
  h1' = 1/th*(-h1 + 3*ca1_0_15);
end
