// SBML level 3 version 1

function max(x, y)
  piecewise(x, x > y, y);
end
max is "minimum";

function min(x, y)
  piecewise(x, x < y, y);
end
min is "maximum";

function heav(x)
  piecewise(0, x < 0, 0.5, x == 0, 1, x > 0, 0);
end
heav is "heavyside";

function mod(x, y)
  piecewise(x - y*ceil(x/y), xor(x < 0, y < 0), x - y*floor(x/y));
end
mod is "modulo";

function am(v)
  0.1*(v + 40)/(1 - exp(-(v + 40)/10));
end

function bm(v)
  4*exp(-(v + 65)/18);
end

function ah(v)
  0.07*exp(-(v + 65)/20);
end

function bh(v)
  1/(1 + exp(-(v + 35)/10));
end

function an(v)
  0.01*(v + 55)/(1 - exp(-(v + 55)/10));
end

function bn(v)
  0.125*exp(-(v + 65)/80);
end

function vex(t, freq, vext)
  vext*sin(2*pi*(freq/1000)*t);
end

model main()
  // XPP model
  // This model was converted from XPP ode format to SBML using sbmlutils-0.1.5a6.
  // # HH-Vext.ode: an XppAut file for the Hodgkin-Huxley equations
  // # Ref: Chen et al., Chinese J Physiol 2010, 54 (6), 423-429.
  // # + strength of external electrical field
  // # + trp channel
  // # time in msec, voltage in mV and frequency in Hz
  // # initial conditions
  // init v=-71, m=0.038, h=0.69, n=0.159
  // # the parameters
  // param vext=8, iapp=0, freq=0.3
  // param gna=120
  // param gk=36, gl=0.3, gtrp=0.03, cm=1
  // number vna=50, vk=-80, vtrp=0, vl=-49
  // # time constants and steady state functions for gating variables
  // am(v)=0.1*(v+40)/(1-exp(-(v+40)/10))
  // bm(v)=4*exp(-(v+65)/18)
  // ah(v)=0.07*exp(-(v+65)/20)
  // bh(v)=1/( 1+ exp(-(v+35)/10) )
  // an(v)=0.01*(v+55)/(1-exp(-(V + 55)/10))
  // bn(v)=0.125*exp(-(V+65)/80)
  // vex(t)=vext*(sin(2*pi*(freq/1000)*t))
  // ik=gk*n^4*(v+vex(t)-vk)
  // ina=gna*m^3*h*(v+vex(t)-vna)
  // il=gl*(v+vex(t)-vl)
  // itrp=gtrp*(v+vex(t)-vtrp)
  // # the equations
  // v'=(-ik-ina-il-itrp+iapp)/cm
  // m'=(am(v)*(1-m)-bm(v)*m)
  // n'=(an(v)*(1-n)-bn(v)*n)
  // h'=(ah(v)*(1-h)-bh(v)*h)
  // aux vex=vex(t)
  // aux itrp=itrp
  // # set xpp parameters
  // @ total=10000, xp=t, yp=v, xlo=0, xhi=10000, ylo=-90, yhi=50, bounds=10000000, dt=0.01
  // @ maxstor=10000000
  // done
  // This file has been produced by sbmlutils.
  // Terms of use
  // Copyright © 2017 Matthias Koenig
  // Redistribution and use of any part of this model, with or without modification, are permitted provided that the following conditions are met:
  // Redistributions of this SBML file must retain the above copyright notice, this list of conditions and the following disclaimer.
  // Redistributions in a different form must reproduce the above copyright notice, this list of conditions and the following disclaimer in the documentation and/or other materials provided with the distribution.
  // This model is distributed in the hope that it will be useful, but WITHOUT ANY WARRANTY; without even the implied warranty of MERCHANTABILITY or FITNESS FOR A PARTICULAR PURPOSE.

  // Parameters:
  v = -71; v is "v = -71";
  m = 0.038; m is "m = 0.038";
  h = 0.69; h is "h = 0.69";
  n = 0.159; n is "n = 0.159";
  vext = 8; vext is "vext = 8";
  iapp = 0; iapp is "iapp = 0";
  freq = 0.3; freq is "freq = 0.3";
  gna = 120; gna is "gna = 120";
  gk = 36; gk is "gk = 36";
  gl = 0.3; gl is "gl = 0.3";
  gtrp = 0.03; gtrp is "gtrp = 0.03";
  cm = 1; cm is "cm = 1";
  vna = 50; vna is "vna = 50";
  vk = -80; vk is "vk = -80";
  vtrp = 0; vtrp is "vtrp = 0";
  vl = -49; vl is "vl = -49";
  ik has dimensionless;
  ina has dimensionless;
  il has dimensionless;
  itrp has dimensionless;
  vex has dimensionless;
  t has dimensionless; t is "model time";

  // Assignment rules:
  ik := gk*n^4*(v + vex(t, freq, vext) - vk);
  ina := gna*m^3*h*(v + vex(t, freq, vext) - vna);
  il := gl*(v + vex(t, freq, vext) - vl);
  itrp := gtrp*(v + vex(t, freq, vext) - vtrp);
  vex := vex(t, freq, vext);
  t := time;

  // Rate rules:
  v' = (-ik - ina - il - itrp + iapp)/cm;
  m' = am(v)*(1 - m) - bm(v)*m;
  n' = an(v)*(1 - n) - bn(v)*n;
  h' = ah(v)*(1 - h) - bh(v)*h;
end
