// SBML level 3 version 1

function max(x, y)
  piecewise(x, x > y, y);
end
max is "minimum";

function min(x, y)
  piecewise(x, x < y, y);
end
min is "maximum";

function heav(x)
  piecewise(0, x < 0, 0.5, x == 0, 1, x > 0, 0);
end
heav is "heavyside";

function mod(x, y)
  piecewise(x - y*ceil(x/y), xor(x < 0, y < 0), x - y*floor(x/y));
end
mod is "modulo";

model main()
  // XPP model
  // This model was converted from XPP ode format to SBML using sbmlutils-0.1.5a6.
  // % Markovian model for wild-type cardiac KERG K+ current. Written by Dr. Sheng-Nan Wu, Han-Dong Chang and Jiun-Shian Wu
  // %Clancy CE and Rudy Y. Cellular consequences of HERG mutations in the long QT syndrome:
  // % precursors to sudden cardiac death. Cardiovasc Res 2001;50:301-313.
  // % Simulations (i.e., macroscopic erg current) can reproduce the result shown at Fig. 4B in this paper.
  // % Constants
  // R=8.314
  // F=96.485
  // Temp=310
  // % Initial values
  // ini c3=1
  // ini c2=0
  // ini c1=0
  // ini o=0.06
  // ini i=0
  // % Values of the model parameters
  // par ko=5.4
  // par ki=140
  // par vhold=-40, vtest=0
  // par ton=50, toff=300
  // v=vhold+heav(t-ton)*heav(toff-t)*(vtest-vhold)
  // % Activation functions
  // vk=((R*Temp)/F)*ln(ko/ki)
  // Gk=1.35e-2*ko^0.59
  // a=5.55e-2* exp(0.05547153*(v-12))
  // b=2.357e-3* exp(-0.036588*(v))
  // ain=2.172
  // bin=1.077
  // aa=6.55e-2* exp(0.05547153*(v-36))
  // bb=2.9357e-3* exp(-0.02158*(v))
  // ai=0.439*exp(-0.02352*(v+25))*4.5/ko
  // bi=0.656*exp(0.000942*(v))*(4.5/ko)^0.3
  // u=(ai*bb*aa)/(aa*bin)
  // % Gating functions
  // dc3/dt=b*c2-a*c3
  // dc2/dt=bin*c1+a*c3-(ain+b)*c2
  // dc1/dt=ain*c2+bb*o+u*i-(bin+2*aa)*c1
  // do/dt=ai*i+aa*c1-(bi+bb)*o
  // di/dt=aa*c1+bi*o-(u+ai)*i
  // aux ik=Gk*o*(v-vk)
  // % Numerical and plotting parameters for xpp
  // @ meth=Euler, dt=.1, total=800
  // @ yp=ik, yhi=1.0, ylo=-0.1, xlo=0, xhi=800, bound=100
  // done
  // This file has been produced by sbmlutils.
  // Terms of use
  // Copyright © 2017 Matthias Koenig
  // Redistribution and use of any part of this model, with or without modification, are permitted provided that the following conditions are met:
  // Redistributions of this SBML file must retain the above copyright notice, this list of conditions and the following disclaimer.
  // Redistributions in a different form must reproduce the above copyright notice, this list of conditions and the following disclaimer in the documentation and/or other materials provided with the distribution.
  // This model is distributed in the hope that it will be useful, but WITHOUT ANY WARRANTY; without even the implied warranty of MERCHANTABILITY or FITNESS FOR A PARTICULAR PURPOSE.

  // Parameters:
  c3_1 = 1; c3_1 is "c3 = 1";
  c2_0 = 0; c2_0 is "c2 = 0";
  c1_0 = 0; c1_0 is "c1 = 0";
  o = 0.06; o is "o = 0.06";
  i = 0; i is "i = 0";
  ko = 5.4; ko is "ko = 5.4";
  ki = 140; ki is "ki = 140";
  vhold = -40; vhold is "vhold = -40";
  vtest = 0; vtest is "vtest = 0";
  ton = 50; ton is "ton = 50";
  toff = 300; toff is "toff = 300";
  r has dimensionless;
  f has dimensionless;
  temp has dimensionless;
  v has dimensionless;
  vk has dimensionless;
  gk has dimensionless;
  a has dimensionless;
  b has dimensionless;
  ain has dimensionless;
  bin has dimensionless;
  aa has dimensionless;
  bb has dimensionless;
  ai has dimensionless;
  bi has dimensionless;
  u has dimensionless;
  ik has dimensionless;
  t has dimensionless; t is "model time";

  // Assignment rules:
  r := 8.314;
  f := 96.485;
  temp := 310;
  v := vhold + heav(t - ton)*heav(toff - t)*(vtest - vhold);
  vk := r*temp/f*ln(ko/ki);
  gk := 1.35e-2*ko^0.59;
  a := 5.55e-2*exp(0.05547153*(v - 12));
  b := 2.357e-3*exp(-0.036588*v);
  ain := 2.172;
  bin := 1.077;
  aa := 6.55e-2*exp(0.05547153*(v - 36));
  bb := 2.9357e-3*exp(-0.02158*v);
  ai := 0.439*exp(-0.02352*(v + 25))*4.5/ko;
  bi := 0.656*exp(0.000942*v)*(4.5/ko)^0.3;
  u := ai*bb*aa/(aa*bin);
  ik := gk*o*(v - vk);
  t := time;

  // Rate rules:
  c3_1' = b*c2_0 - a*c3_1;
  c2_0' = bin*c1_0 + a*c3_1 - (ain + b)*c2_0;
  c1_0' = ain*c2_0 + bb*o + u*i - (bin + 2*aa)*c1_0;
  o' = ai*i + aa*c1_0 - (bi + bb)*o;
  i' = aa*c1_0 + bi*o - (u + ai)*i;
end
