// SBML level 3 version 1

function max(x, y)
  piecewise(x, x > y, y);
end
max is "minimum";

function min(x, y)
  piecewise(x, x < y, y);
end
min is "maximum";

function heav(x)
  piecewise(0, x < 0, 0.5, x == 0, 1, x > 0, 0);
end
heav is "heavyside";

function mod(x, y)
  piecewise(x - y*ceil(x/y), xor(x < 0, y < 0), x - y*floor(x/y));
end
mod is "modulo";

model main()
  // XPP model
  // This model was converted from XPP ode format to SBML using sbmlutils-0.1.5a6.
  // # Markov model for cardiac Na(+) channel implemented by Dr. Jiun-Shian Wu, Dr. Sheng-Nan Wu,
  // # and Dr. Ruey J. Sung, Han-Dong Chang.
  // # Clancy CE and Rudy Y. Na(+) channel mutation that causes both Brugada and long-QT
  // # syndrome phenotypes: a simulation study of mechanism. Circulation 2002;105:1208-13.
  // # This simulation makes traces similar to fig 3A of the paper by Makita et al (2002).
  // # Makita N et al. Drug-induced long-QT syndrome associated with a subclinical SCN5A mutation.
  // # Circulation 2002;106:1269-74.
  // # Constant:
  // Rk=8314
  // Fara=96485
  // Temp=310
  // # Initial values
  // init C3=1, C2=0, C1=0
  // init IC3=0, IC2=0, iif=0, IM1=0, IM2=0
  // init O=0
  // # Values of the model parameters
  // par ko=4.5, ki=136.89149
  // par nao=140, nai=15
  // par vhold=-80, vtest_1=30, vtest_2=-50
  // par cai=7.9e-5
  // par scale=1000
  // # voltage-clamp protocols
  // par ton=5, toff=20, toff_r=5000
  // v=vhold+heav(t-ton)*heav(toff-t)*(vtest_1-vhold)+heav(t-toff)*heav(toff_r-t)*(vtest_2-vhold)
  // Ena=((Rk*temp)/Fara)*ln(nao/nai)
  // # Expressions:
  // a11 = 3.802/(0.1027*exp(-v/17.0)+0.20*exp(-v/150))
  // a12 = 3.802/(0.1027*exp(-v/15.0)+0.23*exp(-v/150))
  // a13 = 3.802/(0.1027*exp(-v/12.0)+0.25*exp(-v/150))
  // b11 = 0.1917*exp(-v/20.3)
  // b12 = 0.20*exp(-(v-5)/20.3)
  // b13 = 0.22*exp(-(v-10)/20.3)
  // a2 = (9.178*exp(v/29.68))
  // b2 = (a13*a2*a3)/( b13*b3)
  // a3 = (3.7933*0.00000001)*exp(-v/7.7)
  // b3 = (0.0084+0.00002*v)
  // a4 = a2/100
  // b4 = a3
  // a5 = a2/(9.5*10000)
  // b5 = a3/50
  // # Gating functions
  // C1' = C2*a12-C1*b12+O*b13-C1*a13+iif*a3-C1*b3
  // C2' = C3*a11-C2*b11-C2*a12+C1*b12+IC2*a3-C2*b3
  // C3' = C2*b11-C3*a11+IC3*a3-C3*b3
  // O' = C1*a13-O*b13+iif*b2-O*a2
  // IC3' = C3*b3-IC3*a3+IC2*b11-IC3*a11
  // IC2' = IC3*a11-IC2*b11+iif*b12-IC2*a12+C2*b3-IC2*a3
  // iif' = IC2*a12-iif*b12+IM1*b4-iif*a4+C1*b3-iif*a3+O*a2-iif*b2
  // IM1'= IM2*b5-IM1*a5+iif*a4-IM1*b4
  // IM2'= IM1*a5-IM2*b5
  // Gna=23.5
  // aux ina=Gna*(O/(IC3+IC2+iif+IM1+IM2+C3+C2+C1+O))*(v-Ena)/scale
  // @ meth=Euler, dt=.005, total=20
  // @ yp=ina, yhi=0.1, ylo=-0.5, xlo=0, xhi=20
  // done
  // This file has been produced by sbmlutils.
  // Terms of use
  // Copyright © 2017 Matthias Koenig
  // Redistribution and use of any part of this model, with or without modification, are permitted provided that the following conditions are met:
  // Redistributions of this SBML file must retain the above copyright notice, this list of conditions and the following disclaimer.
  // Redistributions in a different form must reproduce the above copyright notice, this list of conditions and the following disclaimer in the documentation and/or other materials provided with the distribution.
  // This model is distributed in the hope that it will be useful, but WITHOUT ANY WARRANTY; without even the implied warranty of MERCHANTABILITY or FITNESS FOR A PARTICULAR PURPOSE.

  // Parameters:
  c3_1 = 1; c3_1 is "c3 = 1";
  c2_0 = 0; c2_0 is "c2 = 0";
  c1_0 = 0; c1_0 is "c1 = 0";
  ic3 = 0; ic3 is "ic3 = 0";
  ic2 = 0; ic2 is "ic2 = 0";
  iif = 0; iif is "iif = 0";
  im1 = 0; im1 is "im1 = 0";
  im2 = 0; im2 is "im2 = 0";
  o = 0; o is "o = 0";
  ko = 4.5; ko is "ko = 4.5";
  ki = 136.89149; ki is "ki = 136.89149";
  nao = 140; nao is "nao = 140";
  nai = 15; nai is "nai = 15";
  vhold = -80; vhold is "vhold = -80";
  vtest_1 = 30; vtest_1 is "vtest_1 = 30";
  vtest_2 = -50; vtest_2 is "vtest_2 = -50";
  cai = 7.9e-5; cai is "cai = 7.9e-5";
  scale = 1000; scale is "scale = 1000";
  ton = 5; ton is "ton = 5";
  toff = 20; toff is "toff = 20";
  toff_r = 5000; toff_r is "toff_r = 5000";
  rk has dimensionless;
  fara has dimensionless;
  temp has dimensionless;
  v has dimensionless;
  ena has dimensionless;
  a11 has dimensionless;
  a12 has dimensionless;
  a13 has dimensionless;
  b11 has dimensionless;
  b12 has dimensionless;
  b13 has dimensionless;
  a2 has dimensionless;
  b2 has dimensionless;
  a3 has dimensionless;
  b3 has dimensionless;
  a4 has dimensionless;
  b4 has dimensionless;
  a5 has dimensionless;
  b5 has dimensionless;
  gna has dimensionless;
  ina has dimensionless;
  t has dimensionless; t is "model time";

  // Assignment rules:
  rk := 8314;
  fara := 96485;
  temp := 310;
  v := vhold + heav(t - ton)*heav(toff - t)*(vtest_1 - vhold) + heav(t - toff)*heav(toff_r - t)*(vtest_2 - vhold);
  ena := rk*temp/fara*ln(nao/nai);
  a11 := 3.802/(0.1027*exp(-v/17) + 0.2*exp(-v/150));
  a12 := 3.802/(0.1027*exp(-v/15) + 0.23*exp(-v/150));
  a13 := 3.802/(0.1027*exp(-v/12) + 0.25*exp(-v/150));
  b11 := 0.1917*exp(-v/20.3);
  b12 := 0.2*exp(-(v - 5)/20.3);
  b13 := 0.22*exp(-(v - 10)/20.3);
  a2 := 9.178*exp(v/29.68);
  b2 := a13*a2*a3/(b13*b3);
  a3 := 3.7933*1e-8*exp(-v/7.7);
  b3 := 0.0084 + 2e-5*v;
  a4 := a2/100;
  b4 := a3;
  a5 := a2/(9.5*10000);
  b5 := a3/50;
  gna := 23.5;
  ina := gna*(o/(ic3 + ic2 + iif + im1 + im2 + c3_1 + c2_0 + c1_0 + o))*(v - ena)/scale;
  t := time;

  // Rate rules:
  c1_0' = c2_0*a12 - c1_0*b12 + o*b13 - c1_0*a13 + iif*a3 - c1_0*b3;
  c2_0' = c3_1*a11 - c2_0*b11 - c2_0*a12 + c1_0*b12 + ic2*a3 - c2_0*b3;
  c3_1' = c2_0*b11 - c3_1*a11 + ic3*a3 - c3_1*b3;
  o' = c1_0*a13 - o*b13 + iif*b2 - o*a2;
  ic3' = c3_1*b3 - ic3*a3 + ic2*b11 - ic3*a11;
  ic2' = ic3*a11 - ic2*b11 + iif*b12 - ic2*a12 + c2_0*b3 - ic2*a3;
  iif' = ic2*a12 - iif*b12 + im1*b4 - iif*a4 + c1_0*b3 - iif*a3 + o*a2 - iif*b2;
  im1' = im2*b5 - im1*a5 + iif*a4 - im1*b4;
  im2' = im1*a5 - im2*b5;
end
