// SBML level 3 version 1

function max(x, y)
  piecewise(x, x > y, y);
end
max is "minimum";

function min(x, y)
  piecewise(x, x < y, y);
end
min is "maximum";

function heav(x)
  piecewise(0, x < 0, 0.5, x == 0, 1, x > 0, 0);
end
heav is "heavyside";

function mod(x, y)
  piecewise(x - y*ceil(x/y), xor(x < 0, y < 0), x - y*floor(x/y));
end
mod is "modulo";

function p(v, sm, vmhalf)
  exp(sm*(v - vmhalf))/(1 + exp(sm*(v - vmhalf)));
end

function act_k(v, sk, vkhalf)
  1/(1 + exp((v - vkhalf)/sk));
end

function act_cav(v, sca, vcahalf)
  1/(1 + exp((v - vcahalf)/sca));
end

function act_kca(c, tc)
  tc*c;
end

model main()
  // XPP model
  // This model was converted from XPP ode format to SBML using sbmlutils-0.1.5a6.
  // # A simplified model of NMDA oscillations in lamprey locomotor network neurons
  // # Mikael Huss 070315
  // # Components: NMDA, KCa, Kv, leak, Cav, KCa channels
  // # KCa gets activated by both NMDA-Ca and Cav.
  // # Voltage equation (the factor 1000 is to get the time in seconds)
  // dv/dt= 1000 * (p(v)*gnmda*(enmda-v) + gkca*act_kca(C)*(ek-v) + gk*act_k(v)*(ek-v) + gleak*(eleak-v) + gcav*act_cav(v)*(eca-v) + ibias)
  // dc/dt= inmda*p(v)*gnmda*(enmda-v) + icav*gcav*act_cav(v)*(eca-v) - C/tau
  // param gnmda=0.005, gkca=20, gk=8, gcav=0.005, gleak=0.001
  // param tc=0.02, tau=1, inmda=0.2, icav=0.3, ibias=0
  // param enmda=0, eleak=-70, ek=-80, eca=150,
  // param vmhalf=-60, vkhalf=-1, vcahalf=-45
  // param sm=.3, sk=-7, sca=-5
  // # Magnesium block equation
  // p(v)=exp(sm*(v-vmhalf))/(1+exp(sm*(v-vmhalf)))
  // # Kv current (assumed to be a combination of delayed rectifier and A-current)
  // act_k(v) = 1/(1+exp((v-vkhalf)/sk))
  // # Assume that we have a calcium component with half-activation at -45 mV
  // # (Corresponding to the component which "starts to activate between
  // # -60 and -50 mV"; El Manira and Bussieres 1997)
  // act_cav(v) = 1/(1+exp((v-vcahalf)/sca))
  // act_kca(C)=tc*C
  // aux act=act_kca(C)
  // init v=-70
  // param v(0)=-70
  // c(0)=0
  // @ METH=cvode, ATOLER=1e-6, TOLER=1e-6, DT=0.02
  // @ TOTAL=30, XP=t, YP=v, MAXSTOR=500000, BOUND=50000, BELL=0
  // @ XLO=0, XHI=30, YLO=-80, YHI=0
  // @ ntst=400, nmax=20000, dsmin=1e-15, dsmax=.1, ds=1e-4
  // @ epsl=1e-7, epsu=1e-7, epss=1e-5
  // @ parmin=0, parmax=0.8
  // @ autoxmin=0, autoxmax=0.8, autoymin=-80, autoymax=0, autovar=v
  // This file has been produced by sbmlutils.
  // Terms of use
  // Copyright © 2017 Matthias Koenig
  // Redistribution and use of any part of this model, with or without modification, are permitted provided that the following conditions are met:
  // Redistributions of this SBML file must retain the above copyright notice, this list of conditions and the following disclaimer.
  // Redistributions in a different form must reproduce the above copyright notice, this list of conditions and the following disclaimer in the documentation and/or other materials provided with the distribution.
  // This model is distributed in the hope that it will be useful, but WITHOUT ANY WARRANTY; without even the implied warranty of MERCHANTABILITY or FITNESS FOR A PARTICULAR PURPOSE.

  // Parameters:
  gnmda = 0.005; gnmda is "gnmda = 0.005";
  gkca = 20; gkca is "gkca = 20";
  gk = 8; gk is "gk = 8";
  gcav = 0.005; gcav is "gcav = 0.005";
  gleak = 0.001; gleak is "gleak = 0.001";
  tc = 0.02; tc is "tc = 0.02";
  tau = 1; tau is "tau = 1";
  inmda = 0.2; inmda is "inmda = 0.2";
  icav = 0.3; icav is "icav = 0.3";
  ibias = 0; ibias is "ibias = 0";
  enmda = 0; enmda is "enmda = 0";
  eleak = -70; eleak is "eleak = -70";
  ek = -80; ek is "ek = -80";
  eca = 150; eca is "eca = 150";
  vmhalf = -60; vmhalf is "vmhalf = -60";
  vkhalf = -1; vkhalf is "vkhalf = -1";
  vcahalf = -45; vcahalf is "vcahalf = -45";
  sm = 0.3; sm is "sm = .3";
  sk = -7; sk is "sk = -7";
  sca = -5; sca is "sca = -5";
  v = -70; v is "v = -70";
  c = 0; c is "c = 0";
  act has dimensionless;
  t has dimensionless; t is "model time";

  // Assignment rules:
  act := act_kca(c, tc);
  t := time;

  // Rate rules:
  v' = 1000*(p(v, sm, vmhalf)*gnmda*(enmda - v) + gkca*act_kca(c, tc)*(ek - v) + gk*act_k(v, sk, vkhalf)*(ek - v) + gleak*(eleak - v) + gcav*act_cav(v, sca, vcahalf)*(eca - v) + ibias);
  c' = inmda*p(v, sm, vmhalf)*gnmda*(enmda - v) + icav*gcav*act_cav(v, sca, vcahalf)*(eca - v) - c/tau;
end
