// SBML level 3 version 1

function max(x, y)
  piecewise(x, x > y, y);
end
max is "minimum";

function min(x, y)
  piecewise(x, x < y, y);
end
min is "maximum";

function heav(x)
  piecewise(0, x < 0, 0.5, x == 0, 1, x > 0, 0);
end
heav is "heavyside";

function mod(x, y)
  piecewise(x - y*ceil(x/y), xor(x < 0, y < 0), x - y*floor(x/y));
end
mod is "modulo";

function minf(v, beta_m, gamma_m)
  0.5*(1 + tanh((v - beta_m)/gamma_m));
end

function hinf(v, alpha_h, beta_h, gamma_h)
  1 - alpha_h/(1 + exp((beta_h - v)/gamma_h));
end

function winf(v, beta_w, gamma_w)
  0.5*(1 + tanh((v - beta_w)/gamma_w));
end

function tauw(v, beta_w, gamma_w)
  1/cosh((v - beta_w)/(2*gamma_w));
end

function zinfm(v, betazm, gammazm)
  1/(1 + exp((betazm - v)/gammazm));
end

function zinfahp(v, betazahp, gammazahp)
  1/(1 + exp((betazahp - v)/gammazahp));
end

model main()
  // XPP model
  // This model was converted from XPP ode format to SBML using sbmlutils-0.1.5a6.
  // # Modified Morris-Lecar model
  // # based on model used in Prescott et al. Pyramidal neurons switch from integrators in vitro to resonators under in vivo-like conditions. J. Neurophysiol. 2008
  // # This version of the model includes cumulative sodium channel inactivation
  // # other parameters have been changed to match those indicated in Fig. 9B of the paper.
  // #dV/dt = (i_dc+i_noise-gna*minf(V)*(V-Vna)-gk*w*(V-VK)-gshunt*(V-Vshunt)-gM*zM*(v-vk)-gAHP*zAHP*(v-vk))/c
  // dv/dt = (i_dc+i_noise-gna*h*minf(V)*(V-Vna)-gk*w*(V-VK)-gshunt*(V-Vshunt)-gM*zM*(v-vk)-gAHP*zAHP*(v-vk))/c
  // dw/dt = phi_w*(winf(V)-w)/tauw(V)
  // dzAHP/dt = (zinfAHP(v)-zAHP)/tauzAHP
  // dzM/dt = (zinfM(v)-zM)/tauzM
  // param c=2
  // # HERE IS EVERYTHING YOU NEED TO KNOW ABOUT THE STIMULuS
  // # DC OFFSET
  // # this is controlled by i_dc
  // param i_dc=0
  // # NOISE
  // # This is modeled as an Ornstein-Uhlenbeck process, gives new noise on each trial
  // # Here is the Wiener variable
  // wiener nz
  // # With scale=0 you get no noise
  // # effects of changing dt are automatically controlled for in XPP
  // # However, variance of i_noise also depends on tau_inoise (variance = sigma^2*tau/2)
  // # Therefore, if you want to keep the same variance, you must manually change sigma_inoise if you change tau_inoise
  // di_noise/dt=-1/tau_inoise*(i_noise-i_avg)+sigma*nz
  // param sigma=0, tau_inoise=5, i_avg=0
  // # increase sigma to include noise; sigma=0.1 in paper
  // ## frozen noise can be repeated on multiple trials by saving i_noise to a .tab file and playing it back
  // ## see xpp documentation about tables
  // # HERE IS EVERYTHING YOU NEED TO KNOW ABOUT INTRINSIC CURRENTS
  // # Initial conditions
  // V(0)=-70
  // w(0)=0.000025
  // zAHP(0)=0
  // zM(0)=0
  // # if you want to make sure initial conditions are at steady state
  // # run trial with no stim, then select "initial conditions/last" from main menu... this will start you at the conditions at the end of your previous trial
  // # FAST INWARD CURRENT (INa or activation variable)
  // # This is assumed to activate instantaneously with changes in voltage
  // # voltage-dependent activation curve is described by m
  // minf(V)=.5*(1+tanh((V-beta_m)/gamma_m))
  // # maximal conductance and reversal potential
  // param beta_m=-1.2, gamma_m=18
  // param gna=24, vna=50
  // # to implement sodium channel inactivation at steady state, simply reduce gna
  // # to implement sodium channel inactivation dynamically, comment out line 3 and uncomment line 4, and uncomment the following four lines
  // dh/dt = (hinf(v)-h)/tau_h
  // hinf(v)=1-alpha_h/(1+exp((beta_h-v)/gamma_h))
  // param tau_h=1000,alpha_h=0.67,beta_h=-40,gamma_h=8
  // h(0)=1
  // # Following parameters should also be changed (see Fig. 9 in paper): gna=24, gk=30, gamma_w=8, betazM=-29, gammazM=2, tauzM=400, gM=2
  // # DELAYED RECTIFIER CURRENT (IKdr or recovery variable)
  // # this current activates more slowly than INa, but is still faster than Isub or Iadapt (not included here)
  // # In this code, activation of IKdr is controlled by w (equivalent to y in 3D model)
  // winf(V)=.5*(1+tanh((V-beta_w)/gamma_w))
  // tauw(V)=1/cosh((V-beta_w)/(2*gamma_w))
  // # in the 2D model, varying beta_w shifts the w activation curve (w=y here) and can convert the neuron between class 1, 2, and 3
  // param beta_w=-9, gamma_w=8
  // # maximal conductance and reversal potential
  // param gk=30, vk=-100, phi_w=0.25
  // # SHUNT CURRENT (Ishunt)
  // # just a passive leak conductance
  // # gshunt = 2 for low conductance. Increase to 4 for high conductance, i.e. shunting
  // param gshunt=2, vshunt=-70
  // # ADAPTATION
  // # This actually comprises two current, voltage-activated M-type current and calcium-activated AHP current
  // # The latter is not modelled as calcium-dependent, but with betayAHP = 0, this current is only activated during spikes... roughtly the same conditions under which calcium influx occurs to activate this current
  // # Because IAHP does not activate at subthreshold voltages, it does not influence subthreshold voltage dynamics.
  // # Focus on inserting or removing M current by adjusting gM
  // param tauzM=400
  // # latter in the paper, tauzM was changed to 400 to get theta-frequency oscillations
  // zinfM(v)=1/(1+exp((betazM-V)/gammazM))
  // param betazM=-29,gammazM=2
  // param gM=2
  // param tauzAHP=200
  // zinfAHP(v)=1/(1+exp((betazAHP-V)/gammazAHP))
  // param betazAHP=0,gammazAHP=5
  // param gAHP=1
  // # following parameters control duration of simulation and axes of default plot
  // @ total=100000,dt=.1,xlo=-100,xhi=60,ylo=-.125,yhi=.6,xp=v,yp=w
  // @ meth=euler
  // @ MAXSTOR=1000000
  // done
  // This file has been produced by sbmlutils.
  // Terms of use
  // Copyright © 2017 Matthias Koenig
  // Redistribution and use of any part of this model, with or without modification, are permitted provided that the following conditions are met:
  // Redistributions of this SBML file must retain the above copyright notice, this list of conditions and the following disclaimer.
  // Redistributions in a different form must reproduce the above copyright notice, this list of conditions and the following disclaimer in the documentation and/or other materials provided with the distribution.
  // This model is distributed in the hope that it will be useful, but WITHOUT ANY WARRANTY; without even the implied warranty of MERCHANTABILITY or FITNESS FOR A PARTICULAR PURPOSE.

  // Parameters:
  c = 2; c is "c = 2";
  i_dc = 0; i_dc is "i_dc = 0";
  nz = 0;
  sigma = 0; sigma is "sigma = 0";
  tau_inoise = 5; tau_inoise is "tau_inoise = 5";
  i_avg = 0; i_avg is "i_avg = 0";
  v = -70; v is "v = -70";
  w = 2.5e-5; w is "w = 0.000025";
  zahp = 0; zahp is "zahp = 0";
  zm = 0; zm is "zm = 0";
  beta_m = -1.2; beta_m is "beta_m = -1.2";
  gamma_m = 18; gamma_m is "gamma_m = 18";
  gna = 24; gna is "gna = 24";
  vna = 50; vna is "vna = 50";
  tau_h = 1000; tau_h is "tau_h = 1000";
  alpha_h = 0.67; alpha_h is "alpha_h = 0.67";
  beta_h = -40; beta_h is "beta_h = -40";
  gamma_h = 8; gamma_h is "gamma_h = 8";
  h = 1; h is "h = 1";
  beta_w = -9; beta_w is "beta_w = -9";
  gamma_w = 8; gamma_w is "gamma_w = 8";
  gk = 30; gk is "gk = 30";
  vk = -100; vk is "vk = -100";
  phi_w = 0.25; phi_w is "phi_w = 0.25";
  gshunt = 2; gshunt is "gshunt = 2";
  vshunt = -70; vshunt is "vshunt = -70";
  tauzm = 400; tauzm is "tauzm = 400";
  betazm = -29; betazm is "betazm = -29";
  gammazm = 2; gammazm is "gammazm = 2";
  gm = 2; gm is "gm = 2";
  tauzahp = 200; tauzahp is "tauzahp = 200";
  betazahp = 0; betazahp is "betazahp = 0";
  gammazahp = 5; gammazahp is "gammazahp = 5";
  gahp = 1; gahp is "gahp = 1";
  i_noise = 0 dimensionless;
  t has dimensionless; t is "model time";

  // Assignment rules:
  t := time;

  // Rate rules:
  v' = (i_dc + i_noise - gna*h*minf(v, beta_m, gamma_m)*(v - vna) - gk*w*(v - vk) - gshunt*(v - vshunt) - gm*zm*(v - vk) - gahp*zahp*(v - vk))/c;
  w' = phi_w*(winf(v, beta_w, gamma_w) - w)/tauw(v, beta_w, gamma_w);
  zahp' = (zinfahp(v, betazahp, gammazahp) - zahp)/tauzahp;
  zm' = (zinfm(v, betazm, gammazm) - zm)/tauzm;
  i_noise' = -1/tau_inoise*(i_noise - i_avg) + sigma*nz;
  h' = (hinf(v, alpha_h, beta_h, gamma_h) - h)/tau_h;
end
