// SBML level 3 version 1

function max(x, y)
  piecewise(x, x > y, y);
end
max is "minimum";

function min(x, y)
  piecewise(x, x < y, y);
end
min is "maximum";

function heav(x)
  piecewise(0, x < 0, 0.5, x == 0, 1, x > 0, 0);
end
heav is "heavyside";

function mod(x, y)
  piecewise(x - y*ceil(x/y), xor(x < 0, y < 0), x - y*floor(x/y));
end
mod is "modulo";

function e(t, stim, t_on)
  heav(t - t_on)*heav(stim + t_on - t);
end

function po(t, d)
  heav(d - t);
end

function p(t, per)
  po(mod(t, per));
end

function i_x(t, ampx, stim, t_on, z)
  ampx*z*e(t, t_on, stim);
end

function i_y(t, ampy, stim, t_on, z)
  ampy*z*e(t, t_on, stim);
end

function sd(x, b)
  exp(-b*(1 - cos(x - 2.5)))*b;
end

model main()
  // XPP model
  // This model was converted from XPP ode format to SBML using sbmlutils-0.1.5a6.
  // # Theta neuron model 50e and 20i cells with all-to-all
  // # connectivity and periodic input to both the e- and i-cells
  // #
  // # Parameters
  // par I_e=0.4,I_i=0
  // par tauz=50,gz=.5
  // par sige=0.5,sigi=.01
  // par gie=3,gei=.4,gii=0.15,gee=2,
  // par taue=1,taui=3
  // #
  // # Periodic stimuli description with parameters
  // E(t)=heav(t-t_on)*heav(stim+t_on-t)
  // PO(t)=heav(d-t)
  // P(t)=PO(mod(t,per))
  // z'=(-z+p(t))/tau
  // I_x(t)=Ampx*z*E(t)
  // I_y(t)=Ampy*z*E(t)
  // par Ampx=70,Ampy=10,d=1,per=25,tau=20
  // par t_on=0,stim=1000
  // #
  // # ODEs for e-cells(x), i-cells(y) and adaptation(z)
  // x[0..49]'=1-cos(x[j])+(1+cos(x[j]))*(I_e+I_x(t)-gz*z[j]-gie*si+gee*se+sige*we[j])
  // z[0..49]'=sd(x[j])-z[j]/tauz
  // y[0..19]'=1-cos(y[j])+(1+cos(y[j]))*(I_i+I_y(t)-gii*si+gei*se+sigi*wi[j])
  // #
  // global 1 x[0..49]-pi {x[j]=-pi;out_put=1}
  // global 1 y[0..19]-pi {y[j]=-pi;out_put=1}
  // # Synapses
  // se'=sum(0,49)of(sd(shift(x0,i')))/50-se/taue
  // si'=sum(0,19)of(sd(shift(y0,i')))/20-si/taui
  // #
  // #Initial conditions
  // x[0..49](0)=ran(1)*2*pi-pi
  // y[0..19](0)=ran(1)*2*pi-pi
  // wiener we[0..49]
  // wiener wi[0..19]
  // sd(x)=exp(-b*(1-cos(x-2.5)))*b
  // par b=100
  // aux swgt=.8*se+.2*si
  // aux per_input=I_x(t)
  // @ dt=0.02,nOut=10
  // @ meth=euler,total=1400,trans=400,maxstor=1000000
  // @ yp=se,xlo=400,xhi=1400,ylo=0,yhi=.5
  // done
  // This file has been produced by sbmlutils.
  // Terms of use
  // Copyright © 2017 Matthias Koenig
  // Redistribution and use of any part of this model, with or without modification, are permitted provided that the following conditions are met:
  // Redistributions of this SBML file must retain the above copyright notice, this list of conditions and the following disclaimer.
  // Redistributions in a different form must reproduce the above copyright notice, this list of conditions and the following disclaimer in the documentation and/or other materials provided with the distribution.
  // This model is distributed in the hope that it will be useful, but WITHOUT ANY WARRANTY; without even the implied warranty of MERCHANTABILITY or FITNESS FOR A PARTICULAR PURPOSE.

  // Parameters:
  i_e = 0.4; i_e is "i_e = 0.4";
  i_i = 0; i_i is "i_i = 0";
  tauz = 50; tauz is "tauz = 50";
  gz = 0.5; gz is "gz = .5";
  sige = 0.5; sige is "sige = 0.5";
  sigi = 0.01; sigi is "sigi = .01";
  gie = 3; gie is "gie = 3";
  gei = 0.4; gei is "gei = .4";
  gii = 0.15; gii is "gii = 0.15";
  gee = 2; gee is "gee = 2";
  taue = 1; taue is "taue = 1";
  taui = 3; taui is "taui = 3";
  ampx = 70; ampx is "ampx = 70";
  ampy = 10; ampy is "ampy = 10";
  d = 1; d is "d = 1";
  per = 25; per is "per = 25";
  tau = 20; tau is "tau = 20";
  t_on = 0; t_on is "t_on = 0";
  stim = 1000; stim is "stim = 1000";
  x[0..49] = 0;
  y[0..19] = 0;
  b = 100; b is "b = 100";
  x[0..49] = ran(1)*2*pi-pi = 0 dimensionless;
  y[0..19] = ran(1)*2*pi-pi = 0 dimensionless;
  z = 0 dimensionless;
  se = 0 dimensionless;
  si = 0 dimensionless;
  swgt has dimensionless;
  per_input has dimensionless;
  t has dimensionless; t is "model time";

  // Initial assignments:
  None = ran(1)*2*pi - pi;

  // Assignment rules:
  swgt := 0.8*se + 0.2*si;
  per_input := i_x(t, ampx, stim, t_on, z);
  t := time;

  // Rate rules:
  z' = (-z + p(t, per))/tau;
  se' = ;
  si' = ;

  // Events:
  e0: at (), t0=false:  = -pi, out_put = 1;
  e1: at (), t0=false:  = -pi, out_put = 1;
end
