// SBML level 3 version 1

function max(x, y)
  piecewise(x, x > y, y);
end
max is "minimum";

function min(x, y)
  piecewise(x, x < y, y);
end
min is "maximum";

function heav(x)
  piecewise(0, x < 0, 0.5, x == 0, 1, x > 0, 0);
end
heav is "heavyside";

function mod(x, y)
  piecewise(x - y*ceil(x/y), xor(x < 0, y < 0), x - y*floor(x/y));
end
mod is "modulo";

function sd(x, b)
  exp(-b*(1 - cos(x - 2.5)))*b;
end

model main()
  // XPP model
  // This model was converted from XPP ode format to SBML using sbmlutils-0.1.5a6.
  // # Theta neuron network with 50e and 20i cells with all-to-all
  // # connectivity and tonic input to both the e- and i-cells
  // #
  // # Parameters
  // par I_e=1, I_i=0
  // par gei=.4,gii=0.15,gee=0.1, gie=2
  // par tauz=50,gz=.2
  // par sige=0.5, sigi=.02
  // par taue=1, taui=3
  // #
  // #ODEs for e-cells, i-cells and adaptation
  // x[0..49]'=1-cos(x[j])+(1+cos(x[j]))*(I_e-gz*z[j]-gie*si+gee*se+sige*we[j])
  // z[0..49]'=sd(x[j])-z[j]/tauz
  // y[0..19]'=1-cos(y[j])+(1+cos(y[j]))*(I_i-gii*si+gei*se+sigi*wi[j])
  // # Synapses
  // se'=sum(0,49)of(sd(shift(x0,i')))/50-se/taue
  // si'=sum(0,19)of(sd(shift(y0,i')))/20-si/taui
  // global 1 x[0..49]-pi {x[j]=-pi}
  // global 1 y[0..19]-pi {y[j]=-pi}
  // #
  // # Initial Conditions
  // x[0..49](0)=ran(1)*2*pi-pi
  // y[0..19](0)=ran(1)*2*pi-pi
  // wiener we[0..49]
  // wiener wi[0..19]
  // sd(x)=exp(-b*(1-cos(x-2.5)))*b
  // par b=100
  // aux swgt=.8*se+.2*si
  // @ meth=euler,
  // @ total=1400,trans=400,maxstor=1000000
  // @ dt=0.02,nOut=10
  // @ xp=t,yp=se,xlo=600,xhi=1200,ylo=0,yhi=.5
  // done
  // This file has been produced by sbmlutils.
  // Terms of use
  // Copyright © 2017 Matthias Koenig
  // Redistribution and use of any part of this model, with or without modification, are permitted provided that the following conditions are met:
  // Redistributions of this SBML file must retain the above copyright notice, this list of conditions and the following disclaimer.
  // Redistributions in a different form must reproduce the above copyright notice, this list of conditions and the following disclaimer in the documentation and/or other materials provided with the distribution.
  // This model is distributed in the hope that it will be useful, but WITHOUT ANY WARRANTY; without even the implied warranty of MERCHANTABILITY or FITNESS FOR A PARTICULAR PURPOSE.

  // Parameters:
  i_e = 1; i_e is "i_e = 1";
  i_i = 0; i_i is "i_i = 0";
  gei = 0.4; gei is "gei = .4";
  gii = 0.15; gii is "gii = 0.15";
  gee = 0.1; gee is "gee = 0.1";
  gie = 2; gie is "gie = 2";
  tauz = 50; tauz is "tauz = 50";
  gz = 0.2; gz is "gz = .2";
  sige = 0.5; sige is "sige = 0.5";
  sigi = 0.02; sigi is "sigi = .02";
  taue = 1; taue is "taue = 1";
  taui = 3; taui is "taui = 3";
  x[0..49] = 0;
  y[0..19] = 0;
  b = 100; b is "b = 100";
  x[0..49] = ran(1)*2*pi-pi = 0 dimensionless;
  y[0..19] = ran(1)*2*pi-pi = 0 dimensionless;
  se = 0 dimensionless;
  si = 0 dimensionless;
  swgt has dimensionless;
  t has dimensionless; t is "model time";

  // Initial assignments:
  None = ran(1)*2*pi - pi;

  // Assignment rules:
  swgt := 0.8*se + 0.2*si;
  t := time;

  // Rate rules:
  se' = ;
  si' = ;

  // Events:
  e0: at (), t0=false:  = -pi;
  e1: at (), t0=false:  = -pi;
end
