// SBML level 3 version 1

function max(x, y)
  piecewise(x, x > y, y);
end
max is "minimum";

function min(x, y)
  piecewise(x, x < y, y);
end
min is "maximum";

function heav(x)
  piecewise(0, x < 0, 0.5, x == 0, 1, x > 0, 0);
end
heav is "heavyside";

function mod(x, y)
  piecewise(x - y*ceil(x/y), xor(x < 0, y < 0), x - y*floor(x/y));
end
mod is "modulo";

function am(v, phi)
  phi*0.1*(v + 40)/(1 - exp(-(v + 40)/10));
end

function bm(v, phi)
  phi*0.108*exp(-v/18);
end

function ah(v, phi)
  phi*0.0027*exp(-v/20);
end

function bh(v, phi)
  phi*1/(1 + exp(-(v + 35)/10));
end

function an(v, kan, phi)
  1/kan*phi*0.01*(v + 55)/(1 - exp(-(v + 55)/10));
end

function bn(v, kan, phi)
  1/kan*phi*0.0555*exp(-v/80);
end

function ihh(v, m, h, n, gk, gkatp, gl, gna, natp, poatp, vk, vl, vna)
  gna*h*(v - vna)*m^3 + gk*(v - vk)*n^4 + gl*(v - vl) + gkatp*natp*poatp*(v - vk);
end

function ae(x, ae0)
  ae0/(1 + exp(-x/5));
end

function ai(x, ai0)
  ai0/(1 + exp(-x/5));
end

model main()
  // XPP model
  // This model was converted from XPP ode format to SBML using sbmlutils-0.1.5a6.
  // # hh200x50_Katp.ode
  // # Neurotox Res (2009) 15:71-81
  // # 200 e and 50 I HH equations
  // # random applied current, random conductances
  // # to get it started, just set the excitatory synapses
  // # to some random values between 0 and 1
  // # you will get persistent activity.
  // # here are the HH functions
  // # K(ATP) channel was inserted into the model.
  // am(v)=phi*.1*(v+40)/(1-exp(-(v+40)/10))
  // bm(v)=phi*0.108*exp(-v/18)
  // ah(v)=phi*0.0027*exp(-v/20)
  // bh(v)=phi*1/(1+exp(-(v+35)/10))
  // an(v)=(1/Kan)*phi*.01*(v+55)/(1-exp(-(v+55)/10))
  // bn(v)=(1/Kan)*phi*0.0555*exp(-v/80)
  // par phi=1,Kan=1
  // poatp = 0.8/(1+(iatp/0.023)^2)
  // # Stimulus protocol
  // # param period=20, iStim_mag=10, iStim_beg=5, iStim_dur=2
  // # i_Stim= iStim_mag * heav(mod(t,period)-iStim_beg) * heav(iStim_beg+iStim_dur-mod(t,period))
  // par i_Stim=10
  // par tstim=100
  // par init_atp=0.1 final_atp=0.3
  // iatp=if(t<tstim)then(init_atp)else(final_atp)
  // # this is the current for each cell
  // ihh(v,m,h,n)=gna*h*(v-vna)*m^3+gk*(v-vk)*n^4+gl*(v-vl)+gkatp*natp*poatp*(v-vk)
  // # synaptic onset parameters
  // # s' = a(vpre)(1-s)-s/tau
  // ae(x)=ae0/(1+exp(-x/5))
  // ai(x)=ai0/(1+exp(-x/5))
  // par ae0=4,ai0=1
  // # dont recompute the random tables every time a parameter is changed
  // @ autoeval=0
  // # random synapses - 20 % connectivity
  // table wee % 40000 0 39999 ran(1)<.02
  // table wei % 10000 0 9999 ran(1)<.02
  // table wie % 10000 0 9999 ran(1)<.02
  // table wii % 2500 0 2499 ran(1)<.02
  // # multiply synapses by weights
  // special see=mmult(200,200,wee,se0)
  // special sei=mmult(200,50,wei,se0)
  // special sie=mmult(50,200,wie,si0)
  // special sii=mmult(50,50,wii,si0)
  // # random currents applied to each cell
  // table r_e % 200 0 199 ran(1)-.5
  // table r_i % 50 0 49 ran(1)-.5
  // # parameters
  // par taue=4,taui=10
  // par vna=50 vk=-77 vl=-54.4 gna=120 gk=36 gl=0.3
  // par ie0=15, ie1=0
  // par ii0=0,ii1=0
  // par gee=0.1, gie=0.1, gii=0.1, gei=0.1
  // par eex=0, ein=-75
  // par gkatp=0.082, natp=50
  // # finally the ODEs
  // ve[0..199]'=ie0+ie1*r_e([j])-ihh(ve[j],me[j],he[j],ne[j])-gee*see([j])*(ve[j]-eex)-gie*sie([j])*(ve[j]-ein)
  // vi[0..49]'=ii0+ii1*r_i([j])-ihh(vi[j],mi[j],hi[j],ni[j])-gei*sei([j])*(vi[j]-eex)-gii*sii([j])*(vi[j]-ein)
  // # synapses...
  // se[0..199]'=-se[j]/taue+ae(ve[j])*(1-se[j])
  // si[0..49]'=-si[j]/taui+ai(vi[j])*(1-si[j])
  // # gating variables
  // me[0..199]'=am(ve[j])*(1-me[j])-bm(ve[j])*me[j]
  // he[0..199]'=ah(ve[j])*(1-he[j])-bh(ve[j])*he[j]
  // ne[0..199]'=an(ve[j])*(1-ne[j])-bn(ve[j])*ne[j]
  // mi[0..49]'=am(vi[j])*(1-mi[j])-bm(vi[j])*mi[j]
  // hi[0..49]'=ah(vi[j])*(1-hi[j])-bh(vi[j])*hi[j]
  // ni[0..49]'=an(vi[j])*(1-ni[j])-bn(vi[j])*ni[j]
  // # initial data
  // init ve[0..199]=-75
  // init vi[0..49]=-75
  // # some numerical settings
  // @ total=200,meth=euler,nout=10,dt=.01
  // @ xlo=0, xhi=200, yhi=40, ylo=-90
  // done
  // This file has been produced by sbmlutils.
  // Terms of use
  // Copyright © 2017 Matthias Koenig
  // Redistribution and use of any part of this model, with or without modification, are permitted provided that the following conditions are met:
  // Redistributions of this SBML file must retain the above copyright notice, this list of conditions and the following disclaimer.
  // Redistributions in a different form must reproduce the above copyright notice, this list of conditions and the following disclaimer in the documentation and/or other materials provided with the distribution.
  // This model is distributed in the hope that it will be useful, but WITHOUT ANY WARRANTY; without even the implied warranty of MERCHANTABILITY or FITNESS FOR A PARTICULAR PURPOSE.

  // Parameters:
  phi = 1; phi is "phi = 1";
  kan = 1; kan is "kan = 1";
  i_stim = 10; i_stim is "i_stim = 10";
  tstim = 100; tstim is "tstim = 100";
  init_atp = 0.1; init_atp is "init_atp = 0.1";
  final_atp = 0.3; final_atp is "final_atp = 0.3";
  ae0 = 4; ae0 is "ae0 = 4";
  ai0 = 1; ai0 is "ai0 = 1";
  taue = 4; taue is "taue = 4";
  taui = 10; taui is "taui = 10";
  vna = 50; vna is "vna = 50";
  vk = -77; vk is "vk = -77";
  vl = -54.4; vl is "vl = -54.4";
  gna = 120; gna is "gna = 120";
  gk = 36; gk is "gk = 36";
  gl = 0.3; gl is "gl = 0.3";
  ie0 = 15; ie0 is "ie0 = 15";
  ie1 = 0; ie1 is "ie1 = 0";
  ii0 = 0; ii0 is "ii0 = 0";
  ii1 = 0; ii1 is "ii1 = 0";
  gee = 0.1; gee is "gee = 0.1";
  gie = 0.1; gie is "gie = 0.1";
  gii = 0.1; gii is "gii = 0.1";
  gei = 0.1; gei is "gei = 0.1";
  eex = 0; eex is "eex = 0";
  ein = -75; ein is "ein = -75";
  gkatp = 0.082; gkatp is "gkatp = 0.082";
  natp = 50; natp is "natp = 50";
  ve[0..199] = -75 = -75;
  vi[0..49] = -75 = -75;
  poatp has dimensionless;
  iatp has dimensionless;
  t has dimensionless; t is "model time";

  // Assignment rules:
  poatp := 0.8/(1 + (iatp/0.023)^2);
  iatp := piecewise(init_atp, t < tstim, final_atp);
  t := time;
end
