// SBML level 3 version 1

function max(x, y)
  piecewise(x, x > y, y);
end
max is "minimum";

function min(x, y)
  piecewise(x, x < y, y);
end
min is "maximum";

function heav(x)
  piecewise(0, x < 0, 0.5, x == 0, 1, x > 0, 0);
end
heav is "heavyside";

function mod(x, y)
  piecewise(x - y*ceil(x/y), xor(x < 0, y < 0), x - y*floor(x/y));
end
mod is "modulo";

model main()
  // XPP model
  // This model was converted from XPP ode format to SBML using sbmlutils-0.1.5a6.
  // # Simplified 2D HH model
  // # formatted for use with XPPAUT
  // # Parameters as in the model of Figure 8, Lundstrom et al, J Comp Neurosci
  // # Note: the z variable introduces stimulus noise and must be removed for bifurcation analysis
  // wiener nz
  // v' = -(Gl*(v - El) + Gk*n^4*(v - Ek) + Gna*minf^3*h*(v - Ena))/cm + i/cm + z
  // n' = (ninf - n) / ntau
  // z'=-z/tau + nsig*sqrt(2/tau)*nz
  // par tau=1
  // par i=0, mVh=-40,mk=7,nVh=-45,nk=15, Gna=50,Gk=36,Gl=5,Ena=50,Ek=-77,El=-54,cm=1
  // par nsig=0
  // par Cbase=3,Camp=50,Vmax=-50,sig=1
  // ntau = Cbase + Camp*exp(-(Vmax - V)^2/sig^2)
  // ninf = 1.0 / (1+exp( (nVh - v)/nk) )
  // minf = 1.0 / (1+exp( (mVh - v)/mk) )
  // h = .89 - 1.1*n
  // init v=-65,n=0.3
  // @ meth=euler,total=20ee0,dt=.005,nout=50
  // This file has been produced by sbmlutils.
  // Terms of use
  // Copyright © 2017 Matthias Koenig
  // Redistribution and use of any part of this model, with or without modification, are permitted provided that the following conditions are met:
  // Redistributions of this SBML file must retain the above copyright notice, this list of conditions and the following disclaimer.
  // Redistributions in a different form must reproduce the above copyright notice, this list of conditions and the following disclaimer in the documentation and/or other materials provided with the distribution.
  // This model is distributed in the hope that it will be useful, but WITHOUT ANY WARRANTY; without even the implied warranty of MERCHANTABILITY or FITNESS FOR A PARTICULAR PURPOSE.

  // Parameters:
  nz = 0;
  tau = 1; tau is "tau = 1";
  i = 0; i is "i = 0";
  mvh = -40; mvh is "mvh = -40";
  mk = 7; mk is "mk = 7";
  nvh = -45; nvh is "nvh = -45";
  nk = 15; nk is "nk = 15";
  gna = 50; gna is "gna = 50";
  gk = 36; gk is "gk = 36";
  gl = 5; gl is "gl = 5";
  ena = 50; ena is "ena = 50";
  ek = -77; ek is "ek = -77";
  el = -54; el is "el = -54";
  cm = 1; cm is "cm = 1";
  nsig = 0; nsig is "nsig = 0";
  cbase = 3; cbase is "cbase = 3";
  camp = 50; camp is "camp = 50";
  vmax = -50; vmax is "vmax = -50";
  sig = 1; sig is "sig = 1";
  v = -65; v is "v = -65";
  n = 0.3; n is "n = 0.3";
  z = 0 dimensionless;
  ntau has dimensionless;
  ninf has dimensionless;
  minf has dimensionless;
  h has dimensionless;
  t has dimensionless; t is "model time";

  // Assignment rules:
  ntau := cbase + camp*exp(-(vmax - v)^2/sig^2);
  ninf := 1/(1 + exp((nvh - v)/nk));
  minf := 1/(1 + exp((mvh - v)/mk));
  h := 0.89 - 1.1*n;
  t := time;

  // Rate rules:
  v' = -(gl*(v - el) + gk*n^4*(v - ek) + gna*minf^3*h*(v - ena))/cm + i/cm + z;
  n' = (ninf - n)/ntau;
  z' = -z/tau + nsig*sqrt(2/tau)*nz;
end
