// SBML level 3 version 1

function max(x, y)
  piecewise(x, x > y, y);
end
max is "minimum";

function min(x, y)
  piecewise(x, x < y, y);
end
min is "maximum";

function heav(x)
  piecewise(0, x < 0, 0.5, x == 0, 1, x > 0, 0);
end
heav is "heavyside";

function mod(x, y)
  piecewise(x - y*ceil(x/y), xor(x < 0, y < 0), x - y*floor(x/y));
end
mod is "modulo";

function i_dc(t, idc)
  idc;
end

function minf(v, beta_m, gamma_m)
  0.5*(1 + tanh((v - beta_m)/gamma_m));
end

function yinf(v, beta_y, gamma_y)
  0.5*(1 + tanh((v - beta_y)/gamma_y));
end

function tauy(v, beta_y, gamma_y)
  1/cosh((v - beta_y)/(2*gamma_y));
end

function itf(v, mt, ht, gtbar)
  gtbar*mt^2*ht*v;
end

function mtinf(v)
  1/(1 + exp(-(v + 60)/6.2));
end

function htinf(v)
  1/(1 + exp((v + 84)/4));
end

function tauht(v, apt)
  28 + apt*exp((v + 25)/(-10.5));
end

function hhinf(v, k, vhhalf)
  1/(1 + exp((vhhalf - v)/k));
end

function tauhh(v, camp, cbase, sh, vm)
  cbase + camp*exp(-(vm - v)^2/sh^2);
end

model main()
  // XPP model
  // This model was converted from XPP ode format to SBML using sbmlutils-0.1.5a6.
  // # Modified Morris-Lecar model from Prescott (2008, 2008) + T-current from Rubin (2004)+h-current from Izhikevich
  // # modified from ml_salka.ode
  // #stim used in experiments, mean=0, std=0.1
  // table Iext stim.tab
  // #Iext(t)=0
  // nd=normal(0,0.4)
  // par dc_noise=17.0057
  // aux noise=dc_noise+nd
  // dV/dt = (i_dc(t)+amp*Iext(t)+dc_noise+nd-gna*minf(V)*(V-Vna)-gk*y*(V-VK)-gl*(V-Vl)-itf(V,mtinf(V),h)-gh*hh*(v-Vh))/c
  // dy/dt = phi_y*(yinf(V)-y)/tauy(V)
  // dh/dt = qht*(htinf(V)-h)/tauht(V)
  // dhh/dt=(hhinf(V)-hh)/tauhh(V)
  // par c=2
  // # HERE IS EVERYTHING YOU NEED TO KNOW ABOUT THE STIMULuS
  // i_dc(t)=idc
  // # idc is -20.89 voor -80, -2 voor -70, 16.27 voor -60, 31.43 voor -50
  // par idc=31
  // par amp=200
  // aux stim=i_dc(t)+amp*Iext(t)
  // init V=-50, y=0, h=0, hh=0.03
  // # FAST INWARD CURRENT (INa or activation variable)
  // # This is assumed to activate instantaneously with changes in voltage
  // # voltage-dependent activation curve is described by m
  // minf(V)=.5*(1+tanh((V-beta_m)/gamma_m))
  // # maximal conductance and reversal potential
  // par beta_m=-1.2,gamma_m=18
  // par gna=20,vna=50
  // # DELAYED RECTIFIER CURRENT (IKdr or recovery variable)
  // # this current activates more slowly than INa
  // # In this code, activation of IKdr is controlled by y
  // yinf(V)=.5*(1+tanh((V-beta_y)/gamma_y))
  // tauy(V)=1/cosh((V-beta_y)/(2*gamma_y))
  // # in the 2D model, varying beta_w shifts the w activation curve (w=y here) and can convert the neuron between class 1, 2, and 3
  // par beta_y=0, gamma_y=10
  // # maximal conductance and reversal potential
  // par gk=20, vk=-100, phi_y=0.15
  // # LEAK CURRENT (Il)
  // # just a passive leak conductance
  // par gl=2, vl=-70
  // # T CURRENT (IT)
  // itf(v,mt,ht)=gtbar*mt^2*ht*v
  // # fast (instantaneous) activation
  // mtinf(v) = 1/(1+exp(-(v+60)/6.2))
  // # slow inactivation
  // htinf(v) = 1/(1+exp((v+84)/4))
  // tauht(v)=(28+apt*exp((v+25)/(-10.5)))
  // par gtbar=20,qht=2.5,apt=1
  // # h CURRENT (Ih)
  // hhinf(v)=1/(1+exp((Vhhalf-v)/k))
  // tauhh(v)=Cbase+Camp*exp(-(Vm-v)^2/sh^2)
  // par Cbase=10, Camp=50, sh=20, Vhhalf=-82, k=-9, Vm=-75, Vh=-30, gh=1.5
  // # following parameters control duration of simulation and axes of default plot
  // @ total=303000,xlo=0,xhi=6000,ylo=-100,yhi=50
  // @ meth=euler, dt=0.1, bounds=1000
  // @ MAXSTOR=3030010
  // done
  // This file has been produced by sbmlutils.
  // Terms of use
  // Copyright © 2017 Matthias Koenig
  // Redistribution and use of any part of this model, with or without modification, are permitted provided that the following conditions are met:
  // Redistributions of this SBML file must retain the above copyright notice, this list of conditions and the following disclaimer.
  // Redistributions in a different form must reproduce the above copyright notice, this list of conditions and the following disclaimer in the documentation and/or other materials provided with the distribution.
  // This model is distributed in the hope that it will be useful, but WITHOUT ANY WARRANTY; without even the implied warranty of MERCHANTABILITY or FITNESS FOR A PARTICULAR PURPOSE.

  // Parameters:
  dc_noise = 17.0057; dc_noise is "dc_noise = 17.0057";
  c = 2; c is "c = 2";
  idc = 31; idc is "idc = 31";
  amp = 200; amp is "amp = 200";
  v = -50; v is "v = -50";
  y = 0; y is "y = 0";
  h = 0; h is "h = 0";
  hh = 0.03; hh is "hh = 0.03";
  beta_m = -1.2; beta_m is "beta_m = -1.2";
  gamma_m = 18; gamma_m is "gamma_m = 18";
  gna = 20; gna is "gna = 20";
  vna = 50; vna is "vna = 50";
  beta_y = 0; beta_y is "beta_y = 0";
  gamma_y = 10; gamma_y is "gamma_y = 10";
  gk = 20; gk is "gk = 20";
  vk = -100; vk is "vk = -100";
  phi_y = 0.15; phi_y is "phi_y = 0.15";
  gl = 2; gl is "gl = 2";
  vl = -70; vl is "vl = -70";
  gtbar = 20; gtbar is "gtbar = 20";
  qht = 2.5; qht is "qht = 2.5";
  apt = 1; apt is "apt = 1";
  cbase = 10; cbase is "cbase = 10";
  camp = 50; camp is "camp = 50";
  sh = 20; sh is "sh = 20";
  vhhalf = -82; vhhalf is "vhhalf = -82";
  k = -9; k is "k = -9";
  vm = -75; vm is "vm = -75";
  vh = -30; vh is "vh = -30";
  gh = 1.5; gh is "gh = 1.5";
  nd has dimensionless;
  noise has dimensionless;
  stim has dimensionless;
  t has dimensionless; t is "model time";

  // Assignment rules:
  nd := normal(0, 0.4);
  noise := dc_noise + nd;
  stim := i_dc(t, idc) + amp*iext(t);
  t := time;

  // Rate rules:
  v' = (i_dc(t, idc) + amp*iext(t) + dc_noise + nd - gna*minf(v, beta_m, gamma_m)*(v - vna) - gk*y*(v - vk) - gl*(v - vl) - itf(v, mtinf(v), h, gtbar) - gh*hh*(v - vh))/c;
  y' = phi_y*(yinf(v, beta_y, gamma_y) - y)/tauy(v, beta_y, gamma_y);
  h' = qht*(htinf(v) - h)/tauht(v, apt);
  hh' = (hhinf(v, k, vhhalf) - hh)/tauhh(v, camp, cbase, sh, vm);
end
