// SBML level 2 version 4

model main()

  // Compartments:
  compartment comp1_M1 = 1e-16; comp1_M1 is "compartment1";  // GO:0031594
  compartment comp1 = 1e-16; comp1 is "compartment1";  // GO:0031594
  compartment cell_M3 = 1 volume;  // GO:0005623
  compartment cell = 1 volume;  // GO:0005623

  // Species:
  // monoliganded basal state
  species BL in comp1_M1 = 0; BL is "BasalACh";  // isVersionOf interpro:IPR002394 GO:0005892
  // biliganded desensitised state
  species DLL in comp1_M1 = 0; DLL is "DesensitisedACh2";  // isVersionOf interpro:IPR002394 GO:0005892
  // biliganted active state
  species ALL in comp1_M1 = 0; ALL is "ActiveACh2";  // isVersionOf interpro:IPR002394 GO:0005892
  // unkiganded active state
  species A in comp1_M1 = 0; A is "Active";  // isVersionOf interpro:IPR002394 GO:0005892
  // monoliganded desensitised state
  species DL in comp1_M1 = 0; DL is "DesensitisedACh";  // isVersionOf interpro:IPR002394 GO:0005892
  // biliganded basal state
  species BLL_M1 in comp1_M1 = 0; BLL_M1 is "BasalACh2";  // isVersionOf interpro:IPR002394 GO:0005892
  // monoliganded intermediate
  species IL_M1 in comp1_M1 = 0; IL_M1 is "IntermediateACh";  // isVersionOf interpro:IPR002394 GO:0005892
  // unliganted intermediate
  species I_M1 in comp1_M1 = 0; I_M1 is "Intermediate";  // isVersionOf interpro:IPR002394 GO:0005892
  // biliganded intermediate
  species ILL_M1 in comp1_M1 = 0; ILL_M1 is "IntermediateACh2";  // isVersionOf interpro:IPR002394 GO:0005892
  // monoliganded active state
  species AL in comp1_M1 = 0; AL is "ActiveACh";  // isVersionOf interpro:IPR002394 GO:0005892
  // unliganded basal state
  species B_M1 in comp1_M1 = 1.660578e-21/comp1_M1; B_M1 is "Basal";  // isVersionOf interpro:IPR002394 GO:0005892
  // fully desensitised state
  species D_M1 in comp1_M1 = 0; D_M1 is "Desensitised";  // isVersionOf interpro:IPR002394 GO:0005892
  // monoliganded basal state
  species BL_M2 in comp1 = 0; BL_M2 is "BasalACh";  // isVersionOf interpro:IPR002394 GO:0005892
  // biliganted active state
  species ALL_M2 in comp1 = 0; ALL_M2 is "ActiveACh2";  // isVersionOf interpro:IPR002394 GO:0005892
  // biliganded intermediate
  species ILL in comp1 = 0; ILL is "IntermediateACh2";  // isVersionOf interpro:IPR002394 GO:0005892
  // monoliganded desensitised state
  species DL_M2 in comp1 = 0; DL_M2 is "DesensitisedACh";  // isVersionOf interpro:IPR002394 GO:0005892
  // biliganded desensitised state
  species DLL_M2 in comp1 = 0; DLL_M2 is "DesensitisedACh2";  // isVersionOf GO:0005892
  // unliganded basal state
  species B in comp1 = 1e-22/comp1; B is "Basal";  // isVersionOf interpro:IPR002394 GO:0005892
  // unkiganded active state
  species A_M2 in comp1 = 0; A_M2 is "Active";  // isVersionOf GO:0005892
  // biliganded basal state
  species BLL in comp1 = 0; BLL is "BasalACh2";  // isVersionOf interpro:IPR002394 GO:0005892
  // unliganted intermediate
  species I in comp1 = 0; I is "Intermediate";  // isVersionOf interpro:IPR002394 GO:0005892
  // ligand
  species L in comp1 = 1e-21/comp1; L is "ACh";  // CHEBI:15355 kegg.compound:C01996
  // monoliganded intermediate
  species IL in comp1 = 0; IL is "IntermediateACh";  // isVersionOf interpro:IPR002394 GO:0005892
  // fully desensitised state
  species D in comp1 = 0; D is "Desensitised";  // isVersionOf interpro:IPR002394 GO:0005892
  // monoliganded active state
  species AL_M2 in comp1 = 0; AL_M2 is "ActiveACh";  // isVersionOf interpro:IPR002394 GO:0005892
  species X_M3 in cell_M3 = 0.01; X_M3 is "Cyclin Protease";  // isVersionOf GO:0005680; hasVersion reactome:REACT_7165.1
  species M_M3 in cell_M3 = 0.01; M_M3 is "CDC-2 Kinase";  // hasVersion uniprot:P24033 uniprot:P35567
  species C_M3 in cell_M3 = 0.01; C_M3 is "Cyclin";  // isVersionOf uniprot:Q4KLA0 interpro:IPR006670
  species MI in cell = 0.99; MI is "Inactive CDC-2 Kinase";  // hasVersion uniprot:P24033 uniprot:P35567
  species X in cell = 0.01; X is "Active Cyclin Protease";
  species C in cell = 0.01; C is "Cyclin";  // isVersionOf interpro:IPR006670
  species M in cell = 0.01; M is "Active CDC-2 Kinase";  // hasVersion uniprot:P35567 uniprot:P24033
  species XI in cell = 0.99; XI is "Inactive Cyclin Protease";

  // Parameters:
  t2 = 20;
  kf_9 = 19.7;
  kr_10_M1 = 1.74;
  kr_11_M1 = 0.81;
  kr_12_M1 = 4;
  kr_13_M1 = 8;
  kr_14_M1 = 0.0012;
  kr_16_M1 = 0.0012;
  kf_2 = 30000;
  kf_14 = 0.05;
  kf_16 = 0.05;
  kf_10_M1 = 19.85;
  kf_12_M1 = 3000;
  kr_15_M1 = 0.0012;
  kf_13 = 1500;
  kf_15 = 0.05;
  kf_11 = 20;
  kf_6_M1 = 130;
  kf_7_M1 = 3000;
  kf_4_M1 = 1500;
  kf_5_M1 = 0.54;
  kf_3_M1 = 3000;
  kf_0_M1 = 3000;
  kf_1_M1 = 1500;
  kf_8_M1 = 1500;
  kr_2_M1 = 700;
  kr_3_M1 = 8.64;
  kr_0_M1 = 8000;
  kr_1_M1 = 16000;
  kr_6_M1 = 2740;
  kr_7_M1 = 4;
  kr_4_M1 = 17.28;
  kr_5_M1 = 10800;
  kr_8_M1 = 8;
  kr_9_M1 = 3.74;
  kr_7 = 4;
  kr_6 = 2740;
  kr_5 = 10800;
  kr_4 = 17.28;
  kr_3 = 8.64;
  kr_2 = 700;
  kr_1 = 16000;
  kr_0 = 8000;
  kr_8 = 8;
  kf_12 = 300000000;
  kf_10 = 19.85;
  kr_16 = 0.0012;
  kr_15 = 0.0012;
  kr_14 = 0.0012;
  kr_13 = 8;
  kr_12 = 4;
  kr_11 = 0.81;
  kr_10 = 1.74;
  kf_2_M2 = 30000;
  kf_6 = 130;
  kf_5 = 0.54;
  kf_16_M2 = 0.05;
  kr_9 = 3.74;
  kf_3 = 300000000;
  kf_1 = 150000000;
  kf_0 = 300000000;
  kf_7 = 300000000;
  kf_4 = 150000000;
  kf_9_M2 = 19.7;
  kf_8 = 150000000;
  kf_13_M2 = 150000000;
  kf_11_M2 = 20;
  kf_15_M2 = 0.05;
  kf_14_M2 = 0.05;
  VM1 = 3;
  VM3 = 1;
  Kc = 0.5;
  V3_M3 = ;
  V1_M3 = ;
  V3 = ;
  V1 = ;
  VM3_M4 = 1;
  VM1_M4 = 3;
  Kc_M4 = 0.5;

  // Assignment rules:
  // (no variable named) := M*VM3;
  // (no variable named) := C*VM1*(C + Kc)^(-1);
  // (no variable named) := M*VM3;
  // (no variable named) := C*VM1*(C + Kc)^(-1);

  // Reactions:
  // kf_15 * IL - kr_15 * DL
  // monoliganded intermediate <=> monoliganded desensitised
  React15: IL_M1 -> DL; comp1_M1*(kf_15*IL_M1 - kr_15_M1*DL);
  // kf_14 * I - kr_14 * D
  // unliganded intermediate <=> unliganded desensitised
  React14: I_M1 -> D_M1; comp1_M1*(kf_14*I_M1 - kr_14_M1*D_M1);
  // kf_16 * ILL - kr_16 * DLL
  // biliganded intermediate <=> biliganded desensitised
  React16: ILL_M1 -> DLL; comp1_M1*(kf_16*ILL_M1 - kr_16_M1*DLL);
  // kf_11 * ALL - kr_11 * ILL
  // biliganded active <=> biliganded intermediate
  React11: ALL -> ILL_M1; comp1_M1*(kf_11*ALL - kr_11_M1*ILL_M1);  // GO:0004889
  // kf_10 * AL - kr_10 * IL
  // monoliganded active <=> monoliganded intermediate
  React10: AL -> IL_M1; comp1_M1*(kf_10_M1*AL - kr_10_M1*IL_M1);  // GO:0004889
  // kf_13 * DL - kr_13 * DLL
  // second ligand on desensitised
  React13: DL -> DLL; comp1_M1*(kf_13*DL - kr_13_M1*DLL);  // GO:0042166
  // kf_12 * D - kr_12 * DL
  // first ligand on desensitised
  React12: D_M1 -> DL; comp1_M1*(kf_12_M1*D_M1 - kr_12_M1*DL);  // GO:0042166
  // kf_8 * IL - kr_8 * ILL
  // second ligand on intermediate
  React8: IL_M1 -> ILL_M1; comp1_M1*(kf_8_M1*IL_M1 - kr_8_M1*ILL_M1);  // GO:0042166
  // kf_5 * B - kr_5 * A
  // opening of unliganded
  React5: B_M1 -> A; comp1_M1*(kf_5_M1*B_M1 - kr_5_M1*A);  // GO:0004889
  // kf_3 * A - kr_3 * AL
  // first ligand on active
  React3: A -> AL; comp1_M1*(kf_3_M1*A - kr_3_M1*AL);  // GO:0042166
  // kf_9 * A - kr_9 * I
  // unliganded active <=> unliganded intermediate
  React9_M1: A -> I_M1; comp1_M1*(kf_9*A - kr_9_M1*I_M1);  // GO:0004889
  // kf_4 * AL - kr_4 * ALL
  // second ligand on active
  React4_M1: AL -> ALL; comp1_M1*(kf_4_M1*AL - kr_4_M1*ALL);  // GO:0042166
  // kf_7 * I - kr_7 * IL
  // first ligand on intermediate
  React7_M1: I_M1 -> IL_M1; comp1_M1*(kf_7_M1*I_M1 - kr_7_M1*IL_M1);  // GO:0042166
  // kf_6 * BL - kr_6 * AL
  // opening of monoliganded
  React6_M1: BL -> AL; comp1_M1*(kf_6_M1*BL - kr_6_M1*AL);  // GO:0004889
  // kf_1 * BL - kr_1 * BLL
  // second ligand on basal
  React1_M1: BL -> BLL_M1; comp1_M1*(kf_1_M1*BL - kr_1_M1*BLL_M1);  // GO:0042166
  // kf_0 * B - kr_0 * BL
  // first ligand on basal
  React0_M1: B_M1 -> BL; comp1_M1*(kf_0_M1*B_M1 - kr_0_M1*BL);  // GO:0042166
  // kf_2 * BLL - kr_2 * ALL
  // opening of biliganded
  React2_M1: BLL_M1 -> ALL; comp1_M1*(kf_2*BLL_M1 - kr_2_M1*ALL);  // GO:0004889
  // kf_12 * D * L - kr_12 * DL
  // first ligand on desensitised
  React12_M2: D + L -> DL_M2; comp1*(kf_12*D*L - kr_12*DL_M2);  // GO:0042166
  // kf_13 * DL * L - kr_13 * DLL
  // second ligand on desensitised
  React13_M2: DL_M2 + L -> DLL_M2; comp1*(kf_13_M2*DL_M2*L - kr_13*DLL_M2);  // GO:0042166
  // kf_10 * AL - kr_10 * IL
  // monolig act <=> monolig interm
  React10_M2: AL_M2 -> IL; comp1*(kf_10*AL_M2 - kr_10*IL);  // GO:0004889
  // kf_11 * ALL - kr_11 * ILL
  // bilig act <=> bilig interm
  React11_M2: ALL_M2 -> ILL; comp1*(kf_11_M2*ALL_M2 - kr_11*ILL);  // GO:0004889
  // kf_16 * ILL - kr_16 * DLL
  // bilig interm <=> bilig desen
  React16_M2: ILL -> DLL_M2; comp1*(kf_16_M2*ILL - kr_16*DLL_M2);
  // kf_14 * I - kr_14 * D
  // unlig interm <=> unlig desen
  React14_M2: I -> D; comp1*(kf_14_M2*I - kr_14*D);
  // kf_15 * IL - kr_15 * DL
  // monolig interm <=> monolig desen
  React15_M2: IL -> DL_M2; comp1*(kf_15_M2*IL - kr_15*DL_M2);
  // kf_8 * IL * L - kr_8 * ILL
  // second ligand on intermediate
  React8_M2: IL + L -> ILL; comp1*(kf_8*IL*L - kr_8*ILL);  // GO:0042166
  // kf_9 * A - kr_9 * I
  // unlig act <=> unlig interm
  React9: A_M2 -> I; comp1*(kf_9_M2*A_M2 - kr_9*I);  // GO:0004889
  // kf_0 * B * L - kr_0 * BL
  // first ligand on basal
  React0: B + L -> BL_M2; comp1*(kf_0*B*L - kr_0*BL_M2);  // GO:0042166
  // kf_1 * BL * L - kr_1 * BLL
  // second ligand on basal
  React1: BL_M2 + L -> BLL; comp1*(kf_1*BL_M2*L - kr_1*BLL);  // GO:0042166
  // kf_2 * BLL - kr_2 * ALL
  // opening of biliganded
  React2: BLL -> ALL_M2; comp1*(kf_2_M2*BLL - kr_2*ALL_M2);  // GO:0004889
  // kf_3 * A * L - kr_3 * AL
  // first ligand on active
  React3_M2: A_M2 + L -> AL_M2; comp1*(kf_3*A_M2*L - kr_3*AL_M2);  // GO:0042166
  // kf_4 * AL * L - kr_4 * ALL
  // second ligand on active
  React4: AL_M2 + L -> ALL_M2; comp1*(kf_4*AL_M2*L - kr_4*ALL_M2);  // GO:0042166
  // kf_5 * B - kr_5 * A
  // opening of unliganded
  React5_M2: B -> A_M2; comp1*(kf_5*B - kr_5*A_M2);  // GO:0004889
  // kf_6 * BL - kr_6 * AL
  // opening of monoliganded
  React6: BL_M2 -> AL_M2; comp1*(kf_6*BL_M2 - kr_6*AL_M2);  // GO:0004889
  // kf_7 * I * L - kr_7 * IL
  // first ligand on intermediate
  React7: I + L -> IL; comp1*(kf_7*I*L - kr_7*IL);  // GO:0042166
  activation_of_cdc2_kinase: => M_M3; cell_M3*(1 + (-1*M_M3))*V1_M3*(activation_of_cdc2_kinase_K1 + (-1*M_M3) + 1)^(-1);  // isVersionOf ec-code:3.1.3.16 GO:0045737 GO:0006470
    activation_of_cdc2_kinase_K1 = 0.005;
  deactivation_of_cdc2_kinase: M_M3 => ; cell_M3*M_M3*deactivation_of_cdc2_kinase_V2*(deactivation_of_cdc2_kinase_K2 + M_M3)^(-1);  // isVersionOf ec-code:2.7.10.2 GO:0045736 GO:0006468
    deactivation_of_cdc2_kinase_V2 = 1.5; deactivation_of_cdc2_kinase_K2 = 0.005;
  activation_of_cyclin_protease: => X_M3; cell_M3*V3_M3*(1 + (-1*X_M3))*(activation_of_cyclin_protease_K3 + (-1*X_M3) + 1)^(-1);
    activation_of_cyclin_protease_K3 = 0.005;
  deactivation_of_cyclin_protease: X_M3 => ; cell_M3*deactivation_of_cyclin_protease_V4*X_M3*(deactivation_of_cyclin_protease_K4 + X_M3)^(-1);
    deactivation_of_cyclin_protease_K4 = 0.005; deactivation_of_cyclin_protease_V4 = 0.5;
  creation_of_cyclin: => C_M3; cell_M3*creation_of_cyclin_vi;  // isVersionOf GO:0006412
    creation_of_cyclin_vi = 0.025;
  default_degradation_of_cyclin: C_M3 => ; C_M3*cell_M3*default_degradation_of_cyclin_kd;  // isVersionOf GO:0008054
    default_degradation_of_cyclin_kd = 0.01;
  reaction3: C_M3 => ; C_M3*cell_M3*reaction3_vd*X_M3*(C_M3 + reaction3_Kd)^(-1); reaction3 is "cdc2 kinase triggered degration of cyclin";  // modifiers: X_M3; isVersionOf GO:0008054
    reaction3_vd = 0.25; reaction3_Kd = 0.02;
  reaction3_M4: C => ; C*cell*reaction3_M4_vd*X*(C + reaction3_M4_Kd)^(-1); reaction3_M4 is "cdc2 kinase triggered degration of cyclin";  // modifiers: X; isVersionOf GO:0008054
    reaction3_M4_vd = 0.25; reaction3_M4_Kd = 0.02;
  reaction2_M4: C => ; C*cell*reaction2_M4_kd; reaction2_M4 is "default degradation of cyclin";  // isVersionOf GO:0008054
    reaction2_M4_kd = 0.01;
  reaction1_M4: => C; cell*reaction1_M4_vi; reaction1_M4 is "creation of cyclin";  // isVersionOf GO:0006412
    reaction1_M4_vi = 0.025;
  reaction7_M4: X => XI; cell*reaction7_M4_V4*X*(reaction7_M4_K4 + X)^(-1); reaction7_M4 is "deactivation of cyclin protease";
    reaction7_M4_K4 = 0.005; reaction7_M4_V4 = 0.5;
  reaction6_M4: XI => X; cell*V3*XI*(reaction6_M4_K3 + XI)^(-1); reaction6_M4 is "activation of cyclin protease";
    reaction6_M4_K3 = 0.005;
  reaction5_M4: M => MI; cell*M*reaction5_M4_V2*(reaction5_M4_K2 + M)^(-1); reaction5_M4 is "deactivation of cdc2 kinase";  // isVersionOf ec-code:2.7.10.2 GO:0006468 GO:0045736
    reaction5_M4_V2 = 1.5; reaction5_M4_K2 = 0.005;
  reaction4_M4: MI => M; cell*MI*V1*(reaction4_M4_K1 + MI)^(-1); reaction4_M4 is "activation of cdc2 kinase";  // isVersionOf ec-code:3.1.3.16 GO:0045737 GO:0006470
    reaction4_M4_K1 = 0.005;

  // Events:
  RemovalACh: at (time > t2): kf_0 = 0, kf_3 = 0, kf_7 = 0, kf_12 = 0, kf_1 = 0, kf_4 = 0, kf_8 = 0, kf_13 = 0; RemovalACh is "removal of ACh";  // GO:0001507
end
