// SBML level 3 version 1

model rbc_update(blood, ins_e, gln__L_e, lnlc_e, thm_e, ncam_e, nac_e, urea_e, hco3_e, fum_e, pydxn_e, M_4pyrdx_e, normete__L_e, bilglcur_e, glyc_e, h2o_e, h_e, lac__L_e, sprm_e, M_3moxtyr_e, nrpphr_e, acnam_e, thmmp_e, co2_e, lac__D_e, mal__L_e, ocdcea_e, k_e, na1_e, dhdascb_e, cl_e, arg__L_e, nh4_e, adrnl_e, ala__L_e, ptrc_e, gal_e, ascb__L_e, h2o2_e, mepi_e, acald_e, leuktrB4_e, adn_e, pi_e, orot_e, M_5aop_e, phe__L_e, etha_e, co_e, dopa_e, man_e, gam_e, pydx_e, ac_e, hxan_e, glc__D_e, uri_e, ade_e, camp_e, hcys__L_e, o2_e, hdca_e, pydam_e, M_35cgmp_e, met__L_e, gly_e, cys__L_e, chol_e, ca2_e, gluala_e, ribflv_e, fru_e, spmd_e, fe2_e, leuktrA4_e, pyr_e, gthox_e, EX_ins_e, EX_gln__L_e, EX_lnlc_e, EX_thm_e, EX_ncam_e, EX_nac_e, EX_urea_e, EX_hco3_e, EX_fum_e, EX_pydxn_e, EX_M_4pyrdx_e, EX_normete__L_e, EX_bilglcur_e, EX_glyc_e, EX_h2o_e, EX_h_e, EX_lac__L_e, EX_sprm_e, EX_M_3moxtyr_e, EX_nrpphr_e, EX_acnam_e, EX_thmmp_e, EX_co2_e, EX_lac__D_e, EX_mal__L_e, EX_ocdcea_e, EX_k_e, EX_na1_e, EX_dhdascb_e, EX_cl_e, EX_arg__L_e, EX_nh4_e, EX_adrnl_e, EX_ala__L_e, EX_ptrc_e, EX_gal_e, EX_ascb__L_e, EX_h2o2_e, EX_mepi_e, EX_acald_e, EX_leuktrB4_e, EX_adn_e, EX_pi_e, EX_orot_e, EX_M_5aop_e, EX_phe__L_e, EX_etha_e, EX_co_e, EX_dopa_e, EX_man_e, EX_gam_e, EX_pydx_e, EX_ac_e, EX_hxan_e, EX_glc__D_e, EX_uri_e, EX_ade_e, EX_camp_e, EX_hcys__L_e, EX_o2_e, EX_hdca_e, EX_pydam_e, EX_M_35cgmp_e, EX_met__L_e, EX_gly_e, EX_cys__L_e, EX_chol_e, EX_ca2_e, EX_gluala_e, EX_ribflv_e, EX_fru_e, EX_spmd_e, EX_fe2_e, EX_leuktrA4_e, EX_pyr_e, EX_gthox_e)
  // rbc (UPDATE)
  // E.coli core DFBA model
  // Model version: 1
  // UPDATE submodel
  // Submodel for dynamically updating the metabolite count. This updates the ode model based on the FBA fluxes.
  // Description
  // This is a metabolism model of Homo sapiens in SBML format.
  // The content of this model has been carefully created in a manual research effort. This file has been exported from the software COBRApy and further processed with the JSBML-based ModelPolisher application.
  // This file has been produced by the Systems Biology Research Group using BiGG Models knowledge-base version of Nov 21, 2016, where it is currently hosted and identified by: iAB_RBC_283.
  // Terms of use
  // Copyright © 2016 The Regents of the University of California.
  // Redistribution and use of any part of this model from BiGG Models knowledge-base, with or without modification, are permitted provided that the following conditions are met:
  // Redistributions of this SBML file must retain the above copyright notice, this list of conditions and the following disclaimer.
  // Redistributions in a different form must reproduce the above copyright notice, this list of conditions and the following disclaimer in the documentation and/or other materials provided with the distribution.
  // This model is distributed in the hope that it will be useful, but WITHOUT ANY WARRANTY; without even the implied warranty of MERCHANTABILITY or FITNESS FOR A PARTICULAR PURPOSE.
  // For specific licensing terms about this particular model and regulations of commercial use, see this model in BiGG Models knowledge-base.
  // References
  // When using content from BiGG Models knowledge-base in your research works, please cite
  // King ZA, Lu JS, Dräger A, Miller PC, Federowicz S, Lerman JA, Ebrahim A, Palsson BO, and Lewis NE. (2015).
  // BiGG Models: A platform for integrating, standardizing, and sharing genome-scale models. Nucl Acids Res. doi:10.1093/nar/gkv1049
  // model units - substance: mmol, time: h, volume: l, area: m2, length: m, extent: mmol

  // Compartments:
  compartment blood = 1 l;

  // Species:
  species ins_e in blood = 1; ins_e is "Inosine";
  species gln__L_e in blood = 1; gln__L_e is "L-Glutamine";
  species lnlc_e in blood = 1; lnlc_e is "Lnlc c";
  species thm_e in blood = 1; thm_e is "Thiamin";
  species ncam_e in blood = 1; ncam_e is "Nicotinamide";
  species nac_e in blood = 1; nac_e is "Nicotinate";
  species urea_e in blood = 1; urea_e is "Urea";
  species hco3_e in blood = 1; hco3_e is "Bicarbonate";
  species fum_e in blood = 1; fum_e is "Fumarate";
  species pydxn_e in blood = 1; pydxn_e is "Pyridoxine";
  species M_4pyrdx_e in blood = 1; M_4pyrdx_e is "4pyrdx c";
  species normete__L_e in blood = 1; normete__L_e is "Normete L c";
  species bilglcur_e in blood = 1; bilglcur_e is "Bilglcur c";
  species glyc_e in blood = 1; glyc_e is "Glycerol";
  species h2o_e in blood = 1; h2o_e is "H2O";
  species h_e in blood = 1; h_e is "H+";
  species lac__L_e in blood = 1; lac__L_e is "L-Lactate";
  species sprm_e in blood = 1; sprm_e is "Spermine C10H30N4";
  species M_3moxtyr_e in blood = 1; M_3moxtyr_e is "3moxtyr c";
  species nrpphr_e in blood = 1; nrpphr_e is "Nrpphr c";
  species acnam_e in blood = 1; acnam_e is "N-Acetylneuraminate";
  species thmmp_e in blood = 1; thmmp_e is "Thiamin monophosphate";
  species co2_e in blood = 1; co2_e is "CO2";
  species lac__D_e in blood = 1; lac__D_e is "D-Lactate";
  species mal__L_e in blood = 1; mal__L_e is "L-Malate";
  species ocdcea_e in blood = 1; ocdcea_e is "Octadecenoate (n-C18:1)";
  species k_e in blood = 1; k_e is "Potassium";
  species na1_e in blood = 1; na1_e is "Sodium";
  species dhdascb_e in blood = 1; dhdascb_e is "Dhdascb c";
  species cl_e in blood = 1; cl_e is "Chloride";
  species arg__L_e in blood = 1; arg__L_e is "L-Arginine";
  species nh4_e in blood = 1; nh4_e is "Ammonium";
  species adrnl_e in blood = 1; adrnl_e is "Adrnl c";
  species ala__L_e in blood = 1; ala__L_e is "L-Alanine";
  species ptrc_e in blood = 1; ptrc_e is "Putrescine";
  species gal_e in blood = 1; gal_e is "D-Galactose";
  species ascb__L_e in blood = 1; ascb__L_e is "L-Ascorbate";
  species h2o2_e in blood = 1; h2o2_e is "Hydrogen peroxide";
  species mepi_e in blood = 1; mepi_e is "Mepi c";
  species acald_e in blood = 1; acald_e is "Acetaldehyde";
  species leuktrB4_e in blood = 1; leuktrB4_e is "LeuktrB4 c";
  species adn_e in blood = 1; adn_e is "Adenosine";
  species pi_e in blood = 1; pi_e is "Phosphate";
  species orot_e in blood = 1; orot_e is "Orotate";
  species M_5aop_e in blood = 1; M_5aop_e is "5-Amino-4-oxopentanoate";
  species phe__L_e in blood = 1; phe__L_e is "L-Phenylalanine";
  species etha_e in blood = 1; etha_e is "Ethanolamine";
  species co_e in blood = 1; co_e is "Carbon monoxide";
  species dopa_e in blood = 1; dopa_e is "Dopamine";
  species man_e in blood = 1; man_e is "D-Mannose";
  species gam_e in blood = 1; gam_e is "D-Glucosamine";
  species pydx_e in blood = 1; pydx_e is "Pyridoxal";
  species ac_e in blood = 1; ac_e is "Acetate";
  species hxan_e in blood = 1; hxan_e is "Hypoxanthine";
  species glc__D_e in blood = 1; glc__D_e is "D-Glucose";
  species uri_e in blood = 1; uri_e is "Uridine";
  species ade_e in blood = 1; ade_e is "Adenine";
  species camp_e in blood = 1; camp_e is "CAMP";
  species hcys__L_e in blood = 1; hcys__L_e is "L-Homocysteine";
  species o2_e in blood = 1; o2_e is "O2";
  species hdca_e in blood = 1; hdca_e is "Hexadecanoate (n-C16:0)";
  species pydam_e in blood = 1; pydam_e is "Pyridoxamine";
  species M_35cgmp_e in blood = 1; M_35cgmp_e is "3',5'-Cyclic GMP";
  species met__L_e in blood = 1; met__L_e is "L-Methionine";
  species gly_e in blood = 1; gly_e is "Glycine";
  species cys__L_e in blood = 1; cys__L_e is "L-Cysteine";
  species chol_e in blood = 1; chol_e is "Choline";
  species ca2_e in blood = 1; ca2_e is "Calcium";
  species gluala_e in blood = 1; gluala_e is "5 L Glutamyl L alanine C8H13N2O5";
  species ribflv_e in blood = 1; ribflv_e is "Riboflavin";
  species fru_e in blood = 1; fru_e is "D-Fructose";
  species spmd_e in blood = 1; spmd_e is "Spermidine";
  species fe2_e in blood = 1; fe2_e is "Fe2+";
  species leuktrA4_e in blood = 1; leuktrA4_e is "LeuktrA4 c";
  species pyr_e in blood = 1; pyr_e is "Pyruvate";
  species gthox_e in blood = 1; gthox_e is "Oxidized glutathione";

  // Parameters:
  EX_ins_e = 1 mmol_per_h;
  EX_gln__L_e = 1 mmol_per_h;
  EX_lnlc_e = 1 mmol_per_h;
  EX_thm_e = 1 mmol_per_h;
  EX_ncam_e = 1 mmol_per_h;
  EX_nac_e = 1 mmol_per_h;
  EX_urea_e = 1 mmol_per_h;
  EX_hco3_e = 1 mmol_per_h;
  EX_fum_e = 1 mmol_per_h;
  EX_pydxn_e = 1 mmol_per_h;
  EX_M_4pyrdx_e = 1 mmol_per_h;
  EX_normete__L_e = 1 mmol_per_h;
  EX_bilglcur_e = 1 mmol_per_h;
  EX_glyc_e = 1 mmol_per_h;
  EX_h2o_e = 1 mmol_per_h;
  EX_h_e = 1 mmol_per_h;
  EX_lac__L_e = 1 mmol_per_h;
  EX_sprm_e = 1 mmol_per_h;
  EX_M_3moxtyr_e = 1 mmol_per_h;
  EX_nrpphr_e = 1 mmol_per_h;
  EX_acnam_e = 1 mmol_per_h;
  EX_thmmp_e = 1 mmol_per_h;
  EX_co2_e = 1 mmol_per_h;
  EX_lac__D_e = 1 mmol_per_h;
  EX_mal__L_e = 1 mmol_per_h;
  EX_ocdcea_e = 1 mmol_per_h;
  EX_k_e = 1 mmol_per_h;
  EX_na1_e = 1 mmol_per_h;
  EX_dhdascb_e = 1 mmol_per_h;
  EX_cl_e = 1 mmol_per_h;
  EX_arg__L_e = 1 mmol_per_h;
  EX_nh4_e = 1 mmol_per_h;
  EX_adrnl_e = 1 mmol_per_h;
  EX_ala__L_e = 1 mmol_per_h;
  EX_ptrc_e = 1 mmol_per_h;
  EX_gal_e = 1 mmol_per_h;
  EX_ascb__L_e = 1 mmol_per_h;
  EX_h2o2_e = 1 mmol_per_h;
  EX_mepi_e = 1 mmol_per_h;
  EX_acald_e = 1 mmol_per_h;
  EX_leuktrB4_e = 1 mmol_per_h;
  EX_adn_e = 1 mmol_per_h;
  EX_pi_e = 1 mmol_per_h;
  EX_orot_e = 1 mmol_per_h;
  EX_M_5aop_e = 1 mmol_per_h;
  EX_phe__L_e = 1 mmol_per_h;
  EX_etha_e = 1 mmol_per_h;
  EX_co_e = 1 mmol_per_h;
  EX_dopa_e = 1 mmol_per_h;
  EX_man_e = 1 mmol_per_h;
  EX_gam_e = 1 mmol_per_h;
  EX_pydx_e = 1 mmol_per_h;
  EX_ac_e = 1 mmol_per_h;
  EX_hxan_e = 1 mmol_per_h;
  EX_glc__D_e = 1 mmol_per_h;
  EX_uri_e = 1 mmol_per_h;
  EX_ade_e = 1 mmol_per_h;
  EX_camp_e = 1 mmol_per_h;
  EX_hcys__L_e = 1 mmol_per_h;
  EX_o2_e = 1 mmol_per_h;
  EX_hdca_e = 1 mmol_per_h;
  EX_pydam_e = 1 mmol_per_h;
  EX_M_35cgmp_e = 1 mmol_per_h;
  EX_met__L_e = 1 mmol_per_h;
  EX_gly_e = 1 mmol_per_h;
  EX_cys__L_e = 1 mmol_per_h;
  EX_chol_e = 1 mmol_per_h;
  EX_ca2_e = 1 mmol_per_h;
  EX_gluala_e = 1 mmol_per_h;
  EX_ribflv_e = 1 mmol_per_h;
  EX_fru_e = 1 mmol_per_h;
  EX_spmd_e = 1 mmol_per_h;
  EX_fe2_e = 1 mmol_per_h;
  EX_leuktrA4_e = 1 mmol_per_h;
  EX_pyr_e = 1 mmol_per_h;
  EX_gthox_e = 1 mmol_per_h;

  // Reactions:
  update_ins_e: ins_e -> ; -EX_ins_e;
  update_gln__L_e: gln__L_e -> ; -EX_gln__L_e;
  update_lnlc_e: lnlc_e -> ; -EX_lnlc_e;
  update_thm_e: thm_e -> ; -EX_thm_e;
  update_ncam_e: ncam_e -> ; -EX_ncam_e;
  update_nac_e: nac_e -> ; -EX_nac_e;
  update_urea_e: urea_e -> ; -EX_urea_e;
  update_hco3_e: hco3_e -> ; -EX_hco3_e;
  update_fum_e: fum_e -> ; -EX_fum_e;
  update_pydxn_e: pydxn_e -> ; -EX_pydxn_e;
  update_M_4pyrdx_e: M_4pyrdx_e -> ; -EX_M_4pyrdx_e;
  update_normete__L_e: normete__L_e -> ; -EX_normete__L_e;
  update_bilglcur_e: bilglcur_e -> ; -EX_bilglcur_e;
  update_glyc_e: glyc_e -> ; -EX_glyc_e;
  update_h2o_e: h2o_e -> ; -EX_h2o_e;
  update_h_e: h_e -> ; -EX_h_e;
  update_lac__L_e: lac__L_e -> ; -EX_lac__L_e;
  update_sprm_e: sprm_e -> ; -EX_sprm_e;
  update_M_3moxtyr_e: M_3moxtyr_e -> ; -EX_M_3moxtyr_e;
  update_nrpphr_e: nrpphr_e -> ; -EX_nrpphr_e;
  update_acnam_e: acnam_e -> ; -EX_acnam_e;
  update_thmmp_e: thmmp_e -> ; -EX_thmmp_e;
  update_co2_e: co2_e -> ; -EX_co2_e;
  update_lac__D_e: lac__D_e -> ; -EX_lac__D_e;
  update_mal__L_e: mal__L_e -> ; -EX_mal__L_e;
  update_ocdcea_e: ocdcea_e -> ; -EX_ocdcea_e;
  update_k_e: k_e -> ; -EX_k_e;
  update_na1_e: na1_e -> ; -EX_na1_e;
  update_dhdascb_e: dhdascb_e -> ; -EX_dhdascb_e;
  update_cl_e: cl_e -> ; -EX_cl_e;
  update_arg__L_e: arg__L_e -> ; -EX_arg__L_e;
  update_nh4_e: nh4_e -> ; -EX_nh4_e;
  update_adrnl_e: adrnl_e -> ; -EX_adrnl_e;
  update_ala__L_e: ala__L_e -> ; -EX_ala__L_e;
  update_ptrc_e: ptrc_e -> ; -EX_ptrc_e;
  update_gal_e: gal_e -> ; -EX_gal_e;
  update_ascb__L_e: ascb__L_e -> ; -EX_ascb__L_e;
  update_h2o2_e: h2o2_e -> ; -EX_h2o2_e;
  update_mepi_e: mepi_e -> ; -EX_mepi_e;
  update_acald_e: acald_e -> ; -EX_acald_e;
  update_leuktrB4_e: leuktrB4_e -> ; -EX_leuktrB4_e;
  update_adn_e: adn_e -> ; -EX_adn_e;
  update_pi_e: pi_e -> ; -EX_pi_e;
  update_orot_e: orot_e -> ; -EX_orot_e;
  update_M_5aop_e: M_5aop_e -> ; -EX_M_5aop_e;
  update_phe__L_e: phe__L_e -> ; -EX_phe__L_e;
  update_etha_e: etha_e -> ; -EX_etha_e;
  update_co_e: co_e -> ; -EX_co_e;
  update_dopa_e: dopa_e -> ; -EX_dopa_e;
  update_man_e: man_e -> ; -EX_man_e;
  update_gam_e: gam_e -> ; -EX_gam_e;
  update_pydx_e: pydx_e -> ; -EX_pydx_e;
  update_ac_e: ac_e -> ; -EX_ac_e;
  update_hxan_e: hxan_e -> ; -EX_hxan_e;
  update_glc__D_e: glc__D_e -> ; -EX_glc__D_e;
  update_uri_e: uri_e -> ; -EX_uri_e;
  update_ade_e: ade_e -> ; -EX_ade_e;
  update_camp_e: camp_e -> ; -EX_camp_e;
  update_hcys__L_e: hcys__L_e -> ; -EX_hcys__L_e;
  update_o2_e: o2_e -> ; -EX_o2_e;
  update_hdca_e: hdca_e -> ; -EX_hdca_e;
  update_pydam_e: pydam_e -> ; -EX_pydam_e;
  update_M_35cgmp_e: M_35cgmp_e -> ; -EX_M_35cgmp_e;
  update_met__L_e: met__L_e -> ; -EX_met__L_e;
  update_gly_e: gly_e -> ; -EX_gly_e;
  update_cys__L_e: cys__L_e -> ; -EX_cys__L_e;
  update_chol_e: chol_e -> ; -EX_chol_e;
  update_ca2_e: ca2_e -> ; -EX_ca2_e;
  update_gluala_e: gluala_e -> ; -EX_gluala_e;
  update_ribflv_e: ribflv_e -> ; -EX_ribflv_e;
  update_fru_e: fru_e -> ; -EX_fru_e;
  update_spmd_e: spmd_e -> ; -EX_spmd_e;
  update_fe2_e: fe2_e -> ; -EX_fe2_e;
  update_leuktrA4_e: leuktrA4_e -> ; -EX_leuktrA4_e;
  update_pyr_e: pyr_e -> ; -EX_pyr_e;
  update_gthox_e: gthox_e -> ; -EX_gthox_e;

  // Unit definitions:
  unit h = 3600 second;
  unit g = gram;
  unit m = metre;
  unit m2 = metre^2;
  unit l = litre;
  unit mmol = 1e-3 mole;
  unit per_h = 1 / (3600 second);
  unit mmol_per_h = 1e-3 mole / (3600 second);
  unit mmol_per_l = 1e-3 mole / litre;
  unit l_per_mmol = litre / (1e-3 mole);
  unit g_per_l = gram / litre;
  unit g_per_mmol = gram / (1e-3 mole);
end
