// SBML level 3 version 1

model combined_model()

  // Compartments:
  compartment BIOMD0000000002__comp1 = 1e-16 BIOMD0000000002__volume; BIOMD0000000002__comp1 is "compartment1";  // GO:0031594
  compartment BIOMD0000000003__cell = 1 BIOMD0000000003__volume;  // GO:0005623
  compartment BIOMD0000000001__comp1 = 1e-16 BIOMD0000000001__volume; BIOMD0000000001__comp1 is "compartment1";  // GO:0031594
  compartment BIOMD0000000004__cell = 1 BIOMD0000000004__volume;  // GO:0005623

  // Species:
  // biliganded basal state
  species BIOMD0000000002__BLL in BIOMD0000000002__comp1 = 0; BIOMD0000000002__BLL is "BasalACh2";  // substance in BIOMD0000000002__substance; isVersionOf interpro:IPR002394 GO:0005892
  // monoliganded intermediate
  species BIOMD0000000002__IL in BIOMD0000000002__comp1 = 0; BIOMD0000000002__IL is "IntermediateACh";  // substance in BIOMD0000000002__substance; isVersionOf interpro:IPR002394 GO:0005892
  // monoliganded active state
  species BIOMD0000000002__AL in BIOMD0000000002__comp1 = 0; BIOMD0000000002__AL is "ActiveACh";  // substance in BIOMD0000000002__substance; isVersionOf interpro:IPR002394 GO:0005892
  // unkiganded active state
  species BIOMD0000000002__A in BIOMD0000000002__comp1 = 0; BIOMD0000000002__A is "Active";  // substance in BIOMD0000000002__substance; isVersionOf GO:0005892
  // monoliganded basal state
  species BIOMD0000000002__BL in BIOMD0000000002__comp1 = 0; BIOMD0000000002__BL is "BasalACh";  // substance in BIOMD0000000002__substance; isVersionOf interpro:IPR002394 GO:0005892
  // unliganded basal state
  species BIOMD0000000002__B in BIOMD0000000002__comp1 = 1e-22/BIOMD0000000002__comp1; BIOMD0000000002__B is "Basal";  // substance in BIOMD0000000002__substance; isVersionOf interpro:IPR002394 GO:0005892
  // biliganded desensitised state
  species BIOMD0000000002__DLL in BIOMD0000000002__comp1 = 0; BIOMD0000000002__DLL is "DesensitisedACh2";  // substance in BIOMD0000000002__substance; isVersionOf GO:0005892
  // fully desensitised state
  species BIOMD0000000002__D in BIOMD0000000002__comp1 = 0; BIOMD0000000002__D is "Desensitised";  // substance in BIOMD0000000002__substance; isVersionOf interpro:IPR002394 GO:0005892
  // biliganded intermediate
  species BIOMD0000000002__ILL in BIOMD0000000002__comp1 = 0; BIOMD0000000002__ILL is "IntermediateACh2";  // substance in BIOMD0000000002__substance; isVersionOf interpro:IPR002394 GO:0005892
  // monoliganded desensitised state
  species BIOMD0000000002__DL in BIOMD0000000002__comp1 = 0; BIOMD0000000002__DL is "DesensitisedACh";  // substance in BIOMD0000000002__substance; isVersionOf interpro:IPR002394 GO:0005892
  // unliganted intermediate
  species BIOMD0000000002__I in BIOMD0000000002__comp1 = 0; BIOMD0000000002__I is "Intermediate";  // substance in BIOMD0000000002__substance; isVersionOf interpro:IPR002394 GO:0005892
  // biliganted active state
  species BIOMD0000000002__ALL in BIOMD0000000002__comp1 = 0; BIOMD0000000002__ALL is "ActiveACh2";  // substance in BIOMD0000000002__substance; isVersionOf interpro:IPR002394 GO:0005892
  // ligand
  species BIOMD0000000002__L in BIOMD0000000002__comp1 = 1e-21/BIOMD0000000002__comp1; BIOMD0000000002__L is "ACh";  // substance in BIOMD0000000002__substance; CHEBI:15355 kegg.compound:C01996
  species BIOMD0000000003__C in BIOMD0000000003__cell = 0.01; BIOMD0000000003__C is "Cyclin";  // substance in BIOMD0000000003__substance; isVersionOf uniprot:Q4KLA0 interpro:IPR006670
  species BIOMD0000000003__M in BIOMD0000000003__cell = 0.01; BIOMD0000000003__M is "CDC-2 Kinase";  // substance in BIOMD0000000003__substance; hasVersion uniprot:P24033 uniprot:P35567
  species BIOMD0000000003__X in BIOMD0000000003__cell = 0.01; BIOMD0000000003__X is "Cyclin Protease";  // substance in BIOMD0000000003__substance; isVersionOf GO:0005680; hasVersion reactome:REACT_7165.1
  // biliganded basal state
  species BIOMD0000000001__BLL in BIOMD0000000001__comp1 = 0; BIOMD0000000001__BLL is "BasalACh2";  // substance in BIOMD0000000001__substance; isVersionOf interpro:IPR002394 GO:0005892
  // monoliganded intermediate
  species BIOMD0000000001__IL in BIOMD0000000001__comp1 = 0; BIOMD0000000001__IL is "IntermediateACh";  // substance in BIOMD0000000001__substance; isVersionOf interpro:IPR002394 GO:0005892
  // monoliganded active state
  species BIOMD0000000001__AL in BIOMD0000000001__comp1 = 0; BIOMD0000000001__AL is "ActiveACh";  // substance in BIOMD0000000001__substance; isVersionOf interpro:IPR002394 GO:0005892
  // unkiganded active state
  species BIOMD0000000001__A in BIOMD0000000001__comp1 = 0; BIOMD0000000001__A is "Active";  // substance in BIOMD0000000001__substance; isVersionOf interpro:IPR002394 GO:0005892
  // monoliganded basal state
  species BIOMD0000000001__BL in BIOMD0000000001__comp1 = 0; BIOMD0000000001__BL is "BasalACh";  // substance in BIOMD0000000001__substance; isVersionOf interpro:IPR002394 GO:0005892
  // unliganded basal state
  species BIOMD0000000001__B in BIOMD0000000001__comp1 = 1.660578e-21/BIOMD0000000001__comp1; BIOMD0000000001__B is "Basal";  // substance in BIOMD0000000001__substance; isVersionOf interpro:IPR002394 GO:0005892
  // biliganded desensitised state
  species BIOMD0000000001__DLL in BIOMD0000000001__comp1 = 0; BIOMD0000000001__DLL is "DesensitisedACh2";  // substance in BIOMD0000000001__substance; isVersionOf interpro:IPR002394 GO:0005892
  // fully desensitised state
  species BIOMD0000000001__D in BIOMD0000000001__comp1 = 0; BIOMD0000000001__D is "Desensitised";  // substance in BIOMD0000000001__substance; isVersionOf interpro:IPR002394 GO:0005892
  // biliganded intermediate
  species BIOMD0000000001__ILL in BIOMD0000000001__comp1 = 0; BIOMD0000000001__ILL is "IntermediateACh2";  // substance in BIOMD0000000001__substance; isVersionOf interpro:IPR002394 GO:0005892
  // monoliganded desensitised state
  species BIOMD0000000001__DL in BIOMD0000000001__comp1 = 0; BIOMD0000000001__DL is "DesensitisedACh";  // substance in BIOMD0000000001__substance; isVersionOf interpro:IPR002394 GO:0005892
  // unliganted intermediate
  species BIOMD0000000001__I in BIOMD0000000001__comp1 = 0; BIOMD0000000001__I is "Intermediate";  // substance in BIOMD0000000001__substance; isVersionOf interpro:IPR002394 GO:0005892
  // biliganted active state
  species BIOMD0000000001__ALL in BIOMD0000000001__comp1 = 0; BIOMD0000000001__ALL is "ActiveACh2";  // substance in BIOMD0000000001__substance; isVersionOf interpro:IPR002394 GO:0005892
  species BIOMD0000000004__C in BIOMD0000000004__cell = 0.01; BIOMD0000000004__C is "Cyclin";  // substance in BIOMD0000000004__substance; isVersionOf interpro:IPR006670
  species BIOMD0000000004__M in BIOMD0000000004__cell = 0.01; BIOMD0000000004__M is "Active CDC-2 Kinase";  // substance in BIOMD0000000004__substance; hasVersion uniprot:P24033 uniprot:P35567
  species BIOMD0000000004__X in BIOMD0000000004__cell = 0.01; BIOMD0000000004__X is "Active Cyclin Protease";  // substance in BIOMD0000000004__substance
  species BIOMD0000000004__MI in BIOMD0000000004__cell = 0.99; BIOMD0000000004__MI is "Inactive CDC-2 Kinase";  // substance in BIOMD0000000004__substance; hasVersion uniprot:P24033 uniprot:P35567
  species BIOMD0000000004__XI in BIOMD0000000004__cell = 0.99; BIOMD0000000004__XI is "Inactive Cyclin Protease";  // substance in BIOMD0000000004__substance

  // Parameters:
  BIOMD0000000002__kf_0 = 300000000;
  BIOMD0000000002__kr_0 = 8000;
  BIOMD0000000002__kf_1 = 150000000;
  BIOMD0000000002__kr_1 = 16000;
  BIOMD0000000002__kf_2 = 30000;
  BIOMD0000000002__kr_2 = 700;
  BIOMD0000000002__kf_3 = 300000000;
  BIOMD0000000002__kr_3 = 8.64;
  BIOMD0000000002__kf_4 = 150000000;
  BIOMD0000000002__kr_4 = 17.28;
  BIOMD0000000002__kf_5 = 0.54;
  BIOMD0000000002__kr_5 = 10800;
  BIOMD0000000002__kf_6 = 130;
  BIOMD0000000002__kr_6 = 2740;
  BIOMD0000000002__kf_7 = 300000000;
  BIOMD0000000002__kr_7 = 4;
  BIOMD0000000002__kf_8 = 150000000;
  BIOMD0000000002__kr_8 = 8;
  BIOMD0000000002__kf_9 = 19.7;
  BIOMD0000000002__kr_9 = 3.74;
  BIOMD0000000002__kf_10 = 19.85;
  BIOMD0000000002__kr_10 = 1.74;
  BIOMD0000000002__kf_11 = 20;
  BIOMD0000000002__kr_11 = 0.81;
  BIOMD0000000002__kf_12 = 300000000;
  BIOMD0000000002__kr_12 = 4;
  BIOMD0000000002__kf_13 = 150000000;
  BIOMD0000000002__kr_13 = 8;
  BIOMD0000000002__kf_14 = 0.05;
  BIOMD0000000002__kr_14 = 0.0012;
  BIOMD0000000002__kf_15 = 0.05;
  BIOMD0000000002__kr_15 = 0.0012;
  BIOMD0000000002__kf_16 = 0.05;
  BIOMD0000000002__kr_16 = 0.0012;
  var BIOMD0000000003__V1;
  var BIOMD0000000003__V3;
  BIOMD0000000003__VM1 = 3;
  BIOMD0000000003__VM3 = 1;
  BIOMD0000000003__Kc = 0.5;
  BIOMD0000000001__kf_0 = 3000;
  BIOMD0000000001__kr_0 = 8000;
  BIOMD0000000001__kf_1 = 1500;
  BIOMD0000000001__kr_1 = 16000;
  BIOMD0000000001__kf_2 = 30000;
  BIOMD0000000001__kr_2 = 700;
  BIOMD0000000001__kf_3 = 3000;
  BIOMD0000000001__kr_3 = 8.64;
  BIOMD0000000001__kf_4 = 1500;
  BIOMD0000000001__kr_4 = 17.28;
  BIOMD0000000001__kf_5 = 0.54;
  BIOMD0000000001__kr_5 = 10800;
  BIOMD0000000001__kf_6 = 130;
  BIOMD0000000001__kr_6 = 2740;
  BIOMD0000000001__kf_7 = 3000;
  BIOMD0000000001__kr_7 = 4;
  BIOMD0000000001__kf_8 = 1500;
  BIOMD0000000001__kr_8 = 8;
  BIOMD0000000001__kf_9 = 19.7;
  BIOMD0000000001__kr_9 = 3.74;
  BIOMD0000000001__kf_10 = 19.85;
  BIOMD0000000001__kr_10 = 1.74;
  BIOMD0000000001__kf_11 = 20;
  BIOMD0000000001__kr_11 = 0.81;
  BIOMD0000000001__kf_12 = 3000;
  BIOMD0000000001__kr_12 = 4;
  BIOMD0000000001__kf_13 = 1500;
  BIOMD0000000001__kr_13 = 8;
  BIOMD0000000001__kf_14 = 0.05;
  BIOMD0000000001__kr_14 = 0.0012;
  BIOMD0000000001__kf_15 = 0.05;
  BIOMD0000000001__kr_15 = 0.0012;
  BIOMD0000000001__kf_16 = 0.05;
  BIOMD0000000001__kr_16 = 0.0012;
  BIOMD0000000001__t2 = 20;
  var BIOMD0000000004__V1;
  var BIOMD0000000004__V3;
  BIOMD0000000004__VM1 = 3;
  BIOMD0000000004__VM3 = 1;
  BIOMD0000000004__Kc = 0.5;

  // Assignment rules:
  BIOMD0000000003__V1 := BIOMD0000000003__C*BIOMD0000000003__VM1*(BIOMD0000000003__C + BIOMD0000000003__Kc)^(-1);
  BIOMD0000000003__V3 := BIOMD0000000003__M*BIOMD0000000003__VM3;
  BIOMD0000000004__V1 := BIOMD0000000004__C*BIOMD0000000004__VM1*(BIOMD0000000004__C + BIOMD0000000004__Kc)^(-1);
  BIOMD0000000004__V3 := BIOMD0000000004__M*BIOMD0000000004__VM3;

  // Reactions:
  // kf_0 * B * L - kr_0 * BL
  // first ligand on basal
  BIOMD0000000002__React0: BIOMD0000000002__B + BIOMD0000000002__L -> BIOMD0000000002__BL; BIOMD0000000002__comp1*(BIOMD0000000002__kf_0*BIOMD0000000002__B*BIOMD0000000002__L - BIOMD0000000002__kr_0*BIOMD0000000002__BL);  // GO:0042166
  // kf_1 * BL * L - kr_1 * BLL
  // second ligand on basal
  BIOMD0000000002__React1: BIOMD0000000002__BL + BIOMD0000000002__L -> BIOMD0000000002__BLL; BIOMD0000000002__comp1*(BIOMD0000000002__kf_1*BIOMD0000000002__BL*BIOMD0000000002__L - BIOMD0000000002__kr_1*BIOMD0000000002__BLL);  // GO:0042166
  // kf_2 * BLL - kr_2 * ALL
  // opening of biliganded
  BIOMD0000000002__React2: BIOMD0000000002__BLL -> BIOMD0000000002__ALL; BIOMD0000000002__comp1*(BIOMD0000000002__kf_2*BIOMD0000000002__BLL - BIOMD0000000002__kr_2*BIOMD0000000002__ALL);  // GO:0004889
  // kf_3 * A * L - kr_3 * AL
  // first ligand on active
  BIOMD0000000002__React3: BIOMD0000000002__A + BIOMD0000000002__L -> BIOMD0000000002__AL; BIOMD0000000002__comp1*(BIOMD0000000002__kf_3*BIOMD0000000002__A*BIOMD0000000002__L - BIOMD0000000002__kr_3*BIOMD0000000002__AL);  // GO:0042166
  // kf_4 * AL * L - kr_4 * ALL
  // second ligand on active
  BIOMD0000000002__React4: BIOMD0000000002__AL + BIOMD0000000002__L -> BIOMD0000000002__ALL; BIOMD0000000002__comp1*(BIOMD0000000002__kf_4*BIOMD0000000002__AL*BIOMD0000000002__L - BIOMD0000000002__kr_4*BIOMD0000000002__ALL);  // GO:0042166
  // kf_5 * B - kr_5 * A
  // opening of unliganded
  BIOMD0000000002__React5: BIOMD0000000002__B -> BIOMD0000000002__A; BIOMD0000000002__comp1*(BIOMD0000000002__kf_5*BIOMD0000000002__B - BIOMD0000000002__kr_5*BIOMD0000000002__A);  // GO:0004889
  // kf_6 * BL - kr_6 * AL
  // opening of monoliganded
  BIOMD0000000002__React6: BIOMD0000000002__BL -> BIOMD0000000002__AL; BIOMD0000000002__comp1*(BIOMD0000000002__kf_6*BIOMD0000000002__BL - BIOMD0000000002__kr_6*BIOMD0000000002__AL);  // GO:0004889
  // kf_7 * I * L - kr_7 * IL
  // first ligand on intermediate
  BIOMD0000000002__React7: BIOMD0000000002__I + BIOMD0000000002__L -> BIOMD0000000002__IL; BIOMD0000000002__comp1*(BIOMD0000000002__kf_7*BIOMD0000000002__I*BIOMD0000000002__L - BIOMD0000000002__kr_7*BIOMD0000000002__IL);  // GO:0042166
  // kf_8 * IL * L - kr_8 * ILL
  // second ligand on intermediate
  BIOMD0000000002__React8: BIOMD0000000002__IL + BIOMD0000000002__L -> BIOMD0000000002__ILL; BIOMD0000000002__comp1*(BIOMD0000000002__kf_8*BIOMD0000000002__IL*BIOMD0000000002__L - BIOMD0000000002__kr_8*BIOMD0000000002__ILL);  // GO:0042166
  // kf_9 * A - kr_9 * I
  // unlig act <=> unlig interm
  BIOMD0000000002__React9: BIOMD0000000002__A -> BIOMD0000000002__I; BIOMD0000000002__comp1*(BIOMD0000000002__kf_9*BIOMD0000000002__A - BIOMD0000000002__kr_9*BIOMD0000000002__I);  // GO:0004889
  // kf_10 * AL - kr_10 * IL
  // monolig act <=> monolig interm
  BIOMD0000000002__React10: BIOMD0000000002__AL -> BIOMD0000000002__IL; BIOMD0000000002__comp1*(BIOMD0000000002__kf_10*BIOMD0000000002__AL - BIOMD0000000002__kr_10*BIOMD0000000002__IL);  // GO:0004889
  // kf_11 * ALL - kr_11 * ILL
  // bilig act <=> bilig interm
  BIOMD0000000002__React11: BIOMD0000000002__ALL -> BIOMD0000000002__ILL; BIOMD0000000002__comp1*(BIOMD0000000002__kf_11*BIOMD0000000002__ALL - BIOMD0000000002__kr_11*BIOMD0000000002__ILL);  // GO:0004889
  // kf_12 * D * L - kr_12 * DL
  // first ligand on desensitised
  BIOMD0000000002__React12: BIOMD0000000002__D + BIOMD0000000002__L -> BIOMD0000000002__DL; BIOMD0000000002__comp1*(BIOMD0000000002__kf_12*BIOMD0000000002__D*BIOMD0000000002__L - BIOMD0000000002__kr_12*BIOMD0000000002__DL);  // GO:0042166
  // kf_13 * DL * L - kr_13 * DLL
  // second ligand on desensitised
  BIOMD0000000002__React13: BIOMD0000000002__DL + BIOMD0000000002__L -> BIOMD0000000002__DLL; BIOMD0000000002__comp1*(BIOMD0000000002__kf_13*BIOMD0000000002__DL*BIOMD0000000002__L - BIOMD0000000002__kr_13*BIOMD0000000002__DLL);  // GO:0042166
  // kf_14 * I - kr_14 * D
  // unlig interm <=> unlig desen
  BIOMD0000000002__React14: BIOMD0000000002__I -> BIOMD0000000002__D; BIOMD0000000002__comp1*(BIOMD0000000002__kf_14*BIOMD0000000002__I - BIOMD0000000002__kr_14*BIOMD0000000002__D);
  // kf_15 * IL - kr_15 * DL
  // monolig interm <=> monolig desen
  BIOMD0000000002__React15: BIOMD0000000002__IL -> BIOMD0000000002__DL; BIOMD0000000002__comp1*(BIOMD0000000002__kf_15*BIOMD0000000002__IL - BIOMD0000000002__kr_15*BIOMD0000000002__DL);
  // kf_16 * ILL - kr_16 * DLL
  // bilig interm <=> bilig desen
  BIOMD0000000002__React16: BIOMD0000000002__ILL -> BIOMD0000000002__DLL; BIOMD0000000002__comp1*(BIOMD0000000002__kf_16*BIOMD0000000002__ILL - BIOMD0000000002__kr_16*BIOMD0000000002__DLL);
  BIOMD0000000003__reaction1: => BIOMD0000000003__C; BIOMD0000000003__cell*BIOMD0000000003__reaction1_vi; BIOMD0000000003__reaction1 is "creation of cyclin";  // isVersionOf GO:0006412
    BIOMD0000000003__reaction1_vi = 0.025;
  BIOMD0000000003__reaction2: BIOMD0000000003__C => ; BIOMD0000000003__C*BIOMD0000000003__cell*BIOMD0000000003__reaction2_kd; BIOMD0000000003__reaction2 is "default degradation of cyclin";  // isVersionOf GO:0008054
    BIOMD0000000003__reaction2_kd = 0.01;
  BIOMD0000000003__reaction3: BIOMD0000000003__C => ; BIOMD0000000003__C*BIOMD0000000003__cell*BIOMD0000000003__reaction3_vd*BIOMD0000000003__X*(BIOMD0000000003__C + BIOMD0000000003__reaction3_Kd)^(-1); BIOMD0000000003__reaction3 is "cdc2 kinase triggered degration of cyclin";  // modifiers: BIOMD0000000003__X; isVersionOf GO:0008054
    BIOMD0000000003__reaction3_vd = 0.25; BIOMD0000000003__reaction3_Kd = 0.02;
  BIOMD0000000003__reaction4: => BIOMD0000000003__M; BIOMD0000000003__cell*(1 + (-1*BIOMD0000000003__M))*BIOMD0000000003__V1*(BIOMD0000000003__reaction4_K1 + (-1*BIOMD0000000003__M) + 1)^(-1); BIOMD0000000003__reaction4 is "activation of cdc2 kinase";  // isVersionOf ec-code:3.1.3.16 GO:0045737 GO:0006470
    BIOMD0000000003__reaction4_K1 = 0.005;
  BIOMD0000000003__reaction5: BIOMD0000000003__M => ; BIOMD0000000003__cell*BIOMD0000000003__M*BIOMD0000000003__reaction5_V2*(BIOMD0000000003__reaction5_K2 + BIOMD0000000003__M)^(-1); BIOMD0000000003__reaction5 is "deactivation of cdc2 kinase";  // isVersionOf ec-code:2.7.10.2 GO:0045736 GO:0006468
    BIOMD0000000003__reaction5_V2 = 1.5; BIOMD0000000003__reaction5_K2 = 0.005;
  BIOMD0000000003__reaction6: => BIOMD0000000003__X; BIOMD0000000003__cell*BIOMD0000000003__V3*(1 + (-1*BIOMD0000000003__X))*(BIOMD0000000003__reaction6_K3 + (-1*BIOMD0000000003__X) + 1)^(-1); BIOMD0000000003__reaction6 is "activation of cyclin protease";
    BIOMD0000000003__reaction6_K3 = 0.005;
  BIOMD0000000003__reaction7: BIOMD0000000003__X => ; BIOMD0000000003__cell*BIOMD0000000003__reaction7_V4*BIOMD0000000003__X*(BIOMD0000000003__reaction7_K4 + BIOMD0000000003__X)^(-1); BIOMD0000000003__reaction7 is "deactivation of cyclin protease";
    BIOMD0000000003__reaction7_K4 = 0.005; BIOMD0000000003__reaction7_V4 = 0.5;
  // kf_0 * B - kr_0 * BL
  // first ligand on basal
  BIOMD0000000001__React0: BIOMD0000000001__B -> BIOMD0000000001__BL; BIOMD0000000001__comp1*(BIOMD0000000001__kf_0*BIOMD0000000001__B - BIOMD0000000001__kr_0*BIOMD0000000001__BL);  // GO:0042166
  // kf_1 * BL - kr_1 * BLL
  // second ligand on basal
  BIOMD0000000001__React1: BIOMD0000000001__BL -> BIOMD0000000001__BLL; BIOMD0000000001__comp1*(BIOMD0000000001__kf_1*BIOMD0000000001__BL - BIOMD0000000001__kr_1*BIOMD0000000001__BLL);  // GO:0042166
  // kf_2 * BLL - kr_2 * ALL
  // opening of biliganded
  BIOMD0000000001__React2: BIOMD0000000001__BLL -> BIOMD0000000001__ALL; BIOMD0000000001__comp1*(BIOMD0000000001__kf_2*BIOMD0000000001__BLL - BIOMD0000000001__kr_2*BIOMD0000000001__ALL);  // GO:0004889
  // kf_3 * A - kr_3 * AL
  // first ligand on active
  BIOMD0000000001__React3: BIOMD0000000001__A -> BIOMD0000000001__AL; BIOMD0000000001__comp1*(BIOMD0000000001__kf_3*BIOMD0000000001__A - BIOMD0000000001__kr_3*BIOMD0000000001__AL);  // GO:0042166
  // kf_4 * AL - kr_4 * ALL
  // second ligand on active
  BIOMD0000000001__React4: BIOMD0000000001__AL -> BIOMD0000000001__ALL; BIOMD0000000001__comp1*(BIOMD0000000001__kf_4*BIOMD0000000001__AL - BIOMD0000000001__kr_4*BIOMD0000000001__ALL);  // GO:0042166
  // kf_5 * B - kr_5 * A
  // opening of unliganded
  BIOMD0000000001__React5: BIOMD0000000001__B -> BIOMD0000000001__A; BIOMD0000000001__comp1*(BIOMD0000000001__kf_5*BIOMD0000000001__B - BIOMD0000000001__kr_5*BIOMD0000000001__A);  // GO:0004889
  // kf_6 * BL - kr_6 * AL
  // opening of monoliganded
  BIOMD0000000001__React6: BIOMD0000000001__BL -> BIOMD0000000001__AL; BIOMD0000000001__comp1*(BIOMD0000000001__kf_6*BIOMD0000000001__BL - BIOMD0000000001__kr_6*BIOMD0000000001__AL);  // GO:0004889
  // kf_7 * I - kr_7 * IL
  // first ligand on intermediate
  BIOMD0000000001__React7: BIOMD0000000001__I -> BIOMD0000000001__IL; BIOMD0000000001__comp1*(BIOMD0000000001__kf_7*BIOMD0000000001__I - BIOMD0000000001__kr_7*BIOMD0000000001__IL);  // GO:0042166
  // kf_8 * IL - kr_8 * ILL
  // second ligand on intermediate
  BIOMD0000000001__React8: BIOMD0000000001__IL -> BIOMD0000000001__ILL; BIOMD0000000001__comp1*(BIOMD0000000001__kf_8*BIOMD0000000001__IL - BIOMD0000000001__kr_8*BIOMD0000000001__ILL);  // GO:0042166
  // kf_9 * A - kr_9 * I
  // unliganded active <=> unliganded intermediate
  BIOMD0000000001__React9: BIOMD0000000001__A -> BIOMD0000000001__I; BIOMD0000000001__comp1*(BIOMD0000000001__kf_9*BIOMD0000000001__A - BIOMD0000000001__kr_9*BIOMD0000000001__I);  // GO:0004889
  // kf_10 * AL - kr_10 * IL
  // monoliganded active <=> monoliganded intermediate
  BIOMD0000000001__React10: BIOMD0000000001__AL -> BIOMD0000000001__IL; BIOMD0000000001__comp1*(BIOMD0000000001__kf_10*BIOMD0000000001__AL - BIOMD0000000001__kr_10*BIOMD0000000001__IL);  // GO:0004889
  // kf_11 * ALL - kr_11 * ILL
  // biliganded active <=> biliganded intermediate
  BIOMD0000000001__React11: BIOMD0000000001__ALL -> BIOMD0000000001__ILL; BIOMD0000000001__comp1*(BIOMD0000000001__kf_11*BIOMD0000000001__ALL - BIOMD0000000001__kr_11*BIOMD0000000001__ILL);  // GO:0004889
  // kf_12 * D - kr_12 * DL
  // first ligand on desensitised
  BIOMD0000000001__React12: BIOMD0000000001__D -> BIOMD0000000001__DL; BIOMD0000000001__comp1*(BIOMD0000000001__kf_12*BIOMD0000000001__D - BIOMD0000000001__kr_12*BIOMD0000000001__DL);  // GO:0042166
  // kf_13 * DL - kr_13 * DLL
  // second ligand on desensitised
  BIOMD0000000001__React13: BIOMD0000000001__DL -> BIOMD0000000001__DLL; BIOMD0000000001__comp1*(BIOMD0000000001__kf_13*BIOMD0000000001__DL - BIOMD0000000001__kr_13*BIOMD0000000001__DLL);  // GO:0042166
  // kf_14 * I - kr_14 * D
  // unliganded intermediate <=> unliganded desensitised
  BIOMD0000000001__React14: BIOMD0000000001__I -> BIOMD0000000001__D; BIOMD0000000001__comp1*(BIOMD0000000001__kf_14*BIOMD0000000001__I - BIOMD0000000001__kr_14*BIOMD0000000001__D);
  // kf_15 * IL - kr_15 * DL
  // monoliganded intermediate <=> monoliganded desensitised
  BIOMD0000000001__React15: BIOMD0000000001__IL -> BIOMD0000000001__DL; BIOMD0000000001__comp1*(BIOMD0000000001__kf_15*BIOMD0000000001__IL - BIOMD0000000001__kr_15*BIOMD0000000001__DL);
  // kf_16 * ILL - kr_16 * DLL
  // biliganded intermediate <=> biliganded desensitised
  BIOMD0000000001__React16: BIOMD0000000001__ILL -> BIOMD0000000001__DLL; BIOMD0000000001__comp1*(BIOMD0000000001__kf_16*BIOMD0000000001__ILL - BIOMD0000000001__kr_16*BIOMD0000000001__DLL);
  BIOMD0000000004__reaction1: => BIOMD0000000004__C; BIOMD0000000004__cell*BIOMD0000000004__reaction1_vi; BIOMD0000000004__reaction1 is "creation of cyclin";  // isVersionOf GO:0006412
    BIOMD0000000004__reaction1_vi = 0.025;
  BIOMD0000000004__reaction2: BIOMD0000000004__C => ; BIOMD0000000004__C*BIOMD0000000004__cell*BIOMD0000000004__reaction2_kd; BIOMD0000000004__reaction2 is "default degradation of cyclin";  // isVersionOf GO:0008054
    BIOMD0000000004__reaction2_kd = 0.01;
  BIOMD0000000004__reaction3: BIOMD0000000004__C => ; BIOMD0000000004__C*BIOMD0000000004__cell*BIOMD0000000004__reaction3_vd*BIOMD0000000004__X*(BIOMD0000000004__C + BIOMD0000000004__reaction3_Kd)^(-1); BIOMD0000000004__reaction3 is "cdc2 kinase triggered degration of cyclin";  // modifiers: BIOMD0000000004__X; isVersionOf GO:0008054
    BIOMD0000000004__reaction3_vd = 0.25; BIOMD0000000004__reaction3_Kd = 0.02;
  BIOMD0000000004__reaction4: BIOMD0000000004__MI => BIOMD0000000004__M; BIOMD0000000004__cell*BIOMD0000000004__MI*BIOMD0000000004__V1*(BIOMD0000000004__reaction4_K1 + BIOMD0000000004__MI)^(-1); BIOMD0000000004__reaction4 is "activation of cdc2 kinase";  // isVersionOf ec-code:3.1.3.16 GO:0045737 GO:0006470
    BIOMD0000000004__reaction4_K1 = 0.005;
  BIOMD0000000004__reaction5: BIOMD0000000004__M => BIOMD0000000004__MI; BIOMD0000000004__cell*BIOMD0000000004__M*BIOMD0000000004__reaction5_V2*(BIOMD0000000004__reaction5_K2 + BIOMD0000000004__M)^(-1); BIOMD0000000004__reaction5 is "deactivation of cdc2 kinase";  // isVersionOf ec-code:2.7.10.2 GO:0045736 GO:0006468
    BIOMD0000000004__reaction5_V2 = 1.5; BIOMD0000000004__reaction5_K2 = 0.005;
  BIOMD0000000004__reaction6: BIOMD0000000004__XI => BIOMD0000000004__X; BIOMD0000000004__cell*BIOMD0000000004__V3*BIOMD0000000004__XI*(BIOMD0000000004__reaction6_K3 + BIOMD0000000004__XI)^(-1); BIOMD0000000004__reaction6 is "activation of cyclin protease";
    BIOMD0000000004__reaction6_K3 = 0.005;
  BIOMD0000000004__reaction7: BIOMD0000000004__X => BIOMD0000000004__XI; BIOMD0000000004__cell*BIOMD0000000004__reaction7_V4*BIOMD0000000004__X*(BIOMD0000000004__reaction7_K4 + BIOMD0000000004__X)^(-1); BIOMD0000000004__reaction7 is "deactivation of cyclin protease";
    BIOMD0000000004__reaction7_K4 = 0.005; BIOMD0000000004__reaction7_V4 = 0.5;

  // Events:
  BIOMD0000000001__RemovalACh: at (time > BIOMD0000000001__t2): BIOMD0000000001__kf_0 = 0, BIOMD0000000001__kf_3 = 0, BIOMD0000000001__kf_7 = 0, BIOMD0000000001__kf_12 = 0, BIOMD0000000001__kf_1 = 0, BIOMD0000000001__kf_4 = 0, BIOMD0000000001__kf_8 = 0, BIOMD0000000001__kf_13 = 0; BIOMD0000000001__RemovalACh is "removal of ACh";  // GO:0001507

  // Unit definitions:
  unit BIOMD0000000002__volume = litre;
  unit BIOMD0000000002__substance = mole;
  unit BIOMD0000000002__area = metre^2;
  unit BIOMD0000000003__volume = litre;
  unit BIOMD0000000003__substance = mole;
  unit BIOMD0000000003__area = metre^2;
  unit BIOMD0000000001__volume = litre;
  unit BIOMD0000000001__substance = mole;
  unit BIOMD0000000001__area = metre^2;
  unit BIOMD0000000004__volume = litre;
  unit BIOMD0000000004__substance = mole;
  unit BIOMD0000000004__area = metre^2;
end
