// SBML level 3 version 1

function max(x, y)
  piecewise(x, x > y, y);
end
max is "min";

function min(x, y)
  piecewise(x, x < y, y);
end
min is "max";

model limax_pkpd_38()
  // PKPD model for methacetin based liver function tests.
  // Description
  // This model is a physiological pharmacokinetic/pharmacodynamics model (PKPD) for the absorption, distribution, metabolism and elimination of methacetin, bicarbonate and paracetamol encoded in SBML format.
  // The content of this model has been carefully created in a manual research effort.
  // This file has been created by Matthias Koenig.
  // Terms of use
  // Copyright © 2018 Matthias Koenig.
  // Redistribution and use of any part of this model, with or without modification, are permitted provided that the following conditions are met:
  // Redistributions of this SBML file must retain the above copyright notice, this list of conditions and the following disclaimer.
  // Redistributions in a different form must reproduce the above copyright notice, this list of conditions and the following disclaimer in the documentation and/or other materials provided with the distribution.
  // This model is distributed in the hope that it will be useful, but WITHOUT ANY WARRANTY; without even the implied warranty of MERCHANTABILITY or FITNESS FOR A PARTICULAR PURPOSE.
  // model units - substance: mmole, time: h, volume: litre, area: m2, length: m, extent: mmole

  // Compartments:
  compartment Vre; Vre has litre; Vre is "rest of body";
  compartment Vbo; Vbo has litre; Vbo is "bone";
  compartment Vhe; Vhe has litre; Vhe is "heart";
  compartment Vgu; Vgu has litre; Vgu is "gut";
  compartment Vki; Vki has litre; Vki is "kidney";
  compartment Vli; Vli has litre; Vli is "liver";
  compartment Vlu; Vlu has litre; Vlu is "lung";
  compartment Vsp; Vsp has litre; Vsp is "spleen";
  compartment Vve; Vve has litre; Vve is "venous blood";
  compartment Var; Var has litre; Var is "arterial blood";
  compartment Vpl; Vpl has litre; Vpl is "plasma";
  compartment Vplas_ven; Vplas_ven has litre; Vplas_ven is "venous plasma";
  compartment Vplas_art; Vplas_art has litre; Vplas_art is "arterial plasma";
  compartment Vbreath = 1 litre;
  compartment Vurine = 1 litre;

  // Species:
  substanceOnly species Are_apap in Vre = 0; Are_apap is "paracetamol (rest)";
  substanceOnly species Ahe_apap in Vhe = 0; Ahe_apap is "paracetamol (heart)";
  substanceOnly species Asp_apap in Vsp = 0; Asp_apap is "paracetamol (spleen)";
  substanceOnly species Abo_apap in Vbo = 0; Abo_apap is "paracetamol (bone)";
  substanceOnly species Alu_apap in Vlu = 0; Alu_apap is "paracetamol (lung)";
  substanceOnly species Agu_apap in Vgu = 0; Agu_apap is "paracetamol (gut)";
  substanceOnly species Aki_apap in Vki = 0; Aki_apap is "paracetamol (kidney)";
  substanceOnly species Ali_apap in Vli = 0; Ali_apap is "paracetamol (liver)";
  substanceOnly species Aar_apap in Var = 0; Aar_apap is "paracetamol (arterial blood)";
  substanceOnly species Ave_apap in Vve = 0; Ave_apap is "paracetamol (venous blood)";
  substanceOnly species Aurine_apap in Vurine = 0; Aurine_apap is "paracetamol (urine)";
  substanceOnly species Are_co2c13 in Vre = 0; Are_co2c13 is "C13-CO2 (rest)";
  substanceOnly species Ahe_co2c13 in Vhe = 0; Ahe_co2c13 is "C13-CO2 (heart)";
  substanceOnly species Asp_co2c13 in Vsp = 0; Asp_co2c13 is "C13-CO2 (spleen)";
  substanceOnly species Abo_co2c13 in Vbo = 0; Abo_co2c13 is "C13-CO2 (bone)";
  substanceOnly species Alu_co2c13 in Vlu = 0; Alu_co2c13 is "C13-CO2 (lung)";
  substanceOnly species Agu_co2c13 in Vgu = 0; Agu_co2c13 is "C13-CO2 (gut)";
  substanceOnly species Aki_co2c13 in Vki = 0; Aki_co2c13 is "C13-CO2 (kidney)";
  substanceOnly species Ali_co2c13 in Vli = 0; Ali_co2c13 is "C13-CO2 (liver)";
  substanceOnly species Aar_co2c13 in Var = 0; Aar_co2c13 is "C13-CO2 (arterial blood)";
  substanceOnly species Ave_co2c13 in Vve = 0; Ave_co2c13 is "C13-CO2 (venous blood)";
  substanceOnly species Aurine_co2c13 in Vurine = 0; Aurine_co2c13 is "C13-CO2 (urine)";
  substanceOnly species Are_metc13 in Vre = 0; Are_metc13 is "C13-methacetin (rest)";
  substanceOnly species Ahe_metc13 in Vhe = 0; Ahe_metc13 is "C13-methacetin (heart)";
  substanceOnly species Asp_metc13 in Vsp = 0; Asp_metc13 is "C13-methacetin (spleen)";
  substanceOnly species Abo_metc13 in Vbo = 0; Abo_metc13 is "C13-methacetin (bone)";
  substanceOnly species Alu_metc13 in Vlu = 0; Alu_metc13 is "C13-methacetin (lung)";
  substanceOnly species Agu_metc13 in Vgu = 0; Agu_metc13 is "C13-methacetin (gut)";
  substanceOnly species Aki_metc13 in Vki = 0; Aki_metc13 is "C13-methacetin (kidney)";
  substanceOnly species Ali_metc13 in Vli = 0; Ali_metc13 is "C13-methacetin (liver)";
  substanceOnly species Aar_metc13 in Var = 0; Aar_metc13 is "C13-methacetin (arterial blood)";
  substanceOnly species Ave_metc13 in Vve = 0; Ave_metc13 is "C13-methacetin (venous blood)";
  substanceOnly species Aurine_metc13 in Vurine = 0; Aurine_metc13 is "C13-methacetin (urine)";
  substanceOnly species Abreath_co2c13 in Vbreath = 0; Abreath_co2c13 is "C13-CO2 (breath)";
  substanceOnly species Abo_co2c13_fix in Vbo = 0; Abo_co2c13_fix is "C13-CO2 (bone, fixed)";

  // Parameters:
  BW = 75 kg; BW is "body weight [kg]";
  HEIGHT = 170 cm; HEIGHT is "height [cm]";
  HR = 70 per_min; HR is "heart rate [1/min]";
  HRrest = 70 per_min; HRrest is "heart rate [1/min]";
  BSA has m2; BSA is "body surface area [m^2]";
  COBW = 1.548 ml_per_skg; COBW is "cardiac output per bodyweight [ml/s/kg]";
  CO has ml_per_s; CO is "cardiac output [ml/s]";
  QC has litre_per_h; QC is "cardiac output [L/hr]";
  COHRI = 150 ml; COHRI is "increase of cardiac output per heartbeat [ml/min*min]";
  FVre has litre_per_kg; FVre is "rest of body fractional tissue volume";
  FVbo = 0.0856 litre_per_kg; FVbo is "bone fractional tissue volume";
  FVhe = 0.0047 litre_per_kg; FVhe is "heart fractional tissue volume";
  FVgu = 0.0171 litre_per_kg; FVgu is "gut fractional tissue volume";
  FVki = 0.0044 litre_per_kg; FVki is "kidney fractional tissue volume";
  FVli = 0.021 litre_per_kg; FVli is "liver fractional tissue volume";
  FVlu = 0.0076 litre_per_kg; FVlu is "lung fractional tissue volume";
  FVsp = 0.0026 litre_per_kg; FVsp is "spleen fractional tissue volume";
  FVve = 0.0514 litre_per_kg; FVve is "venous fractional tissue volume";
  FVar = 0.0257 litre_per_kg; FVar is "arterial fractional tissue volume";
  FVpl = 0.0424 litre_per_kg; FVpl is "plasma fractional tissue volume";
  FQre has dimensionless; FQre is "rest of body fractional tissue blood flow";
  FQbo = 0.05 dimensionless; FQbo is "bone fractional tissue blood flow";
  FQhe = 0.04 dimensionless; FQhe is "heart fractional tissue blood flow";
  FQgu = 0.146 dimensionless; FQgu is "gut fractional tissue blood flow";
  FQki = 0.19 dimensionless; FQki is "kidney fractional tissue blood flow";
  FQh = 0.215 dimensionless; FQh is "hepatic (venous side) fractional tissue blood flow";
  FQlu = 1 dimensionless; FQlu is "lung fractional tissue blood flow";
  FQsp = 0.017 dimensionless; FQsp is "spleen fractional tissue blood flow";
  F_PAR = 0.85 dimensionless; F_PAR is "parenchymal liver fraction";
  MPPGL = 45 mg_per_g; MPPGL is "mg microsomal protein per g liver parenchym";
  KLU_EXCO2 = 1.2 per_min; KLU_EXCO2 is "CO2 rate of disposal in air [1/min]";
  KBO_FIXCO2 = 0.1 per_min; KBO_FIXCO2 is "CO2 storage slow pool [1/min]";
  KBO_RELCO2 = 0.0001 per_min; KBO_RELCO2 is "CO2 release slow pool [1/min]";
  KBO_MAXCO2 = 0.2 mM; KBO_MAXCO2 is "CO2 pool size [mg]";
  P_CO2BSA = 300 mmole_per_hm2; P_CO2BSA is "CO2 production per body surface area [mmole/h/m2]";
  R_PDB = 0.01123 dimensionless; R_PDB is "reference value of 13CO2/12CO2 ratio";
  Mr_apap = 151.16 g_per_mole; Mr_apap is "Molecular weight apap [g/mole]";
  D_apap = PODOSE_apap; D_apap has mg; D_apap is "oral dose apap [mg]";
  DIV_apap = IVDOSE_apap; DIV_apap has mg; DIV_apap is "iv dose apap [mg]";
  IVDOSE_apap = 0 mg; IVDOSE_apap is "IV bolus dose apap [mg]";
  PODOSE_apap = 0 mg; PODOSE_apap is "oral bolus dose apap [mg]";
  Ka_apap = 2.5 per_h; Ka_apap is "Ka [1/hr] absorption apap";
  F_apap = 0.87 dimensionless; F_apap is "fraction absorbed apap";
  ti_apap = 10 s; ti_apap is "injection time apap [s]";
  Ki_apap has per_h; Ki_apap is "Ki [1/hr] injection apap";
  Ri_apap = 0 mg_per_min; Ri_apap is "Ri [mg/min] rate of injection apap";
  cum_dose_apap = 0 mg; cum_dose_apap is "Cumulative dose due to infusion apap";
  fup_apap = 1 dimensionless; fup_apap is "fraction unbound in plasma apap";
  BP_apap = 1 dimensionless; BP_apap is "blood to plasma ratio apap";
  fumic_apap = 1 dimensionless; fumic_apap is "fraction unbound in microsomes apap";
  CLrenal_apap = 0.714 litre_per_h; CLrenal_apap is "renal clearance apap [L/hr]";
  Kpre_apap = 0.8 dimensionless; Kpre_apap is "rest plasma partition coefficient";
  Kphe_apap = 1 dimensionless; Kphe_apap is "heart plasma partition coefficient";
  Kpsp_apap = 1 dimensionless; Kpsp_apap is "spleen plasma partition coefficient";
  Kpbo_apap = 1 dimensionless; Kpbo_apap is "bone plasma partition coefficient";
  Kplu_apap = 1 dimensionless; Kplu_apap is "lung plasma partition coefficient";
  Kpgu_apap = 1 dimensionless; Kpgu_apap is "gut plasma partition coefficient";
  Kpki_apap = 1 dimensionless; Kpki_apap is "kidney plasma partition coefficient";
  Kpli_apap = 1 dimensionless; Kpli_apap is "liver plasma partition coefficient";
  Mr_co2c13 = 62.02 g_per_mole; Mr_co2c13 is "Molecular weight co2c13 [g/mole]";
  D_co2c13 = PODOSE_co2c13; D_co2c13 has mg; D_co2c13 is "oral dose co2c13 [mg]";
  DIV_co2c13 = IVDOSE_co2c13; DIV_co2c13 has mg; DIV_co2c13 is "iv dose co2c13 [mg]";
  IVDOSE_co2c13 = 0 mg; IVDOSE_co2c13 is "IV bolus dose co2c13 [mg]";
  PODOSE_co2c13 = 0 mg; PODOSE_co2c13 is "oral bolus dose co2c13 [mg]";
  Ka_co2c13 = 8 per_h; Ka_co2c13 is "Ka [1/hr] absorption co2c13";
  F_co2c13 = 1 dimensionless; F_co2c13 is "fraction absorbed co2c13";
  ti_co2c13 = 10 s; ti_co2c13 is "injection time co2c13 [s]";
  Ki_co2c13 has per_h; Ki_co2c13 is "Ki [1/hr] injection co2c13";
  Ri_co2c13 = 0 mg_per_min; Ri_co2c13 is "Ri [mg/min] rate of injection co2c13";
  cum_dose_co2c13 = 0 mg; cum_dose_co2c13 is "Cumulative dose due to infusion co2c13";
  fup_co2c13 = 1 dimensionless; fup_co2c13 is "fraction unbound in plasma co2c13";
  BP_co2c13 = 1 dimensionless; BP_co2c13 is "blood to plasma ratio co2c13";
  fumic_co2c13 = 1 dimensionless; fumic_co2c13 is "fraction unbound in microsomes co2c13";
  CLrenal_co2c13 = 0 litre_per_h; CLrenal_co2c13 is "renal clearance co2c13 [L/hr]";
  Kpre_co2c13 = 1 dimensionless; Kpre_co2c13 is "rest plasma partition coefficient";
  Kphe_co2c13 = 1 dimensionless; Kphe_co2c13 is "heart plasma partition coefficient";
  Kpsp_co2c13 = 1 dimensionless; Kpsp_co2c13 is "spleen plasma partition coefficient";
  Kpbo_co2c13 = 1 dimensionless; Kpbo_co2c13 is "bone plasma partition coefficient";
  Kplu_co2c13 = 1 dimensionless; Kplu_co2c13 is "lung plasma partition coefficient";
  Kpgu_co2c13 = 1 dimensionless; Kpgu_co2c13 is "gut plasma partition coefficient";
  Kpki_co2c13 = 1 dimensionless; Kpki_co2c13 is "kidney plasma partition coefficient";
  Kpli_co2c13 = 1 dimensionless; Kpli_co2c13 is "liver plasma partition coefficient";
  Mr_metc13 = 165.19 g_per_mole; Mr_metc13 is "Molecular weight metc13 [g/mole]";
  D_metc13 = PODOSE_metc13; D_metc13 has mg; D_metc13 is "oral dose metc13 [mg]";
  DIV_metc13 = IVDOSE_metc13; DIV_metc13 has mg; DIV_metc13 is "iv dose metc13 [mg]";
  IVDOSE_metc13 = 0 mg; IVDOSE_metc13 is "IV bolus dose metc13 [mg]";
  PODOSE_metc13 = 0 mg; PODOSE_metc13 is "oral bolus dose metc13 [mg]";
  Ka_metc13 = 4 per_h; Ka_metc13 is "Ka [1/hr] absorption metc13";
  F_metc13 = 1 dimensionless; F_metc13 is "fraction absorbed metc13";
  ti_metc13 = 10 s; ti_metc13 is "injection time metc13 [s]";
  Ki_metc13 has per_h; Ki_metc13 is "Ki [1/hr] injection metc13";
  Ri_metc13 = 0 mg_per_min; Ri_metc13 is "Ri [mg/min] rate of injection metc13";
  cum_dose_metc13 = 0 mg; cum_dose_metc13 is "Cumulative dose due to infusion metc13";
  fup_metc13 = 1 dimensionless; fup_metc13 is "fraction unbound in plasma metc13";
  BP_metc13 = 1 dimensionless; BP_metc13 is "blood to plasma ratio metc13";
  fumic_metc13 = 1 dimensionless; fumic_metc13 is "fraction unbound in microsomes metc13";
  CLrenal_metc13 = 10 litre_per_h; CLrenal_metc13 is "renal clearance metc13 [L/hr]";
  Kpre_metc13 = 0.2 dimensionless; Kpre_metc13 is "rest plasma partition coefficient";
  Kphe_metc13 = 1 dimensionless; Kphe_metc13 is "heart plasma partition coefficient";
  Kpsp_metc13 = 1 dimensionless; Kpsp_metc13 is "spleen plasma partition coefficient";
  Kpbo_metc13 = 1 dimensionless; Kpbo_metc13 is "bone plasma partition coefficient";
  Kplu_metc13 = 1 dimensionless; Kplu_metc13 is "lung plasma partition coefficient";
  Kpgu_metc13 = 1 dimensionless; Kpgu_metc13 is "gut plasma partition coefficient";
  Kpki_metc13 = 1 dimensionless; Kpki_metc13 is "kidney plasma partition coefficient";
  Kpli_metc13 = 1 dimensionless; Kpli_metc13 is "liver plasma partition coefficient";
  P_CO2 has mmole_per_min;
  P_CO2c13 has mmole_per_min;
  P_CO2c12 has mmole_per_min;
  P_CO2R has dimensionless;
  P_CO2Fc13 has dimensionless;
  DOB has dimensionless;
  Qbo has litre_per_h; Qbo is "bone blood flow";
  Qhe has litre_per_h; Qhe is "heart blood flow";
  Qgu has litre_per_h; Qgu is "gut blood flow";
  Qki has litre_per_h; Qki is "kidney blood flow";
  Qh has litre_per_h; Qh is "hepatic (venous side) blood flow";
  Qha has litre_per_h; Qha is "hepatic artery blood flow";
  Qlu has litre_per_h; Qlu is "lung blood flow";
  Qsp has litre_per_h; Qsp is "spleen blood flow";
  Qre has litre_per_h; Qre is "rest of body blood flow";
  Xbody_apap has mg;
  Cpl_ve_apap has mM; Cpl_ve_apap is "paracetamol venous plasma concentration";
  Cli_free_apap has mM; Cli_free_apap is "paracetamol free liver concentration";
  Cki_free_apap has mM; Cki_free_apap is "paracetamol free kidney concentration";
  Cre_apap has mM; Cre_apap is "paracetamol concentration (rest)";
  Xre_apap has mg; Xre_apap is "paracetamol amount (rest)";
  Mre_apap has mg_per_litre; Mre_apap is "paracetamol amount (rest)";
  Che_apap has mM; Che_apap is "paracetamol concentration (heart)";
  Xhe_apap has mg; Xhe_apap is "paracetamol amount (heart)";
  Mhe_apap has mg_per_litre; Mhe_apap is "paracetamol amount (heart)";
  Csp_apap has mM; Csp_apap is "paracetamol concentration (spleen)";
  Xsp_apap has mg; Xsp_apap is "paracetamol amount (spleen)";
  Msp_apap has mg_per_litre; Msp_apap is "paracetamol amount (spleen)";
  Cbo_apap has mM; Cbo_apap is "paracetamol concentration (bone)";
  Xbo_apap has mg; Xbo_apap is "paracetamol amount (bone)";
  Mbo_apap has mg_per_litre; Mbo_apap is "paracetamol amount (bone)";
  Clu_apap has mM; Clu_apap is "paracetamol concentration (lung)";
  Xlu_apap has mg; Xlu_apap is "paracetamol amount (lung)";
  Mlu_apap has mg_per_litre; Mlu_apap is "paracetamol amount (lung)";
  Cgu_apap has mM; Cgu_apap is "paracetamol concentration (gut)";
  Xgu_apap has mg; Xgu_apap is "paracetamol amount (gut)";
  Mgu_apap has mg_per_litre; Mgu_apap is "paracetamol amount (gut)";
  Cki_apap has mM; Cki_apap is "paracetamol concentration (kidney)";
  Xki_apap has mg; Xki_apap is "paracetamol amount (kidney)";
  Mki_apap has mg_per_litre; Mki_apap is "paracetamol amount (kidney)";
  Cli_apap has mM; Cli_apap is "paracetamol concentration (liver)";
  Xli_apap has mg; Xli_apap is "paracetamol amount (liver)";
  Mli_apap has mg_per_litre; Mli_apap is "paracetamol amount (liver)";
  Car_apap has mM; Car_apap is "paracetamol concentration (arterial blood)";
  Xar_apap has mg; Xar_apap is "paracetamol amount (arterial blood)";
  Mar_apap has mg_per_litre; Mar_apap is "paracetamol amount (arterial blood)";
  Cve_apap has mM; Cve_apap is "paracetamol concentration (venous blood)";
  Xve_apap has mg; Xve_apap is "paracetamol amount (venous blood)";
  Mve_apap has mg_per_litre; Mve_apap is "paracetamol amount (venous blood)";
  Xurine_apap has mg; Xurine_apap is "paracetamol amount (urine)";
  Xbody_co2c13 has mg;
  Cpl_ve_co2c13 has mM; Cpl_ve_co2c13 is "C13-CO2 venous plasma concentration";
  Cli_free_co2c13 has mM; Cli_free_co2c13 is "C13-CO2 free liver concentration";
  Cki_free_co2c13 has mM; Cki_free_co2c13 is "C13-CO2 free kidney concentration";
  Cre_co2c13 has mM; Cre_co2c13 is "C13-CO2 concentration (rest)";
  Xre_co2c13 has mg; Xre_co2c13 is "C13-CO2 amount (rest)";
  Mre_co2c13 has mg_per_litre; Mre_co2c13 is "C13-CO2 amount (rest)";
  Che_co2c13 has mM; Che_co2c13 is "C13-CO2 concentration (heart)";
  Xhe_co2c13 has mg; Xhe_co2c13 is "C13-CO2 amount (heart)";
  Mhe_co2c13 has mg_per_litre; Mhe_co2c13 is "C13-CO2 amount (heart)";
  Csp_co2c13 has mM; Csp_co2c13 is "C13-CO2 concentration (spleen)";
  Xsp_co2c13 has mg; Xsp_co2c13 is "C13-CO2 amount (spleen)";
  Msp_co2c13 has mg_per_litre; Msp_co2c13 is "C13-CO2 amount (spleen)";
  Cbo_co2c13 has mM; Cbo_co2c13 is "C13-CO2 concentration (bone)";
  Xbo_co2c13 has mg; Xbo_co2c13 is "C13-CO2 amount (bone)";
  Mbo_co2c13 has mg_per_litre; Mbo_co2c13 is "C13-CO2 amount (bone)";
  Clu_co2c13 has mM; Clu_co2c13 is "C13-CO2 concentration (lung)";
  Xlu_co2c13 has mg; Xlu_co2c13 is "C13-CO2 amount (lung)";
  Mlu_co2c13 has mg_per_litre; Mlu_co2c13 is "C13-CO2 amount (lung)";
  Cgu_co2c13 has mM; Cgu_co2c13 is "C13-CO2 concentration (gut)";
  Xgu_co2c13 has mg; Xgu_co2c13 is "C13-CO2 amount (gut)";
  Mgu_co2c13 has mg_per_litre; Mgu_co2c13 is "C13-CO2 amount (gut)";
  Cki_co2c13 has mM; Cki_co2c13 is "C13-CO2 concentration (kidney)";
  Xki_co2c13 has mg; Xki_co2c13 is "C13-CO2 amount (kidney)";
  Mki_co2c13 has mg_per_litre; Mki_co2c13 is "C13-CO2 amount (kidney)";
  Cli_co2c13 has mM; Cli_co2c13 is "C13-CO2 concentration (liver)";
  Xli_co2c13 has mg; Xli_co2c13 is "C13-CO2 amount (liver)";
  Mli_co2c13 has mg_per_litre; Mli_co2c13 is "C13-CO2 amount (liver)";
  Car_co2c13 has mM; Car_co2c13 is "C13-CO2 concentration (arterial blood)";
  Xar_co2c13 has mg; Xar_co2c13 is "C13-CO2 amount (arterial blood)";
  Mar_co2c13 has mg_per_litre; Mar_co2c13 is "C13-CO2 amount (arterial blood)";
  Cve_co2c13 has mM; Cve_co2c13 is "C13-CO2 concentration (venous blood)";
  Xve_co2c13 has mg; Xve_co2c13 is "C13-CO2 amount (venous blood)";
  Mve_co2c13 has mg_per_litre; Mve_co2c13 is "C13-CO2 amount (venous blood)";
  Xurine_co2c13 has mg; Xurine_co2c13 is "C13-CO2 amount (urine)";
  Xbody_metc13 has mg;
  Cpl_ve_metc13 has mM; Cpl_ve_metc13 is "C13-methacetin venous plasma concentration";
  Cli_free_metc13 has mM; Cli_free_metc13 is "C13-methacetin free liver concentration";
  Cki_free_metc13 has mM; Cki_free_metc13 is "C13-methacetin free kidney concentration";
  Cre_metc13 has mM; Cre_metc13 is "C13-methacetin concentration (rest)";
  Xre_metc13 has mg; Xre_metc13 is "C13-methacetin amount (rest)";
  Mre_metc13 has mg_per_litre; Mre_metc13 is "C13-methacetin amount (rest)";
  Che_metc13 has mM; Che_metc13 is "C13-methacetin concentration (heart)";
  Xhe_metc13 has mg; Xhe_metc13 is "C13-methacetin amount (heart)";
  Mhe_metc13 has mg_per_litre; Mhe_metc13 is "C13-methacetin amount (heart)";
  Csp_metc13 has mM; Csp_metc13 is "C13-methacetin concentration (spleen)";
  Xsp_metc13 has mg; Xsp_metc13 is "C13-methacetin amount (spleen)";
  Msp_metc13 has mg_per_litre; Msp_metc13 is "C13-methacetin amount (spleen)";
  Cbo_metc13 has mM; Cbo_metc13 is "C13-methacetin concentration (bone)";
  Xbo_metc13 has mg; Xbo_metc13 is "C13-methacetin amount (bone)";
  Mbo_metc13 has mg_per_litre; Mbo_metc13 is "C13-methacetin amount (bone)";
  Clu_metc13 has mM; Clu_metc13 is "C13-methacetin concentration (lung)";
  Xlu_metc13 has mg; Xlu_metc13 is "C13-methacetin amount (lung)";
  Mlu_metc13 has mg_per_litre; Mlu_metc13 is "C13-methacetin amount (lung)";
  Cgu_metc13 has mM; Cgu_metc13 is "C13-methacetin concentration (gut)";
  Xgu_metc13 has mg; Xgu_metc13 is "C13-methacetin amount (gut)";
  Mgu_metc13 has mg_per_litre; Mgu_metc13 is "C13-methacetin amount (gut)";
  Cki_metc13 has mM; Cki_metc13 is "C13-methacetin concentration (kidney)";
  Xki_metc13 has mg; Xki_metc13 is "C13-methacetin amount (kidney)";
  Mki_metc13 has mg_per_litre; Mki_metc13 is "C13-methacetin amount (kidney)";
  Cli_metc13 has mM; Cli_metc13 is "C13-methacetin concentration (liver)";
  Xli_metc13 has mg; Xli_metc13 is "C13-methacetin amount (liver)";
  Mli_metc13 has mg_per_litre; Mli_metc13 is "C13-methacetin amount (liver)";
  Car_metc13 has mM; Car_metc13 is "C13-methacetin concentration (arterial blood)";
  Xar_metc13 has mg; Xar_metc13 is "C13-methacetin amount (arterial blood)";
  Mar_metc13 has mg_per_litre; Mar_metc13 is "C13-methacetin amount (arterial blood)";
  Cve_metc13 has mM; Cve_metc13 is "C13-methacetin concentration (venous blood)";
  Xve_metc13 has mg; Xve_metc13 is "C13-methacetin amount (venous blood)";
  Mve_metc13 has mg_per_litre; Mve_metc13 is "C13-methacetin amount (venous blood)";
  Xurine_metc13 has mg; Xurine_metc13 is "C13-methacetin amount (urine)";
  Xbreath_co2c13 has mg; Xbreath_co2c13 is "C13-methacetin amount (breath)";
  Cbo_co2c13_fix has mM; Cbo_co2c13_fix is "C13-methacetin concentration (bone)";
  Xbo_co2c13_fix has mg; Xbo_co2c13_fix is "C13-methacetin amount (bone)";
  CYP1A2MET_CL = 1.5 mulitre_per_min_mg; CYP1A2MET_CL is "HLM apparent clearance by hepatic microsomes [mul/min/mg]";
  CYP1A2MET_Km_met = 0.02 mM;
  CYP1A2MET_CLliv has litre_per_h; CYP1A2MET_CLliv is "liver clearance [l/hr]";
  CO2FIX_HLM_CL = 1.5 mulitre_per_min_mg; CO2FIX_HLM_CL is "HLM apparent clearance by hepatic microsomes [mul/min/mg]";
  CO2FIX_Km_co2 = 0.2 mM;
  CO2FIX_CLliv has litre_per_h; CO2FIX_CLliv is "liver clearance [l/hr]";
  APAPD_HLM_CL = 2.5 mulitre_per_min_mg; APAPD_HLM_CL is "HLM apparent clearance by hepatic microsomes [mul/min/mg]";
  APAPD_Km_apap = 0.5 mM;
  APAPD_CLliv has litre_per_h; APAPD_CLliv is "liver clearance [l/hr]";

  // Assignment rules:
  FVre := 1 litre_per_kg - (FVbo + FVhe + FVgu + FVki + FVli + FVlu + FVsp + FVve + FVar + FVpl);
  FQre := 1 - (FQbo + FQhe + FQgu + FQki + FQh + FQsp);
  BSA := 0.024265 m2*(BW/(1 kg))^0.5378*(HEIGHT/(1 cm))^0.3964;
  CO := BW*COBW + (HR - HRrest)*COHRI/(60 s_per_min);
  QC := CO/(1000 ml_per_litre)*3600 s_per_h;
  P_CO2 := BSA*P_CO2BSA/(60 min_per_h);
  P_CO2c13 := R_PDB/(1 + R_PDB)*P_CO2 + Exhalation_co2c13/(60 min_per_h);
  P_CO2c12 := 1/(1 + R_PDB)*P_CO2;
  P_CO2R := P_CO2c13/P_CO2c12;
  P_CO2Fc13 := P_CO2c13/(P_CO2c12 + P_CO2c13);
  DOB := (P_CO2c13/P_CO2c12 - R_PDB)/R_PDB*1000;
  Vbo := BW*FVbo;
  Vhe := BW*FVhe;
  Vgu := BW*FVgu;
  Vki := BW*FVki;
  Vli := BW*FVli;
  Vlu := BW*FVlu;
  Vsp := BW*FVsp;
  Vve := BW*FVve;
  Var := BW*FVar;
  Vpl := BW*FVpl;
  Vre := BW*FVre;
  Vplas_ven := Vpl*Vve/(Vve + Var);
  Vplas_art := Vpl*Var/(Vve + Var);
  Qbo := QC*FQbo;
  Qhe := QC*FQhe;
  Qgu := QC*FQgu;
  Qki := QC*FQki;
  Qh := QC*FQh;
  Qha := Qh - Qgu - Qsp;
  Qlu := QC*FQlu;
  Qsp := QC*FQsp;
  Qre := QC*FQre;
  Xbody_apap := Xar_apap + Xbo_apap + Xhe_apap + Xgu_apap + Xki_apap + Xli_apap + Xlu_apap + Xsp_apap + Xre_apap + Xve_apap;
  Cpl_ve_apap := Cve_apap/BP_apap;
  Cli_free_apap := Cli_apap*fup_apap;
  Cki_free_apap := Cki_apap*fup_apap;
  Ki_apap := 1.386/ti_apap*3600 s_per_h;
  Cre_apap := Are_apap/Vre;
  Xre_apap := Are_apap*Mr_apap;
  Mre_apap := Are_apap/Vre*Mr_apap;
  Che_apap := Ahe_apap/Vhe;
  Xhe_apap := Ahe_apap*Mr_apap;
  Mhe_apap := Ahe_apap/Vhe*Mr_apap;
  Csp_apap := Asp_apap/Vsp;
  Xsp_apap := Asp_apap*Mr_apap;
  Msp_apap := Asp_apap/Vsp*Mr_apap;
  Cbo_apap := Abo_apap/Vbo;
  Xbo_apap := Abo_apap*Mr_apap;
  Mbo_apap := Abo_apap/Vbo*Mr_apap;
  Clu_apap := Alu_apap/Vlu;
  Xlu_apap := Alu_apap*Mr_apap;
  Mlu_apap := Alu_apap/Vlu*Mr_apap;
  Cgu_apap := Agu_apap/Vgu;
  Xgu_apap := Agu_apap*Mr_apap;
  Mgu_apap := Agu_apap/Vgu*Mr_apap;
  Cki_apap := Aki_apap/Vki;
  Xki_apap := Aki_apap*Mr_apap;
  Mki_apap := Aki_apap/Vki*Mr_apap;
  Cli_apap := Ali_apap/Vli;
  Xli_apap := Ali_apap*Mr_apap;
  Mli_apap := Ali_apap/Vli*Mr_apap;
  Car_apap := Aar_apap/Var;
  Xar_apap := Aar_apap*Mr_apap;
  Mar_apap := Aar_apap/Var*Mr_apap;
  Cve_apap := Ave_apap/Vve;
  Xve_apap := Ave_apap*Mr_apap;
  Mve_apap := Ave_apap/Vve*Mr_apap;
  Xurine_apap := Aurine_apap*Mr_apap;
  Xbody_co2c13 := Xar_co2c13 + Xbo_co2c13 + Xhe_co2c13 + Xgu_co2c13 + Xki_co2c13 + Xli_co2c13 + Xlu_co2c13 + Xsp_co2c13 + Xre_co2c13 + Xve_co2c13;
  Cpl_ve_co2c13 := Cve_co2c13/BP_co2c13;
  Cli_free_co2c13 := Cli_co2c13*fup_co2c13;
  Cki_free_co2c13 := Cki_co2c13*fup_co2c13;
  Ki_co2c13 := 1.386/ti_co2c13*3600 s_per_h;
  Cre_co2c13 := Are_co2c13/Vre;
  Xre_co2c13 := Are_co2c13*Mr_co2c13;
  Mre_co2c13 := Are_co2c13/Vre*Mr_co2c13;
  Che_co2c13 := Ahe_co2c13/Vhe;
  Xhe_co2c13 := Ahe_co2c13*Mr_co2c13;
  Mhe_co2c13 := Ahe_co2c13/Vhe*Mr_co2c13;
  Csp_co2c13 := Asp_co2c13/Vsp;
  Xsp_co2c13 := Asp_co2c13*Mr_co2c13;
  Msp_co2c13 := Asp_co2c13/Vsp*Mr_co2c13;
  Cbo_co2c13 := Abo_co2c13/Vbo;
  Xbo_co2c13 := Abo_co2c13*Mr_co2c13;
  Mbo_co2c13 := Abo_co2c13/Vbo*Mr_co2c13;
  Clu_co2c13 := Alu_co2c13/Vlu;
  Xlu_co2c13 := Alu_co2c13*Mr_co2c13;
  Mlu_co2c13 := Alu_co2c13/Vlu*Mr_co2c13;
  Cgu_co2c13 := Agu_co2c13/Vgu;
  Xgu_co2c13 := Agu_co2c13*Mr_co2c13;
  Mgu_co2c13 := Agu_co2c13/Vgu*Mr_co2c13;
  Cki_co2c13 := Aki_co2c13/Vki;
  Xki_co2c13 := Aki_co2c13*Mr_co2c13;
  Mki_co2c13 := Aki_co2c13/Vki*Mr_co2c13;
  Cli_co2c13 := Ali_co2c13/Vli;
  Xli_co2c13 := Ali_co2c13*Mr_co2c13;
  Mli_co2c13 := Ali_co2c13/Vli*Mr_co2c13;
  Car_co2c13 := Aar_co2c13/Var;
  Xar_co2c13 := Aar_co2c13*Mr_co2c13;
  Mar_co2c13 := Aar_co2c13/Var*Mr_co2c13;
  Cve_co2c13 := Ave_co2c13/Vve;
  Xve_co2c13 := Ave_co2c13*Mr_co2c13;
  Mve_co2c13 := Ave_co2c13/Vve*Mr_co2c13;
  Xurine_co2c13 := Aurine_co2c13*Mr_co2c13;
  Xbody_metc13 := Xar_metc13 + Xbo_metc13 + Xhe_metc13 + Xgu_metc13 + Xki_metc13 + Xli_metc13 + Xlu_metc13 + Xsp_metc13 + Xre_metc13 + Xve_metc13;
  Cpl_ve_metc13 := Cve_metc13/BP_metc13;
  Cli_free_metc13 := Cli_metc13*fup_metc13;
  Cki_free_metc13 := Cki_metc13*fup_metc13;
  Ki_metc13 := 1.386/ti_metc13*3600 s_per_h;
  Cre_metc13 := Are_metc13/Vre;
  Xre_metc13 := Are_metc13*Mr_metc13;
  Mre_metc13 := Are_metc13/Vre*Mr_metc13;
  Che_metc13 := Ahe_metc13/Vhe;
  Xhe_metc13 := Ahe_metc13*Mr_metc13;
  Mhe_metc13 := Ahe_metc13/Vhe*Mr_metc13;
  Csp_metc13 := Asp_metc13/Vsp;
  Xsp_metc13 := Asp_metc13*Mr_metc13;
  Msp_metc13 := Asp_metc13/Vsp*Mr_metc13;
  Cbo_metc13 := Abo_metc13/Vbo;
  Xbo_metc13 := Abo_metc13*Mr_metc13;
  Mbo_metc13 := Abo_metc13/Vbo*Mr_metc13;
  Clu_metc13 := Alu_metc13/Vlu;
  Xlu_metc13 := Alu_metc13*Mr_metc13;
  Mlu_metc13 := Alu_metc13/Vlu*Mr_metc13;
  Cgu_metc13 := Agu_metc13/Vgu;
  Xgu_metc13 := Agu_metc13*Mr_metc13;
  Mgu_metc13 := Agu_metc13/Vgu*Mr_metc13;
  Cki_metc13 := Aki_metc13/Vki;
  Xki_metc13 := Aki_metc13*Mr_metc13;
  Mki_metc13 := Aki_metc13/Vki*Mr_metc13;
  Cli_metc13 := Ali_metc13/Vli;
  Xli_metc13 := Ali_metc13*Mr_metc13;
  Mli_metc13 := Ali_metc13/Vli*Mr_metc13;
  Car_metc13 := Aar_metc13/Var;
  Xar_metc13 := Aar_metc13*Mr_metc13;
  Mar_metc13 := Aar_metc13/Var*Mr_metc13;
  Cve_metc13 := Ave_metc13/Vve;
  Xve_metc13 := Ave_metc13*Mr_metc13;
  Mve_metc13 := Ave_metc13/Vve*Mr_metc13;
  Xurine_metc13 := Aurine_metc13*Mr_metc13;
  Xbreath_co2c13 := Abreath_co2c13*Mr_co2c13;
  Cbo_co2c13_fix := Abo_co2c13_fix/Vbo;
  Xbo_co2c13_fix := Abo_co2c13_fix*Mr_co2c13;
  CYP1A2MET_CLliv := CYP1A2MET_CL/fumic_metc13*MPPGL*Vli*F_PAR*60 min_per_h/(1000 mulitre_per_g);
  CO2FIX_CLliv := CO2FIX_HLM_CL*MPPGL*Vli*F_PAR*60 min_per_h/(1000 mulitre_per_g);
  APAPD_CLliv := APAPD_HLM_CL/fumic_apap*MPPGL*Vli*F_PAR*60 min_per_h/(1000 mulitre_per_g);

  // Rate rules:
  D_apap' = -Absorption_apap*Mr_apap;
  DIV_apap' = -Injection_apap*Mr_apap;
  cum_dose_apap' = Ri_apap*60 min_per_h;
  D_co2c13' = -Absorption_co2c13*Mr_co2c13;
  DIV_co2c13' = -Injection_co2c13*Mr_co2c13;
  cum_dose_co2c13' = Ri_co2c13*60 min_per_h;
  D_metc13' = -Absorption_metc13*Mr_metc13;
  DIV_metc13' = -Injection_metc13*Mr_metc13;
  cum_dose_metc13' = Ri_metc13*60 min_per_h;

  // Reactions:
  CYP1A2MET: Ali_metc13 => Ali_apap + Ali_co2c13; CYP1A2MET_CLliv*1 mmole_per_litre*(Cli_free_metc13/(Cli_free_metc13 + CYP1A2MET_Km_met)); CYP1A2MET is "CYP1A2_MET (CYP1A2) [metc13 -> apap + co2c13]";
  CO2FIX: Ali_co2c13 => ; CO2FIX_CLliv*1 mmole_per_litre*(Cli_co2c13/(Cli_co2c13 + CO2FIX_Km_co2)); CO2FIX is "CO2FIX [co2c13 ->]";
  APAPD: Ali_apap => ; APAPD_CLliv*1 mmole_per_litre*(Cli_free_apap/(Cli_free_apap + APAPD_Km_apap)); APAPD is "APAP detoxification (apap -> )";
  Exhalation_co2c13: Alu_co2c13 => Abreath_co2c13; KLU_EXCO2*60 min_per_h*Clu_co2c13*Vlu; Exhalation_co2c13 is "exhalation C13-CO2";
  Fixation_co2c13: Ave_co2c13 => Abo_co2c13_fix; KBO_FIXCO2*60 min_per_h*Cve_co2c13*Vve*(1 - Cbo_co2c13_fix/KBO_MAXCO2); Fixation_co2c13 is "fixation C13-CO2";
  Release_co2c13: Abo_co2c13_fix => Ave_co2c13; KBO_RELCO2*60 min_per_h*Cbo_co2c13_fix*Vve; Release_co2c13 is "release C13-CO2";
  Injection_apap: => Ave_apap; Ki_apap*DIV_apap/Mr_apap; Injection_apap is "injection paracetamol";
  Infusion_apap: => Ave_apap; Ri_apap/Mr_apap*60 min_per_h; Infusion_apap is "infusion paracetamol";
  Absorption_apap: => Agu_apap; Ka_apap*D_apap/Mr_apap*F_apap; Absorption_apap is "absorption paracetamol";
  vre_apap: Aki_apap => Aurine_apap; CLrenal_apap*Cki_free_apap; vre_apap is "clearance paracetamol (kidney)";
  ve_lu_apap: Ave_apap => Alu_apap; Qlu*Cve_apap; ve_lu_apap is "inflow lung paracetamol";
  lu_ar_apap: Alu_apap => Aar_apap; Qlu*(Clu_apap/Kplu_apap)*BP_apap; lu_ar_apap is "outflow lung paracetamol";
  ar_re_apap: Aar_apap => Are_apap; Qre*Car_apap; ar_re_apap is "inflow rest paracetamol";
  re_ve_apap: Are_apap => Ave_apap; Qre*(Cre_apap/Kpre_apap)*BP_apap; re_ve_apap is "outflow lung paracetamol";
  ar_bo_apap: Aar_apap => Abo_apap; Qbo*Car_apap; ar_bo_apap is "inflow bone paracetamol";
  bo_ve_apap: Abo_apap => Ave_apap; Qbo*(Cbo_apap/Kpbo_apap)*BP_apap; bo_ve_apap is "outflow bone paracetamol";
  ar_gu_apap: Aar_apap => Agu_apap; Qgu*Car_apap; ar_gu_apap is "inflow gut paracetamol";
  gu_li_apap: Agu_apap => Ali_apap; Qgu*(Cgu_apap/Kpgu_apap)*BP_apap; gu_li_apap is "outflow gut paracetamol";
  ar_he_apap: Aar_apap => Ahe_apap; Qhe*Car_apap; ar_he_apap is "inflow heart paracetamol";
  he_ve_apap: Ahe_apap => Ave_apap; Qhe*(Che_apap/Kphe_apap)*BP_apap; he_ve_apap is "outflow heart paracetamol";
  ar_ki_apap: Aar_apap => Aki_apap; Qki*Car_apap; ar_ki_apap is "inflow kidney paracetamol";
  ki_ve_apap: Aki_apap => Ave_apap; Qki*(Cki_apap/Kpki_apap)*BP_apap; ki_ve_apap is "outflow kidney paracetamol";
  ar_sp_apap: Aar_apap => Asp_apap; Qsp*Car_apap; ar_sp_apap is "inflow spleen paracetamol";
  sp_li_apap: Asp_apap => Ali_apap; Qsp*(Csp_apap/Kpsp_apap)*BP_apap; sp_li_apap is "outflow spleen paracetamol";
  ar_li_apap: Aar_apap => Ali_apap; Qha*Car_apap; ar_li_apap is "inflow liver paracetamol";
  li_ve_apap: Ali_apap => Ave_apap; Qh*(Cli_apap/Kpli_apap)*BP_apap; li_ve_apap is "outflow liver paracetamol";
  Injection_co2c13: => Ave_co2c13; Ki_co2c13*DIV_co2c13/Mr_co2c13; Injection_co2c13 is "injection C13-CO2";
  Infusion_co2c13: => Ave_co2c13; Ri_co2c13/Mr_co2c13*60 min_per_h; Infusion_co2c13 is "infusion C13-CO2";
  Absorption_co2c13: => Agu_co2c13; Ka_co2c13*D_co2c13/Mr_co2c13*F_co2c13; Absorption_co2c13 is "absorption C13-CO2";
  vre_co2c13: Aki_co2c13 => Aurine_co2c13; CLrenal_co2c13*Cki_free_co2c13; vre_co2c13 is "clearance C13-CO2 (kidney)";
  ve_lu_co2c13: Ave_co2c13 => Alu_co2c13; Qlu*Cve_co2c13; ve_lu_co2c13 is "inflow lung C13-CO2";
  lu_ar_co2c13: Alu_co2c13 => Aar_co2c13; Qlu*(Clu_co2c13/Kplu_co2c13)*BP_co2c13; lu_ar_co2c13 is "outflow lung C13-CO2";
  ar_re_co2c13: Aar_co2c13 => Are_co2c13; Qre*Car_co2c13; ar_re_co2c13 is "inflow rest C13-CO2";
  re_ve_co2c13: Are_co2c13 => Ave_co2c13; Qre*(Cre_co2c13/Kpre_co2c13)*BP_co2c13; re_ve_co2c13 is "outflow lung C13-CO2";
  ar_bo_co2c13: Aar_co2c13 => Abo_co2c13; Qbo*Car_co2c13; ar_bo_co2c13 is "inflow bone C13-CO2";
  bo_ve_co2c13: Abo_co2c13 => Ave_co2c13; Qbo*(Cbo_co2c13/Kpbo_co2c13)*BP_co2c13; bo_ve_co2c13 is "outflow bone C13-CO2";
  ar_gu_co2c13: Aar_co2c13 => Agu_co2c13; Qgu*Car_co2c13; ar_gu_co2c13 is "inflow gut C13-CO2";
  gu_li_co2c13: Agu_co2c13 => Ali_co2c13; Qgu*(Cgu_co2c13/Kpgu_co2c13)*BP_co2c13; gu_li_co2c13 is "outflow gut C13-CO2";
  ar_he_co2c13: Aar_co2c13 => Ahe_co2c13; Qhe*Car_co2c13; ar_he_co2c13 is "inflow heart C13-CO2";
  he_ve_co2c13: Ahe_co2c13 => Ave_co2c13; Qhe*(Che_co2c13/Kphe_co2c13)*BP_co2c13; he_ve_co2c13 is "outflow heart C13-CO2";
  ar_ki_co2c13: Aar_co2c13 => Aki_co2c13; Qki*Car_co2c13; ar_ki_co2c13 is "inflow kidney C13-CO2";
  ki_ve_co2c13: Aki_co2c13 => Ave_co2c13; Qki*(Cki_co2c13/Kpki_co2c13)*BP_co2c13; ki_ve_co2c13 is "outflow kidney C13-CO2";
  ar_sp_co2c13: Aar_co2c13 => Asp_co2c13; Qsp*Car_co2c13; ar_sp_co2c13 is "inflow spleen C13-CO2";
  sp_li_co2c13: Asp_co2c13 => Ali_co2c13; Qsp*(Csp_co2c13/Kpsp_co2c13)*BP_co2c13; sp_li_co2c13 is "outflow spleen C13-CO2";
  ar_li_co2c13: Aar_co2c13 => Ali_co2c13; Qha*Car_co2c13; ar_li_co2c13 is "inflow liver C13-CO2";
  li_ve_co2c13: Ali_co2c13 => Ave_co2c13; Qh*(Cli_co2c13/Kpli_co2c13)*BP_co2c13; li_ve_co2c13 is "outflow liver C13-CO2";
  Injection_metc13: => Ave_metc13; Ki_metc13*DIV_metc13/Mr_metc13; Injection_metc13 is "injection C13-methacetin";
  Infusion_metc13: => Ave_metc13; Ri_metc13/Mr_metc13*60 min_per_h; Infusion_metc13 is "infusion C13-methacetin";
  Absorption_metc13: => Agu_metc13; Ka_metc13*D_metc13/Mr_metc13*F_metc13; Absorption_metc13 is "absorption C13-methacetin";
  vre_metc13: Aki_metc13 => Aurine_metc13; CLrenal_metc13*Cki_free_metc13; vre_metc13 is "clearance C13-methacetin (kidney)";
  ve_lu_metc13: Ave_metc13 => Alu_metc13; Qlu*Cve_metc13; ve_lu_metc13 is "inflow lung C13-methacetin";
  lu_ar_metc13: Alu_metc13 => Aar_metc13; Qlu*(Clu_metc13/Kplu_metc13)*BP_metc13; lu_ar_metc13 is "outflow lung C13-methacetin";
  ar_re_metc13: Aar_metc13 => Are_metc13; Qre*Car_metc13; ar_re_metc13 is "inflow rest C13-methacetin";
  re_ve_metc13: Are_metc13 => Ave_metc13; Qre*(Cre_metc13/Kpre_metc13)*BP_metc13; re_ve_metc13 is "outflow lung C13-methacetin";
  ar_bo_metc13: Aar_metc13 => Abo_metc13; Qbo*Car_metc13; ar_bo_metc13 is "inflow bone C13-methacetin";
  bo_ve_metc13: Abo_metc13 => Ave_metc13; Qbo*(Cbo_metc13/Kpbo_metc13)*BP_metc13; bo_ve_metc13 is "outflow bone C13-methacetin";
  ar_gu_metc13: Aar_metc13 => Agu_metc13; Qgu*Car_metc13; ar_gu_metc13 is "inflow gut C13-methacetin";
  gu_li_metc13: Agu_metc13 => Ali_metc13; Qgu*(Cgu_metc13/Kpgu_metc13)*BP_metc13; gu_li_metc13 is "outflow gut C13-methacetin";
  ar_he_metc13: Aar_metc13 => Ahe_metc13; Qhe*Car_metc13; ar_he_metc13 is "inflow heart C13-methacetin";
  he_ve_metc13: Ahe_metc13 => Ave_metc13; Qhe*(Che_metc13/Kphe_metc13)*BP_metc13; he_ve_metc13 is "outflow heart C13-methacetin";
  ar_ki_metc13: Aar_metc13 => Aki_metc13; Qki*Car_metc13; ar_ki_metc13 is "inflow kidney C13-methacetin";
  ki_ve_metc13: Aki_metc13 => Ave_metc13; Qki*(Cki_metc13/Kpki_metc13)*BP_metc13; ki_ve_metc13 is "outflow kidney C13-methacetin";
  ar_sp_metc13: Aar_metc13 => Asp_metc13; Qsp*Car_metc13; ar_sp_metc13 is "inflow spleen C13-methacetin";
  sp_li_metc13: Asp_metc13 => Ali_metc13; Qsp*(Csp_metc13/Kpsp_metc13)*BP_metc13; sp_li_metc13 is "outflow spleen C13-methacetin";
  ar_li_metc13: Aar_metc13 => Ali_metc13; Qha*Car_metc13; ar_li_metc13 is "inflow liver C13-methacetin";
  li_ve_metc13: Ali_metc13 => Ave_metc13; Qh*(Cli_metc13/Kpli_metc13)*BP_metc13; li_ve_metc13 is "outflow liver C13-methacetin";

  // Unit definitions:
  unit h = 3600 second;
  unit s = second;
  unit kg = 1000 gram;
  unit m = metre;
  unit m2 = metre^2;
  unit per_h = 1 / (3600 second);
  unit per_min = 1 / (60 second);
  unit cm = 0.01 metre;
  unit mg = 1e-3 gram;
  unit mmole = 1e-3 mole;
  unit mg_per_litre = 1e-3 gram / litre;
  unit mg_per_g = 1e-3 gram / gram;
  unit mg_per_h = 1e-3 gram / (3600 second);
  unit mmole_per_h = 1e-3 mole / (3600 second);
  unit mmole_per_litre = 1e-3 mole / litre;
  unit mM = 1e-3 mole / litre;
  unit litre_per_h = litre / (3600 second);
  unit litre_per_kg = litre / (1000 gram);
  unit mulitre_per_min_mg = 1e-6 litre / (60 second * 1e-3 gram);
  unit g_per_mole = gram / mole;
  unit m2_per_kg = metre^2 / (1000 gram);
  unit mug_per_hkg = 1e-6 gram / (3600 mole * 1000 gram);
  unit mg_per_min = 1e-3 gram / (60 second);
  unit mmole_per_min = 1e-3 mole / (60 second);
  unit mmole_per_minkg = 1e-3 mole / (60 second * 1000 gram);
  unit mmole_per_hm2 = 1e-3 mole / (3600 second * metre^2);
  unit ml = 1e-3 litre;
  unit ml_per_s = 1e-3 litre / second;
  unit ml_per_skg = 1e-3 litre / (second * 1000 gram);
  unit min_per_h = 60 second / (3600 second);
  unit s_per_min = 60 second / (3600 second);
  unit s_per_h = second / (3600 second);
  unit mulitre_per_g = 1e-6 litre / gram;
  unit ml_per_litre = 1e-3 litre / litre;
end
