// SBML level 3 version 1

function bounds__max(x, y)
  piecewise(x, x > y, y);
end
bounds__max is "min";

function bounds__min(x, y)
  piecewise(x, x < y, y);
end
bounds__min is "max";

model diauxic_top_flat()
  // diauxic (TOP)_flat
  // Diauxic Growth Model
  // Model version: 13
  // TOP model
  // Main comp DFBA model by combining fba, update and bounds model with additional kinetics in the top model.
  // Description
  // Dynamic Flux Balance Analysis of Diauxic Growth in Escherichia coli
  // The key variables in the mathematical model of the metabolic network are the glucose concentration (Glcxt), the acetate concentration (Ac), the biomass concentration (X), and the oxygen concentration (O2) in the gas phase.
  // This file has been produced by Matthias Koenig.
  // Terms of use
  // Copyright © 2017 Matthias Koenig
  // Redistribution and use of any part of this model, with or without modification, are permitted provided that the following conditions are met:
  // Redistributions of this SBML file must retain the above copyright notice, this list of conditions and the following disclaimer.
  // Redistributions in a different form must reproduce the above copyright notice, this list of conditions and the following disclaimer in the documentation and/or other materials provided with the distribution.
  // This model is distributed in the hope that it will be useful, but WITHOUT ANY WARRANTY; without even the implied warranty of MERCHANTABILITY or FITNESS FOR A PARTICULAR PURPOSE.
  // isVersionOf GO:0006007
  // model units - substance: mmol, time: h, volume: l, area: m2, length: m, extent: mmol

  // Compartments:
  compartment bioreactor = 1 l;
  compartment fba__bioreactor = 1 l;

  // Species:
  species Ac in bioreactor = 0.4; Ac is "acetate";  // substance in mmol_per_l; CHEBI:15366 kegg.compound:C00033
  species X in bioreactor = 0.001; X is "biomass";  // substance in mmol_per_l; OMIT:0018723
  species Glcxt in bioreactor = 10.8; Glcxt is "glucose";  // substance in mmol_per_l; CHEBI:4167 kegg.compound:C00031
  species O2 in bioreactor = 0.21; O2 is "oxygen";  // substance in mmol_per_l; CHEBI:15379 kegg.compound:C00007
  species dummy_S in bioreactor = 0;  // substance in mmol_per_l
  species fba__Glcxt in fba__bioreactor = 0; fba__Glcxt is "glucose";  // substance in mmol_per_l; CHEBI:4167 kegg.compound:C00031
  species fba__Ac in fba__bioreactor = 0; fba__Ac is "acetate";  // substance in mmol_per_l; CHEBI:15366 kegg.compound:C00033
  species fba__O2 in fba__bioreactor = 0; fba__O2 is "oxygen";  // substance in mmol_per_l; CHEBI:15379 kegg.compound:C00007
  species fba__X in fba__bioreactor = 0; fba__X is "biomass";  // substance in mmol_per_l; OMIT:0018723

  // Parameters:
  dt = 0.1 h;
  lb_EX_Ac has mmol_per_h;
  ub_EX_Ac = 1000 mmol_per_h;
  lb_EX_X has mmol_per_h;
  ub_EX_X = 1000 mmol_per_h;
  lb_EX_Glcxt has mmol_per_h;
  ub_EX_Glcxt = 1000 mmol_per_h;
  lb_EX_O2 has mmol_per_h;
  ub_EX_O2 = 1000 mmol_per_h;
  pEX_Ac has mmol_per_h;
  pEX_X has mmol_per_h;
  pEX_Glcxt has mmol_per_h;
  pEX_O2 has mmol_per_h;
  O2_ref = 0.21 mmol_per_l; O2_ref is "O2 reference";
  kLa = 7.5 per_h; kLa is "O2 mass transfer";
  fba__zero = 0 mmol_per_h; fba__zero is "zero bound";
  fba__ub_default = 1000 mmol_per_h; fba__ub_default is "default upper bound";
  bounds__lb_fba_EX_Ac = -1000 mmol_per_h;
  bounds__lb_fba_EX_X = -1000 mmol_per_h;
  bounds__lb_fba_EX_Glcxt = -10 mmol_per_h;
  bounds__lb_fba_EX_O2 = -15 mmol_per_h;
  bounds__lb_kin_EX_Glcxt has mmol_per_h;
  bounds__lb_kin_EX_O2 has mmol_per_h;
  bounds__Vmax_EX_O2 = 15 mmol_per_h;
  bounds__Vmax_EX_Glcxt = 10 mmol_per_h;
  bounds__Km_EX_Glcxt = 0.015 mmol_per_l; bounds__Km_EX_Glcxt is "Km_vGlcxt";

  // Assignment rules:
  pEX_Ac := EX_Ac;
  pEX_X := EX_X;
  pEX_Glcxt := EX_Glcxt;
  pEX_O2 := EX_O2;
  bounds__lb_kin_EX_Glcxt := -bounds__Vmax_EX_Glcxt*Glcxt/(bounds__Km_EX_Glcxt + Glcxt);
  bounds__lb_kin_EX_O2 := -bounds__Vmax_EX_O2;
  lb_EX_Ac := bounds__max(bounds__lb_fba_EX_Ac, -Ac/X/(1 l_per_mmol)*bioreactor/dt);
  lb_EX_X := bounds__max(bounds__lb_fba_EX_X, -X/X/(1 l_per_mmol)*bioreactor/dt);
  lb_EX_Glcxt := bounds__max(bounds__lb_kin_EX_Glcxt, -Glcxt/X/(1 l_per_mmol)*bioreactor/dt);
  lb_EX_O2 := bounds__max(bounds__lb_kin_EX_O2, -O2/X/(1 l_per_mmol)*bioreactor/dt);

  // Reactions:
  vO2_transfer: -> O2; kLa*(O2_ref - O2)*bioreactor; vO2_transfer is "oxygen transfer";
  fba__v1: 35 fba__O2 + 39.43 fba__Ac => fba__X; ; fba__v1 is "v1 (39.43 Ac + 35 O2 -> X)";
  fba__v2: 9.46 fba__Glcxt + 12.92 fba__O2 => fba__X; ; fba__v2 is "v2 (9.46 Glcxt + 12.92 O2 -> X)";
  fba__v3: 9.84 fba__Glcxt + 12.73 fba__O2 => fba__X + 1.24 fba__Ac; ; fba__v3 is "v3 (9.84 Glcxt + 12.73 O2 -> 1.24 Ac + X)";
  fba__v4: 19.23 fba__Glcxt => fba__X + 12.12 fba__Ac; ; fba__v4 is "v4 (19.23 Glcxt -> 12.12 Ac + X)";
  EX_Ac: fba__Ac -> ; ;
  EX_Glcxt: fba__Glcxt -> ; ;
  EX_O2: fba__O2 -> ; ;
  EX_X: fba__X -> ; ;
  update__update_Ac: Ac -> ; -pEX_Ac*X*1 l_per_mmol;  // modifiers: X
  update__update_X: X -> ; -pEX_X*X*1 l_per_mmol;
  update__update_Glcxt: Glcxt -> ; -pEX_Glcxt*X*1 l_per_mmol;  // modifiers: X
  update__update_O2: O2 -> ; -pEX_O2*X*1 l_per_mmol;  // modifiers: X

  // Unit definitions:
  unit h = 3600 second; h is "hour";  // UO:0000032
  unit g = gram; g is "gram";
  unit m = metre; m is "meter";  // UO:0000008
  unit m2 = metre^2; m2 is "cubic meter";  // UO:0000080
  unit l = litre; l is "liter";
  unit mmol = 1e-3 mole;
  unit per_h = 1 / (3600 second);
  unit mmol_per_h = 1e-3 mole / (3600 second);
  unit mmol_per_hg = 1e-3 mole / (3600 second * gram);
  unit mmol_per_l = 1e-3 mole / litre;
  unit mmol_per_lg = 1e-3 mole / (litre * gram);
  unit l_per_mmol = litre / (1e-3 mole);
  unit g_per_l = gram / litre;
  unit g_per_mmol = gram / (1e-3 mole);
end
