// SBML level 3 version 1
import "diauxic_fba.xml";
import "diauxic_bounds.xml";
import "diauxic_update.xml";

model diauxic_top()
  // diauxic (TOP)
  // Diauxic Growth Model
  // Model version: 13
  // TOP model
  // Main comp DFBA model by combining fba, update and bounds model with additional kinetics in the top model.
  // Description
  // Dynamic Flux Balance Analysis of Diauxic Growth in Escherichia coli
  // The key variables in the mathematical model of the metabolic network are the glucose concentration (Glcxt), the acetate concentration (Ac), the biomass concentration (X), and the oxygen concentration (O2) in the gas phase.
  // This file has been produced by Matthias Koenig.
  // Terms of use
  // Copyright © 2017 Matthias Koenig
  // Redistribution and use of any part of this model, with or without modification, are permitted provided that the following conditions are met:
  // Redistributions of this SBML file must retain the above copyright notice, this list of conditions and the following disclaimer.
  // Redistributions in a different form must reproduce the above copyright notice, this list of conditions and the following disclaimer in the documentation and/or other materials provided with the distribution.
  // This model is distributed in the hope that it will be useful, but WITHOUT ANY WARRANTY; without even the implied warranty of MERCHANTABILITY or FITNESS FOR A PARTICULAR PURPOSE.
  // isVersionOf GO:0006007
  // model units - substance: mmol, time: h, volume: l, area: m2, length: m, extent: mmol

  // Sub-modules:
  fba: diauxic_fba();
  bounds: diauxic_bounds();
  update: diauxic_update();

  // Compartments:
  compartment bioreactor = 1 l; update.bioreactor_port is bioreactor; bounds.bioreactor_port is bioreactor;

  // Species:
  species Ac in bioreactor = 0.4; Ac is "acetate"; update.Ac_port is Ac; bounds.Ac_port is Ac;  // substance in mmol_per_l; CHEBI:15366 kegg.compound:C00033
  species X in bioreactor = 0.001; X is "biomass"; update.X_port is X; bounds.X_port is X;  // substance in mmol_per_l; OMIT:0018723
  species Glcxt in bioreactor = 10.8; Glcxt is "glucose"; update.Glcxt_port is Glcxt; bounds.Glcxt_port is Glcxt;  // substance in mmol_per_l; CHEBI:4167 kegg.compound:C00031
  species O2 in bioreactor = 0.21; O2 is "oxygen"; update.O2_port is O2; bounds.O2_port is O2;  // substance in mmol_per_l; CHEBI:15379 kegg.compound:C00007
  species dummy_S in bioreactor = 0;  // substance in mmol_per_l

  // Parameters:
  dt = 0.1 h; bounds.dt_port is dt;
  lb_EX_Ac = -1000 mmol_per_h; fba.lb_EX_Ac_port is lb_EX_Ac; bounds.lb_EX_Ac_port is lb_EX_Ac;
  ub_EX_Ac = 1000 mmol_per_h; fba.ub_EX_Ac_port is ub_EX_Ac; bounds.ub_EX_Ac_port is ub_EX_Ac;
  lb_EX_X = -1000 mmol_per_h; fba.lb_EX_X_port is lb_EX_X; bounds.lb_EX_X_port is lb_EX_X;
  ub_EX_X = 1000 mmol_per_h; fba.ub_EX_X_port is ub_EX_X; bounds.ub_EX_X_port is ub_EX_X;
  lb_EX_Glcxt = -10 mmol_per_h; fba.lb_EX_Glcxt_port is lb_EX_Glcxt; bounds.lb_EX_Glcxt_port is lb_EX_Glcxt;
  ub_EX_Glcxt = 1000 mmol_per_h; fba.ub_EX_Glcxt_port is ub_EX_Glcxt; bounds.ub_EX_Glcxt_port is ub_EX_Glcxt;
  lb_EX_O2 = -15 mmol_per_h; fba.lb_EX_O2_port is lb_EX_O2; bounds.lb_EX_O2_port is lb_EX_O2;
  ub_EX_O2 = 1000 mmol_per_h; fba.ub_EX_O2_port is ub_EX_O2; bounds.ub_EX_O2_port is ub_EX_O2;
  pEX_Ac has mmol_per_h; update.pEX_Ac_port is pEX_Ac;
  pEX_X has mmol_per_h; update.pEX_X_port is pEX_X;
  pEX_Glcxt has mmol_per_h; update.pEX_Glcxt_port is pEX_Glcxt;
  pEX_O2 has mmol_per_h; update.pEX_O2_port is pEX_O2;
  O2_ref = 0.21 mmol_per_l; O2_ref is "O2 reference";
  kLa = 7.5 per_h; kLa is "O2 mass transfer";

  // Assignment rules:
  pEX_Ac := EX_Ac;
  pEX_X := EX_X;
  pEX_Glcxt := EX_Glcxt;
  pEX_O2 := EX_O2;

  // Reactions:
  EX_Ac: => dummy_S; 0 mmol_per_h; fba.EX_Ac_port is EX_Ac;
  EX_X: => dummy_S; 0 mmol_per_h; fba.EX_X_port is EX_X;
  EX_Glcxt: => dummy_S; 0 mmol_per_h; fba.EX_Glcxt_port is EX_Glcxt;
  EX_O2: => dummy_S; 0 mmol_per_h; fba.EX_O2_port is EX_O2;
  vO2_transfer: -> O2; kLa*(O2_ref - O2)*bioreactor; vO2_transfer is "oxygen transfer";

  // Unit definitions:
  unit h = 3600 second; h is "hour"; bounds.h is h; fba.h is h; update.h is h;  // UO:0000032
  unit g = gram; g is "gram"; bounds.g is g; fba.g is g; update.g is g;
  unit m = metre; m is "meter"; bounds.m is m; fba.m is m; update.m is m;  // UO:0000008
  unit m2 = metre^2; m2 is "cubic meter"; bounds.m2 is m2; fba.m2 is m2; update.m2 is m2;  // UO:0000080
  unit l = litre; l is "liter"; bounds.l is l; fba.l is l; update.l is l;
  unit mmol = 1e-3 mole; bounds.mmol is mmol; fba.mmol is mmol; update.mmol is mmol;
  unit per_h = 1 / (3600 second); bounds.per_h is per_h; fba.per_h is per_h; update.per_h is per_h;
  unit mmol_per_h = 1e-3 mole / (3600 second); bounds.mmol_per_h is mmol_per_h; fba.mmol_per_h is mmol_per_h; update.mmol_per_h is mmol_per_h;
  unit mmol_per_hg = 1e-3 mole / (3600 second * gram); bounds.mmol_per_hg is mmol_per_hg; fba.mmol_per_hg is mmol_per_hg; update.mmol_per_hg is mmol_per_hg;
  unit mmol_per_l = 1e-3 mole / litre; bounds.mmol_per_l is mmol_per_l; fba.mmol_per_l is mmol_per_l; update.mmol_per_l is mmol_per_l;
  unit mmol_per_lg = 1e-3 mole / (litre * gram); bounds.mmol_per_lg is mmol_per_lg; fba.mmol_per_lg is mmol_per_lg; update.mmol_per_lg is mmol_per_lg;
  unit l_per_mmol = litre / (1e-3 mole); bounds.l_per_mmol is l_per_mmol; fba.l_per_mmol is l_per_mmol; update.l_per_mmol is l_per_mmol;
  unit g_per_l = gram / litre; bounds.g_per_l is g_per_l; fba.g_per_l is g_per_l; update.g_per_l is g_per_l;
  unit g_per_mmol = gram / (1e-3 mole); bounds.g_per_mmol is g_per_mmol; fba.g_per_mmol is g_per_mmol; update.g_per_mmol is g_per_mmol;
end
