// SBML level 3 version 1

model diauxic_update(bioreactor, Ac, Glcxt, O2, X, pEX_Ac, pEX_Glcxt, pEX_O2, pEX_X)
  // diauxic (UPDATE)
  // Diauxic Growth Model
  // Model version: 13
  // UPDATE submodel
  // Submodel for dynamically updating the metabolite count. This updates the ode model based on the FBA fluxes.
  // Description
  // Dynamic Flux Balance Analysis of Diauxic Growth in Escherichia coli
  // The key variables in the mathematical model of the metabolic network are the glucose concentration (Glcxt), the acetate concentration (Ac), the biomass concentration (X), and the oxygen concentration (O2) in the gas phase.
  // This file has been produced by Matthias Koenig.
  // Terms of use
  // Copyright © 2017 Matthias Koenig
  // Redistribution and use of any part of this model, with or without modification, are permitted provided that the following conditions are met:
  // Redistributions of this SBML file must retain the above copyright notice, this list of conditions and the following disclaimer.
  // Redistributions in a different form must reproduce the above copyright notice, this list of conditions and the following disclaimer in the documentation and/or other materials provided with the distribution.
  // This model is distributed in the hope that it will be useful, but WITHOUT ANY WARRANTY; without even the implied warranty of MERCHANTABILITY or FITNESS FOR A PARTICULAR PURPOSE.
  // isVersionOf GO:0006007
  // model units - substance: mmol, time: h, volume: l, area: m2, length: m, extent: mmol

  // Compartments:
  compartment bioreactor = 1 l;

  // Species:
  species Ac in bioreactor = 1; Ac is "acetate";  // substance in mmol_per_l; CHEBI:15366 kegg.compound:C00033
  species Glcxt in bioreactor = 1; Glcxt is "glucose";  // substance in mmol_per_l; CHEBI:4167 kegg.compound:C00031
  species O2 in bioreactor = 1; O2 is "oxygen";  // substance in mmol_per_l; CHEBI:15379 kegg.compound:C00007
  species X in bioreactor = 1; X is "biomass";  // substance in mmol_per_l; OMIT:0018723

  // Parameters:
  pEX_Ac = 1 mmol_per_h;
  pEX_Glcxt = 1 mmol_per_h;
  pEX_O2 = 1 mmol_per_h;
  pEX_X = 1 mmol_per_h;

  // Reactions:
  update_Ac: Ac -> ; -pEX_Ac*X*1 l_per_mmol;  // modifiers: X
  update_Glcxt: Glcxt -> ; -pEX_Glcxt*X*1 l_per_mmol;  // modifiers: X
  update_O2: O2 -> ; -pEX_O2*X*1 l_per_mmol;  // modifiers: X
  update_X: X -> ; -pEX_X*X*1 l_per_mmol;

  // Unit definitions:
  unit h = 3600 second; h is "hour";  // UO:0000032
  unit g = gram; g is "gram";
  unit m = metre; m is "meter";  // UO:0000008
  unit m2 = metre^2; m2 is "cubic meter";  // UO:0000080
  unit l = litre; l is "liter";
  unit mmol = 1e-3 mole;
  unit per_h = 1 / (3600 second);
  unit mmol_per_h = 1e-3 mole / (3600 second);
  unit mmol_per_hg = 1e-3 mole / (3600 second * gram);
  unit mmol_per_l = 1e-3 mole / litre;
  unit mmol_per_lg = 1e-3 mole / (litre * gram);
  unit l_per_mmol = litre / (1e-3 mole);
  unit g_per_l = gram / litre;
  unit g_per_mmol = gram / (1e-3 mole);
end
