// SBML level 3 version 1

model diauxic_update(EX_Glcxt, EX_Ac, EX_O2, EX_X, Glcxt, Ac, O2, X, bioreactor)
  // ODE metabolite update
  // Diauxic Growth Model
  // Description
  // Dynamic Flux Balance Analysis of Diauxic Growth in Escherichia coli
  // The key variables in the mathematical model of the metabolic network are the glucose concentration (Glcxt), the acetate concentration (Ac), the biomass concentration (X), and the oxygen concentration (O2) in the gas phase.
  // This file has been produced by Matthias Koenig.
  // Terms of use
  // Copyright © 2017 Matthias Koenig
  // Redistribution and use of any part of this model, with or without modification, are permitted provided that the following conditions are met:
  // Redistributions of this SBML file must retain the above copyright notice, this list of conditions and the following disclaimer.
  // Redistributions in a different form must reproduce the above copyright notice, this list of conditions and the following disclaimer in the documentation and/or other materials provided with the distribution.
  // This model is distributed in the hope that it will be useful, but WITHOUT ANY WARRANTY; without even the implied warranty of MERCHANTABILITY or FITNESS FOR A PARTICULAR PURPOSE.
  // model units - substance: mmol, time: h, volume: l, area: m2, length: m, extent: mmol

  // Compartments:
  compartment bioreactor = 1 l;

  // Species:
  species Glcxt in bioreactor = 10.8; Glcxt is "glucose";
  species Ac in bioreactor = 0.4; Ac is "acetate";
  species O2 in bioreactor = 0.21; O2 is "oxygen";
  species X in bioreactor = 0.001; X is "biomass";

  // Parameters:
  Y has g_per_l; Y is "biomass [g_per_l]";
  EX_Ac = 1 mmol_per_hg; EX_Ac is "Ac exchange (FBA flux)";
  EX_Glcxt = 1 mmol_per_hg; EX_Glcxt is "Glcxt exchange (FBA flux)";
  EX_O2 = 1 mmol_per_hg; EX_O2 is "O2 exchange (FBA flux)";
  EX_X = 1 mmol_per_hg; EX_X is "X exchange (FBA flux)";
  Km_vFBA = 0.02 mmol_per_l;

  // Assignment rules:
  Y := 1 g_per_mmol*X;

  // Reactions:
  update_Glcxt: Glcxt => ; -EX_Glcxt*Y*bioreactor*Glcxt/(Km_vFBA + Glcxt);
  update_Ac: Ac => ; -EX_Ac*Y*bioreactor*Ac/(Km_vFBA + Ac);
  update_O2: O2 => ; -EX_O2*Y*bioreactor*O2/(Km_vFBA + O2);
  update_X: X => ; -EX_X*Y*bioreactor;

  // Unit definitions:
  unit h = 3600 second;
  unit g = gram;
  unit m = metre;
  unit m2 = metre^2;
  unit l = litre;
  unit per_h = 1 / (3600 second);
  unit mmol_per_l = 1e-3 mole / litre;
  unit g_per_l = gram / litre;
  unit mmol = 1e-3 mole;
  unit per_g = 1 / gram;
  unit g_per_mmol = gram / (1e-3 mole);
  unit mmol_per_h = 1e-3 mole / (3600 second);
  unit mmol_per_hg = 1e-3 mole / (3600 second * gram);
  unit mmol_per_lh = 1e-3 mole / (litre * 3600 second);
  unit g_per_lh = gram / (litre * 3600 second);
end
