// SBML level 3 version 1
import "diauxic_fba.xml";
import "diauxic_bounds.xml";
import "diauxic_update.xml";

model diauxic_top(dt)
  // Top level model
  // Diauxic Growth Model
  // Model version: 6
  // Description
  // Dynamic Flux Balance Analysis of Diauxic Growth in Escherichia coli
  // The key variables in the mathematical model of the metabolic network are the glucose concentration (Glcxt), the acetate concentration (Ac), the biomass concentration (X), and the oxygen concentration (O2) in the gas phase.
  // This file has been produced by Matthias Koenig.
  // Terms of use
  // Copyright © 2017 Matthias Koenig
  // Redistribution and use of any part of this model, with or without modification, are permitted provided that the following conditions are met:
  // Redistributions of this SBML file must retain the above copyright notice, this list of conditions and the following disclaimer.
  // Redistributions in a different form must reproduce the above copyright notice, this list of conditions and the following disclaimer in the documentation and/or other materials provided with the distribution.
  // This model is distributed in the hope that it will be useful, but WITHOUT ANY WARRANTY; without even the implied warranty of MERCHANTABILITY or FITNESS FOR A PARTICULAR PURPOSE.
  // model units - substance: mmol, time: h, volume: l, area: m2, length: m, extent: mmol

  // Sub-modules:
  bounds: diauxic_bounds();
  fba: diauxic_fba();
  update: diauxic_update();

  // Compartments:
  compartment bioreactor = 1 l; fba.bioreactor_port is bioreactor; update.bioreactor_port is bioreactor; bounds.bioreactor_port is bioreactor;

  // Species:
  species Glcxt in bioreactor = 10.8; Glcxt is "glucose"; fba.Glcxt_port is Glcxt; update.Glcxt_port is Glcxt; bounds.Glcxt_port is Glcxt;
  species Ac in bioreactor = 0.4; Ac is "acetate"; fba.Ac_port is Ac; update.Ac_port is Ac; bounds.Ac_port is Ac;
  species O2 in bioreactor = 0.21; O2 is "oxygen"; fba.O2_port is O2; update.O2_port is O2; bounds.O2_port is O2;
  species X in bioreactor = 0.001; X is "biomass"; fba.X_port is X; update.X_port is X; bounds.X_port is X;
  species dummy_S in bioreactor = 0;

  // Parameters:
  dt = 0.1 h; dt is "fba timestep"; bounds.dt_port is dt;
  Y has g_per_l; Y is "biomass [g_per_l]";
  O2_ref = 0.21 mmol_per_l; O2_ref is "O2 reference";
  kLa = 7.5 per_h; kLa is "O2 mass transfer";
  EX_Glcxt has mmol_per_h; update.EX_Glcxt_port is EX_Glcxt;
  EX_Ac has mmol_per_h; update.EX_Ac_port is EX_Ac;
  EX_O2 has mmol_per_h; update.EX_O2_port is EX_O2;
  EX_X has mmol_per_h; update.EX_X_port is EX_X;
  lb_EX_Ac = -1000 mmol_per_h; fba.lb_EX_Ac_port is lb_EX_Ac; bounds.lb_EX_Ac_port is lb_EX_Ac;
  ub_EX_Ac = 1000 mmol_per_h; fba.ub_EX_Ac_port is ub_EX_Ac; bounds.ub_EX_Ac_port is ub_EX_Ac;
  lb_EX_Glcxt = -1000 mmol_per_h; fba.lb_EX_Glcxt_port is lb_EX_Glcxt; bounds.lb_EX_Glcxt_port is lb_EX_Glcxt;
  ub_EX_Glcxt = 1000 mmol_per_h; fba.ub_EX_Glcxt_port is ub_EX_Glcxt; bounds.ub_EX_Glcxt_port is ub_EX_Glcxt;
  lb_EX_O2 = -1000 mmol_per_h; fba.lb_EX_O2_port is lb_EX_O2; bounds.lb_EX_O2_port is lb_EX_O2;
  ub_EX_O2 = 1000 mmol_per_h; fba.ub_EX_O2_port is ub_EX_O2; bounds.ub_EX_O2_port is ub_EX_O2;
  lb_EX_X = -1000 mmol_per_h; fba.lb_EX_X_port is lb_EX_X; bounds.lb_EX_X_port is lb_EX_X;
  ub_EX_X = 1000 mmol_per_h; fba.ub_EX_X_port is ub_EX_X; bounds.ub_EX_X_port is ub_EX_X;

  // Assignment rules:
  EX_Glcxt := dummy_EX_Glcxt;
  EX_Ac := dummy_EX_Ac;
  EX_O2 := dummy_EX_O2;
  EX_X := dummy_EX_X;
  Y := 1 g_per_mmol*X;

  // Reactions:
  dummy_EX_Glcxt: => dummy_S; ; dummy_EX_Glcxt is "EX_Glcxt dummy"; fba.EX_Glcxt_port is dummy_EX_Glcxt;
  dummy_EX_O2: => dummy_S; ; dummy_EX_O2 is "EX_O2 dummy"; fba.EX_O2_port is dummy_EX_O2;
  dummy_EX_Ac: => dummy_S; ; dummy_EX_Ac is "EX_Ac dummy"; fba.EX_Ac_port is dummy_EX_Ac;
  dummy_EX_X: => dummy_S; ; dummy_EX_X is "EX_X dummy"; fba.EX_X_port is dummy_EX_X;
  vO2_transfer: -> O2; kLa*(O2_ref - O2)*bioreactor; vO2_transfer is "oxygen transfer";

  // Unit definitions:
  unit h = 3600 second; bounds.h is h; fba.h is h; update.h is h;
  unit g = gram; bounds.g is g; fba.g is g; update.g is g;
  unit m = metre; bounds.m is m; fba.m is m; update.m is m;
  unit m2 = metre^2; bounds.m2 is m2; fba.m2 is m2; update.m2 is m2;
  unit l = litre; bounds.l is l; fba.l is l; update.l is l;
  unit mmol = 1e-3 mole; bounds.mmol is mmol; fba.mmol is mmol; update.mmol is mmol;
  unit per_h = 1 / (3600 second);
  unit mmol_per_h = 1e-3 mole / (3600 second); bounds.mmol_per_h is mmol_per_h; fba.mmol_per_h is mmol_per_h; update.mmol_per_h is mmol_per_h;
  unit mmol_per_l = 1e-3 mole / litre; bounds.mmol_per_l is mmol_per_l; fba.mmol_per_l is mmol_per_l; update.mmol_per_l is mmol_per_l;
  unit l_per_mmol = litre / (1e-3 mole);
  unit g_per_l = gram / litre; bounds.g_per_l is g_per_l; fba.g_per_l is g_per_l; update.g_per_l is g_per_l;
  unit g_per_mmol = gram / (1e-3 mole); bounds.g_per_mmol is g_per_mmol; fba.g_per_mmol is g_per_mmol; update.g_per_mmol is g_per_mmol;
end
