// SBML level 3 version 1

function bounds__max(x, y)
  piecewise(x, x > y, y);
end
bounds__max is "minimum of arguments";

function bounds__min(x, y)
  piecewise(x, x < y, y);
end
bounds__min is "maximum of arguments";

model diauxic_top_flat()
  // diauxic (TOP)_flat
  // Diauxic Growth Model
  // Model version: 9
  // TOP model
  // Main comp DFBA model by combining fba, update and bounds model with additional kinetics in the top model.
  // Description
  // Dynamic Flux Balance Analysis of Diauxic Growth in Escherichia coli
  // The key variables in the mathematical model of the metabolic network are the glucose concentration (Glcxt), the acetate concentration (Ac), the biomass concentration (X), and the oxygen concentration (O2) in the gas phase.
  // This file has been produced by Matthias Koenig.
  // Terms of use
  // Copyright © 2017 Matthias Koenig
  // Redistribution and use of any part of this model, with or without modification, are permitted provided that the following conditions are met:
  // Redistributions of this SBML file must retain the above copyright notice, this list of conditions and the following disclaimer.
  // Redistributions in a different form must reproduce the above copyright notice, this list of conditions and the following disclaimer in the documentation and/or other materials provided with the distribution.
  // This model is distributed in the hope that it will be useful, but WITHOUT ANY WARRANTY; without even the implied warranty of MERCHANTABILITY or FITNESS FOR A PARTICULAR PURPOSE.
  // model units - substance: mmol, time: h, volume: l, area: m2, length: m, extent: mmol

  // Compartments:
  compartment bioreactor = 1 l;
  compartment fba__bioreactor = 1 l;

  // Species:
  species Glcxt in bioreactor = 10.8; Glcxt is "glucose";
  species Ac in bioreactor = 0.4; Ac is "acetate";
  species O2 in bioreactor = 0.21; O2 is "oxygen";
  species X in bioreactor = 0.001; X is "biomass";
  species dummy_S in bioreactor = 0;
  species fba__Glcxt in fba__bioreactor = 10.8; fba__Glcxt is "glucose";
  species fba__Ac in fba__bioreactor = 0.4; fba__Ac is "acetate";
  species fba__O2 in fba__bioreactor = 0.21; fba__O2 is "oxygen";
  species fba__X in fba__bioreactor = 0.001; fba__X is "biomass";

  // Parameters:
  dt = 0.1 h; dt is "fba timestep";
  Y has g_per_l; Y is "biomass [g_per_l]";
  O2_ref = 0.21 mmol_per_l; O2_ref is "O2 reference";
  kLa = 7.5 per_h; kLa is "O2 mass transfer";
  EX_Glcxt has mmol_per_h;
  EX_Ac has mmol_per_h;
  EX_O2 has mmol_per_h;
  EX_X has mmol_per_h;
  lb_EX_Ac has mmol_per_h;
  ub_EX_Ac = 1000 mmol_per_h;
  lb_EX_Glcxt has mmol_per_h;
  ub_EX_Glcxt = 1000 mmol_per_h;
  lb_EX_O2 has mmol_per_h;
  ub_EX_O2 = 1000 mmol_per_h;
  lb_EX_X has mmol_per_h;
  ub_EX_X = 1000 mmol_per_h;
  fba__zero = 0 mmol_per_h; fba__zero is "zero bound";
  fba__ub_default = 1000 mmol_per_h; fba__ub_default is "default upper bound";
  bounds__zero = 0 mmol_per_h; bounds__zero is "zero bound";
  bounds__lb_default = -1000 mmol_per_h; bounds__lb_default is "default lower bound";
  bounds__ub_default = 1000 mmol_per_h; bounds__ub_default is "default upper bound";
  bounds__lb_kin_EX_Glcxt has mmol_per_h;
  bounds__lb_kin_EX_O2 has mmol_per_h;
  bounds__Vmax_EX_O2 = 15 mmol_per_h;
  bounds__Vmax_EX_Glcxt = 10 mmol_per_h;
  bounds__Km_EX_Glcxt = 0.015 mmol_per_l; bounds__Km_EX_Glcxt is "Km_vGlcxt";

  // Assignment rules:
  EX_Glcxt := dummy_EX_Glcxt;
  EX_Ac := dummy_EX_Ac;
  EX_O2 := dummy_EX_O2;
  EX_X := dummy_EX_X;
  Y := 1 g_per_mmol*X;
  bounds__lb_kin_EX_Glcxt := -bounds__Vmax_EX_Glcxt*Glcxt/(bounds__Km_EX_Glcxt + Glcxt);
  bounds__lb_kin_EX_O2 := -bounds__Vmax_EX_O2;
  lb_EX_Ac := bounds__max(bounds__lb_default, -Ac/X*bioreactor/dt*1 bounds__l_per_mmol);
  lb_EX_Glcxt := bounds__max(bounds__lb_kin_EX_Glcxt, -Glcxt/X*bioreactor/dt*1 bounds__l_per_mmol);
  lb_EX_O2 := bounds__max(bounds__lb_kin_EX_O2, -O2/X*bioreactor/dt*1 bounds__l_per_mmol);
  lb_EX_X := bounds__max(bounds__lb_default, -X/X*bioreactor/dt*1 bounds__l_per_mmol);

  // Reactions:
  vO2_transfer: -> O2; kLa*(O2_ref - O2)*bioreactor; vO2_transfer is "oxygen transfer";
  fba__v1: 39.43 fba__Ac + 35 fba__O2 => fba__X; ; fba__v1 is "v1 (39.43 Ac + 35 O2 -> X)";
  fba__v2: 9.46 fba__Glcxt + 12.92 fba__O2 => fba__X; ; fba__v2 is "v2 (9.46 Glcxt + 12.92 O2 -> X)";
  fba__v3: 9.84 fba__Glcxt + 12.73 fba__O2 => fba__X + 1.24 fba__Ac; ; fba__v3 is "v3 (9.84 Glcxt + 12.73 O2 -> 1.24 Ac + X)";
  fba__v4: 19.23 fba__Glcxt => fba__X + 12.12 fba__Ac; ; fba__v4 is "v4 (19.23 Glcxt -> 12.12 Ac + X)";
  dummy_EX_Ac: fba__Ac -> ; ;
  dummy_EX_Glcxt: fba__Glcxt -> ; ;
  dummy_EX_O2: fba__O2 -> ; ;
  dummy_EX_X: fba__X -> ; ;
  update__update_Ac: Ac -> ; -EX_Ac*X*1 update__l_per_mmol;  // modifiers: X
  update__update_Glcxt: Glcxt -> ; -EX_Glcxt*X*1 update__l_per_mmol;  // modifiers: X
  update__update_O2: O2 -> ; -EX_O2*X*1 update__l_per_mmol;  // modifiers: X
  update__update_X: X -> ; -EX_X*X*1 update__l_per_mmol;

  // Unit definitions:
  unit h = 3600 second;
  unit g = gram;
  unit m = metre;
  unit m2 = metre^2;
  unit l = litre;
  unit mmol = 1e-3 mole;
  unit per_h = 1 / (3600 second);
  unit mmol_per_h = 1e-3 mole / (3600 second);
  unit mmol_per_l = 1e-3 mole / litre;
  unit l_per_mmol = litre / (1e-3 mole);
  unit g_per_l = gram / litre;
  unit g_per_mmol = gram / (1e-3 mole);
  unit fba__per_h = 1 / (3600 second);
  unit fba__l_per_mmol = litre / (1e-3 mole);
  unit bounds__per_h = 1 / (3600 second);
  unit bounds__l_per_mmol = litre / (1e-3 mole);
  unit update__per_h = 1 / (3600 second);
  unit update__l_per_mmol = litre / (1e-3 mole);
end
