// SBML level 3 version 1

model growth_fba(Cell, v4, v2, v3, v1, max_v1, max_v2, max_v3, max_v4, o_uptake, g_uptake, g_uptake_max, o_uptake_max)

  // Compartments:
  compartment Cell = 1;

  // Species:
  substanceOnly species Glcxt in Cell = 0;
  substanceOnly species O2 in Cell = 0;
  substanceOnly species Ac in Cell = 0;
  substanceOnly species $X in Cell = 0;
  substanceOnly species $Glcxt_out in Cell = 0;
  substanceOnly species $O2_out in Cell = 0;

  // Parameters:
  max_v2 = 1;
  max_v1 = 0.1;
  max_v3 = 0.3;
  max_v4 = 0.1;
  default_min = 0;
  default_max = 1000;
  g_uptake_max = 10;
  o_uptake_max = 15;

  // Reactions:
  v4: 19.23 Glcxt => 12.12 Ac + $X; ;
  v3: 9.84 Glcxt + 12.73 O2 => 1.24 Ac + $X; ;
  v2: 9.46 Glcxt + 12.92 O2 => $X; ;
  v1: 39.43 Ac + 35 O2 => $X; ;
  g_uptake: $Glcxt_out => Glcxt; ;
  o_uptake: $O2_out => O2; ;
end

model growth_update(Cell, Ac, rateOfV1, rateOfV3, rateOfV4, rateOfV2, X, O2_out, o_rate_uptake, g_rate_uptake, Glcxt, Glcxt_out, O2)

  // Compartments:
  compartment Cell = 1;

  // Species:
  substanceOnly species Glcxt in Cell = 0;
  substanceOnly species O2 in Cell = 0;
  substanceOnly species Ac in Cell = 0;
  substanceOnly species X in Cell = 0;
  substanceOnly species Glcxt_out in Cell = 0;
  substanceOnly species O2_out in Cell = 0;

  // Parameters:
  rateOfV1 = 0;
  rateOfV3 = 0;
  rateOfV2 = 0;
  rateOfV4 = 0;
  g_rate_uptake = 0;
  o_rate_uptake = 0;

  // Reactions:
  v1: 39.43 Ac + 35 O2 => X; rateOfV1*X;
  o_uptake: O2_out => O2; g_rate_uptake;
  g_uptake: Glcxt_out => Glcxt; g_rate_uptake;
  v3: 12.73 O2 + 9.84 Glcxt => 1.24 Ac + X; rateOfV3*X;
  v4: 19.23 Glcxt => 12.12 Ac + X; rateOfV4*X;
  v2: 9.46 Glcxt + 12.92 O2 => X; rateOfV2*X;
end

model growth_top(C1, C1, C1, C1, C2)

  // Sub-modules:
  C1: growth_fba();
  C2: growth_update();

  // Compartments:
  compartment Cell = 1;

  // Species:
  substanceOnly species O2 in Cell = 0.21; C2.O2 is O2; C2.O2_out is O2;
  substanceOnly species Ac in Cell = 0.4; C2.Ac is Ac;
  substanceOnly species Glcxt in Cell = 10.8; C2.Glcxt is Glcxt; C2.Glcxt_out is Glcxt;
  substanceOnly species dummy in Cell = 0;
  substanceOnly species X in Cell = 0.001; C2.X is X;

  // Parameters:
  Km = 0.015;
  dt = 0.04;
  p2 = 1;
  p3 = 0;
  p4 = 1;
  p5 = 0;
  p6 = 1;
  p7 = 0;

  // Assignment rules:
  g_uptake_max := 10*Glcxt/(Km + Glcxt);
  rateOfV1 := v1;
  rateOfV2 := v2;
  rateOfV3 := v3;
  rateOfV4 := v4;
  g_rate_uptake := g_uptake;
  o_rate_uptake := o_uptake;
  max_v1 := rateOfV1 + 0.1*dt;
  max_v2 := rateOfV2 + 0.3*dt;
  max_v3 := rateOfV3 + 0.3*dt;
  max_v4 := rateOfV4 + 0.1*dt;

  // Reactions:
  v4: dummy => ; v4_kf; C1.v4 is v4;
    v4_kf = 0.1; v4_kr = 1;
  v2: dummy => ; v2_kf; C1.v2 is v2;
    v2_kf = 0.1; v2_kr = 1;
  v3: dummy => ; v3_kf; C1.v3 is v3;
    v3_kf = 0.1; v3_kr = 1;
  g_uptake: dummy => ; g_uptake_kf;
    g_uptake_kf = 0.1; g_uptake_kr = 1;
  o_uptake: dummy => ; o_uptake_kf;
    o_uptake_kf = 0.1; o_uptake_kr = 1;
  v1: dummy => ; v1_kf; C1.v1 is v1;
    v1_kf = 0.1; v1_kr = 1;
  o2_transport: => O2; kLa*(0.21 - O2);
    kLa = 7.5;

  // Events:
  t2: at ((O2 < 0) && (p2 == 1)), t0=false, persistent=false, fromTrigger=false: O2 = 0, p2 = 0, p3 = 1;
  t3: at (true && (p3 == 1)), t0=false, persistent=false, fromTrigger=false: p3 = 0, p2 = 1;
  t4: at ((Ac < 0) && (p4 == 1)), t0=false, persistent=false, fromTrigger=false: Ac = 0, p4 = 0, p5 = 1;
  t5: at (true && (p5 == 1)), t0=false, persistent=false, fromTrigger=false: p5 = 0, p4 = 1;
  t6: at ((Glcxt < 0) && (p6 == 1)), t0=false, persistent=false, fromTrigger=false: Glcxt = 0, p6 = 0, p7 = 1;
  t7: at (true && (p7 == 1)), t0=false, persistent=false, fromTrigger=false: p7 = 0, p6 = 1;
end
