// SBML level 3 version 1
import "ecoli_fba.xml";
import "ecoli_bounds.xml";
import "ecoli_update.xml";

model ecoli_top()
  // ecoli (TOP)
  // E.coli core DFBA model
  // Model version: 10
  // TOP model
  // Main comp DFBA model by combining fba, update and bounds model with additional kinetics in the top model.
  // Description
  // This is a metabolism model of Escherichia coli str. K-12 substr. MG1655 in SBML format.
  // The content of this model has been carefully created in a manual research effort. This file has been exported from the software COBRApy and further processed with the JSBML-based ModelPolisher application.
  // This file has been produced by the Systems Biology Research Group using BiGG Models knowledge-base version of Nov 21, 2016, where it is currently hosted and identified by: e_coli_core.
  // Terms of use
  // Copyright © 2016 The Regents of the University of California.
  // Redistribution and use of any part of this model from BiGG Models knowledge-base, with or without modification, are permitted provided that the following conditions are met:
  // Redistributions of this SBML file must retain the above copyright notice, this list of conditions and the following disclaimer.
  // Redistributions in a different form must reproduce the above copyright notice, this list of conditions and the following disclaimer in the documentation and/or other materials provided with the distribution.
  // This model is distributed in the hope that it will be useful, but WITHOUT ANY WARRANTY; without even the implied warranty of MERCHANTABILITY or FITNESS FOR A PARTICULAR PURPOSE.
  // For specific licensing terms about this particular model and regulations of commercial use, see this model in BiGG Models knowledge-base.
  // References
  // When using content from BiGG Models knowledge-base in your research works, please cite
  // King ZA, Lu JS, Dräger A, Miller PC, Federowicz S, Lerman JA, Ebrahim A, Palsson BO, and Lewis NE. (2015).
  // BiGG Models: A platform for integrating, standardizing, and sharing genome-scale models. Nucl Acids Res. doi:10.1093/nar/gkv1049
  // model units - substance: mmol, time: h, volume: l, area: m2, length: m, extent: mmol

  // Sub-modules:
  fba: ecoli_fba();
  bounds: ecoli_bounds();
  update: ecoli_update();

  // Compartments:
  compartment bioreactor = 1 l; update.bioreactor_port is bioreactor; bounds.bioreactor_port is bioreactor;

  // Species:
  species for_e in bioreactor = 1; for_e is "Formate"; update.for_e_port is for_e; bounds.for_e_port is for_e;
  species fru_e in bioreactor = 1; fru_e is "D-Fructose"; update.fru_e_port is fru_e; bounds.fru_e_port is fru_e;
  species h2o_e in bioreactor = 20; h2o_e is "H2O"; update.h2o_e_port is h2o_e; bounds.h2o_e_port is h2o_e;
  species akg_e in bioreactor = 1; akg_e is "2-Oxoglutarate"; update.akg_e_port is akg_e; bounds.akg_e_port is akg_e;
  species pyr_e in bioreactor = 1; pyr_e is "Pyruvate"; update.pyr_e_port is pyr_e; bounds.pyr_e_port is pyr_e;
  species glc__D_e in bioreactor = 20; glc__D_e is "D-Glucose"; update.glc__D_e_port is glc__D_e; bounds.glc__D_e_port is glc__D_e;
  species fum_e in bioreactor = 1; fum_e is "Fumarate"; update.fum_e_port is fum_e; bounds.fum_e_port is fum_e;
  species X in bioreactor = 0.001; X is "biomass"; update.X_port is X; bounds.X_port is X;
  species pi_e in bioreactor = 1; pi_e is "Phosphate"; update.pi_e_port is pi_e; bounds.pi_e_port is pi_e;
  species lac__D_e in bioreactor = 1; lac__D_e is "D-Lactate"; update.lac__D_e_port is lac__D_e; bounds.lac__D_e_port is lac__D_e;
  species gln__L_e in bioreactor = 10; gln__L_e is "L-Glutamine"; update.gln__L_e_port is gln__L_e; bounds.gln__L_e_port is gln__L_e;
  species acald_e in bioreactor = 1; acald_e is "Acetaldehyde"; update.acald_e_port is acald_e; bounds.acald_e_port is acald_e;
  species etoh_e in bioreactor = 1; etoh_e is "Ethanol"; update.etoh_e_port is etoh_e; bounds.etoh_e_port is etoh_e;
  species ac_e in bioreactor = 1; ac_e is "Acetate"; update.ac_e_port is ac_e; bounds.ac_e_port is ac_e;
  species succ_e in bioreactor = 1; succ_e is "Succinate"; update.succ_e_port is succ_e; bounds.succ_e_port is succ_e;
  species o2_e in bioreactor = 1; o2_e is "O2"; update.o2_e_port is o2_e; bounds.o2_e_port is o2_e;
  species mal__L_e in bioreactor = 1; mal__L_e is "L-Malate"; update.mal__L_e_port is mal__L_e; bounds.mal__L_e_port is mal__L_e;
  species h_e in bioreactor = 1; h_e is "H+"; update.h_e_port is h_e; bounds.h_e_port is h_e;
  species co2_e in bioreactor = 1; co2_e is "CO2"; update.co2_e_port is co2_e; bounds.co2_e_port is co2_e;
  species nh4_e in bioreactor = 1; nh4_e is "Ammonium"; update.nh4_e_port is nh4_e; bounds.nh4_e_port is nh4_e;
  species glu__L_e in bioreactor = 1; glu__L_e is "L-Glutamate"; update.glu__L_e_port is glu__L_e; bounds.glu__L_e_port is glu__L_e;
  species dummy_S in bioreactor = 0;

  // Parameters:
  dt = 0.1 h; bounds.dt_port is dt;
  lb_EX_for_e = 0 mmol_per_h; fba.lb_EX_for_e_port is lb_EX_for_e; bounds.lb_EX_for_e_port is lb_EX_for_e;
  ub_EX_for_e = 1000 mmol_per_h; fba.ub_EX_for_e_port is ub_EX_for_e; bounds.ub_EX_for_e_port is ub_EX_for_e;
  lb_EX_fru_e = 0 mmol_per_h; fba.lb_EX_fru_e_port is lb_EX_fru_e; bounds.lb_EX_fru_e_port is lb_EX_fru_e;
  ub_EX_fru_e = 1000 mmol_per_h; fba.ub_EX_fru_e_port is ub_EX_fru_e; bounds.ub_EX_fru_e_port is ub_EX_fru_e;
  lb_EX_h2o_e = -1000 mmol_per_h; fba.lb_EX_h2o_e_port is lb_EX_h2o_e; bounds.lb_EX_h2o_e_port is lb_EX_h2o_e;
  ub_EX_h2o_e = 1000 mmol_per_h; fba.ub_EX_h2o_e_port is ub_EX_h2o_e; bounds.ub_EX_h2o_e_port is ub_EX_h2o_e;
  lb_EX_akg_e = 0 mmol_per_h; fba.lb_EX_akg_e_port is lb_EX_akg_e; bounds.lb_EX_akg_e_port is lb_EX_akg_e;
  ub_EX_akg_e = 1000 mmol_per_h; fba.ub_EX_akg_e_port is ub_EX_akg_e; bounds.ub_EX_akg_e_port is ub_EX_akg_e;
  lb_EX_pyr_e = 0 mmol_per_h; fba.lb_EX_pyr_e_port is lb_EX_pyr_e; bounds.lb_EX_pyr_e_port is lb_EX_pyr_e;
  ub_EX_pyr_e = 1000 mmol_per_h; fba.ub_EX_pyr_e_port is ub_EX_pyr_e; bounds.ub_EX_pyr_e_port is ub_EX_pyr_e;
  lb_EX_glc__D_e = -10 mmol_per_h; fba.lb_EX_glc__D_e_port is lb_EX_glc__D_e; bounds.lb_EX_glc__D_e_port is lb_EX_glc__D_e;
  ub_EX_glc__D_e = 1000 mmol_per_h; fba.ub_EX_glc__D_e_port is ub_EX_glc__D_e; bounds.ub_EX_glc__D_e_port is ub_EX_glc__D_e;
  lb_EX_fum_e = 0 mmol_per_h; fba.lb_EX_fum_e_port is lb_EX_fum_e; bounds.lb_EX_fum_e_port is lb_EX_fum_e;
  ub_EX_fum_e = 1000 mmol_per_h; fba.ub_EX_fum_e_port is ub_EX_fum_e; bounds.ub_EX_fum_e_port is ub_EX_fum_e;
  lb_EX_X = 0 mmol_per_h; fba.lb_EX_X_port is lb_EX_X; bounds.lb_EX_X_port is lb_EX_X;
  ub_EX_X = 1000 mmol_per_h; fba.ub_EX_X_port is ub_EX_X; bounds.ub_EX_X_port is ub_EX_X;
  lb_EX_pi_e = -1000 mmol_per_h; fba.lb_EX_pi_e_port is lb_EX_pi_e; bounds.lb_EX_pi_e_port is lb_EX_pi_e;
  ub_EX_pi_e = 1000 mmol_per_h; fba.ub_EX_pi_e_port is ub_EX_pi_e; bounds.ub_EX_pi_e_port is ub_EX_pi_e;
  lb_EX_lac__D_e = 0 mmol_per_h; fba.lb_EX_lac__D_e_port is lb_EX_lac__D_e; bounds.lb_EX_lac__D_e_port is lb_EX_lac__D_e;
  ub_EX_lac__D_e = 1000 mmol_per_h; fba.ub_EX_lac__D_e_port is ub_EX_lac__D_e; bounds.ub_EX_lac__D_e_port is ub_EX_lac__D_e;
  lb_EX_gln__L_e = 0 mmol_per_h; fba.lb_EX_gln__L_e_port is lb_EX_gln__L_e; bounds.lb_EX_gln__L_e_port is lb_EX_gln__L_e;
  ub_EX_gln__L_e = 1000 mmol_per_h; fba.ub_EX_gln__L_e_port is ub_EX_gln__L_e; bounds.ub_EX_gln__L_e_port is ub_EX_gln__L_e;
  lb_EX_acald_e = 0 mmol_per_h; fba.lb_EX_acald_e_port is lb_EX_acald_e; bounds.lb_EX_acald_e_port is lb_EX_acald_e;
  ub_EX_acald_e = 1000 mmol_per_h; fba.ub_EX_acald_e_port is ub_EX_acald_e; bounds.ub_EX_acald_e_port is ub_EX_acald_e;
  lb_EX_etoh_e = 0 mmol_per_h; fba.lb_EX_etoh_e_port is lb_EX_etoh_e; bounds.lb_EX_etoh_e_port is lb_EX_etoh_e;
  ub_EX_etoh_e = 1000 mmol_per_h; fba.ub_EX_etoh_e_port is ub_EX_etoh_e; bounds.ub_EX_etoh_e_port is ub_EX_etoh_e;
  lb_EX_ac_e = 0 mmol_per_h; fba.lb_EX_ac_e_port is lb_EX_ac_e; bounds.lb_EX_ac_e_port is lb_EX_ac_e;
  ub_EX_ac_e = 1000 mmol_per_h; fba.ub_EX_ac_e_port is ub_EX_ac_e; bounds.ub_EX_ac_e_port is ub_EX_ac_e;
  lb_EX_succ_e = 0 mmol_per_h; fba.lb_EX_succ_e_port is lb_EX_succ_e; bounds.lb_EX_succ_e_port is lb_EX_succ_e;
  ub_EX_succ_e = 1000 mmol_per_h; fba.ub_EX_succ_e_port is ub_EX_succ_e; bounds.ub_EX_succ_e_port is ub_EX_succ_e;
  lb_EX_o2_e = -1000 mmol_per_h; fba.lb_EX_o2_e_port is lb_EX_o2_e; bounds.lb_EX_o2_e_port is lb_EX_o2_e;
  ub_EX_o2_e = 1000 mmol_per_h; fba.ub_EX_o2_e_port is ub_EX_o2_e; bounds.ub_EX_o2_e_port is ub_EX_o2_e;
  lb_EX_mal__L_e = 0 mmol_per_h; fba.lb_EX_mal__L_e_port is lb_EX_mal__L_e; bounds.lb_EX_mal__L_e_port is lb_EX_mal__L_e;
  ub_EX_mal__L_e = 1000 mmol_per_h; fba.ub_EX_mal__L_e_port is ub_EX_mal__L_e; bounds.ub_EX_mal__L_e_port is ub_EX_mal__L_e;
  lb_EX_h_e = -1000 mmol_per_h; fba.lb_EX_h_e_port is lb_EX_h_e; bounds.lb_EX_h_e_port is lb_EX_h_e;
  ub_EX_h_e = 1000 mmol_per_h; fba.ub_EX_h_e_port is ub_EX_h_e; bounds.ub_EX_h_e_port is ub_EX_h_e;
  lb_EX_co2_e = -1000 mmol_per_h; fba.lb_EX_co2_e_port is lb_EX_co2_e; bounds.lb_EX_co2_e_port is lb_EX_co2_e;
  ub_EX_co2_e = 1000 mmol_per_h; fba.ub_EX_co2_e_port is ub_EX_co2_e; bounds.ub_EX_co2_e_port is ub_EX_co2_e;
  lb_EX_nh4_e = -1000 mmol_per_h; fba.lb_EX_nh4_e_port is lb_EX_nh4_e; bounds.lb_EX_nh4_e_port is lb_EX_nh4_e;
  ub_EX_nh4_e = 1000 mmol_per_h; fba.ub_EX_nh4_e_port is ub_EX_nh4_e; bounds.ub_EX_nh4_e_port is ub_EX_nh4_e;
  lb_EX_glu__L_e = 0 mmol_per_h; fba.lb_EX_glu__L_e_port is lb_EX_glu__L_e; bounds.lb_EX_glu__L_e_port is lb_EX_glu__L_e;
  ub_EX_glu__L_e = 1000 mmol_per_h; fba.ub_EX_glu__L_e_port is ub_EX_glu__L_e; bounds.ub_EX_glu__L_e_port is ub_EX_glu__L_e;
  pEX_for_e has mmol_per_h; update.pEX_for_e_port is pEX_for_e;
  pEX_fru_e has mmol_per_h; update.pEX_fru_e_port is pEX_fru_e;
  pEX_h2o_e has mmol_per_h; update.pEX_h2o_e_port is pEX_h2o_e;
  pEX_akg_e has mmol_per_h; update.pEX_akg_e_port is pEX_akg_e;
  pEX_pyr_e has mmol_per_h; update.pEX_pyr_e_port is pEX_pyr_e;
  pEX_glc__D_e has mmol_per_h; update.pEX_glc__D_e_port is pEX_glc__D_e;
  pEX_fum_e has mmol_per_h; update.pEX_fum_e_port is pEX_fum_e;
  pEX_X has mmol_per_h; update.pEX_X_port is pEX_X;
  pEX_pi_e has mmol_per_h; update.pEX_pi_e_port is pEX_pi_e;
  pEX_lac__D_e has mmol_per_h; update.pEX_lac__D_e_port is pEX_lac__D_e;
  pEX_gln__L_e has mmol_per_h; update.pEX_gln__L_e_port is pEX_gln__L_e;
  pEX_acald_e has mmol_per_h; update.pEX_acald_e_port is pEX_acald_e;
  pEX_etoh_e has mmol_per_h; update.pEX_etoh_e_port is pEX_etoh_e;
  pEX_ac_e has mmol_per_h; update.pEX_ac_e_port is pEX_ac_e;
  pEX_succ_e has mmol_per_h; update.pEX_succ_e_port is pEX_succ_e;
  pEX_o2_e has mmol_per_h; update.pEX_o2_e_port is pEX_o2_e;
  pEX_mal__L_e has mmol_per_h; update.pEX_mal__L_e_port is pEX_mal__L_e;
  pEX_h_e has mmol_per_h; update.pEX_h_e_port is pEX_h_e;
  pEX_co2_e has mmol_per_h; update.pEX_co2_e_port is pEX_co2_e;
  pEX_nh4_e has mmol_per_h; update.pEX_nh4_e_port is pEX_nh4_e;
  pEX_glu__L_e has mmol_per_h; update.pEX_glu__L_e_port is pEX_glu__L_e;

  // Assignment rules:
  pEX_for_e := EX_for_e;
  pEX_fru_e := EX_fru_e;
  pEX_h2o_e := EX_h2o_e;
  pEX_akg_e := EX_akg_e;
  pEX_pyr_e := EX_pyr_e;
  pEX_glc__D_e := EX_glc__D_e;
  pEX_fum_e := EX_fum_e;
  pEX_X := EX_X;
  pEX_pi_e := EX_pi_e;
  pEX_lac__D_e := EX_lac__D_e;
  pEX_gln__L_e := EX_gln__L_e;
  pEX_acald_e := EX_acald_e;
  pEX_etoh_e := EX_etoh_e;
  pEX_ac_e := EX_ac_e;
  pEX_succ_e := EX_succ_e;
  pEX_o2_e := EX_o2_e;
  pEX_mal__L_e := EX_mal__L_e;
  pEX_h_e := EX_h_e;
  pEX_co2_e := EX_co2_e;
  pEX_nh4_e := EX_nh4_e;
  pEX_glu__L_e := EX_glu__L_e;

  // Reactions:
  EX_for_e: => dummy_S; 0 mmol_per_h; fba.EX_for_e_port is EX_for_e;
  EX_fru_e: => dummy_S; 0 mmol_per_h; fba.EX_fru_e_port is EX_fru_e;
  EX_h2o_e: => dummy_S; 0 mmol_per_h; fba.EX_h2o_e_port is EX_h2o_e;
  EX_akg_e: => dummy_S; 0 mmol_per_h; fba.EX_akg_e_port is EX_akg_e;
  EX_pyr_e: => dummy_S; 0 mmol_per_h; fba.EX_pyr_e_port is EX_pyr_e;
  EX_glc__D_e: => dummy_S; 0 mmol_per_h; fba.EX_glc__D_e_port is EX_glc__D_e;
  EX_fum_e: => dummy_S; 0 mmol_per_h; fba.EX_fum_e_port is EX_fum_e;
  EX_X: => dummy_S; 0 mmol_per_h; fba.EX_X_port is EX_X;
  EX_pi_e: => dummy_S; 0 mmol_per_h; fba.EX_pi_e_port is EX_pi_e;
  EX_lac__D_e: => dummy_S; 0 mmol_per_h; fba.EX_lac__D_e_port is EX_lac__D_e;
  EX_gln__L_e: => dummy_S; 0 mmol_per_h; fba.EX_gln__L_e_port is EX_gln__L_e;
  EX_acald_e: => dummy_S; 0 mmol_per_h; fba.EX_acald_e_port is EX_acald_e;
  EX_etoh_e: => dummy_S; 0 mmol_per_h; fba.EX_etoh_e_port is EX_etoh_e;
  EX_ac_e: => dummy_S; 0 mmol_per_h; fba.EX_ac_e_port is EX_ac_e;
  EX_succ_e: => dummy_S; 0 mmol_per_h; fba.EX_succ_e_port is EX_succ_e;
  EX_o2_e: => dummy_S; 0 mmol_per_h; fba.EX_o2_e_port is EX_o2_e;
  EX_mal__L_e: => dummy_S; 0 mmol_per_h; fba.EX_mal__L_e_port is EX_mal__L_e;
  EX_h_e: => dummy_S; 0 mmol_per_h; fba.EX_h_e_port is EX_h_e;
  EX_co2_e: => dummy_S; 0 mmol_per_h; fba.EX_co2_e_port is EX_co2_e;
  EX_nh4_e: => dummy_S; 0 mmol_per_h; fba.EX_nh4_e_port is EX_nh4_e;
  EX_glu__L_e: => dummy_S; 0 mmol_per_h; fba.EX_glu__L_e_port is EX_glu__L_e;

  // Unit definitions:
  unit h = 3600 second; bounds.h is h; fba.h is h; update.h is h;
  unit g = gram; bounds.g is g; fba.g is g; update.g is g;
  unit m = metre; bounds.m is m; fba.m is m; update.m is m;
  unit m2 = metre^2; bounds.m2 is m2; fba.m2 is m2; update.m2 is m2;
  unit l = litre; bounds.l is l; fba.l is l; update.l is l;
  unit mmol = 1e-3 mole; bounds.mmol is mmol; fba.mmol is mmol; update.mmol is mmol;
  unit per_h = 1 / (3600 second); bounds.per_h is per_h; fba.per_h is per_h; update.per_h is per_h;
  unit mmol_per_h = 1e-3 mole / (3600 second); bounds.mmol_per_h is mmol_per_h; fba.mmol_per_h is mmol_per_h; update.mmol_per_h is mmol_per_h;
  unit mmol_per_hg = 1e-3 mole / (3600 second * gram); bounds.mmol_per_hg is mmol_per_hg; fba.mmol_per_hg is mmol_per_hg; update.mmol_per_hg is mmol_per_hg;
  unit mmol_per_l = 1e-3 mole / litre; bounds.mmol_per_l is mmol_per_l; fba.mmol_per_l is mmol_per_l; update.mmol_per_l is mmol_per_l;
  unit l_per_mmol = litre / (1e-3 mole); bounds.l_per_mmol is l_per_mmol; fba.l_per_mmol is l_per_mmol; update.l_per_mmol is l_per_mmol;
  unit g_per_l = gram / litre; bounds.g_per_l is g_per_l; fba.g_per_l is g_per_l; update.g_per_l is g_per_l;
  unit g_per_mmol = gram / (1e-3 mole); bounds.g_per_mmol is g_per_mmol; fba.g_per_mmol is g_per_mmol; update.g_per_mmol is g_per_mmol;
end
