// SBML level 3 version 1

model ecoli_update(bioreactor, h_e, succ_e, ac_e, glc__D_e, glu__L_e, X, o2_e, acald_e, mal__L_e, for_e, gln__L_e, pi_e, lac__D_e, fum_e, fru_e, pyr_e, co2_e, nh4_e, h2o_e, etoh_e, akg_e, pEX_h_e, pEX_succ_e, pEX_ac_e, pEX_glc__D_e, pEX_glu__L_e, pEX_X, pEX_o2_e, pEX_acald_e, pEX_mal__L_e, pEX_for_e, pEX_gln__L_e, pEX_pi_e, pEX_lac__D_e, pEX_fum_e, pEX_fru_e, pEX_pyr_e, pEX_co2_e, pEX_nh4_e, pEX_h2o_e, pEX_etoh_e, pEX_akg_e)
  // ecoli (UPDATE)
  // E.coli core DFBA model
  // Model version: 10
  // UPDATE submodel
  // Submodel for dynamically updating the metabolite count. This updates the ode model based on the FBA fluxes.
  // Description
  // This is a metabolism model of Escherichia coli str. K-12 substr. MG1655 in SBML format.
  // The content of this model has been carefully created in a manual research effort. This file has been exported from the software COBRApy and further processed with the JSBML-based ModelPolisher application.
  // This file has been produced by the Systems Biology Research Group using BiGG Models knowledge-base version of Nov 21, 2016, where it is currently hosted and identified by: e_coli_core.
  // Terms of use
  // Copyright © 2016 The Regents of the University of California.
  // Redistribution and use of any part of this model from BiGG Models knowledge-base, with or without modification, are permitted provided that the following conditions are met:
  // Redistributions of this SBML file must retain the above copyright notice, this list of conditions and the following disclaimer.
  // Redistributions in a different form must reproduce the above copyright notice, this list of conditions and the following disclaimer in the documentation and/or other materials provided with the distribution.
  // This model is distributed in the hope that it will be useful, but WITHOUT ANY WARRANTY; without even the implied warranty of MERCHANTABILITY or FITNESS FOR A PARTICULAR PURPOSE.
  // For specific licensing terms about this particular model and regulations of commercial use, see this model in BiGG Models knowledge-base.
  // References
  // When using content from BiGG Models knowledge-base in your research works, please cite
  // King ZA, Lu JS, Dräger A, Miller PC, Federowicz S, Lerman JA, Ebrahim A, Palsson BO, and Lewis NE. (2015).
  // BiGG Models: A platform for integrating, standardizing, and sharing genome-scale models. Nucl Acids Res. doi:10.1093/nar/gkv1049
  // model units - substance: mmol, time: h, volume: l, area: m2, length: m, extent: mmol

  // Compartments:
  compartment bioreactor = 1 l;

  // Species:
  species h_e in bioreactor = 1; h_e is "H+";
  species succ_e in bioreactor = 1; succ_e is "Succinate";
  species ac_e in bioreactor = 1; ac_e is "Acetate";
  species glc__D_e in bioreactor = 1; glc__D_e is "D-Glucose";
  species glu__L_e in bioreactor = 1; glu__L_e is "L-Glutamate";
  species X in bioreactor = 1; X is "biomass";
  species o2_e in bioreactor = 1; o2_e is "O2";
  species acald_e in bioreactor = 1; acald_e is "Acetaldehyde";
  species mal__L_e in bioreactor = 1; mal__L_e is "L-Malate";
  species for_e in bioreactor = 1; for_e is "Formate";
  species gln__L_e in bioreactor = 1; gln__L_e is "L-Glutamine";
  species pi_e in bioreactor = 1; pi_e is "Phosphate";
  species lac__D_e in bioreactor = 1; lac__D_e is "D-Lactate";
  species fum_e in bioreactor = 1; fum_e is "Fumarate";
  species fru_e in bioreactor = 1; fru_e is "D-Fructose";
  species pyr_e in bioreactor = 1; pyr_e is "Pyruvate";
  species co2_e in bioreactor = 1; co2_e is "CO2";
  species nh4_e in bioreactor = 1; nh4_e is "Ammonium";
  species h2o_e in bioreactor = 1; h2o_e is "H2O";
  species etoh_e in bioreactor = 1; etoh_e is "Ethanol";
  species akg_e in bioreactor = 1; akg_e is "2-Oxoglutarate";
  substanceOnly species X in c = 0.001; X is "biomass";  // substance in g; conversionFactor cf_biomass

  // Parameters:
  cf_biomass = 1 g_per_mmol; cf_biomass is "biomass conversion factor";
  pEX_h_e = 1 mmol_per_h;
  pEX_succ_e = 1 mmol_per_h;
  pEX_ac_e = 1 mmol_per_h;
  pEX_glc__D_e = 1 mmol_per_h;
  pEX_glu__L_e = 1 mmol_per_h;
  pEX_X = 1 mmol_per_h;
  pEX_o2_e = 1 mmol_per_h;
  pEX_acald_e = 1 mmol_per_h;
  pEX_mal__L_e = 1 mmol_per_h;
  pEX_for_e = 1 mmol_per_h;
  pEX_gln__L_e = 1 mmol_per_h;
  pEX_pi_e = 1 mmol_per_h;
  pEX_lac__D_e = 1 mmol_per_h;
  pEX_fum_e = 1 mmol_per_h;
  pEX_fru_e = 1 mmol_per_h;
  pEX_pyr_e = 1 mmol_per_h;
  pEX_co2_e = 1 mmol_per_h;
  pEX_nh4_e = 1 mmol_per_h;
  pEX_h2o_e = 1 mmol_per_h;
  pEX_etoh_e = 1 mmol_per_h;
  pEX_akg_e = 1 mmol_per_h;

  // Reactions:
  update_h_e: h_e -> ; -pEX_h_e;
  update_succ_e: succ_e -> ; -pEX_succ_e;
  update_ac_e: ac_e -> ; -pEX_ac_e;
  update_glc__D_e: glc__D_e -> ; -pEX_glc__D_e;
  update_glu__L_e: glu__L_e -> ; -pEX_glu__L_e;
  update_X: X -> ; -pEX_X;
  update_o2_e: o2_e -> ; -pEX_o2_e;
  update_acald_e: acald_e -> ; -pEX_acald_e;
  update_mal__L_e: mal__L_e -> ; -pEX_mal__L_e;
  update_for_e: for_e -> ; -pEX_for_e;
  update_gln__L_e: gln__L_e -> ; -pEX_gln__L_e;
  update_pi_e: pi_e -> ; -pEX_pi_e;
  update_lac__D_e: lac__D_e -> ; -pEX_lac__D_e;
  update_fum_e: fum_e -> ; -pEX_fum_e;
  update_fru_e: fru_e -> ; -pEX_fru_e;
  update_pyr_e: pyr_e -> ; -pEX_pyr_e;
  update_co2_e: co2_e -> ; -pEX_co2_e;
  update_nh4_e: nh4_e -> ; -pEX_nh4_e;
  update_h2o_e: h2o_e -> ; -pEX_h2o_e;
  update_etoh_e: etoh_e -> ; -pEX_etoh_e;
  update_akg_e: akg_e -> ; -pEX_akg_e;

  // Unit definitions:
  unit h = 3600 second;
  unit g = gram;
  unit m = metre;
  unit m2 = metre^2;
  unit l = litre;
  unit mmol = 1e-3 mole;
  unit per_h = 1 / (3600 second);
  unit mmol_per_h = 1e-3 mole / (3600 second);
  unit mmol_per_hg = 1e-3 mole / (3600 second * gram);
  unit mmol_per_l = 1e-3 mole / litre;
  unit l_per_mmol = litre / (1e-3 mole);
  unit g_per_l = gram / litre;
  unit g_per_mmol = gram / (1e-3 mole);
end
