// SBML level 3 version 1

model growth_update(Cell, Ac, X, Glcxt, O2, rateOfAc, rateOfO2, rateOfGlcxt, rateOfX)

  // Compartments:
  compartment Cell = 1;

  // Species:
  substanceOnly species Glcxt in Cell = 0;
  substanceOnly species O2 in Cell = 0;
  substanceOnly species Ac in Cell = 0;
  substanceOnly species X in Cell = 0;

  // Parameters:
  rateOfX = 0;
  rateOfAc = 0;
  rateOfGlcxt = 0;
  rateOfO2 = 0;
  Km = 0.001;

  // Reactions:
  o_uptake: O2 => ; rateOfO2*X*O2/(O2 + Km);  // modifiers: X
  g_uptake: Glcxt => ; X*rateOfGlcxt*Glcxt/(Km + Glcxt);  // modifiers: X
  a_uptake: Ac => ; rateOfAc*Ac/(Km + Ac)*X;  // modifiers: X
  growth: => X; X*rateOfX;
end
