// SBML level 3 version 1

model growth_fba(Cell, o_uptake, g_uptake, g_uptake_max, o_uptake_max, a_uptake_max, a_uptake, growth)

  // Compartments:
  compartment Cell = 1;

  // Species:
  substanceOnly species Glcxt in Cell = 0;
  substanceOnly species O2 in Cell = 0;
  substanceOnly species Ac in Cell = 0;
  substanceOnly species X in Cell = 0;

  // Parameters:
  a_uptake_max = 0;
  default_min = 0;
  default_max = 1000;
  g_uptake_max = 10;
  o_uptake_max = 15;
  default_neg_min = -1000;

  // Reactions:
  v1: 39.43 Ac + 35 O2 => X; ;
  o_uptake: => O2; ;
  growth: X => ; ;
  v4: 19.23 Glcxt => 12.12 Ac + X; ;
  v3: 9.84 Glcxt + 12.73 O2 => 1.24 Ac + X; ;
  v2: 9.46 Glcxt + 12.92 O2 => X; ;
  g_uptake: => Glcxt; ;
  a_uptake: -> Ac; ;
end

model growth_update(Cell, Ac, X, Glcxt, O2, rateOfAc, rateOfO2, rateOfGlcxt, rateOfX)

  // Compartments:
  compartment Cell = 1;

  // Species:
  substanceOnly species Glcxt in Cell = 0;
  substanceOnly species O2 in Cell = 0;
  substanceOnly species Ac in Cell = 0;
  substanceOnly species X in Cell = 0;

  // Parameters:
  rateOfX = 0;
  rateOfAc = 0;
  rateOfGlcxt = 0;
  rateOfO2 = 0;
  Km = 0.001;

  // Reactions:
  o_uptake: O2 => ; rateOfO2*X*O2/(O2 + Km);  // modifiers: X
  g_uptake: Glcxt => ; X*rateOfGlcxt*Glcxt/(Km + Glcxt);  // modifiers: X
  a_uptake: Ac => ; rateOfAc*Ac/(Km + Ac)*X;  // modifiers: X
  growth: => X; X*rateOfX;
end

function min(x, y)
  piecewise(x, x < y, y);
end

function max(x, y)
  piecewise(x, x > y, y);
end

model growth_bounds(Cell, Ac, O2, Glcxt, dt, max_glcxt, max_o2, max_ac, X)

  // Compartments:
  compartment Cell = 1;

  // Species:
  substanceOnly species Glcxt in Cell = 0;
  substanceOnly species Ac in Cell = 0;
  substanceOnly species O2 in Cell = 0;
  substanceOnly species X in Cell = 0;

  // Parameters:
  dt = 0;

  // Assignment rules:
  max_glcxt := piecewise(10*Glcxt/(Km + Glcxt), 10*Glcxt/(Km + Glcxt) < Glcxt/(X*dt), Glcxt/(X*dt));
  max_ac := piecewise(1000, 1000 < Ac/(X*dt), Ac/(X*dt));
  max_o2 := piecewise(15, 15 < O2/(X*dt), O2/(X*dt));
end

model growth_top(Cell, C1, C2)

  // Sub-modules:
  C1: growth_fba();
  C2: growth_update();
  C3: growth_bounds();

  // Compartments:
  compartment Cell = 1; C3.Cell is Cell;

  // Species:
  substanceOnly species O2 in Cell = 0.21; C3.O2 is O2; C2.O2 is O2;
  substanceOnly species Ac in Cell = 0.4; C3.Ac is Ac; C2.Ac is Ac;
  substanceOnly species Glcxt in Cell = 10.8; C3.Glcxt is Glcxt; C2.Glcxt is Glcxt;
  substanceOnly species dummy in Cell = 0;
  substanceOnly species X in Cell = 0.001; C3.X is X; C2.X is X;

  // Parameters:
  Km = 0.015;
  dt = 0.01; C3.dt is dt;
  g_uptake_max = 0; C3.max_glcxt is g_uptake_max; C1.g_uptake_max is g_uptake_max;
  o_uptake_max = 0; C3.max_o2 is o_uptake_max; C1.o_uptake_max is o_uptake_max;
  a_uptake_max = 0; C3.max_ac is a_uptake_max; C1.a_uptake_max is a_uptake_max;

  // Assignment rules:
  a_rate_uptake := a_uptake;
  x_rate_growth := growth;
  g_rate_uptake := g_uptake;
  o_rate_uptake := o_uptake;

  // Reactions:
  growth: dummy => ; growth_kf; C1.growth is growth;
    growth_kf = 0.1; growth_kr = 1;
  g_uptake: dummy => ; g_uptake_kf; C1.g_uptake is g_uptake;
    g_uptake_kf = 0.1; g_uptake_kr = 1;
  o_uptake: dummy => ; o_uptake_kf; C1.o_uptake is o_uptake;
    o_uptake_kf = 0.1; o_uptake_kr = 1;
  a_uptake: dummy => ; a_uptake_kf; C1.a_uptake is a_uptake;
    a_uptake_kf = 0.1; a_uptake_kr = 1;
  o2_transport: => O2; kLa*(0.21 - O2);
    kLa = 7.5;
end
