// SBML level 3 version 1

model Top_level()

  // Compartments:
  compartment default = 1; default is "Top_level";
  compartment fba__Cell = 1;
  compartment fba_update__default = 1;
  compartment kinetik__default = 1;

  // Species:
  species C in default = 100/default;
  species Dummy in default = 0;
  substanceOnly species $fba__A in fba__Cell = 0;
  substanceOnly species fba__B1 in fba__Cell = 0;
  substanceOnly species fba__B2 in fba__Cell = 0;
  substanceOnly species $fba__C in fba__Cell = 0;
  species kinetik__D in kinetik__default = 0;

  // Parameters:
  boundary = 0;
  k = 0;
  k_R4 = 0;
  kf = 0;
  unknown = 0;
  fba__lb = 0;
  fba__ub = 1000;
  fba__unknown = 0;
  kinetik__k_R4 = 1;

  // Assignment rules:
  p := R000008;

  // Rate rules:
  boundary' = sin(time);

  // Reactions:
  fba__R1: $fba__A => fba__B1; 0;
  fba__R2: fba__B1 => fba__B2; 0;
  R000008: fba__B2 => $fba__C; 0;
  fba_update__R000002: => C; p; fba_update__R000002 is "-> C";
  kinetik__R000005: C => kinetik__D; kinetik__k_R4*C; kinetik__R000005 is "C -> D";
end
