// SBML level 3 version 1
import "toy_fba.xml";
import "toy_bounds.xml";
import "toy_update.xml";

model toy_top()
  // toy (TOP)
  // Wholecell Toy Model
  // Model version: 10
  // TOP model
  // Main comp DFBA model by combining fba, update and bounds model with additional kinetics in the top model.
  // Description
  // This is a toy model for coupling models with different modeling frameworks via comp.
  // This file has been produced by Matthias Koenig.
  // Terms of use
  // Copyright © 2017 Matthias Koenig
  // Redistribution and use of any part of this model, with or without modification, are permitted provided that the following conditions are met:
  // Redistributions of this SBML file must retain the above copyright notice, this list of conditions and the following disclaimer.
  // Redistributions in a different form must reproduce the above copyright notice, this list of conditions and the following disclaimer in the documentation and/or other materials provided with the distribution.
  // This model is distributed in the hope that it will be useful, but WITHOUT ANY WARRANTY; without even the implied warranty of MERCHANTABILITY or FITNESS FOR A PARTICULAR PURPOSE.
  // model units - substance: item, time: s, volume: m3, area: m2, length: m, extent: item

  // Sub-modules:
  fba: toy_fba();
  bounds: toy_bounds();
  update: toy_update();

  // Compartments:
  compartment extern = 1 m3; bounds.extern_port is extern; update.extern_port is extern;

  // Species:
  substanceOnly species A in extern = 10*extern; bounds.A_port is A; update.A_port is A;
  substanceOnly species C in extern = 0; bounds.C_port is C; update.C_port is C;
  substanceOnly species dummy_S in extern = 0;
  substanceOnly species D in extern = 0;

  // Parameters:
  dt = 0.1 s; bounds.dt_port is dt;
  lb_EX_A = -1000 item_per_s; bounds.lb_EX_A_port is lb_EX_A; fba.lb_EX_A_port is lb_EX_A;
  ub_EX_A = 1000 item_per_s; bounds.ub_EX_A_port is ub_EX_A; fba.ub_EX_A_port is ub_EX_A;
  lb_EX_C = -1000 item_per_s; bounds.lb_EX_C_port is lb_EX_C; fba.lb_EX_C_port is lb_EX_C;
  ub_EX_C = 1000 item_per_s; bounds.ub_EX_C_port is ub_EX_C; fba.ub_EX_C_port is ub_EX_C;
  pEX_A has item_per_s; update.pEX_A_port is pEX_A;
  pEX_C has item_per_s; update.pEX_C_port is pEX_C;
  k_R4 = 0.1 per_s;
  ub_R1 = 1 item_per_s; bounds.ub_R1_port is ub_R1; fba.ub_R1_port is ub_R1;

  // Assignment rules:
  pEX_A := EX_A;
  pEX_C := EX_C;

  // Reactions:
  EX_A: => dummy_S; 0 item_per_s; fba.EX_A_port is EX_A;
  EX_C: => dummy_S; 0 item_per_s; fba.EX_C_port is EX_C;
  C_D: C => D; k_R4*C; C_D is "C -> D";

  // Unit definitions:
  unit s = second; bounds.s is s; fba.s is s; update.s is s;
  unit kg = kilogram; bounds.kg is kg; fba.kg is kg; update.kg is kg;
  unit m = metre; bounds.m is m; fba.m is m; update.m is m;
  unit m2 = metre^2; bounds.m2 is m2; fba.m2 is m2; update.m2 is m2;
  unit m3 = metre^3; bounds.m3 is m3; fba.m3 is m3; update.m3 is m3;
  unit mM = mole / metre^3; bounds.mM is mM; fba.mM is mM; update.mM is mM;
  unit per_s = 1 / second; bounds.per_s is per_s; fba.per_s is per_s; update.per_s is per_s;
  unit item_per_s = item / second; bounds.item_per_s is item_per_s; fba.item_per_s is item_per_s; update.item_per_s is item_per_s;
  unit item_per_m3 = item / metre^3; bounds.item_per_m3 is item_per_m3; fba.item_per_m3 is item_per_m3; update.item_per_m3 is item_per_m3;
end
