// SBML level 3 version 1

function bounds__max(x, y)
  piecewise(x, x > y, y);
end
bounds__max is "minimum of arguments";

function bounds__min(x, y)
  piecewise(x, x < y, y);
end
bounds__min is "maximum of arguments";

model toy_top_flat()
  // toy (TOP model)_flat
  // Wholecell Toy Model
  // TOP model
  // Main comp DFBA model by combining fba, update and bounds model with additional kinetics in the top model.
  // Description
  // This is a toy model for coupling models with different modeling frameworks via comp.
  // This file has been produced by Matthias Koenig.
  // Terms of use
  // Copyright © 2017 Matthias Koenig
  // Redistribution and use of any part of this model, with or without modification, are permitted provided that the following conditions are met:
  // Redistributions of this SBML file must retain the above copyright notice, this list of conditions and the following disclaimer.
  // Redistributions in a different form must reproduce the above copyright notice, this list of conditions and the following disclaimer in the documentation and/or other materials provided with the distribution.
  // This model is distributed in the hope that it will be useful, but WITHOUT ANY WARRANTY; without even the implied warranty of MERCHANTABILITY or FITNESS FOR A PARTICULAR PURPOSE.
  // model units - substance: item, time: s, volume: m3, area: m2, length: m, extent: item

  // Compartments:
  compartment extern = 1 m3; extern is "external compartment";
  compartment fba__extern = 1 m3; fba__extern is "external compartment";
  compartment fba__cell = 1 m3;
  compartment fba__membrane = 1 m2;  // 2-D

  // Species:
  substanceOnly species dummy_S in extern = 0;
  substanceOnly species A in extern = 10;
  substanceOnly species C in extern = 0;
  substanceOnly species D in extern = 0;
  substanceOnly species fba__A in fba__extern = 0;
  substanceOnly species fba__C in fba__extern = 0;
  substanceOnly species fba__B1 in fba__cell = 0;
  substanceOnly species fba__B2 in fba__cell = 0;

  // Parameters:
  dt = 0.1 s;
  EX_A has item_per_s;
  EX_C has item_per_s;
  k_R4 = 0.1 per_s;
  ub_R1 = 1 item_per_s;
  lb_EX_A has item_per_s;
  ub_EX_A = 1000 item_per_s;
  lb_EX_C has item_per_s;
  ub_EX_C = 1000 item_per_s;
  bounds__lb_default = -1000 item_per_s;
  bounds__k1 = -0.2 per_s;
  fba__lb = 0 item_per_s; fba__lb is "lower bound";
  fba__ub = 1000 item_per_s; fba__ub is "upper bound";

  // Assignment rules:
  EX_A := dummy_EX_A;
  EX_C := dummy_EX_C;
  lb_EX_A := bounds__max(bounds__lb_default, -A/dt);
  lb_EX_C := bounds__max(bounds__lb_default, -C/dt);

  // Rate rules:
  ub_R1' = bounds__k1*ub_R1;

  // Reactions:
  C_D: C => D; k_R4*C; C_D is "C -> D";
  fba__R1: fba__A -> fba__B1; ; fba__R1 is "A import (R1)";
  fba__R2: fba__B1 -> fba__B2; ; fba__R2 is "B1 <-> B2 (R2)";
  fba__R3: fba__B2 -> fba__C; ; fba__R3 is "B2 export (R3)";
  dummy_EX_A: fba__A -> ; ;
  dummy_EX_C: fba__C -> ; ;
  update__update_A: A -> ; -EX_A;
  update__update_C: C -> ; -EX_C;

  // Unit definitions:
  unit s = second;
  unit kg = kilogram;
  unit m = metre;
  unit m2 = metre^2;
  unit m3 = metre^3;
  unit mM = mole / metre^3;
  unit per_s = 1 / second;
  unit item_per_s = item / second;
  unit item_per_m3 = item / metre^3;
end
