// SBML level 3 version 1

model toy_update(extern, A, C, EX_A, EX_C)
  // toy (UPDATE submodel)
  // Wholecell Toy Model
  // Model version: 4
  // UPDATE submodel
  // Submodel for dynamically updating the metabolite count. This updates the ode model based on the FBA fluxes.
  // Description
  // This is a toy model for coupling models with different modeling frameworks via comp.
  // This file has been produced by Matthias Koenig.
  // Terms of use
  // Copyright © 2017 Matthias Koenig
  // Redistribution and use of any part of this model, with or without modification, are permitted provided that the following conditions are met:
  // Redistributions of this SBML file must retain the above copyright notice, this list of conditions and the following disclaimer.
  // Redistributions in a different form must reproduce the above copyright notice, this list of conditions and the following disclaimer in the documentation and/or other materials provided with the distribution.
  // This model is distributed in the hope that it will be useful, but WITHOUT ANY WARRANTY; without even the implied warranty of MERCHANTABILITY or FITNESS FOR A PARTICULAR PURPOSE.
  // model units - substance: item, time: s, volume: m3, area: m2, length: m, extent: item

  // Compartments:
  compartment extern = 1 m3; extern is "external compartment";

  // Species:
  substanceOnly species A in extern = 10;
  substanceOnly species C in extern = 0;

  // Parameters:
  EX_A = 1 item_per_s;
  EX_C = 1 item_per_s;

  // Reactions:
  update_A: A -> ; -EX_A;
  update_C: C -> ; -EX_C;

  // Unit definitions:
  unit s = second;
  unit kg = kilogram;
  unit m = metre;
  unit m2 = metre^2;
  unit m3 = metre^3;
  unit mM = mole / metre^3;
  unit per_s = 1 / second;
  unit item_per_s = item / second;
  unit item_per_m3 = item / metre^3;
end
