// SBML level 3 version 1
import "fba.xml";
import "update.xml";
import "bounds.xml";

model Top(max_adp, max_atp, max_glucose, max_pyruvate, min_adp, min_atp, min_glucose, min_pyruvate, C1, C3, C3)

  // Sub-modules:
  C1: fba();
  C2: update();
  C3: bounds();

  // Compartments:
  compartment Cell = 1; C3.compartment__Cell is Cell; C2.compartment__Cell is Cell;

  // Species:
  substanceOnly species ATP in Cell = 2; C3.input__ATP is ATP; C2.input__ATP is ATP;
  substanceOnly species dummy in Cell = 0;
  substanceOnly species ADP in Cell = 1; C3.input__ADP is ADP; C2.input__ADP is ADP;
  substanceOnly species Pyruvate in Cell = 0; C3.input__Pyruvate is Pyruvate; C2.input__Pyruvate is Pyruvate;
  substanceOnly species Glucose in Cell = 1; C3.input__Glucose is Glucose; C2.input__Glucose is Glucose;

  // Parameters:
  dt = 1; C3.input__dt is dt;
  max_glucose = 0; C1.input__max_glucose is max_glucose; C3.input__max_glucose is max_glucose;
  min_glucose = 0; C1.input__min_glucose is min_glucose; C3.input__min_glucose is min_glucose;
  max_atp = 0; C1.input__max_atp is max_atp; C3.input__max_atp is max_atp;
  min_atp = 0; C1.input__min_atp is min_atp; C3.input__min_atp is min_atp;
  max_pyruvate = 0; C1.input__max_pyruvate is max_pyruvate; C3.input__max_pyruvate is max_pyruvate;
  min_pyruvate = 0; C1.input__min_pyruvate is min_pyruvate; C3.input__min_pyruvate is min_pyruvate;
  max_adp = 0; C1.input__max_adp is max_adp; C3.input__max_adp is max_adp;
  min_adp = 0; C1.input__min_adp is min_adp; C3.input__min_adp is min_adp;

  // Assignment rules:
  rateOfADP := ADP_Ex;
  rateOfATP := ATP_Ex;
  rateOfPy := Pyruvate_Ex;
  rateOfGlcxt := Glucose_Ex;

  // Reactions:
  ADP_Ex: dummy => ; 0; C1.reaction__ADP_Ex is ADP_Ex;
  ATP_Ex: dummy => ; 0; C1.reaction__ATP_Ex is ATP_Ex;
  Glucose_Ex: dummy => ; 0; C1.reaction__Glucose_Ex is Glucose_Ex;
  Pyruvate_Ex: dummy => ; 0; C1.reaction__Pyruvate_Ex is Pyruvate_Ex;
end
