// SBML level 3 version 1

model update(Cell, rateOfATP, rateOfADP, rateOfGlcxt, rateOfPyruvate, ATP, ADP, Glucose, Pyruvate)

  // Compartments:
  compartment Cell = 1;

  // Species:
  substanceOnly species ATP in Cell = 0;
  substanceOnly species ADP in Cell = 0;
  substanceOnly species Glucose in Cell = 0;
  substanceOnly species Pyruvate in Cell = 0;

  // Parameters:
  rateOfATP = 0;
  rateOfADP = 0;
  rateOfGlcxt = 0;
  rateOfPyruvate = 0;
  Km = 0.1;

  // Reactions:
  R2: Glucose => ; rateOfGlcxt*Glucose/(Km + Glucose);
  R0: ATP => ; rateOfATP*ATP/(Km + ATP);
  R3: => Pyruvate; rateOfPyruvate;
  R1: ADP => ; rateOfADP*ADP/(Km + ADP);
end
