// SBML level 3 version 1

function max(x, y)
  piecewise(x, x > y, y);
end
max is "min";

function min(x, y)
  piecewise(x, x < y, y);
end
min is "max";

model toy_bounds(dt, extern, atp, pyr, adp, glc, lb_EX_atp, ub_EX_atp, lb_EX_pyr, ub_EX_pyr, lb_EX_adp, ub_EX_adp, lb_EX_glc, ub_EX_glc, ub_R1)
  // toy (BOUNDS)
  // ATP Toy Model
  // Model version: 1
  // BOUNDS submodel
  // Submodel for dynamically calculating the flux bounds. The dynamically changing flux bounds are the input to the FBA model.
  // Description
  // This is a toy model for coupling models with different modeling frameworks via comp.
  // This file has been produced by Matthias Koenig.
  // Terms of use
  // Copyright © 2017 Matthias Koenig
  // Redistribution and use of any part of this model, with or without modification, are permitted provided that the following conditions are met:
  // Redistributions of this SBML file must retain the above copyright notice, this list of conditions and the following disclaimer.
  // Redistributions in a different form must reproduce the above copyright notice, this list of conditions and the following disclaimer in the documentation and/or other materials provided with the distribution.
  // This model is distributed in the hope that it will be useful, but WITHOUT ANY WARRANTY; without even the implied warranty of MERCHANTABILITY or FITNESS FOR A PARTICULAR PURPOSE.
  // model units - substance: mole, time: s, volume: m3, area: m2, length: m, extent: mole

  // Compartments:
  compartment extern = 1 m3;

  // Species:
  substanceOnly species atp in extern = 1; atp is "ATP";
  substanceOnly species pyr in extern = 1; pyr is "Pyruvate";
  substanceOnly species adp in extern = 1; adp is "ADP";
  substanceOnly species glc in extern = 1; glc is "Glucose";

  // Parameters:
  dt = 0.1 s;
  lb_EX_atp = -1000 mole_per_s;
  ub_EX_atp = 1000 mole_per_s;
  lb_EX_pyr = -1000 mole_per_s;
  ub_EX_pyr = 1000 mole_per_s;
  lb_EX_adp = -1000 mole_per_s;
  ub_EX_adp = 1000 mole_per_s;
  lb_EX_glc = -1000 mole_per_s;
  ub_EX_glc = 1000 mole_per_s;
  lb_default = -1000 mole_per_s;
  ub_R1 = 1 mole_per_s;
  k1 = -0.2 per_s;
  lb_EX_A has dimensionless;
  lb_EX_C has dimensionless;

  // Assignment rules:
  lb_EX_A := max(lb_default, -A/dt);
  lb_EX_C := max(lb_default, -C/dt);

  // Rate rules:
  ub_R1' = k1*ub_R1;

  // Unit definitions:
  unit s = second;
  unit kg = kilogram;
  unit m = metre;
  unit m2 = metre^2;
  unit m3 = metre^3;
  unit mM = mole / metre^3;
  unit per_s = 1 / second;
  unit mole_per_s = mole / second;
end
