// SBML level 3 version 1

function bounds__max(x, y)
  piecewise(x, x > y, y);
end
bounds__max is "min";

function bounds__min(x, y)
  piecewise(x, x < y, y);
end
bounds__min is "max";

model toy_atp_top_flat()
  // toy_atp (TOP)_flat
  // ATP Toy Model
  // Model version: 1
  // TOP model
  // Main comp DFBA model by combining fba, update and bounds model with additional kinetics in the top model.
  // Description
  // This is a toy model for coupling models with different modeling frameworks via comp.
  // This file has been produced by Matthias Koenig.
  // Terms of use
  // Copyright © 2017 Matthias Koenig
  // Redistribution and use of any part of this model, with or without modification, are permitted provided that the following conditions are met:
  // Redistributions of this SBML file must retain the above copyright notice, this list of conditions and the following disclaimer.
  // Redistributions in a different form must reproduce the above copyright notice, this list of conditions and the following disclaimer in the documentation and/or other materials provided with the distribution.
  // This model is distributed in the hope that it will be useful, but WITHOUT ANY WARRANTY; without even the implied warranty of MERCHANTABILITY or FITNESS FOR A PARTICULAR PURPOSE.
  // model units - substance: mole, time: s, volume: m3, area: m2, length: m, extent: mole

  // Compartments:
  compartment cell = 1 m3;
  compartment fba__cell = 1 m3;

  // Species:
  substanceOnly species adp in cell = 1*cell; adp is "ADP";
  substanceOnly species pyr in cell = 0; pyr is "Pyruvate";
  substanceOnly species glc in cell = 5*cell; glc is "Glucose";
  substanceOnly species atp in cell = 2*cell; atp is "ATP";
  substanceOnly species dummy_S in cell = 0;
  species fba__atp in fba__cell = 0; fba__atp is "ATP";
  species fba__adp in fba__cell = 0; fba__adp is "ADP";
  species fba__glc in fba__cell = 0; fba__glc is "Glucose";
  species fba__pyr in fba__cell = 0; fba__pyr is "Pyruvate";
  species fba__fru16bp in fba__cell = 0; fba__fru16bp is "Fructose 1,6-bisphospate";
  species fba__pg2 in fba__cell = 0; fba__pg2 is "2-Phosphoglycerate";

  // Parameters:
  dt = 0.1 s;
  lb_EX_adp has mole_per_s;
  ub_EX_adp = 1000 mole_per_s;
  lb_EX_pyr has mole_per_s;
  ub_EX_pyr = 1000 mole_per_s;
  lb_EX_glc has mole_per_s;
  ub_EX_glc = 1000 mole_per_s;
  lb_EX_atp has mole_per_s;
  ub_EX_atp = 1000 mole_per_s;
  pEX_adp has mole_per_s;
  pEX_pyr has mole_per_s;
  pEX_glc has mole_per_s;
  pEX_atp has mole_per_s;
  fba__ub_RATP = 0.001 mole_per_s;
  fba__zero = 0 mole_per_s;
  fba__ub_default = 1000 mole_per_s;
  bounds__fbalb_EX_adp = -1000 mole_per_s;
  bounds__fbalb_EX_pyr = -1000 mole_per_s;
  bounds__fbalb_EX_glc = -1000 mole_per_s;
  bounds__fbalb_EX_atp = -1000 mole_per_s;

  // Assignment rules:
  pEX_adp := EX_adp;
  pEX_pyr := EX_pyr;
  pEX_glc := EX_glc;
  pEX_atp := EX_atp;
  lb_EX_adp := bounds__max(bounds__fbalb_EX_adp, -adp/dt);
  lb_EX_pyr := bounds__max(bounds__fbalb_EX_pyr, -pyr/dt);
  lb_EX_glc := bounds__max(bounds__fbalb_EX_glc, -glc/dt);
  lb_EX_atp := bounds__max(bounds__fbalb_EX_atp, -atp/dt);

  // Reactions:
  fba__R1: fba__glc + 2 fba__atp => 2 fba__adp + fba__fru16bp; ; fba__R1 is "glu + 2 atp -> fru16bp + 2 adp";
  fba__R2: fba__fru16bp => 2 fba__pg2; ; fba__R2 is "fru16bp -> 2 pg2";
  fba__R3: fba__adp + fba__pg2 => fba__atp + fba__pyr; ; fba__R3 is "pg2 + adp -> pyr + atp";
  fba__RATP: fba__atp => fba__adp; ; fba__RATP is "atp -> adp";
  EX_atp: fba__atp -> ; ;
  EX_adp: fba__adp -> ; ;
  EX_glc: fba__glc -> ; ;
  EX_pyr: fba__pyr -> ; ;
  update__update_adp: adp -> ; -pEX_adp;
  update__update_pyr: pyr -> ; -pEX_pyr;
  update__update_glc: glc -> ; -pEX_glc;
  update__update_atp: atp -> ; -pEX_atp;

  // Unit definitions:
  unit s = second;
  unit kg = kilogram;
  unit m = metre;
  unit m2 = metre^2;
  unit m3 = metre^3;
  unit mM = mole / metre^3;
  unit per_s = 1 / second;
  unit mole_per_s = mole / second;
end
