// SBML level 3 version 1

model toy_atp_update(cell, adp, pyr, glc, atp, pEX_adp, pEX_pyr, pEX_glc, pEX_atp)
  // toy_atp (UPDATE)
  // ATP Toy Model
  // Model version: 1
  // UPDATE submodel
  // Submodel for dynamically updating the metabolite count. This updates the ode model based on the FBA fluxes.
  // Description
  // This is a toy model for coupling models with different modeling frameworks via comp.
  // This file has been produced by Matthias Koenig.
  // Terms of use
  // Copyright © 2017 Matthias Koenig
  // Redistribution and use of any part of this model, with or without modification, are permitted provided that the following conditions are met:
  // Redistributions of this SBML file must retain the above copyright notice, this list of conditions and the following disclaimer.
  // Redistributions in a different form must reproduce the above copyright notice, this list of conditions and the following disclaimer in the documentation and/or other materials provided with the distribution.
  // This model is distributed in the hope that it will be useful, but WITHOUT ANY WARRANTY; without even the implied warranty of MERCHANTABILITY or FITNESS FOR A PARTICULAR PURPOSE.
  // model units - substance: mole, time: s, volume: m3, area: m2, length: m, extent: mole

  // Compartments:
  compartment cell = 1 m3;

  // Species:
  substanceOnly species adp in cell = 1; adp is "ADP";
  substanceOnly species pyr in cell = 1; pyr is "Pyruvate";
  substanceOnly species glc in cell = 1; glc is "Glucose";
  substanceOnly species atp in cell = 1; atp is "ATP";

  // Parameters:
  pEX_adp = 1 mole_per_s;
  pEX_pyr = 1 mole_per_s;
  pEX_glc = 1 mole_per_s;
  pEX_atp = 1 mole_per_s;

  // Reactions:
  update_adp: adp -> ; -pEX_adp;
  update_pyr: pyr -> ; -pEX_pyr;
  update_glc: glc -> ; -pEX_glc;
  update_atp: atp -> ; -pEX_atp;

  // Unit definitions:
  unit s = second;
  unit kg = kilogram;
  unit m = metre;
  unit m2 = metre^2;
  unit m3 = metre^3;
  unit mM = mole / metre^3;
  unit per_s = 1 / second;
  unit mole_per_s = mole / second;
end
