// SBML level 3 version 1

function bounds__max(x, y)
  piecewise(x, x > y, y);
end
bounds__max is "min";

function bounds__min(x, y)
  piecewise(x, x < y, y);
end
bounds__min is "max";

model toy_atp_top_flat()
  // toy_atp (TOP)_flat
  // ATP Toy Model
  // Model version: 10
  // TOP model
  // Main comp DFBA model by combining fba, update and bounds model with additional kinetics in the top model.
  // Description
  // This is a toy model for coupling models with different modeling frameworks via comp.
  // This file has been produced by Matthias Koenig.
  // Terms of use
  // Copyright © 2017 Matthias Koenig
  // Redistribution and use of any part of this model, with or without modification, are permitted provided that the following conditions are met:
  // Redistributions of this SBML file must retain the above copyright notice, this list of conditions and the following disclaimer.
  // Redistributions in a different form must reproduce the above copyright notice, this list of conditions and the following disclaimer in the documentation and/or other materials provided with the distribution.
  // This model is distributed in the hope that it will be useful, but WITHOUT ANY WARRANTY; without even the implied warranty of MERCHANTABILITY or FITNESS FOR A PARTICULAR PURPOSE.
  // isVersionOf PW:0000640 kegg.pathway:map00010 GO:0006007
  // model units - substance: mole, time: h, volume: m3, area: m2, length: m, extent: mole

  // Compartments:
  compartment cell = 1 m3;  // GO:0005623 FMA:68646
  compartment fba__cell = 1 m3;  // GO:0005623 FMA:68646

  // Species:
  species atp in cell = 2; atp is "ATP";  // substance in mM; CHEBI:30616; isVersionOf kegg.compound:C00002
  species adp in cell = 1; adp is "ADP";  // substance in mM; CHEBI:456216; isVersionOf kegg.compound:C00008
  species glc in cell = 5; glc is "Glucose";  // substance in mM; CHEBI:4167 kegg.compound:C00031
  species pyr in cell = 0; pyr is "Pyruvate";  // substance in mM; CHEBI:32816 kegg.compound:C00022
  species dummy_S in cell = 0;  // substance in mM
  species fba__atp in fba__cell = 0; fba__atp is "ATP";  // substance in mM; CHEBI:30616; isVersionOf kegg.compound:C00002
  species fba__adp in fba__cell = 0; fba__adp is "ADP";  // substance in mM; CHEBI:456216; isVersionOf kegg.compound:C00008
  species fba__glc in fba__cell = 0; fba__glc is "Glucose";  // substance in mM; CHEBI:4167 kegg.compound:C00031
  species fba__pyr in fba__cell = 0; fba__pyr is "Pyruvate";  // substance in mM; CHEBI:32816 kegg.compound:C00022
  species fba__fru16bp in fba__cell = 0; fba__fru16bp is "Fructose 1,6-bisphospate";  // substance in mM; CHEBI:37736 kegg.compound:C00354
  species fba__pg2 in fba__cell = 0; fba__pg2 is "2-Phosphoglycerate";  // substance in mM; CHEBI:17835 kegg.compound:C00631

  // Parameters:
  dt = 0.1 h;
  lb_EX_atp has mole_per_h;
  ub_EX_atp has mole_per_h;
  lb_EX_adp has mole_per_h;
  ub_EX_adp has mole_per_h;
  lb_EX_glc has mole_per_h;
  ub_EX_glc has mole_per_h;
  lb_EX_pyr has mole_per_h;
  ub_EX_pyr has mole_per_h;
  pEX_atp has mole_per_h;
  pEX_adp has mole_per_h;
  pEX_glc has mole_per_h;
  pEX_pyr has mole_per_h;
  Vmax_RATP = 1 mole_per_h;
  k_RATP = 0.1 mM;
  atp_tot has mM;
  c3_tot has mM;
  fba__ub_R3 = 1 mole_per_h;
  fba__zero = 0 mole_per_h;
  fba__ub_default = 1000 mole_per_h;
  bounds__ub_EX_atp_fba = 1000 mole_per_h;
  bounds__lb_EX_atp_fba = -1000 mole_per_h;
  bounds__ub_EX_adp_fba = 1000 mole_per_h;
  bounds__lb_EX_adp_fba = -1000 mole_per_h;
  bounds__ub_EX_glc_fba = 1000 mole_per_h;
  bounds__lb_EX_glc_fba = -1000 mole_per_h;
  bounds__ub_EX_pyr_fba = 1000 mole_per_h;
  bounds__lb_EX_pyr_fba = -1000 mole_per_h;

  // Assignment rules:
  pEX_atp := EX_atp;
  pEX_adp := EX_adp;
  pEX_glc := EX_glc;
  pEX_pyr := EX_pyr;
  atp_tot := atp + adp;
  c3_tot := 2*glc + pyr;
  ub_EX_atp := bounds__ub_EX_atp_fba;
  lb_EX_atp := bounds__max(bounds__lb_EX_atp_fba, -cell*atp/dt);
  ub_EX_adp := bounds__ub_EX_adp_fba;
  lb_EX_adp := bounds__max(bounds__lb_EX_adp_fba, -cell*adp/dt);
  ub_EX_glc := bounds__ub_EX_glc_fba;
  lb_EX_glc := bounds__max(bounds__lb_EX_glc_fba, -cell*glc/dt);
  ub_EX_pyr := bounds__ub_EX_pyr_fba;
  lb_EX_pyr := bounds__max(bounds__lb_EX_pyr_fba, -cell*pyr/dt);

  // Reactions:
  RATP: atp => adp; Vmax_RATP*atp/(k_RATP + atp); RATP is "atp -> adp";  // GO:0046034
  fba__R1: fba__glc + 2 fba__atp => fba__fru16bp + 2 fba__adp; ; fba__R1 is "glu + 2 atp -> fru16bp + 2 adp";  // GO:0006007
  fba__R2: fba__fru16bp => 2 fba__pg2; ; fba__R2 is "fru16bp -> 2 pg2";  // GO:0006007
  fba__R3: fba__pg2 + 2 fba__adp => fba__pyr + 2 fba__atp; ; fba__R3 is "pg2 + adp -> pyr + atp";  // GO:0006007
  EX_atp: fba__atp -> ; ;
  EX_adp: fba__adp -> ; ;
  EX_glc: fba__glc -> ; ;
  EX_pyr: fba__pyr -> ; ;
  update__update_atp: atp -> ; -pEX_atp;
  update__update_adp: adp -> ; -pEX_adp;
  update__update_glc: glc -> ; -pEX_glc;
  update__update_pyr: pyr -> ; -pEX_pyr;

  // Unit definitions:
  unit h = 3600 second; h is "hour";  // UO:0000032
  unit kg = kilogram; kg is "kilogram";  // UO:0000009
  unit m = metre; m is "meter";  // UO:0000008
  unit m2 = metre^2; m2 is "square meter";  // UO:0000080
  unit m3 = metre^3; m3 is "cubic meter";  // UO:0000096
  unit mM = mole / metre^3; mM is "millimolar";  // UO:0000063
  unit mole_per_h = mole / (3600 second);
end
