// SBML level 3 version 1

model toy_atp_update(cell, glc, pyr, atp, adp, pEX_glc, pEX_pyr, pEX_atp, pEX_adp)
  // toy_atp (UPDATE)
  // ATP Toy Model
  // Model version: 12
  // UPDATE submodel
  // Submodel for dynamically updating the metabolite count. This updates the ode model based on the FBA fluxes.
  // Description
  // This is a toy model for coupling models with different modeling frameworks via comp.
  // This file has been produced by Matthias Koenig.
  // Terms of use
  // Copyright © 2017 Matthias Koenig
  // Redistribution and use of any part of this model, with or without modification, are permitted provided that the following conditions are met:
  // Redistributions of this SBML file must retain the above copyright notice, this list of conditions and the following disclaimer.
  // Redistributions in a different form must reproduce the above copyright notice, this list of conditions and the following disclaimer in the documentation and/or other materials provided with the distribution.
  // This model is distributed in the hope that it will be useful, but WITHOUT ANY WARRANTY; without even the implied warranty of MERCHANTABILITY or FITNESS FOR A PARTICULAR PURPOSE.
  // isVersionOf PW:0000640 kegg.pathway:map00010 GO:0006007
  // model units - substance: mole, time: h, volume: m3, area: m2, length: m, extent: mole

  // Compartments:
  compartment cell = 1 m3;  // GO:0005623 FMA:68646

  // Species:
  species glc in cell = 1; glc is "Glucose";  // substance in mM; CHEBI:4167 kegg.compound:C00031
  species pyr in cell = 1; pyr is "Pyruvate";  // substance in mM; CHEBI:32816 kegg.compound:C00022
  species atp in cell = 1; atp is "ATP";  // substance in mM; CHEBI:30616; isVersionOf kegg.compound:C00002
  species adp in cell = 1; adp is "ADP";  // substance in mM; CHEBI:456216; isVersionOf kegg.compound:C00008

  // Parameters:
  pEX_glc = 1 mole_per_h;
  pEX_pyr = 1 mole_per_h;
  pEX_atp = 1 mole_per_h;
  pEX_adp = 1 mole_per_h;

  // Reactions:
  update_glc: glc -> ; -pEX_glc;
  update_pyr: pyr -> ; -pEX_pyr;
  update_atp: atp -> ; -pEX_atp;
  update_adp: adp -> ; -pEX_adp;

  // Unit definitions:
  unit h = 3600 second; h is "hour";  // UO:0000032
  unit kg = kilogram; kg is "kilogram";  // UO:0000009
  unit m = metre; m is "meter";  // UO:0000008
  unit m2 = metre^2; m2 is "square meter";  // UO:0000080
  unit m3 = metre^3; m3 is "cubic meter";  // UO:0000096
  unit mM = mole / metre^3; mM is "millimolar";  // UO:0000063
  unit mole_per_h = mole / (3600 second);
end
