// SBML level 3 version 1
import "toy_atp_fba.xml";
import "toy_atp_bounds.xml";
import "toy_atp_update.xml";

model toy_atp_top()
  // toy_atp (TOP)
  // ATP Toy Model
  // Model version: 13
  // TOP model
  // Main comp DFBA model by combining fba, update and bounds model with additional kinetics in the top model.
  // Description
  // This is a toy model for coupling models with different modeling frameworks via comp.
  // This file has been produced by Matthias Koenig.
  // Terms of use
  // Copyright © 2017-2018 Matthias Koenig
  // Redistribution and use of any part of this model, with or without modification, are permitted provided that the following conditions are met:
  // Redistributions of this SBML file must retain the above copyright notice, this list of conditions and the following disclaimer.
  // Redistributions in a different form must reproduce the above copyright notice, this list of conditions and the following disclaimer in the documentation and/or other materials provided with the distribution.
  // This model is distributed in the hope that it will be useful, but WITHOUT ANY WARRANTY; without even the implied warranty of MERCHANTABILITY or FITNESS FOR A PARTICULAR PURPOSE.
  // isVersionOf PW:0000640 kegg.pathway:map00010 GO:0006007
  // model units - substance: mmole, time: h, volume: litre, area: m2, length: m, extent: mmole

  // Sub-modules:
  fba: toy_atp_fba();
  bounds: toy_atp_bounds();
  update: toy_atp_update();

  // Compartments:
  compartment cell = 1 litre; update.cell_port is cell; bounds.cell_port is cell;  // GO:0005623 FMA:68646

  // Species:
  species atp in cell = 2; atp is "ATP"; bounds.atp_port is atp; update.atp_port is atp;  // CHEBI:30616; isVersionOf kegg.compound:C00002
  species adp in cell = 1; adp is "ADP"; bounds.adp_port is adp; update.adp_port is adp;  // CHEBI:456216; isVersionOf kegg.compound:C00008
  species glc in cell = 5; glc is "Glucose"; bounds.glc_port is glc; update.glc_port is glc;  // CHEBI:4167 kegg.compound:C00031
  species pyr in cell = 0; pyr is "Pyruvate"; bounds.pyr_port is pyr; update.pyr_port is pyr;  // CHEBI:32816 kegg.compound:C00022
  species dummy_S in cell = 0;

  // Parameters:
  dt = 0.1 h; bounds.dt_port is dt;
  lb_EX_atp = -1000 mmole_per_h; bounds.lb_EX_atp_port is lb_EX_atp; fba.lb_EX_atp_port is lb_EX_atp;
  ub_EX_atp = 1000 mmole_per_h; bounds.ub_EX_atp_port is ub_EX_atp; fba.ub_EX_atp_port is ub_EX_atp;
  lb_EX_adp = -1000 mmole_per_h; bounds.lb_EX_adp_port is lb_EX_adp; fba.lb_EX_adp_port is lb_EX_adp;
  ub_EX_adp = 1000 mmole_per_h; bounds.ub_EX_adp_port is ub_EX_adp; fba.ub_EX_adp_port is ub_EX_adp;
  lb_EX_glc = -1000 mmole_per_h; bounds.lb_EX_glc_port is lb_EX_glc; fba.lb_EX_glc_port is lb_EX_glc;
  ub_EX_glc = 1000 mmole_per_h; bounds.ub_EX_glc_port is ub_EX_glc; fba.ub_EX_glc_port is ub_EX_glc;
  lb_EX_pyr = -1000 mmole_per_h; bounds.lb_EX_pyr_port is lb_EX_pyr; fba.lb_EX_pyr_port is lb_EX_pyr;
  ub_EX_pyr = 1000 mmole_per_h; bounds.ub_EX_pyr_port is ub_EX_pyr; fba.ub_EX_pyr_port is ub_EX_pyr;
  pEX_atp has mmole_per_h; update.pEX_atp_port is pEX_atp;
  pEX_adp has mmole_per_h; update.pEX_adp_port is pEX_adp;
  pEX_glc has mmole_per_h; update.pEX_glc_port is pEX_glc;
  pEX_pyr has mmole_per_h; update.pEX_pyr_port is pEX_pyr;
  Vmax_RATP = 1 mmole_per_h;
  k_RATP = 0.1 mM;
  atp_tot has mM;
  c3_tot has mM;

  // Assignment rules:
  pEX_atp := EX_atp;
  pEX_adp := EX_adp;
  pEX_glc := EX_glc;
  pEX_pyr := EX_pyr;
  atp_tot := atp + adp;
  c3_tot := 2*glc + pyr;

  // Reactions:
  EX_atp: => dummy_S; 0 mmole_per_h; fba.EX_atp_port is EX_atp;
  EX_adp: => dummy_S; 0 mmole_per_h; fba.EX_adp_port is EX_adp;
  EX_glc: => dummy_S; 0 mmole_per_h; fba.EX_glc_port is EX_glc;
  EX_pyr: => dummy_S; 0 mmole_per_h; fba.EX_pyr_port is EX_pyr;
  RATP: atp => adp; Vmax_RATP*atp/(k_RATP + atp); RATP is "atp -> adp";  // GO:0046034

  // Unit definitions:
  unit h = 3600 second; h is "hour"; bounds.h is h; fba.h is h; update.h is h;  // UO:0000032
  unit kg = kilogram; kg is "kilogram"; bounds.kg is kg; fba.kg is kg; update.kg is kg;  // UO:0000009
  unit m = metre; m is "meter"; bounds.m is m; fba.m is m; update.m is m;  // UO:0000008
  unit m2 = metre^2; m2 is "square meter"; bounds.m2 is m2; fba.m2 is m2; update.m2 is m2;  // UO:0000080
  unit m3 = metre^3; m3 is "cubic meter"; bounds.m3 is m3; fba.m3 is m3; update.m3 is m3;  // UO:0000096
  unit mmole = 1e-3 mole; bounds.mmole is mmole; fba.mmole is mmole; update.mmole is mmole;
  unit mM = 1e-3 mole / litre; mM is "millimolar"; bounds.mM is mM; fba.mM is mM; update.mM is mM;  // UO:0000063
  unit mmole_per_h = 1e-3 mole / (3600 second); bounds.mmole_per_h is mmole_per_h; fba.mmole_per_h is mmole_per_h; update.mmole_per_h is mmole_per_h;
end
