// SBML level 3 version 1
import "toy_atp_fba.xml";
import "toy_atp_bounds.xml";
import "toy_atp_update.xml";

model toy_atp_top()
  // toy_atp (TOP)
  // ATP Toy Model
  // Model version: 2
  // TOP model
  // Main comp DFBA model by combining fba, update and bounds model with additional kinetics in the top model.
  // Description
  // This is a toy model for coupling models with different modeling frameworks via comp.
  // This file has been produced by Matthias Koenig.
  // Terms of use
  // Copyright © 2017 Matthias Koenig
  // Redistribution and use of any part of this model, with or without modification, are permitted provided that the following conditions are met:
  // Redistributions of this SBML file must retain the above copyright notice, this list of conditions and the following disclaimer.
  // Redistributions in a different form must reproduce the above copyright notice, this list of conditions and the following disclaimer in the documentation and/or other materials provided with the distribution.
  // This model is distributed in the hope that it will be useful, but WITHOUT ANY WARRANTY; without even the implied warranty of MERCHANTABILITY or FITNESS FOR A PARTICULAR PURPOSE.
  // model units - substance: mole, time: s, volume: m3, area: m2, length: m, extent: mole

  // Sub-modules:
  fba: toy_atp_fba();
  bounds: toy_atp_bounds();
  update: toy_atp_update();

  // Compartments:
  compartment cell = 1 m3; update.cell_port is cell; bounds.cell_port is cell;

  // Species:
  substanceOnly species atp in cell = 2*cell; atp is "ATP"; update.atp_port is atp; bounds.atp_port is atp;
  substanceOnly species adp in cell = 1*cell; adp is "ADP"; update.adp_port is adp; bounds.adp_port is adp;
  substanceOnly species glc in cell = 5*cell; glc is "Glucose"; update.glc_port is glc; bounds.glc_port is glc;
  substanceOnly species pyr in cell = 0; pyr is "Pyruvate"; update.pyr_port is pyr; bounds.pyr_port is pyr;
  substanceOnly species dummy_S in cell = 0;

  // Parameters:
  dt = 0.1 s; bounds.dt_port is dt;
  lb_EX_atp = -1000 mole_per_s; fba.lb_EX_atp_port is lb_EX_atp; bounds.lb_EX_atp_port is lb_EX_atp;
  ub_EX_atp = 1000 mole_per_s; fba.ub_EX_atp_port is ub_EX_atp; bounds.ub_EX_atp_port is ub_EX_atp;
  lb_EX_adp = -1000 mole_per_s; fba.lb_EX_adp_port is lb_EX_adp; bounds.lb_EX_adp_port is lb_EX_adp;
  ub_EX_adp = 1000 mole_per_s; fba.ub_EX_adp_port is ub_EX_adp; bounds.ub_EX_adp_port is ub_EX_adp;
  lb_EX_glc = -1000 mole_per_s; fba.lb_EX_glc_port is lb_EX_glc; bounds.lb_EX_glc_port is lb_EX_glc;
  ub_EX_glc = 1000 mole_per_s; fba.ub_EX_glc_port is ub_EX_glc; bounds.ub_EX_glc_port is ub_EX_glc;
  lb_EX_pyr = -1000 mole_per_s; fba.lb_EX_pyr_port is lb_EX_pyr; bounds.lb_EX_pyr_port is lb_EX_pyr;
  ub_EX_pyr = 1000 mole_per_s; fba.ub_EX_pyr_port is ub_EX_pyr; bounds.ub_EX_pyr_port is ub_EX_pyr;
  pEX_atp has mole_per_s; update.pEX_atp_port is pEX_atp;
  pEX_adp has mole_per_s; update.pEX_adp_port is pEX_adp;
  pEX_glc has mole_per_s; update.pEX_glc_port is pEX_glc;
  pEX_pyr has mole_per_s; update.pEX_pyr_port is pEX_pyr;

  // Assignment rules:
  pEX_atp := EX_atp;
  pEX_adp := EX_adp;
  pEX_glc := EX_glc;
  pEX_pyr := EX_pyr;

  // Reactions:
  EX_atp: => dummy_S; 0 mole_per_s; fba.EX_atp_port is EX_atp;
  EX_adp: => dummy_S; 0 mole_per_s; fba.EX_adp_port is EX_adp;
  EX_glc: => dummy_S; 0 mole_per_s; fba.EX_glc_port is EX_glc;
  EX_pyr: => dummy_S; 0 mole_per_s; fba.EX_pyr_port is EX_pyr;

  // Unit definitions:
  unit s = second; bounds.s is s; fba.s is s; update.s is s;
  unit kg = kilogram; bounds.kg is kg; fba.kg is kg; update.kg is kg;
  unit m = metre; bounds.m is m; fba.m is m; update.m is m;
  unit m2 = metre^2; bounds.m2 is m2; fba.m2 is m2; update.m2 is m2;
  unit m3 = metre^3; bounds.m3 is m3; fba.m3 is m3; update.m3 is m3;
  unit mM = mole / metre^3; bounds.mM is mM; fba.mM is mM; update.mM is mM;
  unit per_s = 1 / second; bounds.per_s is per_s; fba.per_s is per_s; update.per_s is per_s;
  unit mole_per_s = mole / second; bounds.mole_per_s is mole_per_s; fba.mole_per_s is mole_per_s; update.mole_per_s is mole_per_s;
end
