// SBML level 3 version 1
import "fba.xml";
import "fba_update.xml";
import "kinetik.xml";

model Top_level()

  // Sub-modules:
  fba: fba();
  fba_update: fba_update();
  kinetik: kinetik();

  // Compartments:
  compartment default = 1; default is "Top_level";

  // Species:
  species C in default = 100/default; kinetik.C_port is C; fba_update.C_port is C;
  species Dummy in default = 0;

  // Parameters:
  boundary = 0; fba.r1_port_1 is boundary;
  k = 0;
  k_R4 = 0;
  kf = 0;
  unknown = 0;

  // Assignment rules:
  p := R000008;

  // Rate rules:
  boundary' = sin(time);

  // Reactions:
  R000008: Dummy => ; 0; R000008 is "Dummy ->"; fba.R3_port is R000008;
end
