// SBML level 3 version 1

model toy_wholecell_update(extern, A, C, pEX_A, pEX_C)
  // toy_wholecell (UPDATE)
  // Wholecell Toy Model
  // Model version: 15
  // UPDATE submodel
  // Submodel for dynamically updating the metabolite count. This updates the ode model based on the FBA fluxes.
  // Description
  // This is a toy model for coupling models with different modeling frameworks via comp.
  // This file has been produced by Matthias Koenig.
  // Terms of use
  // Copyright © 2017 Matthias Koenig
  // Redistribution and use of any part of this model, with or without modification, are permitted provided that the following conditions are met:
  // Redistributions of this SBML file must retain the above copyright notice, this list of conditions and the following disclaimer.
  // Redistributions in a different form must reproduce the above copyright notice, this list of conditions and the following disclaimer in the documentation and/or other materials provided with the distribution.
  // This model is distributed in the hope that it will be useful, but WITHOUT ANY WARRANTY; without even the implied warranty of MERCHANTABILITY or FITNESS FOR A PARTICULAR PURPOSE.
  // model units - substance: item, time: s, volume: m3, area: m2, length: m, extent: item

  // Compartments:
  compartment extern = 1 m3;

  // Species:
  substanceOnly species A in extern = 1*extern;
  substanceOnly species C in extern = 1*extern;

  // Parameters:
  pEX_A = 1 item_per_s;
  pEX_C = 1 item_per_s;

  // Reactions:
  update_A: A -> ; -pEX_A;
  update_C: C -> ; -pEX_C;

  // Unit definitions:
  unit s = second; s is "second";  // UO:0000010
  unit kg = kilogram; kg is "kilogram";  // UO:0000009
  unit m = metre; m is "meter";  // UO:0000008
  unit m2 = metre^2; m2 is "square meter";  // UO:0000080
  unit m3 = metre^3; m3 is "cubic meter";  // UO:0000096
  unit mM = mole / metre^3; mM is "millimolar";  // UO:0000063
  unit per_s = 1 / second;
  unit item_per_s = item / second;
  unit item_per_m3 = item / metre^3;
end
