// SBML level 3 version 1

function max(x, y)
  piecewise(x, x > y, y);
end
max is "min";

function min(x, y)
  piecewise(x, x < y, y);
end
min is "max";

model toy_wholecell_bounds(dt, extern, C, A, lb_EX_C, ub_EX_C, lb_EX_A, ub_EX_A, ub_R1)
  // toy_wholecell (BOUNDS)
  // Wholecell Toy Model
  // Model version: 16
  // BOUNDS submodel
  // Submodel for dynamically calculating the flux bounds. The dynamically changing flux bounds are the input to the FBA model.
  // Description
  // This is a toy model for coupling models with different modeling frameworks via comp.
  // This file has been produced by Matthias Koenig.
  // Terms of use
  // Copyright © 2017 Matthias Koenig
  // Redistribution and use of any part of this model, with or without modification, are permitted provided that the following conditions are met:
  // Redistributions of this SBML file must retain the above copyright notice, this list of conditions and the following disclaimer.
  // Redistributions in a different form must reproduce the above copyright notice, this list of conditions and the following disclaimer in the documentation and/or other materials provided with the distribution.
  // This model is distributed in the hope that it will be useful, but WITHOUT ANY WARRANTY; without even the implied warranty of MERCHANTABILITY or FITNESS FOR A PARTICULAR PURPOSE.
  // model units - substance: item, time: s, volume: m3, area: m2, length: m, extent: item

  // Compartments:
  compartment extern = 1 m3;

  // Species:
  substanceOnly species C in extern = 1*extern;
  substanceOnly species A in extern = 1*extern;

  // Parameters:
  dt = 0.1 s;
  lb_EX_C has item_per_s;
  ub_EX_C = 1000 item_per_s;
  lb_EX_A has item_per_s;
  ub_EX_A = 1000 item_per_s;
  lb_default = -1000 item_per_s;
  ub_R1 = 1 item_per_s;
  k1 = -0.2 per_s;

  // Assignment rules:
  lb_EX_A := max(lb_default, -A/dt);
  lb_EX_C := max(lb_default, -C/dt);

  // Rate rules:
  ub_R1' = k1*ub_R1;

  // Unit definitions:
  unit s = second; s is "second";  // UO:0000010
  unit kg = kilogram; kg is "kilogram";  // UO:0000009
  unit m = metre; m is "meter";  // UO:0000008
  unit m2 = metre^2; m2 is "square meter";  // UO:0000080
  unit m3 = metre^3; m3 is "cubic meter";  // UO:0000096
  unit mM = mole / metre^3; mM is "millimolar";  // UO:0000063
  unit per_s = 1 / second;
  unit item_per_s = item / second;
  unit item_per_m3 = item / metre^3;
end
