// SBML level 3 version 1

model glucose_liver_2(Vli, Ali_ffa, Ali_ala, Ali_glc, Ali_ins, Ali_glu, Ali_lac, Ali_epi)
  // Liver glucose model
  // Description
  // Hepatic metabolism of glucose encoded in SBML format.
  // The content of this model has been carefully created in a manual research effort.
  // This file has been created by Matthias Koenig.
  // Terms of use
  // Copyright © 2018 Matthias Koenig.
  // Redistribution and use of any part of this model, with or without modification, are permitted provided that the following conditions are met:
  // Redistributions of this SBML file must retain the above copyright notice, this list of conditions and the following disclaimer.
  // Redistributions in a different form must reproduce the above copyright notice, this list of conditions and the following disclaimer in the documentation and/or other materials provided with the distribution.
  // This model is distributed in the hope that it will be useful, but WITHOUT ANY WARRANTY; without even the implied warranty of MERCHANTABILITY or FITNESS FOR A PARTICULAR PURPOSE.
  // model units - substance: mmole, time: h, volume: litre, area: m2, length: m, extent: mmole

  // Compartments:
  compartment Vli = 1.47 litre; Vli is "liver";

  // Species:
  substanceOnly species $Ali_h2o in Vli = 0;
  substanceOnly species Ali_ffa in Vli = 0; Ali_ffa is "FFA";
  substanceOnly species Ali_ala in Vli = 0; Ali_ala is "alanine";
  substanceOnly species Ali_glc in Vli = 0; Ali_glc is "glucose";
  substanceOnly species Ali_ins in Vli = 0; Ali_ins is "insulin";
  substanceOnly species Ali_glu in Vli = 0; Ali_glu is "glucagon";
  substanceOnly species Ali_lac in Vli = 0; Ali_lac is "lactate";
  substanceOnly species Ali_epi in Vli = 0; Ali_epi is "epinephrine";

  // Parameters:
  F_PAR = 0.85 dimensionless; F_PAR is "parenchymal liver fraction";
  MPPGL = 45 mg_per_g; MPPGL is "mg microsomal protein per g liver parenchym";
  Mr_glc = 180.16 g_per_mole; Mr_glc is "molecular weight glc [g/mole]";
  Mr_lac = 89.07 g_per_mole; Mr_lac is "molecular weight lac [g/mole]";
  Mr_ffa = 256.43 g_per_mole; Mr_ffa is "molecular weight ffa [g/mole]";
  Cli_h2o has mM; Cli_h2o is "h2o [mM]";
  Cli_ffa has mM; Cli_ffa is "FFA [mM]";
  Cli_ala has mM; Cli_ala is "alanine [mM]";
  Cli_glc has mM; Cli_glc is "glucose [mM]";
  Cli_ins has mM; Cli_ins is "insulin [mM]";
  Cli_glu has mM; Cli_glu is "glucagon [mM]";
  Cli_lac has mM; Cli_lac is "lactate [mM]";
  Cli_epi has mM; Cli_epi is "epinephrine [mM]";
  Xli_ffa has mg; Xli_ffa is "FFA [mg]";
  Mli_ffa has mg_per_litre; Mli_ffa is "FFA [mg/l]";
  Xli_glc has mg; Xli_glc is "glucose [mg]";
  Mli_glc has mg_per_litre; Mli_glc is "glucose [mg/l]";
  Xli_lac has mg; Xli_lac is "lactate [mg]";
  Mli_lac has mg_per_litre; Mli_lac is "lactate [mg/l]";
  LAC2GLC_Vmax = 1 mmole_per_h; LAC2GLC_Vmax is "Gluconeogenesis [mmole_per_h]";
  LAC2GLC_Km = 0.5 mM;

  // Assignment rules:
  Cli_h2o := Ali_h2o/Vli;
  Cli_ffa := Ali_ffa/Vli;
  Cli_ala := Ali_ala/Vli;
  Cli_glc := Ali_glc/Vli;
  Cli_ins := Ali_ins/Vli;
  Cli_glu := Ali_glu/Vli;
  Cli_lac := Ali_lac/Vli;
  Cli_epi := Ali_epi/Vli;
  Xli_ffa := Ali_ffa*Mr_ffa;
  Mli_ffa := Cli_ffa*Mr_ffa;
  Xli_glc := Ali_glc*Mr_glc;
  Mli_glc := Cli_glc*Mr_glc;
  Xli_lac := Ali_lac*Mr_lac;
  Mli_lac := Cli_lac*Mr_lac;

  // Reactions:
  LAC2GLC: 2 Ali_lac => Ali_glc; LAC2GLC_Vmax*(Cli_lac/(Cli_lac + LAC2GLC_Km)); LAC2GLC is "LAC2GLC (2 lac -> glu)";

  // Unit definitions:
  unit h = 3600 second;
  unit s = second;
  unit kg = 1000 gram;
  unit m = metre;
  unit m2 = metre^2;
  unit per_h = 1 / (3600 second);
  unit per_min = 1 / (60 second);
  unit mg = 1e-3 gram;
  unit ml = 1e-3 litre;
  unit mmole = 1e-3 mole;
  unit mM = 1e-3 mole / litre;
  unit mmole_per_h = 1e-3 mole / (3600 second);
  unit g_per_mole = gram / mole;
  unit mg_per_litre = 1e-3 gram / litre;
  unit mg_per_g = 1e-3 gram / gram;
end
