// SBML level 3 version 1

model glucose_rbc_3(Vpl, Apl_glc, Apl_ins, Apl_ala, Apl_glu, Apl_lac, Apl_epi, Apl_ffa)
  // Liver glucose model
  // Description
  // Erythrocyte metabolism of glucose encoded in SBML format.
  // The content of this model has been carefully created in a manual research effort.
  // This file has been created by Matthias Koenig.
  // Terms of use
  // Copyright © 2018 Matthias Koenig.
  // Redistribution and use of any part of this model, with or without modification, are permitted provided that the following conditions are met:
  // Redistributions of this SBML file must retain the above copyright notice, this list of conditions and the following disclaimer.
  // Redistributions in a different form must reproduce the above copyright notice, this list of conditions and the following disclaimer in the documentation and/or other materials provided with the distribution.
  // This model is distributed in the hope that it will be useful, but WITHOUT ANY WARRANTY; without even the implied warranty of MERCHANTABILITY or FITNESS FOR A PARTICULAR PURPOSE.
  // model units - substance: mmole, time: h, volume: litre, area: m2, length: m, extent: mmole

  // Compartments:
  compartment Vpl = 3 litre; Vpl is "plasma";
  compartment Vrbc; Vrbc has litre; Vrbc is "erythrocyte";

  // Species:
  substanceOnly species glcRBC in Vrbc = 0; glcRBC is "glucose";
  substanceOnly species lacRBC in Vrbc = 0; lacRBC is "lactate";
  substanceOnly species Apl_glc in Vpl = 0; Apl_glc is "glucose";
  substanceOnly species Apl_ins in Vpl = 0; Apl_ins is "insulin";
  substanceOnly species Apl_ala in Vpl = 0; Apl_ala is "alanine";
  substanceOnly species Apl_glu in Vpl = 0; Apl_glu is "glucagon";
  substanceOnly species Apl_lac in Vpl = 0; Apl_lac is "lactate";
  substanceOnly species Apl_epi in Vpl = 0; Apl_epi is "epinephrine";
  substanceOnly species Apl_ffa in Vpl = 0; Apl_ffa is "FFA";

  // Parameters:
  alpha = 0.9 dimensionless; alpha is "volume fraction erythrocytes";
  CglcRBC has mM; CglcRBC is "glucose [mM]";
  ClacRBC has mM; ClacRBC is "lactate [mM]";
  CApl_glc has mM; CApl_glc is "glucose [mM]";
  CApl_ins has mM; CApl_ins is "insulin [mM]";
  CApl_ala has mM; CApl_ala is "alanine [mM]";
  CApl_glu has mM; CApl_glu is "glucagon [mM]";
  CApl_lac has mM; CApl_lac is "lactate [mM]";
  CApl_epi has mM; CApl_epi is "epinephrine [mM]";
  CApl_ffa has mM; CApl_ffa is "FFA [mM]";
  GLCIM_Vmax = 100 mmole_per_h; GLCIM_Vmax is "Glucose import Vmax";
  GLCIM_Km = 0.1 mM; GLCIM_Km is "Glucose import Km";
  LACEX_Vmax = 100 mmole_per_h; LACEX_Vmax is "Lactate export Vmax";
  LACEX_Km = 0.1 mM; LACEX_Km is "Lactate export Km";
  GLC2LAC_Vmax = 5 mmole_per_h; GLC2LAC_Vmax is "Glucose utilization rbc";
  GLC2LAC_Km = 0.1 mM;

  // Assignment rules:
  CglcRBC := glcRBC/Vrbc;
  ClacRBC := lacRBC/Vrbc;
  CApl_glc := Apl_glc/Vpl;
  CApl_ins := Apl_ins/Vpl;
  CApl_ala := Apl_ala/Vpl;
  CApl_glu := Apl_glu/Vpl;
  CApl_lac := Apl_lac/Vpl;
  CApl_epi := Apl_epi/Vpl;
  CApl_ffa := Apl_ffa/Vpl;
  Vrbc := Vpl*alpha;

  // Reactions:
  GLCIM: Apl_glc => glcRBC; GLCIM_Vmax/GLCIM_Km*(CApl_glc - CglcRBC)/(1 + CApl_glc/GLCIM_Km + CglcRBC/GLCIM_Km); GLCIM is "GLCIM (Apl_glc -> glcRBC)";
  LACEX: lacRBC => Apl_lac; LACEX_Vmax/LACEX_Km*(ClacRBC - CApl_lac)/(1 + CApl_lac/LACEX_Km + ClacRBC/LACEX_Km); LACEX is "LACEX (lacRBC -> Apl_lac)";
  GLC2LAC: glcRBC => 2 lacRBC; GLC2LAC_Vmax*(CglcRBC/(CglcRBC + GLC2LAC_Km)); GLC2LAC is "GLC2LAC (glcRBC -> 2 lacRBC)";

  // Unit definitions:
  unit h = 3600 second;
  unit s = second;
  unit kg = 1000 gram;
  unit m = metre;
  unit m2 = metre^2;
  unit per_h = 1 / (3600 second);
  unit per_min = 1 / (60 second);
  unit mg = 1e-3 gram;
  unit ml = 1e-3 litre;
  unit mmole = 1e-3 mole;
  unit mM = 1e-3 mole / litre;
  unit mmole_per_h = 1e-3 mole / (3600 second);
  unit g_per_mole = gram / mole;
  unit mg_per_litre = 1e-3 gram / litre;
  unit mg_per_g = 1e-3 gram / gram;
  unit ml_per_l = 1e-3 litre / litre;
  unit mmole_per_hml = 1e-3 mole / (3600 second * 1e-3 litre);
end
