// SBML level 3 version 1

model paracetamol_kidney(Vki, Vext, Vur, apap_ext, apapglu_ext, apapsul_ext, apapcys_ext, apapgsh_ext, apapmer_ext, apap, apapglu, apapsul, apapcys, apapgsh, apapmer, apap_urine, apapglu_urine, apapsul_urine, apapcys_urine, apapgsh_urine, apapmer_urine)
  // model units - substance: mmole, time: min, volume: litre, area: m2, length: m, extent: mmole

  // Compartments:
  compartment Vki = 1 litre; Vki is "kidney";
  compartment Vext = 1 litre; Vext is "extern";
  compartment Vur = 1 litre; Vur is "urine";

  // Species:
  substanceOnly species apap_ext in Vext = 0; apap_ext is "paracetamol (extern)";
  substanceOnly species apapglu_ext in Vext = 0; apapglu_ext is "paracetamol glucuronide (extern)";
  substanceOnly species apapsul_ext in Vext = 0; apapsul_ext is "paracetamol sulfate (extern)";
  substanceOnly species apapcys_ext in Vext = 0; apapcys_ext is "paracetamol cysteine (extern)";
  substanceOnly species apapgsh_ext in Vext = 0; apapgsh_ext is "paracetamol glutathione (extern)";
  substanceOnly species apapmer_ext in Vext = 0; apapmer_ext is "paracetamol mercapturate (extern)";
  substanceOnly species apap in Vki = 0; apap is "paracetamol";
  substanceOnly species apapglu in Vki = 0; apapglu is "paracetamol glucuronide";
  substanceOnly species apapsul in Vki = 0; apapsul is "paracetamol sulfate";
  substanceOnly species apapcys in Vki = 0; apapcys is "paracetamol cysteine";
  substanceOnly species apapgsh in Vki = 0; apapgsh is "paracetamol glutathione";
  substanceOnly species apapmer in Vki = 0; apapmer is "paracetamol mercapturate";
  substanceOnly species apap_urine in Vur = 0; apap_urine is "paracetamol (urine)";
  substanceOnly species apapglu_urine in Vur = 0; apapglu_urine is "paracetamol glucuronide (urine)";
  substanceOnly species apapsul_urine in Vur = 0; apapsul_urine is "paracetamol sulfate (urine)";
  substanceOnly species apapcys_urine in Vur = 0; apapcys_urine is "paracetamol cysteine (urine)";
  substanceOnly species apapgsh_urine in Vur = 0; apapgsh_urine is "paracetamol glutathione (urine)";
  substanceOnly species apapmer_urine in Vur = 0; apapmer_urine is "paracetamol mercapturate (urine)";

  // Parameters:
  APAP_Import_Vmax = 0.005 mmole_per_min;
  APAP_Import_Km = 0.05 mM;
  APAPGLU_Import_Vmax = 0.05 mmole_per_min;
  APAPGLU_Import_Km = 0.05 mM;
  APAPSUL_Import_Vmax = 0.05 mmole_per_min;
  APAPSUL_Import_Km = 0.05 mM;
  APAPCYS_Import_Vmax = 0.05 mmole_per_min;
  APAPCYS_Import_Km = 0.05 mM;
  APAPGSH_Import_Vmax = 0.05 mmole_per_min;
  APAPGSH_Import_Km = 0.05 mM;
  APAPMER_Import_Vmax = 0.05 mmole_per_min;
  APAPMER_Import_Km = 0.05 mM;
  APAPGLU_Vmax = 1e-7 mmole_per_min;
  APAPGLU_Km = 0.05 mM;
  APAPSUL_Vmax = 1e-7 mmole_per_min;
  APAPSUL_Km = 0.05 mM;
  APAPCYS_Vmax = 1e-7 mmole_per_min;
  APAPCYS_Km = 0.05 mM;
  APAPGSH_Vmax = 1e-7 mmole_per_min;
  APAPGSH_Km = 0.05 mM;
  APAPMER_Vmax = 1e-7 mmole_per_min;
  APAPMER_Km = 0.05 mM;
  APAP_Export_Vmax = 0.005 mmole_per_min;
  APAP_Export_Km = 0.05 mM;
  APAPGLU_Export_Vmax = 0.05 mmole_per_min;
  APAPGLU_Export_Km = 0.05 mM;
  APAPSUL_Export_Vmax = 0.05 mmole_per_min;
  APAPSUL_Export_Km = 0.05 mM;
  APAPCYS_Export_Vmax = 0.05 mmole_per_min;
  APAPCYS_Export_Km = 0.05 mM;
  APAPGSH_Export_Vmax = 0.05 mmole_per_min;
  APAPGSH_Export_Km = 0.05 mM;
  APAPMER_Export_Vmax = 0.05 mmole_per_min;
  APAPMER_Export_Km = 0.05 mM;

  // Reactions:
  APAPIM: apap_ext -> apap; APAP_Import_Vmax*(apap_ext/Vext)/(apap_ext/Vext + APAP_Import_Km);
  APAPGLUIM: apapglu_ext -> apapglu; APAPGLU_Import_Vmax*(apapglu_ext/Vext)/(apapglu_ext/Vext + APAPGLU_Import_Km);
  APAPSULIM: apapsul_ext -> apapsul; APAPSUL_Import_Vmax*(apapsul_ext/Vext)/(apapsul_ext/Vext + APAPSUL_Import_Km);
  APAPCYSIM: apapcys_ext -> apapcys; APAPCYS_Import_Vmax*(apapcys_ext/Vext)/(apapcys_ext/Vext + APAPCYS_Import_Km);
  APAPGSHIM: apapgsh_ext -> apapgsh; APAPGSH_Import_Vmax*(apapgsh_ext/Vext)/(apapgsh_ext/Vext + APAPGSH_Import_Km);
  APAPMERIM: apapmer_ext -> apapmer; APAPMER_Import_Vmax*(apapmer_ext/Vext)/(apapmer_ext/Vext + APAPMER_Import_Km);
  APAPGLU: apap -> apapglu; APAPGLU_Vmax*(apap/Vki)/(apap/Vki + APAPGLU_Km);
  APAPSUL: apap => apapsul; APAPSUL_Vmax*(apap/Vki)/(apap/Vki + APAPSUL_Km);
  APAPCYS: apap => apapcys; APAPCYS_Vmax*(apap/Vki)/(apap/Vki + APAPCYS_Km);
  APAPGSH: apap => apapgsh; APAPGSH_Vmax*(apap/Vki)/(apap/Vki + APAPGSH_Km);
  APAPMER: apap => apapmer; APAPMER_Vmax*(apap/Vki)/(apap/Vki + APAPMER_Km);
  APAPEXP: apap -> apap_urine; APAP_Export_Vmax*(apap/Vki)/(apap/Vki + APAP_Export_Km);
  APAPGLUEXP: apapglu -> apapglu_urine; APAPGLU_Export_Vmax*(apapglu/Vki)/(apapglu/Vki + APAPGLU_Export_Km);
  APAPSULEXP: apapsul -> apapsul_urine; APAPSUL_Export_Vmax*(apapsul/Vki)/(apapsul/Vki + APAPSUL_Export_Km);
  APAPCYSEXP: apapcys -> apapcys_urine; APAPCYS_Export_Vmax*(apapcys/Vki)/(apapcys/Vki + APAPCYS_Export_Km);
  APAPGSHEXP: apapgsh -> apapgsh_urine; APAPGSH_Export_Vmax*(apapgsh/Vki)/(apapgsh/Vki + APAPGSH_Export_Km);
  APAPMEREXP: apapmer -> apapmer_urine; APAPMER_Export_Vmax*(apapmer/Vki)/(apapmer/Vki + APAPMER_Export_Km);

  // Unit definitions:
  unit mmole = 1e-3 mole;
  unit mM = 1e-3 mole / litre;
  unit min = 60 second;
  unit m = metre;
  unit m2 = metre^2;
  unit mmole_per_min = 1e-3 mole / (60 second);
end
