// SBML level 3 version 1

model paracetamol_liver(Vli, Vext, apap_ext, apapglu_ext, apapsul_ext, apapcys_ext, apapgsh_ext, apapmer_ext, apap, apapglu, apapsul, apapcys, apapgsh, apapmer)
  // model units - substance: mmole, time: min, volume: litre, area: m2, length: m, extent: mmole

  // Compartments:
  compartment Vli = 1.5 litre; Vli is "liver";
  compartment Vext = 1 litre; Vext is "extern";

  // Species:
  substanceOnly species apap_ext in Vext = 0.2*Vext; apap_ext is "paracetamol (extern)";
  substanceOnly species apapglu_ext in Vext = 0; apapglu_ext is "paracetamol glucuronide (extern)";
  substanceOnly species apapsul_ext in Vext = 0; apapsul_ext is "paracetamol sulfate (extern)";
  substanceOnly species apapcys_ext in Vext = 0; apapcys_ext is "paracetamol cysteine (extern)";
  substanceOnly species apapgsh_ext in Vext = 0; apapgsh_ext is "paracetamol glutathione (extern)";
  substanceOnly species apapmer_ext in Vext = 0; apapmer_ext is "paracetamol mercapturate (extern)";
  substanceOnly species apap in Vli = 0; apap is "paracetamol";
  substanceOnly species apapglu in Vli = 0; apapglu is "paracetamol glucuronide";
  substanceOnly species apapsul in Vli = 0; apapsul is "paracetamol sulfate";
  substanceOnly species apapcys in Vli = 0; apapcys is "paracetamol cysteine";
  substanceOnly species apapgsh in Vli = 0; apapgsh is "paracetamol glutathione";
  substanceOnly species apapmer in Vli = 0; apapmer is "paracetamol mercapturate";

  // Parameters:
  APAP_Vmax = 0.05 mmole_per_min;
  Import_Km = 0.05 mM;
  APAPGLU_Vmax = 0.0001 mmole_per_min;
  APAPGLU_Km = 0.05 mM;
  APAPSUL_Vmax = 5e-5 mmole_per_min;
  APAPSUL_Km = 0.05 mM;
  APAPCYS_Vmax = 1 mmole_per_min;
  APAPCYS_Km = 0.05 mM;
  APAPGSH_Vmax = 1e-6 mmole_per_min;
  APAPGSH_Km = 0.05 mM;
  APAPMER_Vmax = 1e-6 mmole_per_min;
  APAPMER_Km = 0.05 mM;
  APAPGLUEXP_Vmax = 0.01 mmole_per_min;
  APAPGLUEXP_Km = 0.05 mM;
  APAPSULEXP_Vmax = 0.01 mmole_per_min;
  APAPSULEXP_Km = 0.05 mM;
  APAPCYSEXP_Vmax = 0.01 mmole_per_min;
  APAPCYSEXP_Km = 0.05 mM;
  APAPGSHEXP_Vmax = 0.01 mmole_per_min;
  APAPGSHEXP_Km = 0.05 mM;
  APAPMEREXP_Vmax = 0.01 mmole_per_min;
  APAPMEREXP_Km = 0.05 mM;

  // Reactions:
  APAPIM: apap_ext -> apap; APAP_Vmax*(apap_ext/Vli)/(apap_ext/Vli + Import_Km);
  APAPGLU: apap => apapglu; APAPGLU_Vmax*(apap/Vli)/(apap/Vli + APAPGLU_Km);
  APAPSUL: apap => apapsul; APAPSUL_Vmax*(apap/Vli)/(apap/Vli + APAPSUL_Km);
  APAPCYS: apap => apapcys; APAPCYS_Vmax*(apap/Vli)/(apap/Vli + APAPCYS_Km);
  APAPGSH: apap => apapgsh; APAPGSH_Vmax*(apap/Vli)/(apap/Vli + APAPGSH_Km);
  APAPMER: apap => apapmer; APAPMER_Vmax*(apap/Vli)/(apap/Vli + APAPMER_Km);
  APAPGLUEXP: apapglu -> apapglu_ext; APAPGLUEXP_Vmax*(apapglu/Vli)/(apapglu/Vli + APAPGLUEXP_Km);
  APAPSULEXP: apapsul -> apapsul_ext; APAPSULEXP_Vmax*(apapsul/Vli)/(apapsul/Vli + APAPSULEXP_Km);
  APAPCYSEXP: apapcys -> apapcys_ext; APAPCYSEXP_Vmax*(apapcys/Vli)/(apapcys/Vli + APAPCYSEXP_Km);
  APAPGSHEXP: apapgsh -> apapgsh_ext; APAPGSHEXP_Vmax*(apapgsh/Vli)/(apapgsh/Vli + APAPGSHEXP_Km);
  APAPMEREXP: apapmer -> apapmer_ext; APAPMEREXP_Vmax*(apapmer/Vli)/(apapmer/Vli + APAPMEREXP_Km);

  // Unit definitions:
  unit mmole = 1e-3 mole;
  unit mM = 1e-3 mole / litre;
  unit min = 60 second;
  unit m = metre;
  unit m2 = metre^2;
  unit mmole_per_min = 1e-3 mole / (60 second);
end
