// SBML level 3 version 1

model paracetamol_model()
  // model units - substance: mmole, time: min, volume: litre, area: m2, length: m, extent: mmole

  // Compartments:
  compartment Vli = 1.5 litre; Vli is "liver";
  compartment Vext = 1 litre; Vext is "extern";

  // Species:
  species apap_ext in Vext = 0; apap_ext is "paracetamol (extern)";
  species apap_glu_ext in Vext = 0; apap_glu_ext is "paracetamol glucuronide (extern)";
  species apap_sul_ext in Vext = 0; apap_sul_ext is "paracetamol sulfate (extern)";
  species apap_cys_ext in Vext = 0; apap_cys_ext is "paracetamol cysteine (extern)";
  species apap_gsh_ext in Vext = 0; apap_gsh_ext is "paracetamol glutathione (extern)";
  species apap_mer_ext in Vext = 0; apap_mer_ext is "paracetamol mercapturate (extern)";
  species apap in Vli = 0; apap is "paracetamol";
  species apap_glu in Vli = 0; apap_glu is "paracetamol glucuronide";
  species apap_sul in Vli = 0; apap_sul is "paracetamol sulfate";
  species apap_cys in Vli = 0; apap_cys is "paracetamol cysteine";
  species apap_gsh in Vli = 0; apap_gsh is "paracetamol glutathione";
  species apap_mer in Vli = 0; apap_mer is "paracetamol mercapturate";

  // Parameters:
  APAP_Vmax = 1 mmole_per_min;

  // Reactions:
  APAPIM: apap_ext -> apap; APAP_Vmax*(apap_ext - apap)/(apap_ext - apap + 1);
  APAPGLU: apap => apap_glu; ;
  APAPSUL: apap => apap_sul; ;
  APAPCYS: apap => apap_cys; ;
  APAPGSH: apap => apap_gsh; ;
  APAPMER: apap => apap_mer; ;
  APAPGLUEXP: apap_glu -> apap_glu_ext; ;
  APAPSULEXP: apap_sul -> apap_sul_ext; ;
  APAPCYSEXP: apap_cys -> apap_cys_ext; ;
  APAPGSHEXP: apap_gsh -> apap_gsh_ext; ;
  APAPMEREXP: apap_mer -> apap_mer_ext; ;

  // Unit definitions:
  unit mmole = 1e-3 mole;
  unit min = 60 second;
  unit m = metre;
  unit m2 = metre^2;
  unit mmole_per_min = 1e-3 mole / (60 second);
end
