// SBML level 3 version 1

model paracetamol_model_kidney()
  // model units - substance: mmole, time: min, volume: litre, area: m2, length: m, extent: mmole

  // Compartments:
  compartment Vli = 1.5 litre; Vli is "liver";
  compartment Vext = 1 litre; Vext is "extern";
  compartment Vur = 1 litre; Vur is "urine";

  // Species:
  species apap_ext in Vext = 0; apap_ext is "paracetamol (extern)";
  species apap_glu_ext in Vext = 0; apap_glu_ext is "paracetamol glucuronide (extern)";
  species apap_sul_ext in Vext = 0; apap_sul_ext is "paracetamol sulfate (extern)";
  species apap_cys_ext in Vext = 0; apap_cys_ext is "paracetamol cysteine (extern)";
  species apap_gsh_ext in Vext = 0; apap_gsh_ext is "paracetamol glutathione (extern)";
  species apap_mer_ext in Vext = 0; apap_mer_ext is "paracetamol mercapturate (extern)";
  species apap in Vli = 0; apap is "paracetamol";
  species apap_glu in Vli = 0; apap_glu is "paracetamol glucuronide";
  species apap_sul in Vli = 0; apap_sul is "paracetamol sulfate";
  species apap_cys in Vli = 0; apap_cys is "paracetamol cysteine";
  species apap_gsh in Vli = 0; apap_gsh is "paracetamol glutathione";
  species apap_mer in Vli = 0; apap_mer is "paracetamol mercapturate";
  species apap_ur in Vur = 0; apap_ur is "paracetamol (urine)";
  species apap_glu_ur in Vur = 0; apap_glu_ur is "paracetamol glucuronide (urine)";
  species apap_sul_ur in Vur = 0; apap_sul_ur is "paracetamol sulfate (urine)";
  species apap_cys_ur in Vur = 0; apap_cys_ur is "paracetamol cysteine (urine)";
  species apap_gsh_ur in Vur = 0; apap_gsh_ur is "paracetamol glutathione (urine)";
  species apap_mer_ur in Vur = 0; apap_mer_ur is "paracetamol mercapturate (urine)";

  // Parameters:
  APAP_Import_Vmax = 1 mmole_per_min;
  APAP_Import_Km = 1 mM;
  APAPGLU_Import_Vmax = 1 mmole_per_min;
  APAPGLU_Import_Km = 1 mM;
  APAPSUL_Import_Vmax = 1 mmole_per_min;
  APAPSUL_Import_Km = 1 mM;
  APAPCYS_Import_Vmax = 1 mmole_per_min;
  APAPCYS_Import_Km = 1 mM;
  APAPGSH_Import_Vmax = 1 mmole_per_min;
  APAPGSH_Import_Km = 1 mM;
  APAPMER_Import_Vmax = 1 mmole_per_min;
  APAPMER_Import_Km = 1 mM;
  APAPGLU_Vmax = 1 mmole_per_min;
  APAPGLU_Km = 1 mM;
  APAPSUL_Vmax = 1 mmole_per_min;
  APAPSUL_Km = 1 mM;
  APAPCYS_Vmax = 1 mmole_per_min;
  APAPCYS_Km = 1 mM;
  APAPGSH_Vmax = 1 mmole_per_min;
  APAPGSH_Km = 1 mM;
  APAPMER_Vmax = 1 mmole_per_min;
  APAPMER_Km = 1 mM;
  APAP_Export_Vmax = 1 mmole_per_min;
  APAP_Export_Km = 1 mM;
  APAPGLU_Export_Vmax = 1 mmole_per_min;
  APAPGLU_Export_Km = 1 mM;
  APAPSUL_Export_Vmax = 1 mmole_per_min;
  APAPSUL_Export_Km = 1 mM;
  APAPCYS_Export_Vmax = 1 mmole_per_min;
  APAPCYS_Export_Km = 1 mM;
  APAPGSH_Export_Vmax = 1 mmole_per_min;
  APAPGSH_Export_Km = 1 mM;
  APAPMER_Export_Vmax = 1 mmole_per_min;
  APAPMER_Export_Km = 1 mM;

  // Reactions:
  APAPIM: apap_ext -> apap; APAP_Import_Vmax*apap_ext/(apap_ext + APAP_Import_Km);
  APAPGLUIM: apap_glu_ext -> apap_glu; APAPGLU_Import_Vmax*apap_glu_ext/(apap_glu_ext + APAPGLU_Import_Km);
  APAPSULIM: apap_sul_ext -> apap_sul; APAPSUL_Import_Vmax*apap_sul_ext/(apap_sul_ext + APAPSUL_Import_Km);
  APAPCYSIM: apap_cys_ext -> apap_cys; APAPCYS_Import_Vmax*apap_cys_ext/(apap_cys_ext + APAPCYS_Import_Km);
  APAPGSHIM: apap_gsh_ext -> apap_gsh; APAPGSH_Import_Vmax*apap_gsh_ext/(apap_gsh_ext + APAPGSH_Import_Km);
  APAPMERIM: apap_mer_ext -> apap_mer; APAPMER_Import_Vmax*apap_mer_ext/(apap_mer_ext + APAPMER_Import_Km);
  APAPGLU: apap -> apap_glu; APAPGLU_Vmax*apap/(apap + APAPGLU_Km);
  APAPSUL: apap => apap_sul; APAPSUL_Vmax*apap/(apap + APAPSUL_Km);
  APAPCYS: apap => apap_cys; APAPCYS_Vmax*apap/(apap + APAPCYS_Km);
  APAPGSH: apap => apap_gsh; APAPGSH_Vmax*apap/(apap + APAPGSH_Km);
  APAPMER: apap => apap_mer; APAPMER_Vmax*apap/(apap + APAPMER_Km);
  APAPEXP: apap -> apap_ur; APAP_Export_Vmax*apap/(apap + APAP_Export_Km);
  APAPGLUEXP: apap_glu -> apap_glu_ur; APAPGLU_Export_Vmax*apap_glu/(apap_glu + APAPGLU_Export_Km);
  APAPSULEXP: apap_sul -> apap_sul_ur; APAPSUL_Export_Vmax*apap_sul/(apap_sul + APAPSUL_Export_Km);
  APAPCYSEXP: apap_cys -> apap_cys_ur; APAPCYS_Export_Vmax*apap_cys/(apap_cys + APAPCYS_Export_Km);
  APAPGSHEXP: apap_gsh -> apap_gsh_ur; APAPGSH_Export_Vmax*apap_gsh/(apap_gsh + APAPGSH_Export_Km);
  APAPMEREXP: apap_mer -> apap_mer_ur; APAPMER_Export_Vmax*apap_mer/(apap_mer + APAPMER_Export_Km);

  // Unit definitions:
  unit mmole = 1e-3 mole;
  unit mM = 1e-3 mole / litre;
  unit min = 60 second;
  unit m = metre;
  unit m2 = metre^2;
  unit mmole_per_min = 1e-3 mole / (60 second);
end
