// SBML level 3 version 1

model paracetamol_model_liver()
  // model units - substance: mmole, time: min, volume: litre, area: m2, length: m, extent: mmole

  // Compartments:
  compartment Vli = 1.5 litre; Vli is "liver";
  compartment Vext = 1 litre; Vext is "extern";

  // Species:
  species apap_ext in Vext = 0; apap_ext is "paracetamol (extern)";
  species apap_glu_ext in Vext = 0; apap_glu_ext is "paracetamol glucuronide (extern)";
  species apap_sul_ext in Vext = 0; apap_sul_ext is "paracetamol sulfate (extern)";
  species apap_cys_ext in Vext = 0; apap_cys_ext is "paracetamol cysteine (extern)";
  species apap_gsh_ext in Vext = 0; apap_gsh_ext is "paracetamol glutathione (extern)";
  species apap_mer_ext in Vext = 0; apap_mer_ext is "paracetamol mercapturate (extern)";
  species apap in Vli = 0; apap is "paracetamol";
  species apap_glu in Vli = 0; apap_glu is "paracetamol glucuronide";
  species apap_sul in Vli = 0; apap_sul is "paracetamol sulfate";
  species apap_cys in Vli = 0; apap_cys is "paracetamol cysteine";
  species apap_gsh in Vli = 0; apap_gsh is "paracetamol glutathione";
  species apap_mer in Vli = 0; apap_mer is "paracetamol mercapturate";

  // Parameters:
  APAP_Vmax = 1 mmole_per_min;
  Import_Km = 1 mM;
  APAPGLU_Vmax = 1 mmole_per_min;
  APAPGLU_Km = 1 mM;
  APAPSUL_Vmax = 1 mmole_per_min;
  APAPSUL_Km = 1 mM;
  APAPCYS_Vmax = 1 mmole_per_min;
  APAPCYS_Km = 1 mM;
  APAPGSH_Vmax = 1 mmole_per_min;
  APAPGSH_Km = 1 mM;
  APAPMER_Vmax = 1 mmole_per_min;
  APAPMER_Km = 1 mM;
  APAPGLUEXP_Vmax = 1 mmole_per_min;
  APAPGLUEXP_Km = 1 mM;
  APAPSULEXP_Vmax = 1 mmole_per_min;
  APAPSULEXP_Km = 1 mM;
  APAPCYSEXP_Vmax = 1 mmole_per_min;
  APAPCYSEXP_Km = 1 mM;
  APAPGSHEXP_Vmax = 1 mmole_per_min;
  APAPGSHEXP_Km = 1 mM;
  APAPMEREXP_Vmax = 1 mmole_per_min;
  APAPMEREXP_Km = 1 mM;

  // Reactions:
  APAPIM: apap_ext -> apap; APAP_Vmax*(apap_ext - apap)/(apap_ext - apap + Import_Km);
  APAPGLU: apap => apap_glu; APAPGLU_Vmax*apap/(apap + APAPGLU_Km);
  APAPSUL: apap => apap_sul; APAPSUL_Vmax*apap/(apap + APAPSUL_Km);
  APAPCYS: apap => apap_cys; APAPCYS_Vmax*apap/(apap + APAPCYS_Km);
  APAPGSH: apap => apap_gsh; APAPGSH_Vmax*apap/(apap + APAPGSH_Km);
  APAPMER: apap => apap_mer; APAPMER_Vmax*apap/(apap + APAPMER_Km);
  APAPGLUEXP: apap_glu -> apap_glu_ext; APAPGLUEXP_Vmax*(apap_glu - apap_glu_ext)/(apap_glu - apap_glu_ext + APAPGLUEXP_Km);
  APAPSULEXP: apap_sul -> apap_sul_ext; APAPSULEXP_Vmax*(apap_sul - apap_sul_ext)/(apap_sul - apap_sul_ext + APAPSULEXP_Km);
  APAPCYSEXP: apap_cys -> apap_cys_ext; APAPCYSEXP_Vmax*(apap_cys - apap_cys_ext)/(apap_cys - apap_cys_ext + APAPCYSEXP_Km);
  APAPGSHEXP: apap_gsh -> apap_gsh_ext; APAPGSHEXP_Vmax*(apap_gsh - apap_gsh_ext)/(apap_gsh - apap_gsh_ext + APAPGSHEXP_Km);
  APAPMEREXP: apap_mer -> apap_mer_ext; APAPMEREXP_Vmax*(apap_mer - apap_mer_ext)/(apap_mer - apap_mer_ext + APAPMEREXP_Km);

  // Unit definitions:
  unit mmole = 1e-3 mole;
  unit mM = 1e-3 mole / litre;
  unit min = 60 second;
  unit m = metre;
  unit m2 = metre^2;
  unit mmole_per_min = 1e-3 mole / (60 second);
end
