// SBML level 3 version 1

model Koenig_amount_species_1()
  // Koenig Demo Metabolism
  // Description
  // This is a demonstration model for species in amounts SBML format.
  // The content of this model has been carefully created in a manual research effort.
  // This file has been created by Matthias Koenig.
  // Terms of use
  // Copyright © 2019 Matthias Koenig.
  // Redistribution and use of any part of this model, with or without modification, are permitted provided that the following conditions are met:
  // Redistributions of this SBML file must retain the above copyright notice, this list of conditions and the following disclaimer.
  // Redistributions in a different form must reproduce the above copyright notice, this list of conditions and the following disclaimer in the documentation and/or other materials provided with the distribution.
  // This model is distributed in the hope that it will be useful, but WITHOUT ANY WARRANTY; without even the implied warranty of MERCHANTABILITY or FITNESS FOR A PARTICULAR PURPOSE.
  // model units - substance: mmole, time: s, volume: m3, area: m2, length: m, extent: mmole

  // Compartments:
  compartment Vc; Vc has m3; Vc is "cell compartment";

  // Species:
  substanceOnly species Aglc in Vc = 5; Aglc is "glucose";

  // Parameters:
  k1 = 1 per_s;

  // Assignment rules:
  Vc := 2 m3*exp(time/(1 s));

  // Reactions:
  R1: Aglc => ; k1*Aglc;

  // Unit definitions:
  unit s = second;
  unit kg = kilogram;
  unit m = metre;
  unit m2 = metre^2;
  unit m3 = metre^3;
  unit mM = 1e-3 mole / litre;
  unit mmole = 1e-3 mole;
  unit per_s = 1 / second;
  unit mmole_per_s = 1e-3 mole / second;
end
