// SBML level 3 version 1

model assignment_3()
  // model units - substance: mg, time: h, volume: litre, area: m2, length: m, extent: mg

  // Parameters:
  Ave = IVDOSE; Ave has mg;
  D = PODOSE; D has mg;
  IVDOSE = 0 mg;
  PODOSE = 100 mg;
  k1 = 0.1 litre_per_h;
  BW = 70 kg;
  FVve = 0.0514 litre_per_kg;
  Cve has mg_per_litre;
  Vve has litre;

  // Assignment rules:
  Cve := Ave/Vve;
  Vve := BW*FVve;

  // Rate rules:
  Ave' = -k1*Cve;

  // Unit definitions:
  unit h = 3600 second;
  unit kg = 1000 gram;
  unit m = metre;
  unit m2 = metre^2;
  unit per_h = 1 / (3600 second);
  unit mg = 1e-3 gram;
  unit mg_per_litre = 1e-3 gram / litre;
  unit mg_per_g = 1e-3 gram / gram;
  unit mg_per_h = 1e-3 gram / (3600 second);
  unit litre_per_h = litre / (3600 second);
  unit litre_per_kg = litre / (1000 gram);
  unit mulitre_per_min_mg = 1e-6 litre / (60 second * 1e-3 gram);
  unit ml_per_s = 1e-3 litre / second;
  unit s_per_h = second / (3600 second);
  unit min_per_h = 60 second / (3600 second);
  unit ml_per_litre = 1e-3 litre / litre;
  unit mulitre_per_g = 1e-6 litre / gram;
end
