// SBML level 3 version 1

model mass_charge_balance_example_1()
  // Model demonstrating mass and charge balance
  // Description
  // Test model demonstrating inline annotations.
  // The content of this model has been carefully created in a manual research effort.
  // This file has been created by Matthias Koenig.
  // Terms of use
  // Copyright © 2019 Matthias Koenig.
  // Redistribution and use of any part of this model, with or without modification, are permitted provided that the following conditions are met:
  // Redistributions of this SBML file must retain the above copyright notice, this list of conditions and the following disclaimer.
  // Redistributions in a different form must reproduce the above copyright notice, this list of conditions and the following disclaimer in the documentation and/or other materials provided with the distribution.
  // This model is distributed in the hope that it will be useful, but WITHOUT ANY WARRANTY; without even the implied warranty of MERCHANTABILITY or FITNESS FOR A PARTICULAR PURPOSE.
  // model units - substance: mole, time: s, volume: m3, area: m2, length: m, extent: mole

  // Compartments:
  compartment cyto; cyto has m3; cyto is "cytosol";  // GO:0005829

  // Species:
  species $glc in cyto = 3; glc is "D-glucose";  // vmhmetabolite:glc_D bigg.metabolite:glc__D kegg.compound:C00031 hmdb:HMDB0000122
  species $atp in cyto = 3; atp is "ATP";  // vmhmetabolite:atp
  species $glc6p in cyto = 3; glc6p is "glucose-6 phosphate";  // vmhmetabolite:g6p
  species $adp in cyto = 3; adp is "ADP";  // vmhmetabolite:adp
  species $h in cyto = 3; h is "H+";  // vmhmetabolite:h

  // Parameters:
  HEX1_v = 1 mole_per_s;

  // Assignment rules:
  cyto := 1 m3;

  // Reactions:
  HEX1: $glc + $atp => $glc6p + $adp + $h; HEX1_v; HEX1 is "Hexokinase (D-Glucose:ATP)";  // vmhreaction:HEX1 ec-code:2.7.1.1 ec-code:2.7.1.2 kegg.reaction:R00299

  // Unit definitions:
  unit kg = kilogram;
  unit s = second;
  unit m = metre;
  unit m2 = metre^2;
  unit m3 = metre^3;
  unit mM = 1e-3 mole / litre;
  unit mole_per_s = mole / second;
end
