// SBML level 3 version 1

model midazolam_model()
  // model units - substance: mmole, time: min, volume: litre, area: m2, length: m, extent: mmole

  // Compartments:
  compartment Vli = 1.5 litre; Vli is "liver";
  compartment Vext = 1 litre; Vext is "extern";

  // Species:
  species mid_ext in Vext = 0; mid_ext is "midazolam (extern)";
  species mid1oh_ext in Vext = 0; mid1oh_ext is "1-hydroxy-midazolam (extern)";
  species mid in Vli = 0; mid is "midazolam";
  species mid1oh in Vli = 0; mid1oh is "1-hydroxy-midazolam";

  // Parameters:
  MIDIM_Vmax = 1 mmole_per_min;

  // Reactions:
  MIDIM: mid_ext -> mid; MIDIM_Vmax;
  MID1OHEX: mid1oh -> mid1oh_ext; ;
  MIDOH: mid => mid1oh; ;

  // Unit definitions:
  unit mmole = 1e-3 mole;
  unit min = 60 second;
  unit m = metre;
  unit m2 = metre^2;
  unit mmole_per_min = 1e-3 mole / (60 second);
end
