// SBML level 3 version 1

model midazolam_model_intestine()
  // model units - substance: mmole, time: min, volume: litre, area: m2, length: m, extent: mmole

  // Compartments:
  compartment Vex = 1 litre; Vex is "stomach";
  compartment Vint = 1 litre; Vint is "intestine";

  // Species:
  species mid_ex in Vex = 0; mid_ex is "midazolam (extern)";
  species mid1oh_ex in Vex = 0; mid1oh_ex is "1-hydroxy-midazolam (extern)";
  species mid in Vint = 0; mid is "midazolam (intestine)";
  species mid1oh in Vint = 0; mid1oh is "1-hydroxy-midazolam (intestine)";

  // Parameters:
  MIDIM_Vmax = 0.5 mmole_per_min;
  MIDIM_Km = 0.004 mM;
  MIDOH_Vmax = 0.5 mmole_per_min;
  MIDOH_Km = 0.004 mM;
  MID1OHBL_Vmax = 0.5 mmole_per_min;
  MID1OHBL_Km = 0.004 mM;

  // Reactions:
  MIDIM: mid_ex -> mid; MIDIM_Vmax*(mid_ex/(mid_ex + MIDIM_Km));
  MIDOH: mid => mid1oh; MIDOH_Vmax*(mid/(mid + MIDOH_Km));
  MID1OHEX: mid1oh -> mid1oh_ex; MID1OHBL_Vmax*(mid1oh/(mid1oh + MID1OHBL_Km));

  // Unit definitions:
  unit mmole = 1e-3 mole;
  unit min = 60 second;
  unit m = metre;
  unit m2 = metre^2;
  unit mM = 1e-3 mole / litre;
  unit mmole_per_min = 1e-3 mole / (60 second);
end
