// SBML level 3 version 1

model midazolam_model_kidney()
  // model units - substance: mmole, time: min, volume: litre, area: m2, length: m, extent: mmole

  // Compartments:
  compartment Vext = 1 litre; Vext is "extern";
  compartment Vkid = 1 litre; Vkid is "kidney";
  compartment Vurine = 1 litre;

  // Species:
  species mid1oh_ext in Vext = 0; mid1oh_ext is "1-hydroxy-midazolam (extern)";
  species mid1oh in Vkid = 0; mid1oh is "1-hydroxy-midazolam (kidney)";
  species mid1oh_urine in Vurine = 0; mid1oh_urine is "1-hydroxy-midazolam (urine)";

  // Parameters:
  MID1OHIM_Vmax = 1 mmole_per_min;
  MID1OHIM_Km = 1 mM;
  MID1OHEX_Vmax = 1 mmole_per_min;
  MID1OHEX_Km = 1 mM;

  // Reactions:
  MID1OHIM: mid1oh_ext -> mid1oh; MID1OHIM_Vmax*(mid1oh_ext/(mid1oh_ext + MID1OHIM_Km));
  MID1OHEX: mid1oh => mid1oh_urine; MID1OHEX_Vmax*(mid1oh/(mid1oh + MID1OHEX_Km));

  // Unit definitions:
  unit mmole = 1e-3 mole;
  unit min = 60 second;
  unit m = metre;
  unit m2 = metre^2;
  unit mM = 1e-3 mole / litre;
  unit mmole_per_min = 1e-3 mole / (60 second);
end
