// SBML level 3 version 1

model midazolam_model_liver()
  // model units - substance: mmole, time: min, volume: litre, area: m2, length: m, extent: mmole

  // Compartments:
  compartment Vli = 1.5 litre; Vli is "liver";
  compartment Vext = 1 litre; Vext is "extern";

  // Species:
  species mid_ext in Vext = 0; mid_ext is "midazolam (extern)";
  species mid1oh_ext in Vext = 0; mid1oh_ext is "1-hydroxy-midazolam (extern)";
  species mid in Vli = 0; mid is "midazolam (liver)";
  species mid1oh in Vli = 0; mid1oh is "1-hydroxy-midazolam (liver)";

  // Parameters:
  MIDIM_Vmax = 1 mmole_per_min;
  MIDIM_Km = 0.003 mM;
  MID1OHEX_Vmax = 1e-6 mmole_per_min;
  MID1OHEX_Km = 0.0028 mM;
  MIDOH_Vmax = 1 mmole_per_min;
  MIDOH_Km = 0.003 mM;

  // Reactions:
  MIDIM: mid_ext -> mid; MIDIM_Vmax*(mid_ext/(mid_ext + MIDIM_Km));
  MID1OHEX: mid1oh -> mid1oh_ext; MID1OHEX_Vmax*(mid1oh/(mid1oh + MID1OHEX_Km));
  MIDOH: mid => mid1oh; MIDOH_Vmax*(mid/(mid + MIDOH_Km));

  // Unit definitions:
  unit mmole = 1e-3 mole;
  unit min = 60 second;
  unit m = metre;
  unit m2 = metre^2;
  unit mM = 1e-3 mole / litre;
  unit mmole_per_min = 1e-3 mole / (60 second);
end
