// SBML level 3 version 1

model midazolam_body_flat()
  // model units - substance: mmole, time: min, volume: litre, area: m2, length: m, extent: mmole

  // Compartments:
  compartment Vre; Vre has litre; Vre is "rest of body";
  compartment Vgu; Vgu has litre; Vgu is "gut";
  compartment Vki; Vki has litre; Vki is "kidney";
  compartment Vli; Vli has litre; Vli is "liver";
  compartment Vlu; Vlu has litre; Vlu is "lung";
  compartment Vsp; Vsp has litre; Vsp is "spleen";
  compartment Vpa; Vpa has litre; Vpa is "pancreas";
  compartment Vve; Vve has litre; Vve is "venous blood";
  compartment Var; Var has litre; Var is "arterial blood";
  compartment Vurine = 1 litre;
  compartment Vgu_tissue; Vgu_tissue has litre;
  compartment Vgu_blood; Vgu_blood has litre;
  compartment Vki_tissue; Vki_tissue has litre;
  compartment Vki_blood; Vki_blood has litre;
  compartment Vli_tissue; Vli_tissue has litre;
  compartment Vli_blood; Vli_blood has litre;
  compartment Vlu_tissue; Vlu_tissue has litre;
  compartment Vlu_blood; Vlu_blood has litre;
  compartment Vpa_tissue; Vpa_tissue has litre;
  compartment Vpa_blood; Vpa_blood has litre;
  compartment Vsp_tissue; Vsp_tissue has litre;
  compartment Vsp_blood; Vsp_blood has litre;
  compartment Vre_tissue; Vre_tissue has litre;
  compartment Vre_blood; Vre_blood has litre;
  compartment KI__Vurine = 1 litre;

  // Species:
  substanceOnly species Agu_blood_mid in Vgu_blood = 0; Agu_blood_mid is "midazolam (gut)";
  substanceOnly species Aki_blood_mid in Vki_blood = 0; Aki_blood_mid is "midazolam (kidney)";
  substanceOnly species Ali_blood_mid in Vli_blood = 0; Ali_blood_mid is "midazolam (liver)";
  substanceOnly species Alu_blood_mid in Vlu_blood = 0; Alu_blood_mid is "midazolam (lung)";
  substanceOnly species Apa_blood_mid in Vpa_blood = 0; Apa_blood_mid is "midazolam (pancreas)";
  substanceOnly species Asp_blood_mid in Vsp_blood = 0; Asp_blood_mid is "midazolam (spleen)";
  substanceOnly species Are_blood_mid in Vre_blood = 0; Are_blood_mid is "midazolam (rest)";
  substanceOnly species Aar_mid in Var = 0; Aar_mid is "midazolam (arterial blood)";
  substanceOnly species Ave_mid in Vve = 0; Ave_mid is "midazolam (venous blood)";
  substanceOnly species Aurine_mid in Vurine = 0; Aurine_mid is "midazolam (urine)";
  substanceOnly species Agu_blood_mid1oh in Vgu_blood = 0; Agu_blood_mid1oh is "1-hydroxymidazolam (gut)";
  substanceOnly species Aki_blood_mid1oh in Vki_blood = 0; Aki_blood_mid1oh is "1-hydroxymidazolam (kidney)";
  substanceOnly species Ali_blood_mid1oh in Vli_blood = 0; Ali_blood_mid1oh is "1-hydroxymidazolam (liver)";
  substanceOnly species Alu_blood_mid1oh in Vlu_blood = 0; Alu_blood_mid1oh is "1-hydroxymidazolam (lung)";
  substanceOnly species Apa_blood_mid1oh in Vpa_blood = 0; Apa_blood_mid1oh is "1-hydroxymidazolam (pancreas)";
  substanceOnly species Asp_blood_mid1oh in Vsp_blood = 0; Asp_blood_mid1oh is "1-hydroxymidazolam (spleen)";
  substanceOnly species Are_blood_mid1oh in Vre_blood = 0; Are_blood_mid1oh is "1-hydroxymidazolam (rest)";
  substanceOnly species Aar_mid1oh in Var = 0; Aar_mid1oh is "1-hydroxymidazolam (arterial blood)";
  substanceOnly species Ave_mid1oh in Vve = 0; Ave_mid1oh is "1-hydroxymidazolam (venous blood)";
  substanceOnly species Aurine_mid1oh in Vurine = 0; Aurine_mid1oh is "1-hydroxymidazolam (urine)";
  substanceOnly species KI__mid1oh in Vki_tissue = 0; KI__mid1oh is "1-hydroxy-midazolam (kidney)";
  substanceOnly species LI__mid in Vli_tissue = 0; LI__mid is "midazolam (liver)";
  substanceOnly species LI__mid1oh in Vli_tissue = 0; LI__mid1oh is "1-hydroxy-midazolam (liver)";

  // Parameters:
  conversion_ml_per_l = 1000 ml_per_l; conversion_ml_per_l is "volume conversion factor";
  conversion_l_per_ml = 0.001 l_per_ml; conversion_l_per_ml is "volume conversion factor";
  BW = 75 kg; BW is "body weight [kg]";
  HEIGHT = 170 cm; HEIGHT is "height [cm]";
  HR = 70 per_min; HR is "heart rate [1/min]";
  HRrest = 70 per_min; HRrest is "heart rate [1/min]";
  BSA has m2; BSA is "body surface area [m^2]";
  COBW = 1.548 ml_per_s_kg; COBW is "cardiac output per bodyweight [ml/s/kg]";
  CO has ml_per_s; CO is "cardiac output [ml/s]";
  QC has l_per_min; QC is "cardiac output [L/hr]";
  COHRI = 150 ml; COHRI is "increase of cardiac output per heartbeat [ml/min*min]";
  Fblood = 0.02 dimensionless; Fblood is "blood fraction of organ volume";
  FVgu = 0.0171 l_per_kg; FVgu is "gut fractional tissue volume";
  FVki = 0.0044 l_per_kg; FVki is "kidney fractional tissue volume";
  FVli = 0.021 l_per_kg; FVli is "liver fractional tissue volume";
  FVlu = 0.0076 l_per_kg; FVlu is "lung fractional tissue volume";
  FVsp = 0.0026 l_per_kg; FVsp is "spleen fractional tissue volume";
  FVpa = 0.01 l_per_kg; FVpa is "pancreas fractional tissue volume";
  FVre has l_per_kg; FVre is "rest of body fractional tissue volume";
  FVve = 0.0514 l_per_kg; FVve is "venous fractional tissue volume";
  FVar = 0.0257 l_per_kg; FVar is "arterial fractional tissue volume";
  FQgu = 0.146 dimensionless; FQgu is "gut fractional tissue blood flow";
  FQki = 0.19 dimensionless; FQki is "kidney fractional tissue blood flow";
  FQh = 0.215 dimensionless; FQh is "hepatic (venous side) fractional tissue blood flow";
  FQlu = 1 dimensionless; FQlu is "lung fractional tissue blood flow";
  FQsp = 0.017 dimensionless; FQsp is "spleen fractional tissue blood flow";
  FQpa = 0.017 dimensionless; FQpa is "pancreas fractional tissue blood flow";
  FQre has dimensionless; FQre is "rest of body fractional tissue blood flow";
  Mr_mid = 325.768 g_per_mole; Mr_mid is "Molecular weight mid [g/mole]";
  IVDOSE_mid = 0 mg; IVDOSE_mid is "IV bolus dose mid [mg]";
  PODOSE_mid = 0 mg; PODOSE_mid is "oral bolus dose mid [mg]";
  Ka_mid = 1 per_hr; Ka_mid is "Ka [1/hr] absorption mid";
  F_mid = 1 dimensionless; F_mid is "fraction absorbed mid";
  ti_mid = 10 s; ti_mid is "injection time mid [s]";
  Ki_mid has per_min; Ki_mid is "Ki [1/min] injection mid";
  Ri_mid = 0 mg_per_min; Ri_mid is "Ri [mg/min] rate of injection mid";
  cum_dose_mid = 0 mg; cum_dose_mid is "Cumulative dose due to infusion mid";
  BP_mid = 1 dimensionless; BP_mid is "blood to plasma ratio mid";
  Mr_mid1oh = 341.8 g_per_mole; Mr_mid1oh is "Molecular weight mid1oh [g/mole]";
  IVDOSE_mid1oh = 0 mg; IVDOSE_mid1oh is "IV bolus dose mid1oh [mg]";
  PODOSE_mid1oh = 0 mg; PODOSE_mid1oh is "oral bolus dose mid1oh [mg]";
  Ka_mid1oh = 1 per_hr; Ka_mid1oh is "Ka [1/hr] absorption mid1oh";
  F_mid1oh = 1 dimensionless; F_mid1oh is "fraction absorbed mid1oh";
  ti_mid1oh = 10 s; ti_mid1oh is "injection time mid1oh [s]";
  Ki_mid1oh has per_min; Ki_mid1oh is "Ki [1/min] injection mid1oh";
  Ri_mid1oh = 0 mg_per_min; Ri_mid1oh is "Ri [mg/min] rate of injection mid1oh";
  cum_dose_mid1oh = 0 mg; cum_dose_mid1oh is "Cumulative dose due to infusion mid1oh";
  BP_mid1oh = 1 dimensionless; BP_mid1oh is "blood to plasma ratio mid1oh";
  Qgu has l_per_min; Qgu is "gut blood flow";
  Qki has l_per_min; Qki is "kidney blood flow";
  Qh has l_per_min; Qh is "hepatic (venous side) blood flow";
  Qha has l_per_min; Qha is "hepatic artery blood flow";
  Qlu has l_per_min; Qlu is "lung blood flow";
  Qsp has l_per_min; Qsp is "spleen blood flow";
  Qpa has l_per_min; Qpa is "pancreas blood flow";
  Qre has l_per_min; Qre is "rest of body blood flow";
  Cpl_ve_mid has mM; Cpl_ve_mid is "midazolam venous plasma concentration";
  Cgu_blood_mid has mM; Cgu_blood_mid is "midazolam concentration (gut)";
  Xgu_blood_mid has mg; Xgu_blood_mid is "{s_name} amount ({c_name})";
  Mgu_blood_mid has mg_per_l; Mgu_blood_mid is "midazolam amount (gut)";
  Cki_blood_mid has mM; Cki_blood_mid is "midazolam concentration (kidney)";
  Xki_blood_mid has mg; Xki_blood_mid is "{s_name} amount ({c_name})";
  Mki_blood_mid has mg_per_l; Mki_blood_mid is "midazolam amount (kidney)";
  Cli_blood_mid has mM; Cli_blood_mid is "midazolam concentration (liver)";
  Xli_blood_mid has mg; Xli_blood_mid is "{s_name} amount ({c_name})";
  Mli_blood_mid has mg_per_l; Mli_blood_mid is "midazolam amount (liver)";
  Clu_blood_mid has mM; Clu_blood_mid is "midazolam concentration (lung)";
  Xlu_blood_mid has mg; Xlu_blood_mid is "{s_name} amount ({c_name})";
  Mlu_blood_mid has mg_per_l; Mlu_blood_mid is "midazolam amount (lung)";
  Cpa_blood_mid has mM; Cpa_blood_mid is "midazolam concentration (pancreas)";
  Xpa_blood_mid has mg; Xpa_blood_mid is "{s_name} amount ({c_name})";
  Mpa_blood_mid has mg_per_l; Mpa_blood_mid is "midazolam amount (pancreas)";
  Csp_blood_mid has mM; Csp_blood_mid is "midazolam concentration (spleen)";
  Xsp_blood_mid has mg; Xsp_blood_mid is "{s_name} amount ({c_name})";
  Msp_blood_mid has mg_per_l; Msp_blood_mid is "midazolam amount (spleen)";
  Cre_blood_mid has mM; Cre_blood_mid is "midazolam concentration (rest)";
  Xre_blood_mid has mg; Xre_blood_mid is "{s_name} amount ({c_name})";
  Mre_blood_mid has mg_per_l; Mre_blood_mid is "midazolam amount (rest)";
  Car_mid has mM; Car_mid is "midazolam concentration (arterial blood)";
  Xar_mid has mg; Xar_mid is "{s_name} amount ({c_name})";
  Mar_mid has mg_per_l; Mar_mid is "midazolam amount (arterial blood)";
  Cve_mid has mM; Cve_mid is "midazolam concentration (venous blood)";
  Xve_mid has mg; Xve_mid is "{s_name} amount ({c_name})";
  Mve_mid has mg_per_l; Mve_mid is "midazolam amount (venous blood)";
  Xurine_mid has mg; Xurine_mid is "midazolam amount (urine)";
  Cpl_ve_mid1oh has mM; Cpl_ve_mid1oh is "1-hydroxymidazolam venous plasma concentration";
  Cgu_blood_mid1oh has mM; Cgu_blood_mid1oh is "1-hydroxymidazolam concentration (gut)";
  Xgu_blood_mid1oh has mg; Xgu_blood_mid1oh is "{s_name} amount ({c_name})";
  Mgu_blood_mid1oh has mg_per_l; Mgu_blood_mid1oh is "1-hydroxymidazolam amount (gut)";
  Cki_blood_mid1oh has mM; Cki_blood_mid1oh is "1-hydroxymidazolam concentration (kidney)";
  Xki_blood_mid1oh has mg; Xki_blood_mid1oh is "{s_name} amount ({c_name})";
  Mki_blood_mid1oh has mg_per_l; Mki_blood_mid1oh is "1-hydroxymidazolam amount (kidney)";
  Cli_blood_mid1oh has mM; Cli_blood_mid1oh is "1-hydroxymidazolam concentration (liver)";
  Xli_blood_mid1oh has mg; Xli_blood_mid1oh is "{s_name} amount ({c_name})";
  Mli_blood_mid1oh has mg_per_l; Mli_blood_mid1oh is "1-hydroxymidazolam amount (liver)";
  Clu_blood_mid1oh has mM; Clu_blood_mid1oh is "1-hydroxymidazolam concentration (lung)";
  Xlu_blood_mid1oh has mg; Xlu_blood_mid1oh is "{s_name} amount ({c_name})";
  Mlu_blood_mid1oh has mg_per_l; Mlu_blood_mid1oh is "1-hydroxymidazolam amount (lung)";
  Cpa_blood_mid1oh has mM; Cpa_blood_mid1oh is "1-hydroxymidazolam concentration (pancreas)";
  Xpa_blood_mid1oh has mg; Xpa_blood_mid1oh is "{s_name} amount ({c_name})";
  Mpa_blood_mid1oh has mg_per_l; Mpa_blood_mid1oh is "1-hydroxymidazolam amount (pancreas)";
  Csp_blood_mid1oh has mM; Csp_blood_mid1oh is "1-hydroxymidazolam concentration (spleen)";
  Xsp_blood_mid1oh has mg; Xsp_blood_mid1oh is "{s_name} amount ({c_name})";
  Msp_blood_mid1oh has mg_per_l; Msp_blood_mid1oh is "1-hydroxymidazolam amount (spleen)";
  Cre_blood_mid1oh has mM; Cre_blood_mid1oh is "1-hydroxymidazolam concentration (rest)";
  Xre_blood_mid1oh has mg; Xre_blood_mid1oh is "{s_name} amount ({c_name})";
  Mre_blood_mid1oh has mg_per_l; Mre_blood_mid1oh is "1-hydroxymidazolam amount (rest)";
  Car_mid1oh has mM; Car_mid1oh is "1-hydroxymidazolam concentration (arterial blood)";
  Xar_mid1oh has mg; Xar_mid1oh is "{s_name} amount ({c_name})";
  Mar_mid1oh has mg_per_l; Mar_mid1oh is "1-hydroxymidazolam amount (arterial blood)";
  Cve_mid1oh has mM; Cve_mid1oh is "1-hydroxymidazolam concentration (venous blood)";
  Xve_mid1oh has mg; Xve_mid1oh is "{s_name} amount ({c_name})";
  Mve_mid1oh has mg_per_l; Mve_mid1oh is "1-hydroxymidazolam amount (venous blood)";
  Xurine_mid1oh has mg; Xurine_mid1oh is "1-hydroxymidazolam amount (urine)";
  inflow_li_mid1oh has mmole_per_min;
  outflow_li_mid1oh has mmole_per_min;
  KI__MID1OHIM_Vmax = 1 mmole_per_min;
  KI__MID1OHIM_Km = 1 mM;
  KI__MID1OHEX_Vmax = 1 mmole_per_min;
  KI__MID1OHEX_Km = 1 mM;
  LI__MIDIM_Vmax = 1 mmole_per_min;
  LI__MIDIM_Km = 0.003 mM;
  LI__MID1OHEX_Vmax = 1 mmole_per_min;
  LI__MID1OHEX_Km = 0.0028 mM;
  LI__MIDOH_Vmax = 1 mmole_per_min;
  LI__MIDOH_Km = 0.003 mM;

  // Assignment rules:
  FVre := 1 l_per_kg - (FVgu + FVki + FVli + FVlu + FVsp + FVpa + FVve + FVar);
  FQre := 1 - (FQki + FQh);
  BSA := 0.024265 m2*(BW/(1 kg))^0.5378*(HEIGHT/(1 cm))^0.3964;
  CO := BW*COBW + (HR - HRrest)*COHRI/(60 s_per_min);
  QC := CO/(1000 ml_per_l)*60 s_per_min;
  Vgu := BW*FVgu;
  Vki := BW*FVki;
  Vli := BW*FVli;
  Vlu := BW*FVlu;
  Vsp := BW*FVsp;
  Vpa := BW*FVpa;
  Vre := BW*FVre;
  Vve := BW*FVve - FVve/(FVar + FVve)*BW*Fblood*(1 l_per_kg - FVve - FVar);
  Var := BW*FVar - FVar/(FVar + FVve)*BW*Fblood*(1 l_per_kg - FVve - FVar);
  Qgu := QC*FQgu;
  Qki := QC*FQki;
  Qh := QC*FQh;
  Qha := Qh - Qgu - Qsp - Qpa;
  Qlu := QC*FQlu;
  Qsp := QC*FQsp;
  Qpa := QC*FQpa;
  Qre := QC*FQre;
  Vgu_tissue := Vgu*(1 - Fblood);
  Vgu_blood := Vgu*Fblood;
  Vki_tissue := Vki*(1 - Fblood);
  Vki_blood := Vki*Fblood;
  Vli_tissue := Vli*(1 - Fblood);
  Vli_blood := Vli*Fblood;
  Vlu_tissue := Vlu*(1 - Fblood);
  Vlu_blood := Vlu*Fblood;
  Vpa_tissue := Vpa*(1 - Fblood);
  Vpa_blood := Vpa*Fblood;
  Vsp_tissue := Vsp*(1 - Fblood);
  Vsp_blood := Vsp*Fblood;
  Vre_tissue := Vre*(1 - Fblood);
  Vre_blood := Vre*Fblood;
  Cpl_ve_mid := Cve_mid/BP_mid;
  Ki_mid := 1.386/ti_mid*3600 s_per_hr;
  Cgu_blood_mid := Agu_blood_mid/Vgu_blood;
  Xgu_blood_mid := Agu_blood_mid*Mr_mid;
  Mgu_blood_mid := Agu_blood_mid/Vgu_blood*Mr_mid;
  Cki_blood_mid := Aki_blood_mid/Vki_blood;
  Xki_blood_mid := Aki_blood_mid*Mr_mid;
  Mki_blood_mid := Aki_blood_mid/Vki_blood*Mr_mid;
  Cli_blood_mid := Ali_blood_mid/Vli_blood;
  Xli_blood_mid := Ali_blood_mid*Mr_mid;
  Mli_blood_mid := Ali_blood_mid/Vli_blood*Mr_mid;
  Clu_blood_mid := Alu_blood_mid/Vlu_blood;
  Xlu_blood_mid := Alu_blood_mid*Mr_mid;
  Mlu_blood_mid := Alu_blood_mid/Vlu_blood*Mr_mid;
  Cpa_blood_mid := Apa_blood_mid/Vpa_blood;
  Xpa_blood_mid := Apa_blood_mid*Mr_mid;
  Mpa_blood_mid := Apa_blood_mid/Vpa_blood*Mr_mid;
  Csp_blood_mid := Asp_blood_mid/Vsp_blood;
  Xsp_blood_mid := Asp_blood_mid*Mr_mid;
  Msp_blood_mid := Asp_blood_mid/Vsp_blood*Mr_mid;
  Cre_blood_mid := Are_blood_mid/Vre_blood;
  Xre_blood_mid := Are_blood_mid*Mr_mid;
  Mre_blood_mid := Are_blood_mid/Vre_blood*Mr_mid;
  Car_mid := Aar_mid/Var;
  Xar_mid := Aar_mid*Mr_mid;
  Mar_mid := Aar_mid/Var*Mr_mid;
  Cve_mid := Ave_mid/Vve;
  Xve_mid := Ave_mid*Mr_mid;
  Mve_mid := Ave_mid/Vve*Mr_mid;
  Xurine_mid := Aurine_mid*Mr_mid;
  Cpl_ve_mid1oh := Cve_mid1oh/BP_mid1oh;
  Ki_mid1oh := 1.386/ti_mid1oh*3600 s_per_hr;
  Cgu_blood_mid1oh := Agu_blood_mid1oh/Vgu_blood;
  Xgu_blood_mid1oh := Agu_blood_mid1oh*Mr_mid1oh;
  Mgu_blood_mid1oh := Agu_blood_mid1oh/Vgu_blood*Mr_mid1oh;
  Cki_blood_mid1oh := Aki_blood_mid1oh/Vki_blood;
  Xki_blood_mid1oh := Aki_blood_mid1oh*Mr_mid1oh;
  Mki_blood_mid1oh := Aki_blood_mid1oh/Vki_blood*Mr_mid1oh;
  Cli_blood_mid1oh := Ali_blood_mid1oh/Vli_blood;
  Xli_blood_mid1oh := Ali_blood_mid1oh*Mr_mid1oh;
  Mli_blood_mid1oh := Ali_blood_mid1oh/Vli_blood*Mr_mid1oh;
  Clu_blood_mid1oh := Alu_blood_mid1oh/Vlu_blood;
  Xlu_blood_mid1oh := Alu_blood_mid1oh*Mr_mid1oh;
  Mlu_blood_mid1oh := Alu_blood_mid1oh/Vlu_blood*Mr_mid1oh;
  Cpa_blood_mid1oh := Apa_blood_mid1oh/Vpa_blood;
  Xpa_blood_mid1oh := Apa_blood_mid1oh*Mr_mid1oh;
  Mpa_blood_mid1oh := Apa_blood_mid1oh/Vpa_blood*Mr_mid1oh;
  Csp_blood_mid1oh := Asp_blood_mid1oh/Vsp_blood;
  Xsp_blood_mid1oh := Asp_blood_mid1oh*Mr_mid1oh;
  Msp_blood_mid1oh := Asp_blood_mid1oh/Vsp_blood*Mr_mid1oh;
  Cre_blood_mid1oh := Are_blood_mid1oh/Vre_blood;
  Xre_blood_mid1oh := Are_blood_mid1oh*Mr_mid1oh;
  Mre_blood_mid1oh := Are_blood_mid1oh/Vre_blood*Mr_mid1oh;
  Car_mid1oh := Aar_mid1oh/Var;
  Xar_mid1oh := Aar_mid1oh*Mr_mid1oh;
  Mar_mid1oh := Aar_mid1oh/Var*Mr_mid1oh;
  Cve_mid1oh := Ave_mid1oh/Vve;
  Xve_mid1oh := Ave_mid1oh*Mr_mid1oh;
  Mve_mid1oh := Ave_mid1oh/Vve*Mr_mid1oh;
  Xurine_mid1oh := Aurine_mid1oh*Mr_mid1oh;
  inflow_li_mid1oh := Flow_gu_li_mid1oh + Flow_sp_li_mid1oh + Flow_pa_li_mid1oh + Flow_ar_li_mid1oh;
  outflow_li_mid1oh := Flow_li_ve_mid1oh;

  // Rate rules:
  PODOSE_mid' = -absorption_mid*Mr_mid;
  IVDOSE_mid' = -injection_mid*Mr_mid;
  cum_dose_mid' = Ri_mid;
  PODOSE_mid1oh' = -absorption_mid1oh*Mr_mid1oh;
  IVDOSE_mid1oh' = -injection_mid1oh*Mr_mid1oh;
  cum_dose_mid1oh' = Ri_mid1oh;

  // Reactions:
  injection_mid: => Ave_mid; Ki_mid*IVDOSE_mid/Mr_mid; injection_mid is "injection midazolam";
  infusion_mid: => Ave_mid; Ri_mid/Mr_mid; infusion_mid is "infusion midazolam";
  absorption_mid: => Agu_blood_mid; Ka_mid/(60 min_per_hr)*PODOSE_mid/Mr_mid*F_mid; absorption_mid is "absorption midazolam";
  Flow_ar_gu_mid: Aar_mid => Agu_blood_mid; Qgu*Car_mid; Flow_ar_gu_mid is "inflow gut midazolam";
  Flow_gu_li_mid: Agu_blood_mid => Ali_blood_mid; Qgu*Cgu_blood_mid*BP_mid; Flow_gu_li_mid is "outflow gut midazolam";
  Flow_ar_ki_mid: Aar_mid => Aki_blood_mid; Qki*Car_mid; Flow_ar_ki_mid is "inflow kidney midazolam";
  Flow_ki_ve_mid: Aki_blood_mid => Ave_mid; Qki*Cki_blood_mid*BP_mid; Flow_ki_ve_mid is "outflow kidney midazolam";
  Flow_ar_li_mid: Aar_mid => Ali_blood_mid; Qha*Car_mid; Flow_ar_li_mid is "inflow liver midazolam";
  Flow_li_ve_mid: Ali_blood_mid => Ave_mid; Qh*Cli_blood_mid*BP_mid; Flow_li_ve_mid is "outflow liver midazolam";
  Flow_ve_lu_mid: Ave_mid => Alu_blood_mid; Qlu*Cve_mid; Flow_ve_lu_mid is "inflow lung midazolam";
  Flow_lu_ar_mid: Alu_blood_mid => Aar_mid; Qlu*Clu_blood_mid*BP_mid; Flow_lu_ar_mid is "outflow lung midazolam";
  Flow_ar_pa_mid: Aar_mid => Apa_blood_mid; Qpa*Car_mid; Flow_ar_pa_mid is "inflow pancreas midazolam";
  Flow_pa_li_mid: Apa_blood_mid => Ali_blood_mid; Qpa*Cpa_blood_mid*BP_mid; Flow_pa_li_mid is "outflow pancreas midazolam";
  Flow_ar_sp_mid: Aar_mid => Asp_blood_mid; Qsp*Car_mid; Flow_ar_sp_mid is "inflow spleen midazolam";
  Flow_sp_li_mid: Asp_blood_mid => Ali_blood_mid; Qsp*Csp_blood_mid*BP_mid; Flow_sp_li_mid is "outflow spleen midazolam";
  Flow_ar_re_mid: Aar_mid => Are_blood_mid; Qre*Car_mid; Flow_ar_re_mid is "inflow rest midazolam";
  Flow_re_ve_mid: Are_blood_mid => Ave_mid; Qre*Cre_blood_mid*BP_mid; Flow_re_ve_mid is "outflow rest midazolam";
  injection_mid1oh: => Ave_mid1oh; Ki_mid1oh*IVDOSE_mid1oh/Mr_mid1oh; injection_mid1oh is "injection 1-hydroxymidazolam";
  infusion_mid1oh: => Ave_mid1oh; Ri_mid1oh/Mr_mid1oh; infusion_mid1oh is "infusion 1-hydroxymidazolam";
  absorption_mid1oh: => Agu_blood_mid1oh; Ka_mid1oh/(60 min_per_hr)*PODOSE_mid1oh/Mr_mid1oh*F_mid1oh; absorption_mid1oh is "absorption 1-hydroxymidazolam";
  Flow_ar_gu_mid1oh: Aar_mid1oh => Agu_blood_mid1oh; Qgu*Car_mid1oh; Flow_ar_gu_mid1oh is "inflow gut 1-hydroxymidazolam";
  Flow_gu_li_mid1oh: Agu_blood_mid1oh => Ali_blood_mid1oh; Qgu*Cgu_blood_mid1oh*BP_mid1oh; Flow_gu_li_mid1oh is "outflow gut 1-hydroxymidazolam";
  Flow_ar_ki_mid1oh: Aar_mid1oh => Aki_blood_mid1oh; Qki*Car_mid1oh; Flow_ar_ki_mid1oh is "inflow kidney 1-hydroxymidazolam";
  Flow_ki_ve_mid1oh: Aki_blood_mid1oh => Ave_mid1oh; Qki*Cki_blood_mid1oh*BP_mid1oh; Flow_ki_ve_mid1oh is "outflow kidney 1-hydroxymidazolam";
  Flow_ar_li_mid1oh: Aar_mid1oh => Ali_blood_mid1oh; Qha*Car_mid1oh; Flow_ar_li_mid1oh is "inflow liver 1-hydroxymidazolam";
  Flow_li_ve_mid1oh: Ali_blood_mid1oh => Ave_mid1oh; Qh*Cli_blood_mid1oh*BP_mid1oh; Flow_li_ve_mid1oh is "outflow liver 1-hydroxymidazolam";
  Flow_ve_lu_mid1oh: Ave_mid1oh => Alu_blood_mid1oh; Qlu*Cve_mid1oh; Flow_ve_lu_mid1oh is "inflow lung 1-hydroxymidazolam";
  Flow_lu_ar_mid1oh: Alu_blood_mid1oh => Aar_mid1oh; Qlu*Clu_blood_mid1oh*BP_mid1oh; Flow_lu_ar_mid1oh is "outflow lung 1-hydroxymidazolam";
  Flow_ar_pa_mid1oh: Aar_mid1oh => Apa_blood_mid1oh; Qpa*Car_mid1oh; Flow_ar_pa_mid1oh is "inflow pancreas 1-hydroxymidazolam";
  Flow_pa_li_mid1oh: Apa_blood_mid1oh => Ali_blood_mid1oh; Qpa*Cpa_blood_mid1oh*BP_mid1oh; Flow_pa_li_mid1oh is "outflow pancreas 1-hydroxymidazolam";
  Flow_ar_sp_mid1oh: Aar_mid1oh => Asp_blood_mid1oh; Qsp*Car_mid1oh; Flow_ar_sp_mid1oh is "inflow spleen 1-hydroxymidazolam";
  Flow_sp_li_mid1oh: Asp_blood_mid1oh => Ali_blood_mid1oh; Qsp*Csp_blood_mid1oh*BP_mid1oh; Flow_sp_li_mid1oh is "outflow spleen 1-hydroxymidazolam";
  Flow_ar_re_mid1oh: Aar_mid1oh => Are_blood_mid1oh; Qre*Car_mid1oh; Flow_ar_re_mid1oh is "inflow rest 1-hydroxymidazolam";
  Flow_re_ve_mid1oh: Are_blood_mid1oh => Ave_mid1oh; Qre*Cre_blood_mid1oh*BP_mid1oh; Flow_re_ve_mid1oh is "outflow rest 1-hydroxymidazolam";
  KI__MID1OHIM: Aki_blood_mid1oh -> KI__mid1oh; KI__MID1OHIM_Vmax*(Aki_blood_mid1oh/Vki_blood/(Aki_blood_mid1oh/Vki_blood + KI__MID1OHIM_Km));
  KI__MID1OHEX: KI__mid1oh => Aurine_mid1oh; KI__MID1OHEX_Vmax*(KI__mid1oh/Vki_tissue/(KI__mid1oh/Vki_tissue + KI__MID1OHEX_Km));
  LI__MIDIM: Ali_blood_mid -> LI__mid; LI__MIDIM_Vmax*(Ali_blood_mid/Vli_blood/(Ali_blood_mid/Vli_blood + LI__MIDIM_Km));
  LI__MID1OHEX: LI__mid1oh -> Ali_blood_mid1oh; LI__MID1OHEX_Vmax*(LI__mid1oh/Vli_tissue/(LI__mid1oh/Vli_tissue + LI__MID1OHEX_Km));
  LI__MIDOH: LI__mid => LI__mid1oh; LI__MIDOH_Vmax*(LI__mid/Vli_tissue/(LI__mid/Vli_tissue + LI__MIDOH_Km));

  // Unit definitions:
  unit mmole = 1e-3 mole;
  unit min = 60 second;
  unit m = metre;
  unit m2 = metre^2;
  unit mM = 1e-3 mole / litre;
  unit mmole_per_min = 1e-3 mole / (60 second);
  unit kg = kilogram;
  unit per_min = 1 / (60 second);
  unit s = second;
  unit mg = 1e-3 gram;
  unit ml = 1e-3 litre;
  unit hr = 3600 second;
  unit per_hr = 1 / (3600 second);
  unit cm = 0.01 metre;
  unit mg_per_l = 1e-3 gram / litre;
  unit mg_per_g = 1e-3 gram / gram;
  unit mg_per_hr = 1e-3 gram / (3600 second);
  unit l_per_min = litre / (60 second);
  unit l_per_hr = litre / (3600 second);
  unit l_per_kg = litre / (1000 gram);
  unit l_per_ml = litre / (1e-3 litre);
  unit g_per_mole = gram / mole;
  unit m2_per_kg = metre^2 / (1000 gram);
  unit mg_per_min = 1e-3 gram / (60 second);
  unit mmole_per_hr = 1e-3 mole / (3600 second);
  unit mmole_per_l = 1e-3 mole / litre;
  unit mmole_per_min_kg = 1e-3 mole / (60 second * 1000 gram);
  unit mmole_per_hr_ml = 1e-3 mole / (3600 second * 1e-3 litre);
  unit ml_per_s = 1e-3 litre / second;
  unit ml_per_s_kg = 1e-3 litre / (second * 1000 gram);
  unit ml_per_l = 1e-3 litre / litre;
  unit mulitre_per_g = 1e-6 litre / gram;
  unit mul_per_min_mg = 1e-6 litre / (60 second * 1e-3 gram);
  unit min_per_hr = 60 second / (3600 second);
  unit s_per_min = 60 second / (3600 second);
  unit s_per_hr = second / (3600 second);
end
