// SBML level 2 version 4

function KL_22401(Vmax, E, A, Km, B)
  Vmax*A/(Km + A);
end

function KL_2616(P, Kp, Ks, Keq, V, S)
  V*(S - P/Keq)/(Ks*(1 + S/Ks + P/Kp));
end

function KL_4642(Kb, V, B, A, Kia, Ka)
  V*A*B/(Kia*Kb + Ka*B + Kb*A + A*B);
end

model SABIOmdl30May2016554()
  // This model has been created with the help of the SABIO-RK Database (http://sabio.h-its.org/) (c) 2005-2016 HITS gGmbH http://www.h-its.org
  // To cite SABIO-RK Database, please use "http://www.ncbi.nlm.nih.gov/pubmed/22102587"
  // SABIO-RK - database for biochemical reaction kinetics. Wittig U, Kania R, Golebiewski M, Rey M, Shi L, Jong L, Algaa E, Weidemann A, Sauer-Danzwith H, Mir S, Krebs O, Bittkowski M, Wetsch E, Rojas I, Mueller W. Nucleic Acids Res. 2012;40(Database issue)790-6

  // Compartments:
  compartment compart_Cell;

  // Species:
  species SPC_34_Cell in compart_Cell = 1; SPC_34_Cell is "ATP";  // CHEBI:15422 CHEBI:30616 kegg.compound:C00002
  species SPC_1407_Cell in compart_Cell = 1; SPC_1407_Cell is "D-Glucose";  // CHEBI:4167 CHEBI:17634 kegg.compound:C00031
  species SPC_35_Cell in compart_Cell = 1; SPC_35_Cell is "ADP";  // CHEBI:16761 kegg.compound:C00008
  species SPC_1405_Cell in compart_Cell = 1; SPC_1405_Cell is "D-Glucose 6-phosphate";  // CHEBI:4170 CHEBI:14314 CHEBI:15954 kegg.compound:C00092
  species ENZ_118323_Cell in compart_Cell = 1; ENZ_118323_Cell is "glucokinase(Enzyme) wildtype isoform B1";  // uniprot:P17712
  species SPC_1374_Cell in compart_Cell = 1; SPC_1374_Cell is "D-Fructose 6-phosphate";  // CHEBI:15946 kegg.compound:C00085
  species ENZ_140578_Cell in compart_Cell = 1; ENZ_140578_Cell is "glucose-6-phosphate isomerase(Enzyme) wildtype";
  species SPC_1465_Cell in compart_Cell = 1; SPC_1465_Cell is "D-Fructose 1,6-bisphosphate";  // CHEBI:16905 CHEBI:37736 kegg.compound:C00354
  species ENZ_141430_Cell in compart_Cell = 1; ENZ_141430_Cell is "6-phosphofructokinase(Enzyme) wildtype";  // hasPart uniprot:P47858; hasPart uniprot:P30835; hasPart uniprot:P47860

  // Reactions:
  REAC_0: SPC_34_Cell + SPC_1407_Cell -> SPC_35_Cell + SPC_1405_Cell; KL_22401(Vmax, ENZ_118323_Cell, SPC_1407_Cell, Km_SPC_1407_Cell, SPC_34_Cell);  // modifiers: ENZ_118323_Cell; isVersionOf ec-code:2.7.1.2; kegg.reaction:R00299; hasTaxon taxonomy:10116; sabiork.reaction:793
    Vmax = 1.17222222e-10 moldivs; Km_SPC_1407_Cell = 0.01552 M;
  REAC_1: SPC_1405_Cell -> SPC_1374_Cell; KL_2616(SPC_1374_Cell, Kp_SPC_1374_Cell, Ks_SPC_1405_Cell, Keq, REAC_1_V, SPC_1405_Cell);  // modifiers: ENZ_140578_Cell; isVersionOf ec-code:5.3.1.9; kegg.reaction:R00771; hasTaxon taxonomy:10116; sabiork.reaction:1123
    Kp_SPC_1374_Cell = 0.0002 M; Ks_SPC_1405_Cell = 0.0002 M; Keq = 0.4; REAC_1_V = 4.5e-6 molswedgeonegwedgeone;
  REAC_2: SPC_34_Cell + SPC_1374_Cell -> SPC_35_Cell + SPC_1465_Cell; KL_4642(Kb_SPC_34_Cell, REAC_2_V, SPC_34_Cell, SPC_1374_Cell, Kia_SPC_1374_Cell, Ka_SPC_1374_Cell);  // modifiers: ENZ_141430_Cell; isVersionOf ec-code:2.7.1.11; kegg.reaction:R00756; hasTaxon taxonomy:10116; sabiork.reaction:1113
    Kb_SPC_34_Cell = 0.000111 M; REAC_2_V = 0.0014483623 katgwedgeone; Kia_SPC_1374_Cell = 1.2e-5 M; Ka_SPC_1374_Cell = 7.7e-5 M;

  // Unit definitions:
  unit moldivs = mole / second; moldivs is "mol/s";
  unit M = mole / litre;
  unit molswedgeonegwedgeone = mole / (gram * second); molswedgeonegwedgeone is "mol*s^(-1)*g^(-1)";
  unit katgwedgeone = katal / gram; katgwedgeone is "katal*g^(-1)";
end
