// SBML level 3 version 1

model test_6()
  // Koenig Test Model
  // Description
  // Test model.
  // The content of this model has been carefully created in a manual research effort.
  // This file has been produced by Koenig Matthias.
  // Terms of use
  // Copyright © 2016 Koenig Matthias.
  // Redistribution and use of any part of this model, with or without modification, are permitted provided that the following conditions are met:
  // Redistributions of this SBML file must retain the above copyright notice, this list of conditions and the following disclaimer.
  // Redistributions in a different form must reproduce the above copyright notice, this list of conditions and the following disclaimer in the documentation and/or other materials provided with the distribution.
  // This model is distributed in the hope that it will be useful, but WITHOUT ANY WARRANTY; without even the implied warranty of MERCHANTABILITY or FITNESS FOR A PARTICULAR PURPOSE.
  // model units - substance: mole, time: s, volume: m3, area: m2, length: m, extent: mole

  // Compartments:
  compartment ext = Vol_e; ext has m3; ext is "external";
  compartment cyto; cyto has m3; cyto is "cytosol";
  compartment pm = A_m; pm has m2; pm is "membrane";  // 2-D

  // Species:
  species c__gal in cyto = 0.00012; c__gal is "D-galactose";
  species $e__gal in ext = 3; e__gal is "D-galactose";

  // Parameters:
  x_cell = 2.5e-5 m; x_cell is "cell diameter";
  Vol_e = 1e-12 m3; Vol_e is "external volume";
  A_m = 1 m2; A_m is "membrane area";
  Vol_c = x_cell*x_cell*x_cell; Vol_c has m3; Vol_c is "cell volume";
  GLUT2_Vmax = 1e-13 mole_per_s;
  GLUT2_k_gal = 1 mM;
  GLUT2_keq = 1 dimensionless;

  // Assignment rules:
  cyto := Vol_c;

  // Reactions:
  e__GLUT2_GAL: $e__gal -> c__gal; GLUT2_Vmax/GLUT2_k_gal*(e__gal - c__gal/GLUT2_keq)/(1 + c__gal/GLUT2_k_gal + e__gal/GLUT2_k_gal); e__GLUT2_GAL is "galactose transport [e__]";

  // Unit definitions:
  unit Pa_s_per_m2 = pascal * second / metre^2;
  unit Pa_s_per_m3 = pascal * second / metre^3;
  unit Pa_s_per_m4 = pascal * second / metre^4;
  unit Pa = pascal;
  unit m_per_s = metre / second;
  unit per_m3 = 1 / metre^3;
  unit per_m2 = 1 / metre^2;
  unit mole_per_s = mole / second;
  unit m2_per_s = metre^2 / second;
  unit mole_per_s_per_mM2 = metre^6 / (mole * second);
  unit m3_per_skg = metre^3 / (kilogram * second);
  unit m2 = metre^2;
  unit mM_s = mole * second / metre^3;
  unit per_s = 1 / second;
  unit m3 = metre^3;
  unit mM = mole / metre^3;
  unit mole_per_s_per_mM = metre^3 / second;
  unit kg_per_m3 = kilogram / metre^3;
  unit per_mM = metre^3 / mole;
  unit m6_per_Pa2_s2 = metre^6 / (pascal^2 * second^2);
  unit kg = kilogram;
  unit m = metre;
  unit s = second;
  unit Pa_s = pascal * second;
  unit m3_per_s = metre^3 / second;
end
