// SBML level 3 version 1

model atp_balance_1(c, atp, adp)
  // model units - substance: mmole, time: second, volume: litre, area: m2, length: metre, extent: mmole

  // Compartments:
  compartment c = 1e-5 litre; c is "cell compartment";

  // Species:
  species atp in c = 3; atp is "ATP";
  species adp in c = 0.8; adp is "ADP";

  // Parameters:
  Vmax = 1e-6 mmole_per_s; Vmax is "Vmax ATPase";
  Km_atp = 0.1 mM; Km_atp is "Km ATP";
  a_sum has mM; a_sum is "ATP + ADP balance";

  // Assignment rules:
  a_sum := atp + adp;

  // Reactions:
  ATPASE: atp => adp; Vmax*(atp/(Km_atp + atp)); ATPASE is "ATP consumption";

  // Unit definitions:
  unit m2 = metre^2;
  unit mmole = 1e-3 mole;
  unit mM = 1e-3 mole / litre;
  unit mmole_per_s = 1e-3 mole / second;
end
