// SBML level 3 version 1

model tiny_example_3(c, glc, atp, adp)
  // Description
  // A minimal example in SBML format.
  // The content of this model has been carefully created in a manual research effort.
  // This file has been created by SBML team.
  // Terms of use
  // Copyright © 2019 SBML team.
  // Redistribution and use of any part of this model, with or without modification, are permitted provided that the following conditions are met:
  // Redistributions of this SBML file must retain the above copyright notice, this list of conditions and the following disclaimer.
  // Redistributions in a different form must reproduce the above copyright notice, this list of conditions and the following disclaimer in the documentation and/or other materials provided with the distribution.
  // This model is distributed in the hope that it will be useful, but WITHOUT ANY WARRANTY; without even the implied warranty of MERCHANTABILITY or FITNESS FOR A PARTICULAR PURPOSE.
  // GO:0008152
  // hasTaxon taxonomy:9606
  // model units - substance: mmole, time: second, volume: litre, area: m2, length: metre, extent: mmole

  // Compartments:
  compartment c = 1e-5 litre; c is "cell compartment";  // GO:0005623 FMA:68646

  // Species:
  species glc in c = 5; glc is "glucose";  // CHEBI:4167 kegg.compound:C00031
  species atp in c = 3; atp is "ATP";  // CHEBI:30616; isVersionOf kegg.compound:C00002
  species g6p in c = 0.1; g6p is "glucose-6-phosphate";  // CHEBI:58225/chebi; isVersionOf C00668:kegg.compound
  species adp in c = 0.8; adp is "ADP";  // CHEBI:456216; isVersionOf kegg.compound:C00008
  species $hydron in c = 0; hydron is "H+";  // CHEBI:15378 kegg.compound:C00080

  // Parameters:
  Vmax = 1e-6 mmole_per_s; Vmax is "Vmax Hexokinase";
  Km_glc = 0.5 mM; Km_glc is "Km glucose";
  Km_atp = 0.1 mM; Km_atp is "Km ATP";

  // Reactions:
  GK: glc + atp => g6p + adp + $hydron; Vmax*(glc/(Km_glc + glc))*(atp/(Km_atp + atp)); GK is "Glucokinase";  // isVersionOf ec-code:2.7.1.2 uniprot:P35557 kegg.reaction:R01092 rhea:36495

  // Unit definitions:
  unit m2 = metre^2;
  unit mmole = 1e-3 mole;
  unit mM = 1e-3 mole / litre;
  unit mmole_per_s = 1e-3 mole / second;
end
