// SBML level 3 version 1

function Function_for_Glucokinase(Km_atp, Km_glc, Vmax, atp, c, glc)
  Vmax*(glc/(Km_glc + glc))*(atp/(Km_atp + atp))/c;
end

model tiny_example_3()
  // Description
  // A minimal example in SBML format.
  // The content of this model has been carefully created in a manual research effort.
  // This file has been created by SBML team.
  // Terms of use
  // Copyright © 2019 SBML team.
  // Redistribution and use of any part of this model, with or without modification, are permitted provided that the following conditions are met:
  // Redistributions of this SBML file must retain the above copyright notice, this list of conditions and the following disclaimer.
  // Redistributions in a different form must reproduce the above copyright notice, this list of conditions and the following disclaimer in the documentation and/or other materials provided with the distribution.
  // This model is distributed in the hope that it will be useful, but WITHOUT ANY WARRANTY; without even the implied warranty of MERCHANTABILITY or FITNESS FOR A PARTICULAR PURPOSE.
  // GO:0008152
  // hasTaxon taxonomy:9606
  // hasTaxon taxonomy:9606
  // model units - substance: substance, time: time, volume: volume, area: area, length: length, extent: substance

  // Compartments:
  compartment c = 1e-5 volume; c is "cell compartment";  // FMA:68646; GO:0005623

  // Species:
  species glc in c = 5; glc is "glucose";  // CHEBI:4167; kegg.compound:C00031
  species atp in c = 3; atp is "ATP";  // CHEBI:30616; isVersionOf kegg.compound:C00002
  species g6p in c = 0.1; g6p is "glucose-6-phosphate";  // CHEBI:58225/chebi; isVersionOf C00668:kegg.compound
  species adp in c = 0.8; adp is "ADP";  // CHEBI:456216; isVersionOf kegg.compound:C00008
  species $hydron in c = 0; hydron is "H+";  // CHEBI:15378; kegg.compound:C00080

  // Parameters:
  Vmax = 1e-6 unit_0; Vmax is "Vmax Hexokinase";
  Km_glc = 0.5 unit_1; Km_glc is "Km glucose";
  Km_atp = 0.1 unit_1; Km_atp is "Km ATP";

  // Reactions:
  GK: glc + atp => g6p + adp + $hydron; c*Function_for_Glucokinase(Km_atp, Km_glc, Vmax, atp, c, glc); GK is "Glucokinase";  // isVersionOf rhea:36495; isVersionOf ec-code:2.7.1.2; isVersionOf kegg.reaction:R01092; isVersionOf uniprot:P35557

  // Unit definitions:
  unit m2 = metre^2;
  unit mmole = 1e-3 mole;
  unit mM = 1e-3 mole / litre;
  unit mmole_per_s = 1e-3 mole / second;
  unit length = metre;
  unit area = metre^2;
  unit volume = litre;
  unit time = second;
  unit substance = 1e-3 mole;
  unit unit_0 = 1e-3 mole / second; unit_0 is "mmol/s";
  unit unit_1 = 1e-3 mole / litre; unit_1 is "mmol/l";
end
