// SBML level 3 version 1

model diauxic_fba(EX_Ac, EX_Glcxt, EX_O2, EX_X, lb_EX_Ac, lb_EX_Glcxt, lb_EX_O2, lb_EX_X, ub_EX_Ac, ub_EX_Glcxt, ub_EX_O2, ub_EX_X)
  // FBA submodel (diauxic_fba)
  // Diauxic Growth Model
  // Model version: 6
  // Description
  // Dynamic Flux Balance Analysis of Diauxic Growth in Escherichia coli
  // The key variables in the mathematical model of the metabolic network are the glucose concentration (Glcxt), the acetate concentration (Ac), the biomass concentration (X), and the oxygen concentration (O2) in the gas phase.
  // This file has been produced by Matthias Koenig.
  // Terms of use
  // Copyright © 2017 Matthias Koenig
  // Redistribution and use of any part of this model, with or without modification, are permitted provided that the following conditions are met:
  // Redistributions of this SBML file must retain the above copyright notice, this list of conditions and the following disclaimer.
  // Redistributions in a different form must reproduce the above copyright notice, this list of conditions and the following disclaimer in the documentation and/or other materials provided with the distribution.
  // This model is distributed in the hope that it will be useful, but WITHOUT ANY WARRANTY; without even the implied warranty of MERCHANTABILITY or FITNESS FOR A PARTICULAR PURPOSE.
  // model units - substance: mmol, time: h, volume: l, area: m2, length: m, extent: mmol

  // Compartments:
  compartment bioreactor = 1 l;

  // Species:
  species Glcxt in bioreactor = 10.8; Glcxt is "glucose";
  species Ac in bioreactor = 0.4; Ac is "acetate";
  species O2 in bioreactor = 0.21; O2 is "oxygen";
  species X in bioreactor = 0.001; X is "biomass";

  // Parameters:
  zero = 0 mmol_per_h; zero is "zero bound";
  lb_default = -1000 mmol_per_h; lb_default is "default lower bound";
  ub_default = 1000 mmol_per_h; ub_default is "default upper bound";
  lb_EX_Ac = -1000 mmol_per_h;
  ub_EX_Ac = 1000 mmol_per_h;
  lb_EX_Glcxt = -1000 mmol_per_h;
  ub_EX_Glcxt = 1000 mmol_per_h;
  lb_EX_O2 = -1000 mmol_per_h;
  ub_EX_O2 = 1000 mmol_per_h;
  lb_EX_X = -1000 mmol_per_h;
  ub_EX_X = 1000 mmol_per_h;

  // Reactions:
  EX_O2: O2 => ; ; EX_O2 is "O2 exchange";
  EX_Glcxt: Glcxt => ; ; EX_Glcxt is "Glcxt exchange";
  EX_Ac: Ac -> ; ; EX_Ac is "Ac exchange";
  EX_X: X => ; ; EX_X is "biomass exchange";
  v1_39_43_Ac_35_O2_X: 39.43 Ac + 35 O2 => X; ; v1_39_43_Ac_35_O2_X is "v1 (39.43 Ac + 35 O2 -> X)";
  v2_9_46_Glcxt_12_92_O2_X: 9.46 Glcxt + 12.92 O2 => X; ; v2_9_46_Glcxt_12_92_O2_X is "v2 (9.46 Glcxt + 12.92 O2 -> X)";
  v3_9_84_Glcxt_12_73_O2_1_24_Ac_X: 9.84 Glcxt + 12.73 O2 => X + 1.24 Ac; ; v3_9_84_Glcxt_12_73_O2_1_24_Ac_X is "v3 (9.84 Glcxt + 12.73 O2 -> 1.24 Ac + X)";
  v4_19_23_Glcxt_12_12_Ac_X: 19.23 Glcxt => X + 12.12 Ac; ; v4_19_23_Glcxt_12_12_Ac_X is "v4 (19.23 Glcxt -> 12.12 Ac + X)";

  // Unit definitions:
  unit h = 3600 second;
  unit g = gram;
  unit m = metre;
  unit m2 = metre^2;
  unit l = litre;
  unit mmol = 1e-3 mole;
  unit per_h = 1 / (3600 second);
  unit mmol_per_h = 1e-3 mole / (3600 second);
  unit mmol_per_l = 1e-3 mole / litre;
  unit l_per_mmol = litre / (1e-3 mole);
  unit g_per_l = gram / litre;
  unit g_per_mmol = gram / (1e-3 mole);
end

function max(x, y)
  piecewise(x, x > y, y);
end
max is "minimum of arguments";

function min(x, y)
  piecewise(x, x < y, y);
end
min is "maximum of arguments";

model diauxic_bounds(dt, bioreactor, Glcxt, Ac, O2, X, lb_EX_Ac, ub_EX_Ac, lb_EX_Glcxt, ub_EX_Glcxt, lb_EX_O2, ub_EX_O2, lb_EX_X, ub_EX_X)
  // ODE bounds submodel
  // Diauxic Growth Model
  // Model version: 6
  // Description
  // Dynamic Flux Balance Analysis of Diauxic Growth in Escherichia coli
  // The key variables in the mathematical model of the metabolic network are the glucose concentration (Glcxt), the acetate concentration (Ac), the biomass concentration (X), and the oxygen concentration (O2) in the gas phase.
  // This file has been produced by Matthias Koenig.
  // Terms of use
  // Copyright © 2017 Matthias Koenig
  // Redistribution and use of any part of this model, with or without modification, are permitted provided that the following conditions are met:
  // Redistributions of this SBML file must retain the above copyright notice, this list of conditions and the following disclaimer.
  // Redistributions in a different form must reproduce the above copyright notice, this list of conditions and the following disclaimer in the documentation and/or other materials provided with the distribution.
  // This model is distributed in the hope that it will be useful, but WITHOUT ANY WARRANTY; without even the implied warranty of MERCHANTABILITY or FITNESS FOR A PARTICULAR PURPOSE.
  // model units - substance: mmol, time: h, volume: l, area: m2, length: m, extent: mmol

  // Compartments:
  compartment bioreactor = 1 l;

  // Species:
  species Glcxt in bioreactor = 10.8; Glcxt is "glucose";
  species Ac in bioreactor = 0.4; Ac is "acetate";
  species O2 in bioreactor = 0.21; O2 is "oxygen";
  species X in bioreactor = 0.001; X is "biomass";

  // Parameters:
  dt = 0.1 h; dt is "fba timestep";
  zero = 0 mmol_per_h; zero is "zero bound";
  lb_default = -1000 mmol_per_h; lb_default is "default lower bound";
  ub_default = 1000 mmol_per_h; ub_default is "default upper bound";
  lb_EX_Ac has mmol_per_h;
  ub_EX_Ac = 1000 mmol_per_h;
  lb_EX_Glcxt has mmol_per_h;
  ub_EX_Glcxt = 1000 mmol_per_h;
  lb_EX_O2 has mmol_per_h;
  ub_EX_O2 = 1000 mmol_per_h;
  lb_EX_X has mmol_per_h;
  ub_EX_X = 1000 mmol_per_h;
  lb_kin_EX_Glcxt has mmol_per_h;
  lb_kin_EX_O2 has mmol_per_h;
  Vmax_EX_O2 = 15 mmol_per_h;
  Vmax_EX_Glcxt = 10 mmol_per_h;
  Km_EX_Glcxt = 0.015 mmol_per_l; Km_EX_Glcxt is "Km_vGlcxt";

  // Assignment rules:
  lb_kin_EX_Glcxt := -Vmax_EX_Glcxt*Glcxt/(Km_EX_Glcxt + Glcxt);
  lb_kin_EX_O2 := -Vmax_EX_O2;
  lb_EX_Ac := max(lb_default, -Ac*bioreactor/dt);
  lb_EX_Glcxt := max(lb_kin_EX_Glcxt, -Glcxt*bioreactor/dt);
  lb_EX_O2 := max(lb_kin_EX_O2, -O2*bioreactor/dt);
  lb_EX_X := max(lb_default, -X*bioreactor/dt);

  // Unit definitions:
  unit h = 3600 second;
  unit g = gram;
  unit m = metre;
  unit m2 = metre^2;
  unit l = litre;
  unit mmol = 1e-3 mole;
  unit per_h = 1 / (3600 second);
  unit mmol_per_h = 1e-3 mole / (3600 second);
  unit mmol_per_l = 1e-3 mole / litre;
  unit l_per_mmol = litre / (1e-3 mole);
  unit g_per_l = gram / litre;
  unit g_per_mmol = gram / (1e-3 mole);
end

model diauxic_update(EX_Glcxt, EX_Ac, EX_O2, EX_X, Glcxt, Ac, O2, X, bioreactor)
  // ODE metabolite update
  // Diauxic Growth Model
  // Model version: 6
  // Description
  // Dynamic Flux Balance Analysis of Diauxic Growth in Escherichia coli
  // The key variables in the mathematical model of the metabolic network are the glucose concentration (Glcxt), the acetate concentration (Ac), the biomass concentration (X), and the oxygen concentration (O2) in the gas phase.
  // This file has been produced by Matthias Koenig.
  // Terms of use
  // Copyright © 2017 Matthias Koenig
  // Redistribution and use of any part of this model, with or without modification, are permitted provided that the following conditions are met:
  // Redistributions of this SBML file must retain the above copyright notice, this list of conditions and the following disclaimer.
  // Redistributions in a different form must reproduce the above copyright notice, this list of conditions and the following disclaimer in the documentation and/or other materials provided with the distribution.
  // This model is distributed in the hope that it will be useful, but WITHOUT ANY WARRANTY; without even the implied warranty of MERCHANTABILITY or FITNESS FOR A PARTICULAR PURPOSE.
  // model units - substance: mmol, time: h, volume: l, area: m2, length: m, extent: mmol

  // Compartments:
  compartment bioreactor = 1 l;

  // Species:
  species Glcxt in bioreactor = 10.8; Glcxt is "glucose";
  species Ac in bioreactor = 0.4; Ac is "acetate";
  species O2 in bioreactor = 0.21; O2 is "oxygen";
  species X in bioreactor = 0.001; X is "biomass";

  // Parameters:
  EX_Ac = 1 mmol_per_h; EX_Ac is "Ac exchange (FBA flux)";
  EX_Glcxt = 1 mmol_per_h; EX_Glcxt is "Glcxt exchange (FBA flux)";
  EX_O2 = 1 mmol_per_h; EX_O2 is "O2 exchange (FBA flux)";
  EX_X = 1 mmol_per_h; EX_X is "X exchange (FBA flux)";

  // Reactions:
  update_Glcxt: Glcxt -> ; -EX_Glcxt*X*1 l_per_mmol;  // modifiers: X
  update_Ac: Ac -> ; -EX_Ac*X*1 l_per_mmol;  // modifiers: X
  update_O2: O2 -> ; -EX_O2*X*1 l_per_mmol;  // modifiers: X
  update_X: X -> ; -EX_X*X*1 l_per_mmol;

  // Unit definitions:
  unit h = 3600 second;
  unit g = gram;
  unit m = metre;
  unit m2 = metre^2;
  unit l = litre;
  unit mmol = 1e-3 mole;
  unit per_h = 1 / (3600 second);
  unit mmol_per_h = 1e-3 mole / (3600 second);
  unit mmol_per_l = 1e-3 mole / litre;
  unit l_per_mmol = litre / (1e-3 mole);
  unit g_per_l = gram / litre;
  unit g_per_mmol = gram / (1e-3 mole);
end

model diauxic_top(dt)
  // Top level model
  // Diauxic Growth Model
  // Model version: 6
  // Description
  // Dynamic Flux Balance Analysis of Diauxic Growth in Escherichia coli
  // The key variables in the mathematical model of the metabolic network are the glucose concentration (Glcxt), the acetate concentration (Ac), the biomass concentration (X), and the oxygen concentration (O2) in the gas phase.
  // This file has been produced by Matthias Koenig.
  // Terms of use
  // Copyright © 2017 Matthias Koenig
  // Redistribution and use of any part of this model, with or without modification, are permitted provided that the following conditions are met:
  // Redistributions of this SBML file must retain the above copyright notice, this list of conditions and the following disclaimer.
  // Redistributions in a different form must reproduce the above copyright notice, this list of conditions and the following disclaimer in the documentation and/or other materials provided with the distribution.
  // This model is distributed in the hope that it will be useful, but WITHOUT ANY WARRANTY; without even the implied warranty of MERCHANTABILITY or FITNESS FOR A PARTICULAR PURPOSE.
  // model units - substance: mmol, time: h, volume: l, area: m2, length: m, extent: mmol

  // Sub-modules:
  bounds: diauxic_bounds();
  fba: diauxic_fba();
  update: diauxic_update();

  // Compartments:
  compartment bioreactor = 1 l; update.bioreactor is bioreactor; bounds.bioreactor is bioreactor;

  // Species:
  species Glcxt in bioreactor = 10.8; Glcxt is "glucose"; update.Glcxt is Glcxt; bounds.Glcxt is Glcxt;
  species Ac in bioreactor = 0.4; Ac is "acetate"; update.Ac is Ac; bounds.Ac is Ac;
  species O2 in bioreactor = 0.21; O2 is "oxygen"; update.O2 is O2; bounds.O2 is O2;
  species X in bioreactor = 0.001; X is "biomass"; update.X is X; bounds.X is X;
  species dummy_S in bioreactor = 0;

  // Parameters:
  dt = 0.1 h; dt is "fba timestep"; bounds.dt is dt;
  Y has g_per_l; Y is "biomass [g_per_l]";
  O2_ref = 0.21 mmol_per_l; O2_ref is "O2 reference";
  kLa = 7.5 per_h; kLa is "O2 mass transfer";
  EX_Glcxt has mmol_per_h; update.EX_Glcxt is EX_Glcxt;
  EX_Ac has mmol_per_h; update.EX_Ac is EX_Ac;
  EX_O2 has mmol_per_h; update.EX_O2 is EX_O2;
  EX_X has mmol_per_h; update.EX_X is EX_X;
  lb_EX_Ac = -1000 mmol_per_h; fba.lb_EX_Ac is lb_EX_Ac; bounds.lb_EX_Ac is lb_EX_Ac;
  ub_EX_Ac = 1000 mmol_per_h; fba.ub_EX_Ac is ub_EX_Ac; bounds.ub_EX_Ac is ub_EX_Ac;
  lb_EX_Glcxt = -1000 mmol_per_h; fba.lb_EX_Glcxt is lb_EX_Glcxt; bounds.lb_EX_Glcxt is lb_EX_Glcxt;
  ub_EX_Glcxt = 1000 mmol_per_h; fba.ub_EX_Glcxt is ub_EX_Glcxt; bounds.ub_EX_Glcxt is ub_EX_Glcxt;
  lb_EX_O2 = -1000 mmol_per_h; fba.lb_EX_O2 is lb_EX_O2; bounds.lb_EX_O2 is lb_EX_O2;
  ub_EX_O2 = 1000 mmol_per_h; fba.ub_EX_O2 is ub_EX_O2; bounds.ub_EX_O2 is ub_EX_O2;
  lb_EX_X = -1000 mmol_per_h; fba.lb_EX_X is lb_EX_X; bounds.lb_EX_X is lb_EX_X;
  ub_EX_X = 1000 mmol_per_h; fba.ub_EX_X is ub_EX_X; bounds.ub_EX_X is ub_EX_X;

  // Assignment rules:
  EX_Glcxt := dummy_EX_Glcxt;
  EX_Ac := dummy_EX_Ac;
  EX_O2 := dummy_EX_O2;
  EX_X := dummy_EX_X;
  Y := 1 g_per_mmol*X;

  // Reactions:
  dummy_EX_Glcxt: => dummy_S; ; dummy_EX_Glcxt is "EX_Glcxt dummy"; fba.EX_Glcxt is dummy_EX_Glcxt;
  dummy_EX_O2: => dummy_S; ; dummy_EX_O2 is "EX_O2 dummy"; fba.EX_O2 is dummy_EX_O2;
  dummy_EX_Ac: => dummy_S; ; dummy_EX_Ac is "EX_Ac dummy"; fba.EX_Ac is dummy_EX_Ac;
  dummy_EX_X: => dummy_S; ; dummy_EX_X is "EX_X dummy"; fba.EX_X is dummy_EX_X;
  vO2_transfer: -> O2; kLa*(O2_ref - O2)*bioreactor; vO2_transfer is "oxygen transfer";

  // Unit definitions:
  unit h = 3600 second; bounds.h is h; fba.h is h; update.h is h;
  unit g = gram; bounds.g is g; fba.g is g; update.g is g;
  unit m = metre; bounds.m is m; fba.m is m; update.m is m;
  unit m2 = metre^2; bounds.m2 is m2; fba.m2 is m2; update.m2 is m2;
  unit l = litre; bounds.l is l; fba.l is l; update.l is l;
  unit mmol = 1e-3 mole; bounds.mmol is mmol; fba.mmol is mmol; update.mmol is mmol;
  unit per_h = 1 / (3600 second);
  unit mmol_per_h = 1e-3 mole / (3600 second); bounds.mmol_per_h is mmol_per_h; fba.mmol_per_h is mmol_per_h; update.mmol_per_h is mmol_per_h;
  unit mmol_per_l = 1e-3 mole / litre; bounds.mmol_per_l is mmol_per_l; fba.mmol_per_l is mmol_per_l; update.mmol_per_l is mmol_per_l;
  unit l_per_mmol = litre / (1e-3 mole);
  unit g_per_l = gram / litre; bounds.g_per_l is g_per_l; fba.g_per_l is g_per_l; update.g_per_l is g_per_l;
  unit g_per_mmol = gram / (1e-3 mole); bounds.g_per_mmol is g_per_mmol; fba.g_per_mmol is g_per_mmol; update.g_per_mmol is g_per_mmol;
end
