// SBML level 3 version 1

model caffeine_pkpd_2()
  // PKPD model for clearance of caffeine
  // Description
  // This model is a physiologically based pharmacokinetic model (PKPD) encoded in SBML format for the clearance of caffeine by the human body.
  // The content of this model has been carefully created in a manual research effort.
  // This file has been created by Matthias Koenig.
  // Terms of use
  // Copyright © 2016 Matthias Koenig.
  // Redistribution and use of any part of this model, with or without modification, are permitted provided that the following conditions are met:
  // Redistributions of this SBML file must retain the above copyright notice, this list of conditions and the following disclaimer.
  // Redistributions in a different form must reproduce the above copyright notice, this list of conditions and the following disclaimer in the documentation and/or other materials provided with the distribution.
  // This model is distributed in the hope that it will be useful, but WITHOUT ANY WARRANTY; without even the implied warranty of MERCHANTABILITY or FITNESS FOR A PARTICULAR PURPOSE.
  // model units - substance: mg, time: h, volume: litre, area: m2, length: m, extent: mg

  // Compartments:
  compartment Vre; Vre has litre;
  compartment Vgu; Vgu has litre;
  compartment Vki; Vki has litre;
  compartment Vli; Vli has litre;
  compartment Vlu; Vlu has litre;
  compartment Vsp; Vsp has litre;
  compartment Vve; Vve has litre;
  compartment Var; Var has litre;
  compartment Vpl; Vpl has litre;
  compartment Vplas_ven; Vplas_ven has litre;
  compartment Vplas_art; Vplas_art has litre;

  // Parameters:
  BW = 70 kg;
  CO = 108.33 ml_per_s;
  QC has litre_per_h;
  FVre = 0.9049 litre_per_kg;
  FVgu = 0.0171 litre_per_kg;
  FVki = 0.0044 litre_per_kg;
  FVli = 0.021 litre_per_kg;
  FVlu = 0.0076 litre_per_kg;
  FVsp = 0.0026 litre_per_kg;
  FVve = 0.0514 litre_per_kg;
  FVar = 0.0257 litre_per_kg;
  FVpl = 0.0424 litre_per_kg;
  FQgu = 0.146462 dimensionless;
  FQki = 0.19 dimensionless;
  FQh = 0.215385 dimensionless;
  FQlu = 1 dimensionless;
  FQsp = 0.017231 dimensionless;
  FQre = 0.594615 dimensionless;
  MPPGL = 45 mg_per_g;
  Kpgu_caf = 1 dimensionless;
  Kpki_caf = 1 dimensionless;
  Kpli_caf = 1 dimensionless;
  Kplu_caf = 1 dimensionless;
  Kpsp_caf = 1 dimensionless;
  Kpre_caf = 0.3 dimensionless;
  Kpgu_px = 1 dimensionless;
  Kpki_px = 1 dimensionless;
  Kpli_px = 1 dimensionless;
  Kplu_px = 1 dimensionless;
  Kpsp_px = 1 dimensionless;
  Kpre_px = 0.3 dimensionless;
  Agu_caf = 0 mg;
  Aki_caf = 0 mg;
  Ali_caf = 0 mg;
  Alu_caf = 0 mg;
  Asp_caf = 0 mg;
  Are_caf = 0 mg;
  Aar_caf = 0 mg;
  Agu_px = 0 mg;
  Aki_px = 0 mg;
  Ali_px = 0 mg;
  Alu_px = 0 mg;
  Asp_px = 0 mg;
  Are_px = 0 mg;
  Aar_px = 0 mg;
  Ave_caf = IVDOSE_caf; Ave_caf has mg;
  D_caf = PODOSE_caf; D_caf has mg;
  DCL_caf = 0 mg;
  IVDOSE_caf = 0 mg;
  PODOSE_caf = 100 mg;
  Ave_px = IVDOSE_px; Ave_px has mg;
  D_px = PODOSE_px; D_px has mg;
  DCL_px = 0 mg;
  IVDOSE_px = 0 mg;
  PODOSE_px = 0 mg;
  Ka_caf = 2.5 per_h;
  F_caf = 1 dimensionless;
  Ka_px = 2.5 per_h;
  F_px = 1 dimensionless;
  fup_caf = 1 dimensionless;
  BP_caf = 1 dimensionless;
  fumic_caf = 1 dimensionless;
  fup_px = 1 dimensionless;
  BP_px = 1 dimensionless;
  fumic_px = 1 dimensionless;
  HLM_CLint_caf = 1.5 mulitre_per_min_mg;
  HLM_CLint_px = 1.5 mulitre_per_min_mg;
  CLrenal_caf = 0 litre_per_h;
  CLrenal_px = 0 litre_per_h;
  Qgu has litre_per_h;
  Qki has litre_per_h;
  Qh has litre_per_h;
  Qha has litre_per_h;
  Qlu has litre_per_h;
  Qsp has litre_per_h;
  Qre has litre_per_h;
  Cgu_caf has mg_per_litre;
  Cki_caf has mg_per_litre;
  Cli_caf has mg_per_litre;
  Clu_caf has mg_per_litre;
  Csp_caf has mg_per_litre;
  Cre_caf has mg_per_litre;
  Cve_caf has mg_per_litre;
  Car_caf has mg_per_litre;
  Cgu_px has mg_per_litre;
  Cki_px has mg_per_litre;
  Cli_px has mg_per_litre;
  Clu_px has mg_per_litre;
  Csp_px has mg_per_litre;
  Cre_px has mg_per_litre;
  Cve_px has mg_per_litre;
  Car_px has mg_per_litre;
  Cpl_ve_caf has mg_per_litre;
  Cli_free_caf has mg_per_litre;
  Cki_free_caf has mg_per_litre;
  CLliv_caf has litre_per_h;
  vliv_caf has mg_per_h;
  Cpl_ve_px has mg_per_litre;
  Cli_free_px has mg_per_litre;
  Cki_free_px has mg_per_litre;
  CLliv_px has litre_per_h;
  vliv_px has mg_per_h;
  Absorption_caf has mg_per_h;
  Venous_caf has mg_per_h;
  Absorption_px has mg_per_h;
  Venous_px has mg_per_h;
  Abody_caf has mg;
  Abody_px has mg;

  // Assignment rules:
  Vgu := BW*FVgu;
  Vki := BW*FVki;
  Vli := BW*FVli;
  Vlu := BW*FVlu;
  Vsp := BW*FVsp;
  Vve := BW*FVve;
  Var := BW*FVar;
  Vpl := BW*FVpl;
  Vre := BW*FVre;
  Vplas_ven := Vpl*Vve/(Vve + Var);
  Vplas_art := Vpl*Var/(Vve + Var);
  QC := CO/(1000 ml_per_litre)*3600 s_per_h;
  Qgu := QC*FQgu;
  Qki := QC*FQki;
  Qh := QC*FQh;
  Qha := Qh - Qgu - Qsp;
  Qlu := QC*FQlu;
  Qsp := QC*FQsp;
  Qre := QC*FQre;
  Cgu_caf := Agu_caf/Vgu;
  Cki_caf := Aki_caf/Vki;
  Cli_caf := Ali_caf/Vli;
  Clu_caf := Alu_caf/Vlu;
  Csp_caf := Asp_caf/Vsp;
  Cre_caf := Are_caf/Vre;
  Cve_caf := Ave_caf/Vve;
  Car_caf := Aar_caf/Var;
  Cgu_px := Agu_px/Vgu;
  Cki_px := Aki_px/Vki;
  Cli_px := Ali_px/Vli;
  Clu_px := Alu_px/Vlu;
  Csp_px := Asp_px/Vsp;
  Cre_px := Are_px/Vre;
  Cve_px := Ave_px/Vve;
  Car_px := Aar_px/Var;
  Cpl_ve_caf := Cve_caf/BP_caf;
  Cli_free_caf := Cli_caf*fup_caf;
  Cki_free_caf := Cki_caf*fup_caf;
  CLliv_caf := HLM_CLint_caf/fumic_caf*MPPGL*Vli*60 min_per_h/(1000 mulitre_per_g);
  vliv_caf := Cli_free_caf*CLliv_caf;
  Cpl_ve_px := Cve_px/BP_px;
  Cli_free_px := Cli_px*fup_px;
  Cki_free_px := Cki_px*fup_px;
  CLliv_px := HLM_CLint_px/fumic_px*MPPGL*Vli*60 min_per_h/(1000 mulitre_per_g);
  vliv_px := Cli_free_px*CLliv_px;
  Absorption_caf := Ka_caf*D_caf*F_caf;
  Venous_caf := Qki*(Cki_caf/Kpki_caf)*BP_caf + Qh*(Cli_caf/Kpli_caf)*BP_caf + Qre*(Cre_caf/Kpre_caf)*BP_caf;
  Absorption_px := Ka_px*D_px*F_px;
  Venous_px := Qki*(Cki_px/Kpki_px)*BP_px + Qh*(Cli_px/Kpli_px)*BP_px + Qre*(Cre_px/Kpre_px)*BP_px;
  Abody_caf := Aar_caf + Agu_caf + Aki_caf + Ali_caf + Alu_caf + Asp_caf + Are_caf + Ave_caf;
  Abody_px := Aar_px + Agu_px + Aki_px + Ali_px + Alu_px + Asp_px + Are_px + Ave_px;

  // Rate rules:
  Agu_caf' = Absorption_caf + Qgu*(Car_caf - Cgu_caf/Kpgu_caf*BP_caf);
  Aki_caf' = Qki*(Car_caf - Cki_caf/Kpki_caf*BP_caf) - CLrenal_caf*Cki_free_caf;
  Ali_caf' = Qha*Car_caf + Qgu*(Cgu_caf/Kpgu_caf)*BP_caf + Qsp*(Csp_caf/Kpsp_caf)*BP_caf - Qh*(Cli_caf/Kpli_caf)*BP_caf - vliv_caf;
  Alu_caf' = Qlu*Cve_caf - Qlu*(Clu_caf/Kplu_caf)*BP_caf;
  Asp_caf' = Qsp*(Car_caf - Csp_caf/Kpsp_caf*BP_caf);
  Ave_caf' = Venous_caf - Qlu*Cve_caf;
  Aar_caf' = Qlu*(Clu_caf/Kplu_caf)*BP_caf - Qlu*Car_caf;
  Are_caf' = Qre*(Car_caf - Cre_caf/Kpre_caf*BP_caf);
  D_caf' = -Absorption_caf;
  DCL_caf' = CLrenal_caf*Cki_free_caf + Cli_free_caf*CLliv_caf;
  Agu_px' = Absorption_px + Qgu*(Car_px - Cgu_px/Kpgu_px*BP_px);
  Aki_px' = Qki*(Car_px - Cki_px/Kpki_px*BP_px) - CLrenal_px*Cki_free_px;
  Ali_px' = Qha*Car_px + Qgu*(Cgu_px/Kpgu_px)*BP_px + Qsp*(Csp_px/Kpsp_px)*BP_px - Qh*(Cli_px/Kpli_px)*BP_px + vliv_caf - vliv_px;
  Alu_px' = Qlu*Cve_px - Qlu*(Clu_px/Kplu_px)*BP_px;
  Asp_px' = Qsp*(Car_px - Csp_px/Kpsp_px*BP_px);
  Ave_px' = Venous_px - Qlu*Cve_px;
  Aar_px' = Qlu*(Clu_px/Kplu_px)*BP_px - Qlu*Car_px;
  Are_px' = Qre*(Car_px - Cre_px/Kpre_px*BP_px);
  D_px' = -Absorption_px;
  DCL_px' = CLrenal_px*Cki_free_px - vliv_px;

  // Unit definitions:
  unit h = 3600 second;
  unit kg = 1000 gram;
  unit m = metre;
  unit m2 = metre^2;
  unit per_h = 1 / (3600 second);
  unit mg = 1e-3 gram;
  unit mg_per_litre = 1e-3 gram / litre;
  unit mg_per_g = 1e-3 gram / gram;
  unit mg_per_h = 1e-3 gram / (3600 second);
  unit litre_per_h = litre / (3600 second);
  unit litre_per_kg = litre / (1000 gram);
  unit mulitre_per_min_mg = 1e-6 litre / (60 second * 1e-3 gram);
  unit ml_per_s = 1e-3 litre / second;
  unit s_per_h = second / (3600 second);
  unit min_per_h = 60 second / (3600 second);
  unit ml_per_litre = 1e-3 litre / litre;
  unit mulitre_per_g = 1e-6 litre / gram;
end
