// SBML level 3 version 1

function max(x, y)
  piecewise(x, x > y, y);
end
max is "minimum";

function min(x, y)
  piecewise(x, x < y, y);
end
min is "maximum";

function heav(x)
  piecewise(0, x < 0, 0.5, x == 0, 1, x > 0, 0);
end
heav is "heavyside";

function mod(x, y)
  piecewise(x - y*ceil(x/y), xor(x < 0, y < 0), x - y*floor(x/y));
end
mod is "modulo";

function am(v)
  0.1*(25 - v)/(exp((25 - v)/10) - 1);
end

function bm(v)
  4*exp(-v/18);
end

function ah(v)
  0.07*exp(-v/20);
end

function bh(v)
  1/(exp((30 - v)/10) + 1);
end

function an(v)
  0.01*(10 - v)/(exp((10 - v)/10) - 1);
end

function bn(v)
  0.125*exp(-v/80);
end

function vex(t, freq, vext)
  vext*sin(2*pi*(freq/1000)*t);
end

model main()
  // XPP model
  // This model was converted from XPP ode format to SBML using sbmlutils-0.4.9.
  // # HH-ext.ode: an XppAut file for the Hodgkin-Huxley equations
  // # + strength of external electrical field
  // # time in msec, voltage in mV and frequency in Hz
  // # initial conditions
  // init V=0, m=0.052, h=0.596, n=0.317
  // # the parameters
  // param vext=8, iapp=1, freq=0.3
  // param VNa=115,VK=-12,VL=10.599, gNa=120
  // param gK=36, gL=0.3, cm=1
  // # time constants and steady state functions for gating variables
  // am(v)=0.1*(25-v)/(exp((25-v)/10)-1)
  // bm(v)=4*exp(-v/18)
  // ah(v)=0.07*exp(-v/20)
  // bh(v)=1/(exp((30-v)/10)+1)
  // an(v)=0.01*(10-v)/(exp((10-v)/10)-1)
  // bn(v)=0.125*exp(-v/80)
  // vex(t)=vext*(sin(2*pi*(freq/1000)*t))
  // ik=gK*n^4*(v+vex(t)-VK)
  // ina=gNa*m^3*h*(v+vex(t)-VNa)
  // il=gL*(v+vex(t)-VL)
  // # the equations
  // v'=(-ik-ina-il+iapp)/cm
  // m'=(am(v)*(1-m)-bm(v)*m)
  // n'=(an(v)*(1-n)-bn(v)*n)
  // h'=(ah(v)*(1-h)-bh(v)*h)
  // aux vexf=vex(t)
  // # set xpp parameters
  // @ total=25000, xp=t, yp=v, xlo=0, xhi=25000, ylo=-20, yhi=120, bounds=10000000, dt=0.01
  // @ maxstor=10000000
  // done
  // This file has been produced by sbmlutils.
  // Terms of use
  // Copyright © 2017 Matthias Koenig
  // Redistribution and use of any part of this model, with or without modification, are permitted provided that the following conditions are met:
  // Redistributions of this SBML file must retain the above copyright notice, this list of conditions and the following disclaimer.
  // Redistributions in a different form must reproduce the above copyright notice, this list of conditions and the following disclaimer in the documentation and/or other materials provided with the distribution.
  // This model is distributed in the hope that it will be useful, but WITHOUT ANY WARRANTY; without even the implied warranty of MERCHANTABILITY or FITNESS FOR A PARTICULAR PURPOSE.

  // Parameters:
  V = 0; V is "V = 0";
  m = 0.052; m is "m = 0.052";
  h = 0.596; h is "h = 0.596";
  n = 0.317; n is "n = 0.317";
  vext = 8; vext is "vext = 8";
  iapp = 1; iapp is "iapp = 1";
  freq = 0.3; freq is "freq = 0.3";
  VNa = 115; VNa is "VNa = 115";
  VK = -12; VK is "VK = -12";
  VL = 10.599; VL is "VL = 10.599";
  gNa = 120; gNa is "gNa = 120";
  gK = 36; gK is "gK = 36";
  gL = 0.3; gL is "gL = 0.3";
  cm = 1; cm is "cm = 1";
  v = NaN; v has dimensionless;
  ik has dimensionless;
  ina has dimensionless;
  il has dimensionless;
  vexf has dimensionless;
  t has dimensionless; t is "model time";

  // Assignment rules:
  ik := gK*n^4*(v + vex(t, freq, vext) - VK);
  ina := gNa*m^3*h*(v + vex(t, freq, vext) - VNa);
  il := gL*(v + vex(t, freq, vext) - VL);
  vexf := vex(t, freq, vext);
  t := time;

  // Rate rules:
  v' = (-ik - ina - il + iapp)/cm;
  m' = am(v)*(1 - m) - bm(v)*m;
  n' = an(v)*(1 - n) - bn(v)*n;
  h' = ah(v)*(1 - h) - bh(v)*h;
end
