// SBML level 3 version 1

function max(x, y)
  piecewise(x, x > y, y);
end
max is "minimum";

function min(x, y)
  piecewise(x, x < y, y);
end
min is "maximum";

function heav(x)
  piecewise(0, x < 0, 0.5, x == 0, 1, x > 0, 0);
end
heav is "heavyside";

function mod(x, y)
  piecewise(x - y*ceil(x/y), xor(x < 0, y < 0), x - y*floor(x/y));
end
mod is "modulo";

model main()
  // XPP model
  // This model was converted from XPP ode format to SBML using sbmlutils-0.4.10.
  // # PLOS Computational Biology, Riz et al., 2013
  // # human beta-cell model including SK-channels and Ca2+ dynamics
  // # Default parameters as in Fig. 1A
  // # Differential equations
  // V'= -(ISK + IBK + IKv + IHERG + INa + ICaL + ICaPQ + ICaT + IKatp*(1+sigma*q) + Ileak + Igabar)
  // # use for stochastic simulation in Fig 1E
  // wiener q
  // par sigma=0
  // mkv'=(mkvinf-mkv)/taumkv
  // mBK'=(mBKinf-mBK)/taumBK
  // hNa'=(hNainf-hNa)/tauhNa
  // hCaL'=(hCaLinf-hCaL)/tauhCaL
  // hCaT'=(hCaTinf-hCaT)/tauhCaT
  // mHERG'=(mHERGinf-mHERG)/taumHERG
  // hHERG'=(hHERGinf-hHERG)/tauhHERG
  // # Differential equations for Ca2+ dynamics
  // Cam'=f*( (JCaL+JCaPQ+JCaT) - B*(Cam-Cac)/Volm*Volc - L/Volm*Volc )
  // Cac'=f*(B*(Cam-Cac)-Jserca+Jleak)
  // # Initial conditions
  // V(0)=-63
  // mkv(0)=0.02
  // mBK(0)=0.002
  // hNa(0)=0.97
  // hCaL(0)=0.98
  // hCaT(0)=0.52
  // mHERG(0)=0.1
  // hHERG(0)=0.7
  // Cam(0)=0.30
  // Cac(0)=0.17
  // ## Nernst voltages
  // par VNa=70
  // par VCa=65
  // par VK=-75
  // par VCl=-40
  // ## Leak current
  // par gleak=0.015
  // par vleak=-30
  // Ileak=gleak*(V-vleak)
  // aux Ileak=Ileak
  // ## IKv
  // par taumkv0=2, Vmkv=0, nmkv=-10, gkv=1
  // mkvinf=1/(1+exp((V-Vmkv)/nmkv))
  // taumkv=taumkv0+10*exp(min(log(3),(-20-V)/6))
  // IKv=gkv*mkv*(V-VK)
  // ## IBK
  // par taumBK=2, VmBK=0, nmBK=-10, BBK=20, gBK=0.02
  // mBKinf=1/( 1+exp((V-VmBK)/nmBK))
  // IBK = gBK*(-ICa+BBK)*mBK*(V-VK)
  // aux ibk=IBK
  // ## hERG channels
  // par VmHERG=-30, nmHERG=-10, taumHERG=100
  // par VhHERG=-42, nhHERG=17.5, tauhHERG=50
  // par gHERG=0
  // mHERGinf=1/( 1+exp((V-VmHERG)/nmHERG) )
  // hHERGinf=1/( 1+exp((V-VhHERG)/nhHERG) )
  // IHERG = gHERG*mHERG*hHERG*(V-VK)
  // ## Na current
  // par gNa=0.4, VmNa=-18, nmNa=-5, VhNa=-42, nhNa=6, tauhNa=2
  // hNainf=1/( 1+exp((V-VhNa)/nhNa) )
  // mNainf=1/( 1+exp((V-VmNa)/nmNa) )
  // INa=gNa*mNainf*hNa*(V-VNa)
  // ## L-type Ca current
  // par gCaL=0.14, VmCaL=-25, nmCaL=-6, tauhCaL=20
  // mCaLinf=1/( 1+exp((V-VmCaL)/nmCaL) )
  // hCaLinf=max(0,min(1,1+mCaLinf*(V-VCa)/57))
  // ICaL = gCaL*mCaLinf*hCaL*(V-VCa)
  // ## PQ-type Ca current
  // par gCaPQ=0.17, VmCaPQ=-10, nmCaPQ=-6
  // mCaPQinf=1/( 1+exp((V-VmCaPQ)/nmCaPQ) )
  // ICaPQ = gCaPQ*mCaPQinf*(V-VCa)
  // ## T-type Ca current
  // par gCaT=0.05, VmCaT=-40, nmCaT=-4, VhCaT=-64, nhCaT=8, tauhCaT=7
  // mCaTinf=1/( 1+exp((V-VmCaT)/nmCaT) )
  // hCaTinf=1/( 1+exp((V-VhCaT)/nhCaT) )
  // ICaT = gCaT*mCaTinf*hCaT*(V-VCa)
  // ICa=ICaL+ICaPQ+ICaT
  // ## Katp current
  // IKatp=gkatp*(V-VK)
  // par gkatp=0.01
  // ## Gabar current
  // Igabar=ggabar*(V-VCl)
  // par ggabar=0
  // ## ISK current
  // par gSK=0.1, kSK=0.57, nSK=5.2
  // ISK = gSK*(Cam^nSK/( kSK^nSK+Cam^nSK) )*(V-VK)
  // #aux ISK=ISK
  // ## Ca diffusion
  // #definition of fluxes
  // par Cm=10
  // JCaL=-alpha*ICaL*Cm/Volm
  // JCaPQ=-alpha*ICaPQ*Cm/Volm
  // JCaT=-alpha*ICaT*Cm/Volm
  // Jserca=Jsercamax*Cac^2/(Kserca^2 + Cac^2)
  // Jpmca=Jpmcamax*Cam/(Kpmca + Cam)
  // Jncx=Jncx0*(Cam)
  // L=Jpmca+Jncx
  // # Calcium dynamics parameters
  // par f=0.01
  // par B=0.1
  // par Volc=1.15e-12, Volm=1e-13
  // # conversion to fluxes
  // par alpha=5.18e-15
  // # other fluxes
  // par Jsercamax=0.06, Kserca=0.27, Jpmcamax=0.021, Kpmca=0.5, Jleak=0.94e-3, Jncx0=0.01867
  // @ meth=cvode, toler=1.0e-10, atoler=1.0e-10, dt=.01, total=3000,
  // @ maxstor=2000000,bounds=10000000000000000000, xp=t, yp=v
  // @ xlo=0, xhi=3000, ylo=-80, yhi=10
  // done
  // This file has been produced by sbmlutils.
  // Terms of use
  // Copyright © 2017 Matthias Koenig
  // Redistribution and use of any part of this model, with or without modification, are permitted provided that the following conditions are met:
  // Redistributions of this SBML file must retain the above copyright notice, this list of conditions and the following disclaimer.
  // Redistributions in a different form must reproduce the above copyright notice, this list of conditions and the following disclaimer in the documentation and/or other materials provided with the distribution.
  // This model is distributed in the hope that it will be useful, but WITHOUT ANY WARRANTY; without even the implied warranty of MERCHANTABILITY or FITNESS FOR A PARTICULAR PURPOSE.

  // Parameters:
  q = 0;
  sigma = 0; sigma is "sigma = 0";
  V = -63; V is "V = -63";
  mkv = 0.02; mkv is "mkv = 0.02";
  mBK = 0.002; mBK is "mBK = 0.002";
  hNa = 0.97; hNa is "hNa = 0.97";
  hCaL = 0.98; hCaL is "hCaL = 0.98";
  hCaT = 0.52; hCaT is "hCaT = 0.52";
  mHERG = 0.1; mHERG is "mHERG = 0.1";
  hHERG = 0.7; hHERG is "hHERG = 0.7";
  Cam = 0.3; Cam is "Cam = 0.30";
  Cac = 0.17; Cac is "Cac = 0.17";
  VNa = 70; VNa is "VNa = 70";
  VCa = 65; VCa is "VCa = 65";
  VK = -75; VK is "VK = -75";
  VCl = -40; VCl is "VCl = -40";
  gleak = 0.015; gleak is "gleak = 0.015";
  vleak = -30; vleak is "vleak = -30";
  taumkv0 = 2; taumkv0 is "taumkv0 = 2";
  Vmkv = 0; Vmkv is "Vmkv = 0";
  nmkv = -10; nmkv is "nmkv = -10";
  gkv = 1; gkv is "gkv = 1";
  taumBK = 2; taumBK is "taumBK = 2";
  VmBK = 0; VmBK is "VmBK = 0";
  nmBK = -10; nmBK is "nmBK = -10";
  BBK = 20; BBK is "BBK = 20";
  gBK = 0.02; gBK is "gBK = 0.02";
  VmHERG = -30; VmHERG is "VmHERG = -30";
  nmHERG = -10; nmHERG is "nmHERG = -10";
  taumHERG = 100; taumHERG is "taumHERG = 100";
  VhHERG = -42; VhHERG is "VhHERG = -42";
  nhHERG = 17.5; nhHERG is "nhHERG = 17.5";
  tauhHERG = 50; tauhHERG is "tauhHERG = 50";
  gHERG = 0; gHERG is "gHERG = 0";
  gNa = 0.4; gNa is "gNa = 0.4";
  VmNa = -18; VmNa is "VmNa = -18";
  nmNa = -5; nmNa is "nmNa = -5";
  VhNa = -42; VhNa is "VhNa = -42";
  nhNa = 6; nhNa is "nhNa = 6";
  tauhNa = 2; tauhNa is "tauhNa = 2";
  gCaL = 0.14; gCaL is "gCaL = 0.14";
  VmCaL = -25; VmCaL is "VmCaL = -25";
  nmCaL = -6; nmCaL is "nmCaL = -6";
  tauhCaL = 20; tauhCaL is "tauhCaL = 20";
  gCaPQ = 0.17; gCaPQ is "gCaPQ = 0.17";
  VmCaPQ = -10; VmCaPQ is "VmCaPQ = -10";
  nmCaPQ = -6; nmCaPQ is "nmCaPQ = -6";
  gCaT = 0.05; gCaT is "gCaT = 0.05";
  VmCaT = -40; VmCaT is "VmCaT = -40";
  nmCaT = -4; nmCaT is "nmCaT = -4";
  VhCaT = -64; VhCaT is "VhCaT = -64";
  nhCaT = 8; nhCaT is "nhCaT = 8";
  tauhCaT = 7; tauhCaT is "tauhCaT = 7";
  gkatp = 0.01; gkatp is "gkatp = 0.01";
  ggabar = 0; ggabar is "ggabar = 0";
  gSK = 0.1; gSK is "gSK = 0.1";
  kSK = 0.57; kSK is "kSK = 0.57";
  nSK = 5.2; nSK is "nSK = 5.2";
  Cm = 10; Cm is "Cm = 10";
  f = 0.01; f is "f = 0.01";
  B = 0.1; B is "B = 0.1";
  Volc = 1.15e-12; Volc is "Volc = 1.15e-12";
  Volm = 1e-13; Volm is "Volm = 1e-13";
  alpha = 5.18e-15; alpha is "alpha = 5.18e-15";
  Jsercamax = 0.06; Jsercamax is "Jsercamax = 0.06";
  Kserca = 0.27; Kserca is "Kserca = 0.27";
  Jpmcamax = 0.021; Jpmcamax is "Jpmcamax = 0.021";
  Kpmca = 0.5; Kpmca is "Kpmca = 0.5";
  Jleak = 0.00094; Jleak is "Jleak = 0.94e-3";
  Jncx0 = 0.01867; Jncx0 is "Jncx0 = 0.01867";
  Ileak has dimensionless;
  mkvinf has dimensionless;
  taumkv has dimensionless;
  IKv has dimensionless;
  mBKinf has dimensionless;
  IBK has dimensionless;
  ibk has dimensionless;
  mHERGinf has dimensionless;
  hHERGinf has dimensionless;
  IHERG has dimensionless;
  hNainf has dimensionless;
  mNainf has dimensionless;
  INa has dimensionless;
  mCaLinf has dimensionless;
  hCaLinf has dimensionless;
  ICaL has dimensionless;
  mCaPQinf has dimensionless;
  ICaPQ has dimensionless;
  mCaTinf has dimensionless;
  hCaTinf has dimensionless;
  ICaT has dimensionless;
  ICa has dimensionless;
  IKatp has dimensionless;
  Igabar has dimensionless;
  ISK has dimensionless;
  JCaL has dimensionless;
  JCaPQ has dimensionless;
  JCaT has dimensionless;
  Jserca has dimensionless;
  Jpmca has dimensionless;
  Jncx has dimensionless;
  L has dimensionless;
  t has dimensionless; t is "model time";

  // Assignment rules:
  Ileak := gleak*(V - vleak);
  mkvinf := 1/(1 + exp((V - Vmkv)/nmkv));
  taumkv := taumkv0 + 10*exp(min(log10(3), (-20 - V)/6));
  IKv := gkv*mkv*(V - VK);
  mBKinf := 1/(1 + exp((V - VmBK)/nmBK));
  IBK := gBK*(-ICa + BBK)*mBK*(V - VK);
  ibk := IBK;
  mHERGinf := 1/(1 + exp((V - VmHERG)/nmHERG));
  hHERGinf := 1/(1 + exp((V - VhHERG)/nhHERG));
  IHERG := gHERG*mHERG*hHERG*(V - VK);
  hNainf := 1/(1 + exp((V - VhNa)/nhNa));
  mNainf := 1/(1 + exp((V - VmNa)/nmNa));
  INa := gNa*mNainf*hNa*(V - VNa);
  mCaLinf := 1/(1 + exp((V - VmCaL)/nmCaL));
  hCaLinf := max(0, min(1, 1 + mCaLinf*(V - VCa)/57));
  ICaL := gCaL*mCaLinf*hCaL*(V - VCa);
  mCaPQinf := 1/(1 + exp((V - VmCaPQ)/nmCaPQ));
  ICaPQ := gCaPQ*mCaPQinf*(V - VCa);
  mCaTinf := 1/(1 + exp((V - VmCaT)/nmCaT));
  hCaTinf := 1/(1 + exp((V - VhCaT)/nhCaT));
  ICaT := gCaT*mCaTinf*hCaT*(V - VCa);
  ICa := ICaL + ICaPQ + ICaT;
  IKatp := gkatp*(V - VK);
  Igabar := ggabar*(V - VCl);
  ISK := gSK*(Cam^nSK/(kSK^nSK + Cam^nSK))*(V - VK);
  JCaL := -alpha*ICaL*Cm/Volm;
  JCaPQ := -alpha*ICaPQ*Cm/Volm;
  JCaT := -alpha*ICaT*Cm/Volm;
  Jserca := Jsercamax*Cac^2/(Kserca^2 + Cac^2);
  Jpmca := Jpmcamax*Cam/(Kpmca + Cam);
  Jncx := Jncx0*Cam;
  L := Jpmca + Jncx;
  t := time;

  // Rate rules:
  V' = -(ISK + IBK + IKv + IHERG + INa + ICaL + ICaPQ + ICaT + IKatp*(1 + sigma*q) + Ileak + Igabar);
  mkv' = (mkvinf - mkv)/taumkv;
  mBK' = (mBKinf - mBK)/taumBK;
  hNa' = (hNainf - hNa)/tauhNa;
  hCaL' = (hCaLinf - hCaL)/tauhCaL;
  hCaT' = (hCaTinf - hCaT)/tauhCaT;
  mHERG' = (mHERGinf - mHERG)/taumHERG;
  hHERG' = (hHERGinf - hHERG)/tauhHERG;
  Cam' = f*(JCaL + JCaPQ + JCaT - B*(Cam - Cac)/Volm*Volc - L/Volm*Volc);
  Cac' = f*(B*(Cam - Cac) - Jserca + Jleak);
end
