// SBML level 3 version 1

model amount_species_example()
  // Example model with species in amounts and concentrations
  // Description
  // This example model demonstrates how to define species in amounts and concentrations. The key is to set the hasOnlySubstanceUnits on the species.
  // Terms of use
  // The content of this model has been carefully created in a manual research effort. This file has been created by Matthias König using sbmlutils. For questions contact koenigmx@hu-berlin.de.
  // Copyright © 2021 Matthias König.
  // Redistribution and use of any part of this model, with or without modification, are permitted provided that the following conditions are met:
  // Redistributions of this SBML file must retain the above copyright notice, this list of conditions and the following disclaimer.
  // Redistributions in a different form must reproduce the above copyright notice, this list of conditions and the following disclaimer in the documentation and/or other materials provided with the distribution.
  // This model is distributed in the hope that it will be useful, but WITHOUT ANY WARRANTY; without even the implied warranty of MERCHANTABILITY or FITNESS FOR A PARTICULAR PURPOSE.
  // model units - substance: mole, time: s, volume: m3, area: m2, length: metre, extent: mmole

  // Compartments:
  compartment Vc; Vc has m3; Vc is "cell compartment";  // SBO:0000290

  // Species:
  // Species in amounts. The unit of the species is the substanceUnit, i.e. [mmole].
  substanceOnly species Aglc in Vc = 5; Aglc is "glucose";  // substance in mmole; SBO:0000247
  // Species in concentration via the hasOnlySubstanceUnit=False. The unit of the species is the substanceUnit/compartmentUnit, i.e. [mmole/litre].
  species Cglc6p in Vc = 0; Cglc6p is "glucose 6-phosphate";  // substance in mmole; SBO:0000247

  // Parameters:
  k1 = 1 per_s;

  // Assignment rules:
  Vc := 2 m3*exp(time/(1 s));

  // Reactions:
  R1: Aglc => Cglc6p; k1*Aglc;  // SBO:0000176

  // Unit definitions:
  unit hr = 3600 second; hr is "hour";
  unit m = metre; m is "meter";
  unit m2 = metre^2; m2 is "meter^2";
  unit m3 = metre^3; m3 is "meter^3";
  unit min = 60 second; min is "minute";
  unit mmole = 1e-3 mole;
  unit mmole_per_s = 1e-3 mole / second; mmole_per_s is "mmole/s";
  unit per_hr = 1 / (2.777778e-4 second); per_hr is "1/hr";
  unit per_min = 1 / (0.01666667 second); per_min is "1/min";
  unit per_s = 1 / second; per_s is "1/s";
  unit s = second; s is "second";
end
