// SBML level 3 version 1

model icg_liver(Vext, Vli, Vbi, Vfeces, icg_ext, icg_feces)
  // Clearance of icg by the liver
  // ## Description Model for hepatic elimination of indocyanine green encoded in SBML format.
  // Assumptions:
  // icg is only metabolized in the liver
  // model units - substance: mmole, time: min, volume: l, area: m2, length: m, extent: mmole

  // Compartments:
  compartment Vext = 4 l; Vext is "plasma";  // SBO:0000290
  compartment Vli = 1.5 l; Vli is "liver";  // SBO:0000290
  compartment Vbi = 1 l; Vbi is "bile";  // SBO:0000290
  compartment Vfeces = 1 l;  // SBO:0000290

  // Species:
  species icg_ext in Vext = 0; icg_ext is "icg (plasma)";  // SBO:0000247
  // Reference range: 0.01 [mmole/l] (~ 1 mg/dl)
  species $bil_ext in Vext = 0.01; bil_ext is "bilirubin (extern)";  // SBO:0000247
  species icg in Vli = 0; icg is "icg (liver)";  // SBO:0000247
  species icg_bi in Vbi = 0; icg_bi is "icg (bile)";  // SBO:0000247
  substanceOnly species icg_feces in Vfeces = 0; icg_feces is "icg (feces)";  // SBO:0000247

  // Parameters:
  ICGIM_Vmax = 0.03695988 mmole_per_min_l; ICGIM_Vmax is "Vmax for icg import";  // SBO:0000186
  ICGIM_Km = 0.02165918 mM; ICGIM_Km is "Km icg of icg import";  // SBO:0000322
  // bilirubin reference range: ~ 0.1 - 5 [g/dl] (10 [mg/l] /584.6623 [g/mole]) ~ 0.0171 mmole/l setting Ki in reference range
  ICGIM_ki_bil = 0.02 mM; ICGIM_ki_bil is "Ki bilirubin of icg import";  // SBO:0000261
  // Parameter for scaling transport protein amount.
  f_oatp1b3 = 1 dimensionless; f_oatp1b3 is "scaling factor protein amount";  // SBO:0000002
  ICGLI2CA_Vmax = 0.0009436728 mmole_per_min_l; ICGLI2CA_Vmax is "Vmax bile export icg";  // SBO:0000186
  ICGLI2CA_Km = 0.01238866 mM; ICGLI2CA_Km is "Km bile export icg";  // SBO:0000322
  ICGLI2BI_Vmax = 0.0001145966 per_min; ICGLI2BI_Vmax is "Vmax bile transport icg";  // SBO:0000186

  // Reactions:
  // Solute carrier organic anion transporter family member 1B3 (SLCO1B3). Bilirubin effect was modeled as competitive inhibition.
  ICGIM: icg_ext => icg; f_oatp1b3*ICGIM_Vmax*Vli*icg_ext/(ICGIM_Km*(1 + bil_ext/ICGIM_ki_bil) + icg_ext); ICGIM is "ICG import";  // modifiers: bil_ext; SBO:0000655 uniprot:Q9NPD5 omit:0040643; isEncodedBy ncit:C106617
  // Phosphatidylcholine translocator ABCB4
  ICGLI2CA: icg => icg_bi; ICGLI2CA_Vmax*Vli*icg/(ICGLI2CA_Km + icg); ICGLI2CA is "ICG export (bile)";  // SBO:0000655; isVersionOf uniprot:P21439
  // As simplification transport directly into feces (no information on time course available). No transport proteins involved in the biliary secretion into the duodenum.
  ICGLI2BI: icg_bi => icg_feces; ICGLI2BI_Vmax*Vli*icg_bi; ICGLI2BI is "ICG bile transport";  // SBO:0000655

  // Unit definitions:
  unit cm = 0.01 metre;
  unit hr = 3600 second; hr is "hour";
  unit kg = 1000 gram; kg is "kilogram";
  unit l = (0.1 metre)^3; l is "liter";
  unit l_per_min = (0.02554365 metre)^3 / second; l_per_min is "l/min";
  unit m = metre; m is "meter";
  unit m2 = metre^2; m2 is "meter^2";
  unit m3 = metre^3; m3 is "meter^3";
  unit mM = mole / metre^3; mM is "mmole/liter";
  unit mg = 1e-3 gram;
  unit min = 60 second; min is "minute";
  unit ml = (0.01 metre)^3;
  unit mmole = 1e-3 mole;
  unit mmole_per_min = 1.666667e-5 mole / second; mmole_per_min is "mmole/min";
  unit mmole_per_min_l = 0.01666667 mole / (second * metre^3); mmole_per_min_l is "mmole/min/l";
  unit mmole_per_s = 1e-3 mole / second; mmole_per_s is "mmole/s";
  unit per_hr = 1 / (3600 second); per_hr is "1/hr";
  unit per_min = 1 / (60 second); per_min is "1/min";
  unit per_s = 1 / second; per_s is "1/s";
  unit s = second; s is "second";
end
