// SBML level 3 version 1

model simple_reaction()
  // Koenig example model: simple reaction
  // Description
  // Test model to show creation of compartment, species and reaction.
  // The content of this model has been carefully created in a manual research effort.
  // This file has been created by Matthias Koenig.
  // Terms of use
  // Copyright © 2021 Matthias Koenig.
  // Redistribution and use of any part of this model, with or without modification, are permitted provided that the following conditions are met:
  // Redistributions of this SBML file must retain the above copyright notice, this list of conditions and the following disclaimer.
  // Redistributions in a different form must reproduce the above copyright notice, this list of conditions and the following disclaimer in the documentation and/or other materials provided with the distribution.
  // This model is distributed in the hope that it will be useful, but WITHOUT ANY WARRANTY; without even the implied warranty of MERCHANTABILITY or FITNESS FOR A PARTICULAR PURPOSE.
  // model units - substance: mmole, time: s, volume: litre, area: m2, length: m, extent: mmole

  // Compartments:
  compartment cell = 1 litre;

  // Species:
  species A in cell = 10;  // SBO:0000247
  species B in cell = 10;  // SBO:0000247

  // Parameters:
  v1_Vmax = 1 mmole_per_s;
  v1_Km_A = 0.1 mM;

  // Reactions:
  v1_A_B: A => B; v1_Vmax*v1_Km_A/(v1_Km_A + A); v1_A_B is "v1: A -> B";

  // Unit definitions:
  unit s = second;
  unit m = metre;
  unit m2 = metre^2;
  unit mM = 1e-3 mole / litre;
  unit mmole = 1e-3 mole;
  unit mmole_per_s = 1e-3 mole / second;
end
