// SBML level 3 version 2
// Created with https://github.com/matthiaskoenig/sbmlutils.

model DallaMan2006()
  // DallaMan2006 - Glucose Insulin System
  // Description
  // This is a A simulation model of the glucose-insulin system in the postprandial state in SBML format.
  // This model is described in the article:
  // Meal simulation model of the glucose-insulin system.
  // Dalla Man C, Rizza RA, Cobelli C.
  // IEEE Trans Biomed Eng. 2007 Oct;54(10):1740-9.
  // Abstract:
  // A simulation model of the glucose-insulin system in the postprandial state can be useful in several circumstances, including testing of glucose sensors, insulin infusion alg"orithms and decision support systems for diabetes. Here, we present a new simulation model in normal humans that describes the physiological events that occur after a meal, by employing the quantitative knowledge that has become available in recent years. Model parameters were set to fit the mean data of a large normal subject database that underwent a triple tracer meal protocol which provided quasi-model independent estimates of major glucose and insulin fluxes, e.g., meal rate of appearance, endogenous glucose production, utilization of glucose, insulin secretion.
  // Terms of use
  // The content of this model has been carefully created in a manual research effort. This file has been created by Matthias König using sbmlutils. For questions contact koenigmx@hu-berlin.de. Copyright © 2024 Matthias König.
  // This work is licensed under a Creative Commons Attribution 4.0 International License.
  // Redistribution and use of any part of this model, with or without modification, are permitted provided that the following conditions are met:
  // Redistributions of this SBML file must retain the above copyright notice, this list of conditions and the following disclaimer.
  // Redistributions in a different form must reproduce the above copyright notice, this list of conditions and the following disclaimer in the documentation and/or other materials provided with the distribution.
  // This model is distributed in the hope that it will be useful, but WITHOUT ANY WARRANTY; without even the implied warranty of MERCHANTABILITY or FITNESS FOR A PARTICULAR PURPOSE.
  // model units - substance: mole, time: min, volume: m3, area: m2, length: metre, extent: mole

  // Parameters:
  Gp = 178 mg_per_kg; Gp is "glucose mass in plasma [mg/kg]";
  Gt = 135 mg_per_kg; Gt is "glucose mass rapidly equilibrating tissue [mg/kg]";
  Il = 4.5 pmol_per_kg; Il is "insulin mass liver [pmol/kg]";
  Ip = 1.25 pmol_per_kg; Ip is "insulin mass plasma [pmol/kg]";
  Qsto1 = 78000 mg; Qsto1 is "glucose in the stomach solid [mg]";
  Qsto2 = 0 mg; Qsto2 is "glucose in the stomach liquid [mg]";
  Qgut = 0 mg; Qgut is "glucose in the intestine [mg]";
  I1 = 25 pmol_per_l;
  Id = 25 pmol_per_l; Id is "delayed insulin [pmol/l]";
  INS = 0 pmol_per_l;
  Ipo = 3.6 pmol_per_kg; Ipo is "insulin portal vein [pmol/kg]";
  Y = 0 pmol_per_kgmin; Y is "Y [pmol/kg/min]";
  BW = 78 kg; BW is "body weight [kg]";
  D = 78000 mg; D is "amount of ingested glucose [mg]";
  V_G = 1.88 dl_per_kg; V_G is "V_G distribution volume glucose [dl/kg]";
  k_1 = 0.065 per_min; k_1 is "k_1 glucose kinetics";
  k_2 = 0.079 per_min; k_2 is "k_2 glucose kinetics [1/min]";
  G_b = 95 mg_per_dl; G_b is "basline plasma glucose [mg/dl]";
  V_I = 0.05 l_per_kg; V_I is "V_I distribution volume insulin";
  m_1 = 0.19 per_min;
  m_2 = 0.484 per_min;
  m_4 = 0.194 per_min;
  m_5 = 0.0304 minkg_per_pmol;
  m_6 = 0.6471 dimensionless;
  I_b = 25 pmol_per_l;
  S_b = 1.8 pmol_per_kgmin;
  k_max = 0.0558 per_min;
  k_min = 0.008 per_min;
  k_abs = 0.057 per_min; k_abs is "rate of intestinal absorption";
  k_gri = 0.0558 per_min; k_gri is "rate of stomach grinding";
  f = 0.9 dimensionless; f is "fraction of intestinal absorption which appears in plasma";
  b = 0.82 dimensionless;
  d = 0.01 dimensionless;
  k_p1 = 2.7 mg_per_kgmin; k_p1 is "extrapolated EGP at zero glucose and insulin [mg/kg/min]";
  k_p2 = 0.0021 per_min; k_p2 is "liver glucose effectiveness";
  k_p3 = 0.009 mgl_per_kgminpmol; k_p3 is "parameter governing amplitude of insulin action on the liver [(mg*l)/(kg*min*pmol)]";
  k_p4 = 0.0618 mg_per_minpmol; k_p4 is "parameter governing amplitude of portal insulin action on the liver";
  k_i = 0.0079 per_min; k_i is "rate parameter accounting for delay between insulin signal and insulin action [1/min]";
  F_cns = 1 mg_per_kgmin; F_cns is "U_ii; glucose uptake by the brain and erythrocytes [mg/min/kg]";
  V_m0 = 2.5 mg_per_kgmin;
  V_mX = 0.047 mgl_per_kgminpmol;
  K_m0 = 225.59 mg_per_kg;
  V_f0 = 2.5 mg_per_kgmin;
  V_fX = 0.047 mgl_per_kgminpmol;
  K_f0 = 225.59 mg_per_kg;
  p_2U = 0.0331 per_min;
  part = 0.2 dimensionless;
  K = 2.3 pmoldl_per_kgmg;
  alpha = 0.05 per_min;
  beta = 0.11 pmoldl_per_kgminmg;
  gamma = 0.5 per_min;
  aa has per_mg;
  cc has per_mg;
  EGP has mg_per_kgmin; EGP is "EGP endogenous glucose production [mg/kg/min]";
  V_mmax has mg_per_kgmin;
  V_fmax has mg_per_kgmin;
  E has mg_per_kgmin; E is "E renal excretion";
  S has pmol_per_kgmin; S is "S insulin secretion";
  I has pmol_per_l; I is "I plasma insulin concentration";
  G has mg_per_dl; G is "G plasma glucose concentration";
  HE has dimensionless; HE is "HE hepatic extraction insulin";
  m_3 has per_min;
  Q_sto has mg; Q_sto is "glucose in the stomach [mg]";
  Ra has mg_per_kgmin; Ra is "Ra glucose rate of appearance";
  k_empt has per_min; k_empt is "rate of gastric emptying";
  U_idm has mg_per_kgmin;
  U_idf has mg_per_kgmin;
  U_id has mg_per_kgmin; U_id is "insulin dependent glucose utilization";
  U_ii has mg_per_kgmin; U_ii is "insulin independent glucose utilization";
  U has mg_per_kgmin; U is "U glucose uptake";
  S_po has pmol_per_kgmin; S_po is "[pmol/kg/min]";

  // Assignment rules:
  aa := 5/2/(1 - b)/D;
  cc := 5/2/d/D;
  EGP := k_p1 - k_p2*Gp - k_p3*Id - k_p4*Ipo;
  V_mmax := (1 - part)*(V_m0 + V_mX*INS);
  V_fmax := part*(V_f0 + V_fX*INS);
  E := 0 mg_per_kgmin;
  S := gamma*Ipo;
  I := Ip/V_I;
  G := Gp/V_G;
  HE := -m_5*S + m_6;
  m_3 := HE*m_1/(1 - HE);
  Q_sto := Qsto1 + Qsto2;
  Ra := 1.32*f*k_abs*Qgut/BW;
  k_empt := k_min + (k_max - k_min)/2*(tanh(aa*(Q_sto - b*D)) - tanh(cc*(Q_sto - d*D)) + 2);
  U_idm := V_mmax*Gt/(K_m0 + Gt);
  U_idf := V_fmax*Gt/(K_f0 + Gt);
  U_id := U_idm + U_idf;
  U_ii := F_cns;
  // Sum of insulin independent Uii and insulin-dependent glucose utilizations
  U := U_ii + U_id;
  S_po := Y + K*(EGP + Ra - E - U_ii - k_1*Gp + k_2*Gt)/V_G + S_b;

  // Rate rules:
  Gp' = EGP + Ra - U_ii - E - k_1*Gp + k_2*Gt;
  Gt' = -U_id + k_1*Gp - k_2*Gt;
  Il' = -(m_1 + m_3)*Il + m_2*Ip + S;
  Ip' = -(m_2 + m_4)*Ip + m_1*Il;
  Qsto1' = -k_gri*Qsto1;
  Qsto2' = -k_empt*Qsto2 + k_gri*Qsto1;
  Qgut' = -k_abs*Qgut + k_empt*Qsto2;
  I1' = -k_i*(I1 - I);
  Id' = -k_i*(Id - I1);
  INS' = -p_2U*INS + p_2U*(I - I_b);
  Ipo' = -gamma*Ipo + S_po;
  Y' = -alpha*(Y - beta*(G - G_b));

  // Unit definitions:
  unit dl_per_kg = 0.1 litre / (1000 gram); dl_per_kg is "dl/kg";
  unit kg = 1000 gram;
  unit l_per_kg = litre / (1000 gram); l_per_kg is "l/kg";
  unit m2 = metre^2; m2 is "m^2";
  unit m3 = metre^3; m3 is "m^3";
  unit mg = 1e-3 gram;
  unit mg_per_dl = 1e-3 gram / (0.1 litre); mg_per_dl is "mg/dl";
  unit mg_per_kg = 1e-3 gram / (1000 gram); mg_per_kg is "mg/kg";
  unit mg_per_kgmin = 1e-3 gram / (1000 gram * 60 second); mg_per_kgmin is "mg/kg/min";
  unit mg_per_min = 1e-3 gram / (60 second); mg_per_min is "mg/min";
  unit mg_per_minpmol = 1e-3 gram / (60 second * 1e-12 mole); mg_per_minpmol is "mg/min/pmol";
  unit mgl_per_kgminpmol = 1e-3 gram * litre / (1000 gram * 60 second * 1e-12 mole); mgl_per_kgminpmol is "mg*l/kg/min/pmol";
  unit min = 60 second;
  unit minkg_per_pmol = 60 second * 1000 gram / (1e-12 mole); minkg_per_pmol is "min*kg/pmol";
  unit per_mg = 1 / (1e-3 gram); per_mg is "1/mg";
  unit per_min = 1 / (60 second); per_min is "1/min";
  unit pmol_per_kg = 1e-12 mole / (1000 gram); pmol_per_kg is "pmol/kg";
  unit pmol_per_kgmin = 1e-12 mole / (1000 gram * 60 second); pmol_per_kgmin is "pmol/kg/min";
  unit pmol_per_kgmin2 = 1e-12 mole / (1000 gram * (60 second)^2); pmol_per_kgmin2 is "pmol/kg/min^2";
  unit pmol_per_l = 1e-12 mole / litre; pmol_per_l is "pmol/l";
  unit pmol_per_lmin = 1e-12 mole / (litre * 60 second); pmol_per_lmin is "pmol/l/min";
  unit pmoldl_per_kgmg = 1e-12 mole * 0.1 litre / (1000 gram * 1e-3 gram); pmoldl_per_kgmg is "pmol*dl/kg/mg";
  unit pmoldl_per_kgminmg = 1e-12 mole * 0.1 litre / (1000 gram * 60 second * 1e-3 gram); pmoldl_per_kgminmg is "pmol*dl/kg/min/mg";
  unit pmolmg_per_kgdl = 1e-12 mole * 1e-3 gram / (1000 gram * 0.1 litre); pmolmg_per_kgdl is "pmol*mg/kg/dl";
  unit pmolmg_per_kgmindl = 1e-12 mole * 1e-3 gram / (1000 gram * 60 second * 0.1 litre); pmolmg_per_kgmindl is "pmol*mg/kg/min/dl";
end
