// SBML level 3 version 1
// Created with https://github.com/matthiaskoenig/sbmlutils.

model Koenig_demo_v15()
  // Koenig Demo Metabolism
  // Description
  // This is a demonstration model in SBML format.
  // Terms of use
  // The content of this model has been carefully created in a manual research effort. This file has been created by Matthias König using sbmlutils. For questions contact koenigmx@hu-berlin.de. Copyright © 2022 Matthias König.
  // This work is licensed under a Creative Commons Attribution 4.0 International License.
  // Redistribution and use of any part of this model, with or without modification, are permitted provided that the following conditions are met:
  // Redistributions of this SBML file must retain the above copyright notice, this list of conditions and the following disclaimer.
  // Redistributions in a different form must reproduce the above copyright notice, this list of conditions and the following disclaimer in the documentation and/or other materials provided with the distribution.
  // This model is distributed in the hope that it will be useful, but WITHOUT ANY WARRANTY; without even the implied warranty of MERCHANTABILITY or FITNESS FOR A PARTICULAR PURPOSE.
  // model units - substance: mole, time: second, volume: m3, area: m2, length: metre, extent: mole

  // Compartments:
  compartment e = 1e-6 m3; e is "external compartment";
  compartment c = 1e-6 m3; c is "cell compartment";
  compartment m = 1 m2; m is "plasma membrane";  // 2-D

  // Species:
  species c__A in c = 0;
  species c__B in c = 0;
  species c__C in c = 0;
  species e__A in e = 0;
  species e__B in e = 0;
  species e__C in e = 0;

  // Parameters:
  scale_f = 1e-6 dimensionless; scale_f is "metabolic scaling factor";
  Vmax_bA = 5 mole_per_s;
  Km_A = 1 mM;
  Vmax_bB = 2 mole_per_s;
  Km_B = 0.5 mM;
  Vmax_bC = 2 mole_per_s;
  Km_C = 3 mM;
  Vmax_v1 = 1 mole_per_s;
  Keq_v1 = 10 dimensionless;
  Vmax_v2 = 0.5 mole_per_s;
  Vmax_v3 = 0.5 mole_per_s;
  Vmax_v4 = 0.5 mole_per_s;
  Keq_v4 = 2 dimensionless;

  // Reactions:
  bA: e__A => c__A; scale_f*(Vmax_bA/Km_A)*(e__A - c__A)/(1 + e__A/Km_A + c__A/Km_A); bA is "bA (A import)";
  bB: c__B => e__B; scale_f*(Vmax_bB/Km_B)*(c__B - e__B)/(1 + e__B/Km_B + c__B/Km_B); bB is "bB (B export)";
  bC: c__C => e__C; scale_f*(Vmax_bC/Km_C)*(c__C - e__C)/(1 + e__C/Km_C + c__C/Km_C); bC is "bC (C export)";
  v1_A_B: c__A => c__B; scale_f*Vmax_v1/Km_A*(c__A - 1/Keq_v1*c__B); v1_A_B is "v1 (A -> B)";
  v2_A_C: c__A => c__C; scale_f*Vmax_v2/Km_A*c__A; v2_A_C is "v2 (A -> C)";
  v3_C_A: c__C => c__A; scale_f*Vmax_v3/Km_A*c__C; v3_C_A is "v3 (C -> A)";
  v4_C_B: c__C => c__B; scale_f*Vmax_v4/Km_A*(c__C - 1/Keq_v4*c__B); v4_C_B is "v4 (C -> B)";

  // Unit definitions:
  unit m2 = metre^2; m2 is "meter^2";
  unit m3 = metre^3; m3 is "meter^3";
  unit mM = 1e-3 mole / litre; mM is "mmole/liter";
  unit mole_per_s = mole / second; mole_per_s is "mole/s";
end
