// SBML level 3 version 1

model galactose_v32()
  // PBPK model for galactose based dynamical liver function tests (GEC).
  // Description
  // This model is a physiological-base pharmacokinetic model (PBPK) for the absorption, distribution, metabolism and elimination of galactose encoded in SBML format.
  // The model is applied to the analysis of galactose based liver function tests.
  // The content of this model has been carefully created in a manual research effort.
  // This file has been created by Matthias Koenig.
  // Terms of use
  // Copyright © 2018 Matthias Koenig.
  // Redistribution and use of any part of this model, with or without modification, are permitted provided that the following conditions are met:
  // Redistributions of this SBML file must retain the above copyright notice, this list of conditions and the following disclaimer.
  // Redistributions in a different form must reproduce the above copyright notice, this list of conditions and the following disclaimer in the documentation and/or other materials provided with the distribution.
  // This model is distributed in the hope that it will be useful, but WITHOUT ANY WARRANTY; without even the implied warranty of MERCHANTABILITY or FITNESS FOR A PARTICULAR PURPOSE.
  // model units - substance: mmole, time: h, volume: litre, area: m2, length: m, extent: mmole

  // Compartments:
  compartment Vre; Vre has litre; Vre is "rest of body";
  compartment Vgu; Vgu has litre; Vgu is "gut";
  compartment Vki; Vki has litre; Vki is "kidney";
  compartment Vli; Vli has litre; Vli is "liver";
  compartment Vlu; Vlu has litre; Vlu is "lung";
  compartment Vsp; Vsp has litre; Vsp is "spleen";
  compartment Vve; Vve has litre; Vve is "venous blood";
  compartment Var; Var has litre; Var is "arterial blood";
  compartment Vpl; Vpl has litre; Vpl is "plasma";
  compartment Vplas_ven; Vplas_ven has litre; Vplas_ven is "venous plasma";
  compartment Vplas_art; Vplas_art has litre; Vplas_art is "arterial plasma";
  compartment Vurine = 1 litre;

  // Species:
  substanceOnly species Aar_gal in Var = 0; Aar_gal is "galactose (arterial blood)";
  substanceOnly species Are_gal in Vre = 0; Are_gal is "galactose (rest)";
  substanceOnly species Aki_gal in Vki = 0; Aki_gal is "galactose (kidney)";
  substanceOnly species Asp_gal in Vsp = 0; Asp_gal is "galactose (spleen)";
  substanceOnly species Ave_gal in Vve = 0; Ave_gal is "galactose (venous blood)";
  substanceOnly species Agu_gal in Vgu = 0; Agu_gal is "galactose (gut)";
  substanceOnly species Ali_gal in Vli = 0; Ali_gal is "galactose (liver)";
  substanceOnly species Alu_gal in Vlu = 0; Alu_gal is "galactose (lung)";
  substanceOnly species Aurine_gal in Vurine = 0; Aurine_gal is "galactose (urine)";

  // Parameters:
  BW = 75 kg; BW is "body weight [kg]";
  HEIGHT = 170 cm; HEIGHT is "height [cm]";
  HR = 70 per_min; HR is "heart rate [1/min]";
  HRrest = 70 per_min; HRrest is "heart rate [1/min]";
  BSA has m2; BSA is "body surface area [m^2]";
  COBW = 1.548 ml_per_skg; COBW is "cardiac output per bodyweight [ml/s/kg]";
  CO has ml_per_s; CO is "cardiac output [ml/s]";
  QC has litre_per_h; QC is "cardiac output [L/hr]";
  COHRI = 150 ml; COHRI is "increase of cardiac output per heartbeat [ml/min*min]";
  FVre has litre_per_kg; FVre is "rest of body fractional tissue volume";
  FVgu = 0.0171 litre_per_kg; FVgu is "gut fractional tissue volume";
  FVki = 0.0044 litre_per_kg; FVki is "kidney fractional tissue volume";
  FVli = 0.021 litre_per_kg; FVli is "liver fractional tissue volume";
  FVlu = 0.0076 litre_per_kg; FVlu is "lung fractional tissue volume";
  FVsp = 0.0026 litre_per_kg; FVsp is "spleen fractional tissue volume";
  FVve = 0.0514 litre_per_kg; FVve is "venous fractional tissue volume";
  FVar = 0.0257 litre_per_kg; FVar is "arterial fractional tissue volume";
  FVpl = 0.0424 litre_per_kg; FVpl is "plasma fractional tissue volume";
  FQre has dimensionless; FQre is "rest of body fractional tissue blood flow";
  FQgu = 0.146 dimensionless; FQgu is "gut fractional tissue blood flow";
  FQki = 0.19 dimensionless; FQki is "kidney fractional tissue blood flow";
  FQh = 0.215 dimensionless; FQh is "hepatic (venous side) fractional tissue blood flow";
  FQlu = 1 dimensionless; FQlu is "lung fractional tissue blood flow";
  FQsp = 0.017 dimensionless; FQsp is "spleen fractional tissue blood flow";
  F_PAR = 0.85 dimensionless; F_PAR is "parenchymal liver fraction";
  MPPGL = 45 mg_per_g; MPPGL is "mg microsomal protein per g liver parenchym";
  Mr_gal = 180.16 g_per_mole; Mr_gal is "Molecular weight gal [g/mole]";
  IVDOSE_gal = 0 mg; IVDOSE_gal is "IV bolus dose gal [mg]";
  PODOSE_gal = 0 mg; PODOSE_gal is "oral bolus dose gal [mg]";
  Ka_gal = 2.5 per_h; Ka_gal is "Ka [1/hr] absorption gal";
  F_gal = 1 dimensionless; F_gal is "fraction absorbed gal";
  ti_gal = 10 s; ti_gal is "injection time gal [s]";
  Ki_gal has per_h; Ki_gal is "Ki [1/hr] injection gal";
  Ri_gal = 0 mg_per_min; Ri_gal is "Ri [mg/min] rate of injection gal";
  cum_dose_gal = 0 mg; cum_dose_gal is "Cumulative dose due to infusion gal";
  fup_gal = 1 dimensionless; fup_gal is "fraction unbound in plasma gal";
  BP_gal = 1 dimensionless; BP_gal is "blood to plasma ratio gal";
  fumic_gal = 1 dimensionless; fumic_gal is "fraction unbound in microsomes gal";
  CLrenal_gal = 0 litre_per_h; CLrenal_gal is "renal clearance gal [L/hr]";
  Kpre_gal = 1 dimensionless; Kpre_gal is "rest plasma partition coefficient";
  Kpki_gal = 1 dimensionless; Kpki_gal is "kidney plasma partition coefficient";
  Kpsp_gal = 1 dimensionless; Kpsp_gal is "spleen plasma partition coefficient";
  Kpgu_gal = 1 dimensionless; Kpgu_gal is "gut plasma partition coefficient";
  Kpli_gal = 1 dimensionless; Kpli_gal is "liver plasma partition coefficient";
  Kplu_gal = 1 dimensionless; Kplu_gal is "lung plasma partition coefficient";
  Qgu has litre_per_h; Qgu is "gut blood flow";
  Qki has litre_per_h; Qki is "kidney blood flow";
  Qh has litre_per_h; Qh is "hepatic (venous side) blood flow";
  Qha has litre_per_h; Qha is "hepatic artery blood flow";
  Qlu has litre_per_h; Qlu is "lung blood flow";
  Qsp has litre_per_h; Qsp is "spleen blood flow";
  Qre has litre_per_h; Qre is "rest of body blood flow";
  Xbody_gal has mg;
  Cpl_ve_gal has mM; Cpl_ve_gal is "galactose venous plasma concentration";
  Cli_free_gal has mM; Cli_free_gal is "galactose free liver concentration";
  Cki_free_gal has mM; Cki_free_gal is "galactose free kidney concentration";
  Car_gal has mM; Car_gal is "galactose concentration (arterial blood)";
  Xar_gal has mg; Xar_gal is "galactose amount (arterial blood)";
  Mar_gal has mg_per_litre; Mar_gal is "galactose amount (arterial blood)";
  Cre_gal has mM; Cre_gal is "galactose concentration (rest)";
  Xre_gal has mg; Xre_gal is "galactose amount (rest)";
  Mre_gal has mg_per_litre; Mre_gal is "galactose amount (rest)";
  Cki_gal has mM; Cki_gal is "galactose concentration (kidney)";
  Xki_gal has mg; Xki_gal is "galactose amount (kidney)";
  Mki_gal has mg_per_litre; Mki_gal is "galactose amount (kidney)";
  Csp_gal has mM; Csp_gal is "galactose concentration (spleen)";
  Xsp_gal has mg; Xsp_gal is "galactose amount (spleen)";
  Msp_gal has mg_per_litre; Msp_gal is "galactose amount (spleen)";
  Cve_gal has mM; Cve_gal is "galactose concentration (venous blood)";
  Xve_gal has mg; Xve_gal is "galactose amount (venous blood)";
  Mve_gal has mg_per_litre; Mve_gal is "galactose amount (venous blood)";
  Cgu_gal has mM; Cgu_gal is "galactose concentration (gut)";
  Xgu_gal has mg; Xgu_gal is "galactose amount (gut)";
  Mgu_gal has mg_per_litre; Mgu_gal is "galactose amount (gut)";
  Cli_gal has mM; Cli_gal is "galactose concentration (liver)";
  Xli_gal has mg; Xli_gal is "galactose amount (liver)";
  Mli_gal has mg_per_litre; Mli_gal is "galactose amount (liver)";
  Clu_gal has mM; Clu_gal is "galactose concentration (lung)";
  Xlu_gal has mg; Xlu_gal is "galactose amount (lung)";
  Mlu_gal has mg_per_litre; Mlu_gal is "galactose amount (lung)";
  Xurine_gal has mg; Xurine_gal is "galactose amount (urine)";

  // Assignment rules:
  FVre := 1 litre_per_kg - (FVgu + FVki + FVli + FVlu + FVsp + FVve + FVar + FVpl);
  FQre := 1 - (FQgu + FQki + FQh + FQsp);
  BSA := 0.024265 m2*(BW/(1 kg))^0.5378*(HEIGHT/(1 cm))^0.3964;
  CO := BW*COBW + (HR - HRrest)*COHRI/(60 s_per_min);
  QC := CO/(1000 ml_per_litre)*3600 s_per_h;
  Vgu := BW*FVgu;
  Vki := BW*FVki;
  Vli := BW*FVli;
  Vlu := BW*FVlu;
  Vsp := BW*FVsp;
  Vve := BW*FVve;
  Var := BW*FVar;
  Vpl := BW*FVpl;
  Vre := BW*FVre;
  Vplas_ven := Vpl*Vve/(Vve + Var);
  Vplas_art := Vpl*Var/(Vve + Var);
  Qgu := QC*FQgu;
  Qki := QC*FQki;
  Qh := QC*FQh;
  Qha := Qh - Qgu - Qsp;
  Qlu := QC*FQlu;
  Qsp := QC*FQsp;
  Qre := QC*FQre;
  Xbody_gal := Xar_gal + Xgu_gal + Xki_gal + Xli_gal + Xlu_gal + Xsp_gal + Xre_gal + Xve_gal;
  Cpl_ve_gal := Cve_gal/BP_gal;
  Cli_free_gal := Cli_gal*fup_gal;
  Cki_free_gal := Cki_gal*fup_gal;
  Ki_gal := 1.386/ti_gal*3600 s_per_h;
  Car_gal := Aar_gal/Var;
  Xar_gal := Aar_gal*Mr_gal;
  Mar_gal := Aar_gal/Var*Mr_gal;
  Cre_gal := Are_gal/Vre;
  Xre_gal := Are_gal*Mr_gal;
  Mre_gal := Are_gal/Vre*Mr_gal;
  Cki_gal := Aki_gal/Vki;
  Xki_gal := Aki_gal*Mr_gal;
  Mki_gal := Aki_gal/Vki*Mr_gal;
  Csp_gal := Asp_gal/Vsp;
  Xsp_gal := Asp_gal*Mr_gal;
  Msp_gal := Asp_gal/Vsp*Mr_gal;
  Cve_gal := Ave_gal/Vve;
  Xve_gal := Ave_gal*Mr_gal;
  Mve_gal := Ave_gal/Vve*Mr_gal;
  Cgu_gal := Agu_gal/Vgu;
  Xgu_gal := Agu_gal*Mr_gal;
  Mgu_gal := Agu_gal/Vgu*Mr_gal;
  Cli_gal := Ali_gal/Vli;
  Xli_gal := Ali_gal*Mr_gal;
  Mli_gal := Ali_gal/Vli*Mr_gal;
  Clu_gal := Alu_gal/Vlu;
  Xlu_gal := Alu_gal*Mr_gal;
  Mlu_gal := Alu_gal/Vlu*Mr_gal;
  Xurine_gal := Aurine_gal*Mr_gal;

  // Rate rules:
  PODOSE_gal' = -Absorption_gal*Mr_gal;
  IVDOSE_gal' = -Injection_gal*Mr_gal;

  // Reactions:
  Injection_gal: => Ave_gal; Ki_gal*IVDOSE_gal/Mr_gal; Injection_gal is "injection galactose";
  Infusion_gal: => Ave_gal; Ri_gal/Mr_gal*60 min_per_h; Infusion_gal is "infusion galactose";
  Absorption_gal: => Agu_gal; Ka_gal*PODOSE_gal/Mr_gal*F_gal; Absorption_gal is "absorption galactose";
  RenalClearance_gal: Aki_gal => Aurine_gal; CLrenal_gal*Cki_free_gal; RenalClearance_gal is "clearance galactose (kidney)";
  Flow_ve_lu_gal: Ave_gal => Alu_gal; Qlu*Cve_gal; Flow_ve_lu_gal is "inflow lung galactose";
  Flow_lu_ar_gal: Alu_gal => Aar_gal; Qlu*(Clu_gal/Kplu_gal)*BP_gal; Flow_lu_ar_gal is "outflow lung galactose";
  Flow_ar_re_gal: Aar_gal => Are_gal; Qre*Car_gal; Flow_ar_re_gal is "inflow rest galactose";
  Flow_re_ve_gal: Are_gal => Ave_gal; Qre*(Cre_gal/Kpre_gal)*BP_gal; Flow_re_ve_gal is "outflow lung galactose";
  Flow_ar_gu_gal: Aar_gal => Agu_gal; Qgu*Car_gal; Flow_ar_gu_gal is "inflow gut galactose";
  Flow_gu_li_gal: Agu_gal => Ali_gal; Qgu*(Cgu_gal/Kpgu_gal)*BP_gal; Flow_gu_li_gal is "outflow gut galactose";
  Flow_ar_ki_gal: Aar_gal => Aki_gal; Qki*Car_gal; Flow_ar_ki_gal is "inflow kidney galactose";
  Flow_ki_ve_gal: Aki_gal => Ave_gal; Qki*(Cki_gal/Kpki_gal)*BP_gal; Flow_ki_ve_gal is "outflow kidney galactose";
  Flow_ar_sp_gal: Aar_gal => Asp_gal; Qsp*Car_gal; Flow_ar_sp_gal is "inflow spleen galactose";
  Flow_sp_li_gal: Asp_gal => Ali_gal; Qsp*(Csp_gal/Kpsp_gal)*BP_gal; Flow_sp_li_gal is "outflow spleen galactose";
  Flow_ar_li_gal: Aar_gal => Ali_gal; Qha*Car_gal; Flow_ar_li_gal is "inflow liver galactose";
  Flow_li_ve_gal: Ali_gal => Ave_gal; Qh*(Cli_gal/Kpli_gal)*BP_gal; Flow_li_ve_gal is "outflow liver galactose";

  // Unit definitions:
  unit h = 3600 second;
  unit s = second;
  unit kg = 1000 gram;
  unit m = metre;
  unit m2 = metre^2;
  unit per_h = 1 / (3600 second);
  unit per_min = 1 / (60 second);
  unit cm = 0.01 metre;
  unit mg = 1e-3 gram;
  unit mmole = 1e-3 mole;
  unit ml = 1e-3 litre;
  unit mg_per_litre = 1e-3 gram / litre;
  unit mg_per_g = 1e-3 gram / gram;
  unit mg_per_h = 1e-3 gram / (3600 second);
  unit mmole_per_h = 1e-3 mole / (3600 second);
  unit mmole_per_litre = 1e-3 mole / litre;
  unit mM = 1e-3 mole / litre;
  unit litre_per_h = litre / (3600 second);
  unit litre_per_kg = litre / (1000 gram);
  unit mulitre_per_min_mg = 1e-6 litre / (60 second * 1e-3 gram);
  unit g_per_mole = gram / mole;
  unit m2_per_kg = metre^2 / (1000 gram);
  unit mug_per_hkg = 1e-6 gram / (3600 mole * 1000 gram);
  unit mg_per_min = 1e-3 gram / (60 second);
  unit mmole_per_min = 1e-3 mole / (60 second);
  unit mmole_per_minkg = 1e-3 mole / (60 second * 1000 gram);
  unit mmole_per_hm2 = 1e-3 mole / (3600 second * metre^2);
  unit ml_per_s = 1e-3 litre / second;
  unit ml_per_skg = 1e-3 litre / (second * 1000 gram);
  unit min_per_h = 60 second / (3600 second);
  unit s_per_min = 60 second / (3600 second);
  unit s_per_h = second / (3600 second);
  unit mulitre_per_g = 1e-6 litre / gram;
  unit ml_per_litre = 1e-3 litre / litre;
end
