// SBML level 3 version 1

model glucose_brain_5(Vbr, Vext, Aext_glc, Aext_lac)
  // Brain glucose model
  // Description
  // Brain glucose metabolism encoded in SBML format.
  // The content of this model has been carefully created in a manual research effort.
  // This file has been created by Matthias Koenig.
  // Terms of use
  // Copyright © 2018 Matthias Koenig.
  // Redistribution and use of any part of this model, with or without modification, are permitted provided that the following conditions are met:
  // Redistributions of this SBML file must retain the above copyright notice, this list of conditions and the following disclaimer.
  // Redistributions in a different form must reproduce the above copyright notice, this list of conditions and the following disclaimer in the documentation and/or other materials provided with the distribution.
  // This model is distributed in the hope that it will be useful, but WITHOUT ANY WARRANTY; without even the implied warranty of MERCHANTABILITY or FITNESS FOR A PARTICULAR PURPOSE.
  // model units - substance: mmole, time: h, volume: litre, area: m2, length: m, extent: mmole

  // Compartments:
  compartment Vbr = 1.4 litre; Vbr is "brain tissue";
  compartment Vext = 1 litre; Vext is "brain blood";

  // Species:
  substanceOnly species Aext_glc in Vext = 5*Vext; Aext_glc is "glucose";
  substanceOnly species Aext_lac in Vext = 0.8*Vext; Aext_lac is "lactate";
  substanceOnly species Abr_glc in Vbr = 5*Vbr; Abr_glc is "glucose";
  substanceOnly species Abr_lac in Vbr = 0.8*Vbr; Abr_lac is "lactate";

  // Parameters:
  Cext_glc has mM; Cext_glc is "glucose concentration (Vext)";
  Cext_lac has mM; Cext_lac is "lactate concentration (Vext)";
  Cbr_glc has mM; Cbr_glc is "glucose concentration (Vbr)";
  Cbr_lac has mM; Cbr_lac is "lactate concentration (Vbr)";
  GLCIM_Vmax = 1000 mmole_per_hl; GLCIM_Vmax is "Glucose utilization brain";
  GLCIM_Km = 0.1 mM;
  LACIM_Vmax = 1000 mmole_per_hl; LACIM_Vmax is "Glucose utilization brain";
  LACIM_Km = 0.1 mM;
  GLC2LAC_Vmax = 2000 mmole_per_hl; GLC2LAC_Vmax is "Glucose utilization brain";
  GLC2LAC_Km = 0.01 mM;

  // Assignment rules:
  Cext_glc := Aext_glc/Vext;
  Cext_lac := Aext_lac/Vext;
  Cbr_glc := Abr_glc/Vbr;
  Cbr_lac := Abr_lac/Vbr;

  // Reactions:
  GLCIM: Aext_glc -> Abr_glc; GLCIM_Vmax/GLCIM_Km*Vbr*(Cext_glc - Cbr_glc)/(1 + Cext_glc/GLCIM_Km + Cbr_glc/GLCIM_Km); GLCIM is "GLCIM (glc_ext <-> glc)";
  LACIM: Aext_lac -> Abr_lac; LACIM_Vmax/LACIM_Km*Vbr*(Cext_lac - Cbr_lac)/(1 + Cext_lac/LACIM_Km + Cbr_lac/LACIM_Km); LACIM is "LACIM (lac_ext <-> lac)";
  GLC2LAC: Abr_glc => 2 Abr_lac; GLC2LAC_Vmax*Vbr*(Cbr_glc/(Cbr_glc + GLC2LAC_Km)); GLC2LAC is "GLC2LAC (glc -> 2 lac)";

  // Unit definitions:
  unit h = 3600 second;
  unit s = second;
  unit kg = 1000 gram;
  unit m = metre;
  unit m2 = metre^2;
  unit per_h = 1 / (3600 second);
  unit per_min = 1 / (60 second);
  unit mg = 1e-3 gram;
  unit ml = 1e-3 litre;
  unit mmole = 1e-3 mole;
  unit mM = 1e-3 mole / litre;
  unit mmole_per_h = 1e-3 mole / (3600 second);
  unit g_per_mole = gram / mole;
  unit mg_per_litre = 1e-3 gram / litre;
  unit mg_per_g = 1e-3 gram / gram;
  unit ml_per_l = 1e-3 litre / litre;
  unit mmole_per_hl = 1e-3 mole / (3600 second * litre);
end
