// SBML level 3 version 1

model glucose_liver_3(Vli, Vext, Aext_glc, Aext_lac)
  // Liver glucose model
  // Description
  // Hepatic metabolism of glucose encoded in SBML format.
  // The content of this model has been carefully created in a manual research effort.
  // This file has been created by Matthias Koenig.
  // Terms of use
  // Copyright © 2018 Matthias Koenig.
  // Redistribution and use of any part of this model, with or without modification, are permitted provided that the following conditions are met:
  // Redistributions of this SBML file must retain the above copyright notice, this list of conditions and the following disclaimer.
  // Redistributions in a different form must reproduce the above copyright notice, this list of conditions and the following disclaimer in the documentation and/or other materials provided with the distribution.
  // This model is distributed in the hope that it will be useful, but WITHOUT ANY WARRANTY; without even the implied warranty of MERCHANTABILITY or FITNESS FOR A PARTICULAR PURPOSE.
  // model units - substance: mmole, time: h, volume: litre, area: m2, length: m, extent: mmole

  // Compartments:
  compartment Vli = 1.47 litre; Vli is "liver";
  compartment Vext = 1 litre; Vext is "liver blood";

  // Species:
  substanceOnly species Aext_glc in Vext = 5*Vext; Aext_glc is "glucose";
  substanceOnly species Aext_lac in Vext = 0.8*Vext; Aext_lac is "lactate";
  substanceOnly species Ali_glc in Vli = 5*Vli; Ali_glc is "glucose";
  substanceOnly species Ali_lac in Vli = 0.8*Vli; Ali_lac is "lactate";

  // Parameters:
  Cext_glc has mM; Cext_glc is "glucose concentration (Vext)";
  Cext_lac has mM; Cext_lac is "lactate concentration (Vext)";
  Cli_glc has mM; Cli_glc is "glucose concentration (Vli)";
  Cli_lac has mM; Cli_lac is "lactate concentration (Vli)";
  GLCIM_Vmax = 1000 mmole_per_hl; GLCIM_Vmax is "Glucose utilization brain";
  GLCIM_Km = 0.1 mM;
  LACIM_Vmax = 1000 mmole_per_hl; LACIM_Vmax is "Glucose utilization brain";
  LACIM_Km = 0.1 mM;
  LAC2GLC_Vmax = 200 mmole_per_hl; LAC2GLC_Vmax is "Gluconeogenesis [mmole_per_h]";
  LAC2GLC_Km = 0.05 mM;

  // Assignment rules:
  Cext_glc := Aext_glc/Vext;
  Cext_lac := Aext_lac/Vext;
  Cli_glc := Ali_glc/Vli;
  Cli_lac := Ali_lac/Vli;

  // Reactions:
  GLCIM: Aext_glc -> Ali_glc; GLCIM_Vmax/GLCIM_Km*Vli*(Cext_glc - Cli_glc)/(1 + Cext_glc/GLCIM_Km + Cli_glc/GLCIM_Km); GLCIM is "GLCIM (glc_ext <-> glc)";
  LACIM: Aext_lac -> Ali_lac; LACIM_Vmax/LACIM_Km*Vli*(Cext_lac - Cli_lac)/(1 + Cext_lac/LACIM_Km + Cli_lac/LACIM_Km); LACIM is "LACIM (lac_ext <-> lac)";
  LAC2GLC: 2 Ali_lac => Ali_glc; LAC2GLC_Vmax*Vli*(5 mM - Cext_glc)/Cext_glc*(Cli_lac/(Cli_lac + LAC2GLC_Km)); LAC2GLC is "LAC2GLC (2 lac -> glu)";

  // Unit definitions:
  unit h = 3600 second;
  unit s = second;
  unit kg = 1000 gram;
  unit m = metre;
  unit m2 = metre^2;
  unit per_h = 1 / (3600 second);
  unit per_min = 1 / (60 second);
  unit mg = 1e-3 gram;
  unit ml = 1e-3 litre;
  unit mmole = 1e-3 mole;
  unit mM = 1e-3 mole / litre;
  unit mmole_per_h = 1e-3 mole / (3600 second);
  unit g_per_mole = gram / mole;
  unit mg_per_litre = 1e-3 gram / litre;
  unit mg_per_g = 1e-3 gram / gram;
  unit mmole_per_hl = 1e-3 mole / (3600 second * litre);
end
