// SBML level 3 version 1

model glucose_rbc_4(Vpl, glc_ext, lac_ext)
  // Erythrocyte glucose model
  // Description
  // Erythrocyte metabolism of glucose encoded in SBML format.
  // The content of this model has been carefully created in a manual research effort.
  // This file has been created by Matthias Koenig.
  // Terms of use
  // Copyright © 2018 Matthias Koenig.
  // Redistribution and use of any part of this model, with or without modification, are permitted provided that the following conditions are met:
  // Redistributions of this SBML file must retain the above copyright notice, this list of conditions and the following disclaimer.
  // Redistributions in a different form must reproduce the above copyright notice, this list of conditions and the following disclaimer in the documentation and/or other materials provided with the distribution.
  // This model is distributed in the hope that it will be useful, but WITHOUT ANY WARRANTY; without even the implied warranty of MERCHANTABILITY or FITNESS FOR A PARTICULAR PURPOSE.
  // model units - substance: mmole, time: h, volume: litre, area: m2, length: m, extent: mmole

  // Compartments:
  compartment Vpl = 3 litre; Vpl is "plasma";
  compartment Vrbc; Vrbc has litre; Vrbc is "erythrocyte";

  // Species:
  substanceOnly species glc_ext in Vpl = 0; glc_ext is "glucose";
  substanceOnly species lac_ext in Vpl = 0; lac_ext is "lactate";
  substanceOnly species glcRBC in Vrbc = 0; glcRBC is "glucose";
  substanceOnly species lacRBC in Vrbc = 0; lacRBC is "lactate";

  // Parameters:
  alpha = 0.9 dimensionless; alpha is "volume fraction erythrocytes";
  GLCIM_Vmax = 100 mmole_per_h; GLCIM_Vmax is "Glucose import Vmax";
  GLCIM_Km = 0.1 mM; GLCIM_Km is "Glucose import Km";
  LACEX_Vmax = 100 mmole_per_h; LACEX_Vmax is "Lactate export Vmax";
  LACEX_Km = 0.1 mM; LACEX_Km is "Lactate export Km";
  GLC2LAC_Vmax = 5 mmole_per_h; GLC2LAC_Vmax is "Glucose utilization rbc";
  GLC2LAC_Km = 0.1 mM;

  // Assignment rules:
  Vrbc := Vpl*alpha;

  // Reactions:
  GLCIM: glc_ext => glcRBC; GLCIM_Vmax/GLCIM_Km*(glc_ext/Vpl - glcRBC/Vrbc)/(1 + glc_ext/Vpl/GLCIM_Km + glcRBC/Vrbc/GLCIM_Km); GLCIM is "GLCIM (glc_ext -> glcRBC)";
  LACEX: lacRBC => lac_ext; LACEX_Vmax/LACEX_Km*(lacRBC/Vrbc - lac_ext/Vpl)/(1 + lac_ext/Vpl/LACEX_Km + lacRBC/Vrbc/LACEX_Km); LACEX is "LACEX (lacRBC -> Apl_lac)";
  GLC2LAC: glcRBC => 2 lacRBC; GLC2LAC_Vmax*(glcRBC/Vrbc)/(glcRBC/Vrbc + GLC2LAC_Km); GLC2LAC is "GLC2LAC (glcRBC -> 2 lacRBC)";

  // Unit definitions:
  unit h = 3600 second;
  unit s = second;
  unit kg = 1000 gram;
  unit m = metre;
  unit m2 = metre^2;
  unit per_h = 1 / (3600 second);
  unit per_min = 1 / (60 second);
  unit mg = 1e-3 gram;
  unit ml = 1e-3 litre;
  unit mmole = 1e-3 mole;
  unit mM = 1e-3 mole / litre;
  unit mmole_per_h = 1e-3 mole / (3600 second);
  unit g_per_mole = gram / mole;
  unit mg_per_litre = 1e-3 gram / litre;
  unit mg_per_g = 1e-3 gram / gram;
  unit ml_per_l = 1e-3 litre / litre;
  unit mmole_per_hml = 1e-3 mole / (3600 second * 1e-3 litre);
end
