// SBML level 3 version 1

model glucose_brain_4(Vbr, Abr_lac, Abr_ffa, Abr_ala, Abr_ins, Abr_glu, Abr_epi, Abr_glc)
  // Liver glucose model
  // Description
  // Hepatic metabolism of glucose encoded in SBML format.
  // The content of this model has been carefully created in a manual research effort.
  // This file has been created by Matthias Koenig.
  // Terms of use
  // Copyright © 2018 Matthias Koenig.
  // Redistribution and use of any part of this model, with or without modification, are permitted provided that the following conditions are met:
  // Redistributions of this SBML file must retain the above copyright notice, this list of conditions and the following disclaimer.
  // Redistributions in a different form must reproduce the above copyright notice, this list of conditions and the following disclaimer in the documentation and/or other materials provided with the distribution.
  // This model is distributed in the hope that it will be useful, but WITHOUT ANY WARRANTY; without even the implied warranty of MERCHANTABILITY or FITNESS FOR A PARTICULAR PURPOSE.
  // model units - substance: mmole, time: h, volume: litre, area: m2, length: m, extent: mmole

  // Compartments:
  compartment Vbr = 1.4 litre; Vbr is "brain";

  // Species:
  substanceOnly species Abr_lac in Vbr = 0; Abr_lac is "lactate";
  substanceOnly species Abr_ffa in Vbr = 0; Abr_ffa is "FFA";
  substanceOnly species Abr_ala in Vbr = 0; Abr_ala is "alanine";
  substanceOnly species Abr_ins in Vbr = 0; Abr_ins is "insulin";
  substanceOnly species Abr_glu in Vbr = 0; Abr_glu is "glucagon";
  substanceOnly species Abr_epi in Vbr = 0; Abr_epi is "epinephrine";
  substanceOnly species Abr_glc in Vbr = 0; Abr_glc is "glucose";

  // Parameters:
  Mr_glc = 180.16 g_per_mole; Mr_glc is "molecular weight glc [g/mole]";
  Mr_lac = 89.07 g_per_mole; Mr_lac is "molecular weight lac [g/mole]";
  Mr_ffa = 256.43 g_per_mole; Mr_ffa is "molecular weight ffa [g/mole]";
  Cbr_lac has mM; Cbr_lac is "lactate [mM]";
  Cbr_ffa has mM; Cbr_ffa is "FFA [mM]";
  Cbr_ala has mM; Cbr_ala is "alanine [mM]";
  Cbr_ins has mM; Cbr_ins is "insulin [mM]";
  Cbr_glu has mM; Cbr_glu is "glucagon [mM]";
  Cbr_epi has mM; Cbr_epi is "epinephrine [mM]";
  Cbr_glc has mM; Cbr_glc is "glucose [mM]";
  Xbr_lac has mg; Xbr_lac is "lactate [mg]";
  Mbr_lac has mg_per_litre; Mbr_lac is "lactate [mg/l]";
  Xbr_ffa has mg; Xbr_ffa is "FFA [mg]";
  Mbr_ffa has mg_per_litre; Mbr_ffa is "FFA [mg/l]";
  Xbr_glc has mg; Xbr_glc is "glucose [mg]";
  Mbr_glc has mg_per_litre; Mbr_glc is "glucose [mg/l]";
  GLC2LAC_Vmax = 0.01865 mmole_per_hml; GLC2LAC_Vmax is "Glucose utilization brain";
  GLC2LAC_Km = 0.01 mM;

  // Assignment rules:
  Cbr_lac := Abr_lac/Vbr;
  Cbr_ffa := Abr_ffa/Vbr;
  Cbr_ala := Abr_ala/Vbr;
  Cbr_ins := Abr_ins/Vbr;
  Cbr_glu := Abr_glu/Vbr;
  Cbr_epi := Abr_epi/Vbr;
  Cbr_glc := Abr_glc/Vbr;
  Xbr_lac := Abr_lac*Mr_lac;
  Mbr_lac := Cbr_lac*Mr_lac;
  Xbr_ffa := Abr_ffa*Mr_ffa;
  Mbr_ffa := Cbr_ffa*Mr_ffa;
  Xbr_glc := Abr_glc*Mr_glc;
  Mbr_glc := Cbr_glc*Mr_glc;

  // Reactions:
  GLC2LAC: Abr_glc => 2 Abr_lac; GLC2LAC_Vmax*Vbr*1000 ml_per_l*(Cbr_glc/(Cbr_glc + GLC2LAC_Km)); GLC2LAC is "GLC2LAC (glc -> 2 lac)";

  // Unit definitions:
  unit h = 3600 second;
  unit s = second;
  unit kg = 1000 gram;
  unit m = metre;
  unit m2 = metre^2;
  unit per_h = 1 / (3600 second);
  unit per_min = 1 / (60 second);
  unit mg = 1e-3 gram;
  unit ml = 1e-3 litre;
  unit mmole = 1e-3 mole;
  unit mM = 1e-3 mole / litre;
  unit mmole_per_h = 1e-3 mole / (3600 second);
  unit g_per_mole = gram / mole;
  unit mg_per_litre = 1e-3 gram / litre;
  unit mg_per_g = 1e-3 gram / gram;
  unit ml_per_l = 1e-3 litre / litre;
  unit mmole_per_hml = 1e-3 mole / (3600 second * 1e-3 litre);
end
