// SBML level 3 version 1

model full_model()
  // full_model
  // Description
  // Example demonstrating more complete information in SBML model.
  // The content of this model has been carefully created in a manual research effort.
  // This file has been created by Matthias Koenig.
  // Terms of use
  // Copyright © 2021 Matthias Koenig.
  // Redistribution and use of any part of this model, with or without modification, are permitted provided that the following conditions are met:
  // Redistributions of this SBML file must retain the above copyright notice, this list of conditions and the following disclaimer.
  // Redistributions in a different form must reproduce the above copyright notice, this list of conditions and the following disclaimer in the documentation and/or other materials provided with the distribution.
  // This model is distributed in the hope that it will be useful, but WITHOUT ANY WARRANTY; without even the implied warranty of MERCHANTABILITY or FITNESS FOR A PARTICULAR PURPOSE.
  // model units - substance: mmole, time: min, volume: litre, area: m2, length: m, extent: mmole

  // Compartments:
  // Overall cell compartment with volume set to an arbitrary value of 1.0.
  compartment cell = 1 litre;  // SBO:0000290 ncit:C48694

  // Species:
  // Species represents D-glucopyranose.
  species glucose in cell = 10;  // SBO:0000247 CHEBI:4167 inchikey:WQZGKKKJIJFFOK-GASJEMHNSA-N
  species glucose_6_phosphate in cell = 10; glucose_6_phosphate is "glucose 6-phosphate";  // SBO:0000247 CHEBI:58225

  // Parameters:
  k1 = 0.1 litre_per_min;
  J0_lb = 0 mmole_per_min; J0_lb is "lower flux bound J0";
  J0_ub = 1000 mmole_per_min; J0_ub is "upper flux bound J0";

  // Reactions:
  // Simplified hexokinase reaction ignoring ATP, ADP cofactors.Reaction is not mass and charge balanced.
  J0: glucose => glucose_6_phosphate; k1*glucose; J0 is "hexokinase";  // uniprot:P17710

  // Constraints:
  constraint J0 >= J0_lb;
  constraint J0 >= J0_ub;

  // Unit definitions:
  unit m = metre;
  unit m2 = metre^2;
  unit min = 60 second;
  unit mmole = 1e-3 mole;
  unit mM = 1e-3 mole / litre;
  unit mmole_per_min = 1e-3 mole / (60 second);
  unit litre_per_min = litre / (60 second);
end
