// SBML level 3 version 1
// Created with https://github.com/matthiaskoenig/sbmlutils.

model annotation()
  // model with inline annotations
  // Model with inline annotations
  // Test model demonstrating inline annotations.
  // Terms of use
  // The content of this model has been carefully created in a manual research effort. This file has been created by Matthias König using sbmlutils. For questions contact koenigmx@hu-berlin.de.
  // Copyright © 2021 Matthias König.
  // This work is licensed under a Creative Commons Attribution 4.0 International License.
  // Redistribution and use of any part of this model, with or without modification, are permitted provided that the following conditions are met:
  // Redistributions of this SBML file must retain the above copyright notice, this list of conditions and the following disclaimer.
  // Redistributions in a different form must reproduce the above copyright notice, this list of conditions and the following disclaimer in the documentation and/or other materials provided with the distribution.
  // This model is distributed in the hope that it will be useful, but WITHOUT ANY WARRANTY; without even the implied warranty of MERCHANTABILITY or FITNESS FOR A PARTICULAR PURPOSE.
  // model units - substance: mole, time: second, volume: m3, area: m2, length: metre, extent: mole

  // Compartments:
  compartment ext = Vol_e; ext has m3; ext is "external";  // SBO:0000290 BTO:0000089
  compartment cyto; cyto has m3; cyto is "cytosol";  // SBO:0000290 GO:0005829
  compartment pm = A_m; pm has m2; pm is "membrane";  // 2-D; SBO:0000290 GO:0005886

  // Species:
  species $e__gal in ext = 3; e__gal is "D-galactose";  // SBO:0000247 bigg.metabolite:gal CHEBI:28061 vmhmetabolite:gal
  species c__gal in cyto = 0.00012; c__gal is "D-galactose";  // SBO:0000247

  // Parameters:
  x_cell = 2.5e-5 metre; x_cell is "cell diameter";
  Vol_e = 1e-12 m3; Vol_e is "external volume";
  A_m = 1 m2; A_m is "membrane area";
  Vol_c = x_cell*x_cell*x_cell; Vol_c has m3;
  GLUT2_Vmax = 1e-13 mole_per_s;
  GLUT2_k_gal = 1 mM;
  GLUT2_keq = 1 dimensionless;

  // Assignment rules:
  cyto := Vol_c;

  // Reactions:
  e__GLUT2_GAL: $e__gal -> c__gal; GLUT2_Vmax/GLUT2_k_gal*(e__gal - c__gal/GLUT2_keq)/(1 + c__gal/GLUT2_k_gal + e__gal/GLUT2_k_gal); e__GLUT2_GAL is "galactose transport [e__]";  // SBO:0000284

  // Unit definitions:
  unit kg = 1000 gram;
  unit m2 = metre^2; m2 is "meter^2";
  unit m3 = metre^3; m3 is "meter^3";
  unit mM = 1e-3 mole / litre; mM is "mmole/l";
  unit mole_per_s = mole / second; mole_per_s is "mole/s";
  unit per_s = 1 / second; per_s is "1/s";
end
