// SBML level 3 version 1
// Created with https://github.com/matthiaskoenig/sbmlutils.

model assignment_example()
  // Example model for testing InitialAssignments in roadrunner.
  // ## Terms of use
  // The content of this model has been carefully created in a manual research effort.
  // This file has been created by [Matthias König](https://livermetabolism.com)
  // using <a href="">[sbmlutils](https://github.com/matthiaskoenig/sbmlutils)</a>.
  // For questions contact koenigmx@hu-berlin.de.
  // <a href="https://livermetabolism.com">
  // <img src="https://livermetabolism.com/img/people/koenig.png" width="80"></img>
  // </a>
  // Copyright © 2021 Matthias König.
  // <a rel="license" href="http://creativecommons.org/licenses/by/4.0/">
  // <img alt="Creative Commons License" style="border-width:0" src="https://i.creativecommons.org/l/by/4.0/88x31.png" /></a><br />This work is licensed under a <a rel="license" href="http://creativecommons.org/licenses/by/4.0/">Creative Commons Attribution 4.0 International License</a>.
  // Redistribution and use of any part of this model, with or without modification,
  // are permitted provided that the following conditions are met:
  // 1. Redistributions of this SBML file must retain the above copyright notice, this
  // list of conditions and the following disclaimer.
  // 2. Redistributions in a different form must reproduce the above copyright notice,
  // this list of conditions and the following disclaimer in the documentation and/or
  // other materials provided with the distribution.
  // This model is distributed in the hope that it will be useful, but WITHOUT ANY
  // WARRANTY; without even the implied warranty of MERCHANTABILITY or FITNESS
  // FOR A PARTICULAR PURPOSE.
  // model units - substance: mg, time: hr, volume: litre, area: m2, length: metre, extent: mg

  // Parameters:
  Ave = IVDOSE; Ave has mg;
  D = PODOSE; D has mg;
  IVDOSE = 0 mg;
  PODOSE = 100 mg;
  k1 = 0.1 l_per_hr;
  BW = 70 kg;
  FVve = 0.0514 l_per_kg;
  Cve has mg_per_l;
  Vve has litre;

  // Assignment rules:
  Cve := Ave/Vve;
  Vve := BW*FVve;

  // Rate rules:
  Ave' = -k1*Cve;

  // Unit definitions:
  unit hr = 3600 second;
  unit kg = 1000 gram;
  unit l_per_hr = (6.524779e-3 metre)^3 / second; l_per_hr is "liter/hr";
  unit l_per_kg = (0.1 metre)^3 / (1e-3 gram); l_per_kg is "liter/kg";
  unit m2 = metre^2; m2 is "meter^2";
  unit mg = 1e-3 gram;
  unit mg_per_hr = 2.777778e-7 gram / second; mg_per_hr is "mg/hr";
  unit mg_per_l = gram / metre^3; mg_per_l is "mg/liter";
end
