// SBML level 3 version 1
// Created with https://github.com/matthiaskoenig/sbmlutils.

model fbc_mass_charge()
  // fbc model with mass and charge balance
  // Model demonstrating mass and charge balance
  // Description
  // Test model demonstrating inline annotations.
  // Terms of use
  // The content of this model has been carefully created in a manual research effort. This file has been created by Matthias König using sbmlutils. For questions contact koenigmx@hu-berlin.de.
  // Copyright © 2021 Matthias König.
  // This work is licensed under a Creative Commons Attribution 4.0 International License.
  // Redistribution and use of any part of this model, with or without modification, are permitted provided that the following conditions are met:
  // Redistributions of this SBML file must retain the above copyright notice, this list of conditions and the following disclaimer.
  // Redistributions in a different form must reproduce the above copyright notice, this list of conditions and the following disclaimer in the documentation and/or other materials provided with the distribution.
  // This model is distributed in the hope that it will be useful, but WITHOUT ANY WARRANTY; without even the implied warranty of MERCHANTABILITY or FITNESS FOR A PARTICULAR PURPOSE.
  // model units - substance: mole, time: second, volume: m3, area: m2, length: metre, extent: mole

  // Compartments:
  compartment cyto; cyto has m3; cyto is "cytosol";  // SBO:0000290 GO:0005829

  // Species:
  species $glc in cyto = 3; glc is "D-glucose";  // SBO:0000247 vmhmetabolite:glc_D bigg.metabolite:glc__D kegg.compound:C00031
  species $atp in cyto = 3; atp is "ATP";  // SBO:0000247 vmhmetabolite:atp
  species $glc6p in cyto = 3; glc6p is "glucose-6 phosphate";  // SBO:0000247 vmhmetabolite:g6p
  species $adp in cyto = 3; adp is "ADP";  // SBO:0000247 vmhmetabolite:adp
  species $h in cyto = 3; h is "H+";  // SBO:0000247 vmhmetabolite:h

  // Parameters:
  HEX1_v = 1 mole_per_s;

  // Assignment rules:
  cyto := 1 m3;

  // Reactions:
  HEX1: $glc + $atp => $glc6p + $adp + $h; HEX1_v; HEX1 is "Hexokinase (D-Glucose:ATP)";  // SBO:0000176 vmhreaction:HEX1 ec-code:2.7.1.1 ec-code:2.7.1.2

  // Unit definitions:
  unit m2 = metre^2; m2 is "meter^2";
  unit m3 = metre^3; m3 is "meter^3";
  unit mole_per_s = mole / second; mole_per_s is "mole/s";
end
