// SBML level 3 version 1
// Created with https://github.com/matthiaskoenig/sbmlutils.

model linear_chain()
  // Linear chain
  // Example model for the programatic creation of a linear chain.
  // Terms of use
  // The content of this model has been carefully created in a manual research effort. This file has been created by Matthias König using sbmlutils. For questions contact koenigmx@hu-berlin.de. Copyright © 2022 Matthias König.
  // This work is licensed under a Creative Commons Attribution 4.0 International License.
  // Redistribution and use of any part of this model, with or without modification, are permitted provided that the following conditions are met:
  // Redistributions of this SBML file must retain the above copyright notice, this list of conditions and the following disclaimer.
  // Redistributions in a different form must reproduce the above copyright notice, this list of conditions and the following disclaimer in the documentation and/or other materials provided with the distribution.
  // This model is distributed in the hope that it will be useful, but WITHOUT ANY WARRANTY; without even the implied warranty of MERCHANTABILITY or FITNESS FOR A PARTICULAR PURPOSE.

  // Compartments:
  compartment cell = 1;

  // Species:
  species S1 in cell = 10;
  species Species_2 in cell = 0;
  species Species_3 in cell = 0;
  species Species_4 in cell = 0;
  species Species_5 in cell = 0;
  species Species_6 in cell = 0;
  species Species_7 in cell = 0;
  species Species_8 in cell = 0;
  species Species_9 in cell = 0;
  species Species_10 in cell = 0;
  species Species_11 in cell = 0;
  species Species_12 in cell = 0;
  species Species_13 in cell = 0;
  species Species_14 in cell = 0;
  species Species_15 in cell = 0;
  species Species_16 in cell = 0;
  species Species_17 in cell = 0;
  species Species_18 in cell = 0;
  species Species_19 in cell = 0;
  species Species_20 in cell = 0;
  species Species_21 in cell = 0;

  // Parameters:
  k1 = 0.1; k1 is "rate constant 1";
  k2 = 0.1; k2 is "rate constant 2";
  k3 = 0.1; k3 is "rate constant 3";
  k4 = 0.1; k4 is "rate constant 4";
  k5 = 0.1; k5 is "rate constant 5";
  k6 = 0.1; k6 is "rate constant 6";
  k7 = 0.1; k7 is "rate constant 7";
  k8 = 0.1; k8 is "rate constant 8";
  k9 = 0.1; k9 is "rate constant 9";
  k10 = 0.1; k10 is "rate constant 10";
  k11 = 0.1; k11 is "rate constant 11";
  k12 = 0.1; k12 is "rate constant 12";
  k13 = 0.1; k13 is "rate constant 13";
  k14 = 0.1; k14 is "rate constant 14";
  k15 = 0.1; k15 is "rate constant 15";
  k16 = 0.1; k16 is "rate constant 16";
  k17 = 0.1; k17 is "rate constant 17";
  k18 = 0.1; k18 is "rate constant 18";
  k19 = 0.1; k19 is "rate constant 19";
  k20 = 0.1; k20 is "rate constant 20";

  // Reactions:
  J1: S1 => Species_2; k1*S1;
  J2: Species_2 => Species_3; k2*Species_2;
  J3: Species_3 => Species_4; k3*Species_3;
  J4: Species_4 => Species_5; k4*Species_4;
  J5: Species_5 => Species_6; k5*Species_5;
  J6: Species_6 => Species_7; k6*Species_6;
  J7: Species_7 => Species_8; k7*Species_7;
  J8: Species_8 => Species_9; k8*Species_8;
  J9: Species_9 => Species_10; k9*Species_9;
  J10: Species_10 => Species_11; k10*Species_10;
  J11: Species_11 => Species_12; k11*Species_11;
  J12: Species_12 => Species_13; k12*Species_12;
  J13: Species_13 => Species_14; k13*Species_13;
  J14: Species_14 => Species_15; k14*Species_14;
  J15: Species_15 => Species_16; k15*Species_15;
  J16: Species_16 => Species_17; k16*Species_16;
  J17: Species_17 => Species_18; k17*Species_17;
  J18: Species_18 => Species_19; k18*Species_18;
  J19: Species_19 => Species_20; k19*Species_19;
  J20: Species_20 => Species_21; k20*Species_20;
end
