// SBML level 3 version 1
// Created with https://github.com/matthiaskoenig/sbmlutils.

model minimal_model(cell, S1)
  // GO:0008152
  // hasTaxon taxonomy:9606

  // Compartments:
  compartment cell = 1;  // SBO:0000290 GO:0005623 FMA:68646

  // Species:
  species S1 in cell = 10;  // SBO:0000247 CHEBI:4167 kegg.compound:C00031
  species S2 in cell = 0;  // SBO:0000247 CHEBI:58225; isVersionOf kegg.compound:C00668

  // Parameters:
  k1 = 0.1; k1 is "rate constant for J0";  // SBO:0000002 SBO:0000027

  // Reactions:
  J0: S1 => S2; k1*S1;  // SBO:0000176; isVersionOf ec-code:2.7.1.2 uniprot:P35557 kegg.reaction:R01092 rhea:36495
end
