// SBML level 3 version 1
// Created with https://github.com/matthiaskoenig/sbmlutils.

model minimal_model_comp()
  // Hierarchical model reusing the minimal model in composite model coupling.

  // Compartments:
  compartment cell0 = 1;
  compartment cell1 = 1;
  compartment cell2 = 1;
  compartment cell3 = 1;
  compartment cell4 = 1;
  compartment cell5 = 1;
  compartment cell6 = 1;
  compartment cell7 = 1;
  compartment cell8 = 1;
  compartment cell9 = 1;

  // Species:
  species S0 in cell0 = 10;
  species S1 in cell1 = 0;
  species S2 in cell2 = 0;
  species S3 in cell3 = 0;
  species S4 in cell4 = 0;
  species S5 in cell5 = 0;
  species S6 in cell6 = 0;
  species S7 in cell7 = 0;
  species S8 in cell8 = 0;
  species S9 in cell9 = 0;
  species submodel0__S2 in cell0 = 0;
  species submodel1__S2 in cell1 = 0;
  species submodel2__S2 in cell2 = 0;
  species submodel3__S2 in cell3 = 0;
  species submodel4__S2 in cell4 = 0;
  species submodel5__S2 in cell5 = 0;
  species submodel6__S2 in cell6 = 0;
  species submodel7__S2 in cell7 = 0;
  species submodel8__S2 in cell8 = 0;
  species submodel9__S2 in cell9 = 0;

  // Parameters:
  D = 0.01;
  submodel0__k1 = 0.1;
  submodel1__k1 = 0.1;
  submodel2__k1 = 0.1;
  submodel3__k1 = 0.1;
  submodel4__k1 = 0.1;
  submodel5__k1 = 0.1;
  submodel6__k1 = 0.1;
  submodel7__k1 = 0.1;
  submodel8__k1 = 0.1;
  submodel9__k1 = 0.1;

  // Reactions:
  J0: S0 -> S1; D*(S0 - S1);
  J1: S1 -> S2; D*(S1 - S2);
  J2: S2 -> S3; D*(S2 - S3);
  J3: S3 -> S4; D*(S3 - S4);
  J4: S4 -> S5; D*(S4 - S5);
  J5: S5 -> S6; D*(S5 - S6);
  J6: S6 -> S7; D*(S6 - S7);
  J7: S7 -> S8; D*(S7 - S8);
  J8: S8 -> S9; D*(S8 - S9);
  submodel0__J0: S0 => submodel0__S2; submodel0__k1*submodel0__S2;
  submodel1__J0: S1 => submodel1__S2; submodel1__k1*submodel1__S2;
  submodel2__J0: S2 => submodel2__S2; submodel2__k1*submodel2__S2;
  submodel3__J0: S3 => submodel3__S2; submodel3__k1*submodel3__S2;
  submodel4__J0: S4 => submodel4__S2; submodel4__k1*submodel4__S2;
  submodel5__J0: S5 => submodel5__S2; submodel5__k1*submodel5__S2;
  submodel6__J0: S6 => submodel6__S2; submodel6__k1*submodel6__S2;
  submodel7__J0: S7 => submodel7__S2; submodel7__k1*submodel7__S2;
  submodel8__J0: S8 => submodel8__S2; submodel8__k1*submodel8__S2;
  submodel9__J0: S9 => submodel9__S2; submodel9__k1*submodel9__S2;
end
