// SBML level 3 version 1
// Created with https://github.com/matthiaskoenig/sbmlutils.

model multiple_substance_units()
  // model with multiple substance units
  // Example model for multiple substance units
  // The substance units for species are restricted to a single substance unit so that reaction rates are in [substance_units/time_units] in an SBML model.
  // Applying species conversion factors allows to have distinct subsets of species with different units in a single model.
  // A typical example is the combination of metabolic compounds (simple chemicals) often in mmole with proteins in a single model.
  // Terms of use
  // The content of this model has been carefully created in a manual research effort. This file has been created by Matthias König using sbmlutils. For questions contact koenigmx@hu-berlin.de.
  // Copyright © 2021 Matthias König.
  // This work is licensed under a Creative Commons Attribution 4.0 International License.
  // Redistribution and use of any part of this model, with or without modification, are permitted provided that the following conditions are met:
  // Redistributions of this SBML file must retain the above copyright notice, this list of conditions and the following disclaimer.
  // Redistributions in a different form must reproduce the above copyright notice, this list of conditions and the following disclaimer in the documentation and/or other materials provided with the distribution.
  // This model is distributed in the hope that it will be useful, but WITHOUT ANY WARRANTY; without even the implied warranty of MERCHANTABILITY or FITNESS FOR A PARTICULAR PURPOSE.
  // model units - substance: mmole, time: min, volume: litre, area: m2, length: metre, extent: mmole

  // Compartments:
  compartment cyto = 1 litre; cyto is "cytosol";  // SBO:0000290

  // Species:
  species glc in cyto = 3; glc is "D-glucose";  // SBO:0000247
  species glc6p in cyto = 0.5; glc6p is "D-glucose 6-phosphate";  // SBO:0000247
  // extent * conversionfactor = substanceUnit
  // mmole * 1/mmole = dimensionless
  substanceOnly species hex1 in cyto = 1*cyto; hex1 is "hexokinase protein";  // substance in dimensionless; conversionFactor cf_units_per_mmole; SBO:0000245

  // Parameters:
  cf_units_per_mmole = 1 per_mmole; cf_units_per_mmole is "dimensionless species conversion";  // SBO:0000002
  HEX1SYNTHESIS_k = 1 mmole_per_min;  // SBO:0000186
  HEX1_Vmax = 1 mmole_per_min;  // SBO:0000186
  HEX1_Km_glc = 0.1 mM;  // SBO:0000027

  // Reactions:
  HEX1SYNTHESIS: => hex1; HEX1SYNTHESIS_k; HEX1SYNTHESIS is "hexokinase synthesis";  // SBO:0000176
  HEX1: glc => glc6p; HEX1_Vmax*hex1*glc/(HEX1_Km_glc + glc); HEX1 is "hexokinase";  // modifiers: hex1; SBO:0000176

  // Unit definitions:
  unit kg = 1000 gram;
  unit m2 = metre^2; m2 is "meter^2";
  unit m3 = metre^3; m3 is "meter^3";
  unit mM = 1e-3 mole / litre; mM is "mmole/liter";
  unit min = 60 second;
  unit mmole = 1e-3 mole;
  unit mmole_per_min = 1e-3 mole / (60 second); mmole_per_min is "mmole/min";
  unit per_min = 1 / (60 second); per_min is "1/min";
  unit per_mmole = 1 / (1e-3 mole); per_mmole is "1/mmole";
end
