// SBML level 3 version 1
// Created with https://github.com/matthiaskoenig/sbmlutils.

model reaction()
  // model with reaction
  // Reaction definition
  // This example demonstrates the creation of reactions with constant or variable stoichiometry.
  // Terms of use
  // The content of this model has been carefully created in a manual research effort. This file has been created by Matthias König using sbmlutils. For questions contact koenigmx@hu-berlin.de. Copyright © 2022 Matthias König.
  // This work is licensed under a Creative Commons Attribution 4.0 International License.
  // Redistribution and use of any part of this model, with or without modification, are permitted provided that the following conditions are met:
  // Redistributions of this SBML file must retain the above copyright notice, this list of conditions and the following disclaimer.
  // Redistributions in a different form must reproduce the above copyright notice, this list of conditions and the following disclaimer in the documentation and/or other materials provided with the distribution.
  // This model is distributed in the hope that it will be useful, but WITHOUT ANY WARRANTY; without even the implied warranty of MERCHANTABILITY or FITNESS FOR A PARTICULAR PURPOSE.

  // Compartments:
  compartment c = NaN; c is "cytosol";

  // Species:
  species $x in c = 10;  // SBO:0000247
  species y in c = 0;  // SBO:0000247

  // Parameters:
  k1 = 1;

  // Initial assignments:
  v4_x = 2.5;
  v4_y = 5;

  // Assignment rules:
  // Time dependent variable stoichiometry.
  f1 := 1*time;
  // Time dependent variable stoichiometry.
  f2 := 2*time;

  // Reactions:
  // Reaction with constant stoichiometry 1.0.
  v1: $x => y; k1*x;
  // Reaction with constant stoichiometry.
  v2: $x => 2 y; k1*x;
  // Reaction with variable stoichiometry set via AssignmentRules.
  v3: f1 $x => f2 y; k1*x;
  // Reaction with initial assignment of stoichiometry.
  v4: v4_x $x => v4_y y; k1*x;
end
