// SBML level 3 version 1
// Created with https://github.com/matthiaskoenig/sbmlutils.

model simple_reaction_with_units()
  // model reaction with units
  // Model reaction with units
  // This example demonstrates how to create a compartment, species and reaction. The model uses units. Model with single irreversible reaction v1: A -> B.
  // Terms of use
  // The content of this model has been carefully created in a manual research effort. This file has been created by Matthias König using sbmlutils. For questions contact koenigmx@hu-berlin.de. Copyright © 2022 Matthias König.
  // This work is licensed under a Creative Commons Attribution 4.0 International License.
  // Redistribution and use of any part of this model, with or without modification, are permitted provided that the following conditions are met:
  // Redistributions of this SBML file must retain the above copyright notice, this list of conditions and the following disclaimer.
  // Redistributions in a different form must reproduce the above copyright notice, this list of conditions and the following disclaimer in the documentation and/or other materials provided with the distribution.
  // This model is distributed in the hope that it will be useful, but WITHOUT ANY WARRANTY; without even the implied warranty of MERCHANTABILITY or FITNESS FOR A PARTICULAR PURPOSE.
  // model units - substance: mmole, time: s, volume: liter, area: m2, length: m, extent: mmole

  // Compartments:
  compartment cell = 1 liter;  // SBO:0000290

  // Species:
  species A in cell = 10;  // SBO:0000247
  species B in cell = 10;  // SBO:0000247

  // Parameters:
  v1_Vmax = 1 mmole_per_s;
  v1_Km_A = 0.1 mM;

  // Reactions:
  v1_A_B: A => B; v1_Vmax*v1_Km_A/(v1_Km_A + A); v1_A_B is "v1: A -> B";  // SBO:0000176

  // Unit definitions:
  unit liter = litre;
  unit m = metre; m is "meter";
  unit m2 = metre^2; m2 is "meter^2";
  unit mM = 1e-3 mole / litre; mM is "mmole/liter";
  unit mmole = 1e-3 mole;
  unit mmole_per_s = 1e-3 mole / second; mmole_per_s is "mmole/s";
  unit s = second; s is "second";
end
