// SBML level 3 version 1
// Created with https://github.com/matthiaskoenig/sbmlutils.

model icg_liver(Vext, Vli, Vbi, Vfeces, icg_ext, icg_feces)
  // model for icg elimination by the liver
  // Model for icg elimination by the liver
  // Description
  // Model for hepatic elimination of indocyanine green encoded in SBML format.
  // Assumptions:
  // icg is only metabolized in the liver
  // Terms of use
  // The content of this model has been carefully created in a manual research effort. This file has been created by Matthias König using sbmlutils . For questions contact koenigmx@hu-berlin.de.
  // Copyright © 2021 Matthias König.
  // This work is licensed under a Creative Commons Attribution 4.0 International License.
  // Redistribution and use of any part of this model, with or without modification, are permitted provided that the following conditions are met:
  // Redistributions of this SBML file must retain the above copyright notice, this list of conditions and the following disclaimer.
  // Redistributions in a different form must reproduce the above copyright notice, this list of conditions and the following disclaimer in the documentation and/or other materials provided with the distribution.
  // This model is distributed in the hope that it will be useful, but WITHOUT ANY WARRANTY; without even the implied warranty of MERCHANTABILITY or FITNESS FOR A PARTICULAR PURPOSE.
  // model units - substance: mmole, time: min, volume: litre, area: m2, length: metre, extent: mmole

  // Compartments:
  compartment Vext = 4 litre; Vext is "plasma";  // SBO:0000290 ncit:C13356 BTO:0000131
  compartment Vli = 1.5 litre; Vli is "liver";  // SBO:0000290 FMA:7197 BTO:0000759 ncit:C12392
  compartment Vbi = 1 litre; Vbi is "bile";  // SBO:0000290 FMA:62971 ncit:C13192
  compartment Vfeces = 1 litre;  // SBO:0000290 FMA:64183 ncit:C13234 BTO:0000440

  // Species:
  species icg_ext in Vext = 0; icg_ext is "icg (plasma)";  // SBO:0000247 inchikey:MOFVSTNWEDAEEK-UHFFFAOYSA-M CHEBI:31696 ncit:C65913
  // Reference range: 0.01 [mmole/l] (~ 1 mg/dl)
  species $bil_ext in Vext = 0.01; bil_ext is "bilirubin (extern)";  // SBO:0000247 inchikey:BPYKTIZUTYGOLE-IFADSCNNSA-N CHEBI:16990 ncit:C305
  species icg in Vli = 0; icg is "icg (liver)";  // SBO:0000247 inchikey:MOFVSTNWEDAEEK-UHFFFAOYSA-M CHEBI:31696 ncit:C65913
  species icg_bi in Vbi = 0; icg_bi is "icg (bile)";  // SBO:0000247 inchikey:MOFVSTNWEDAEEK-UHFFFAOYSA-M CHEBI:31696 ncit:C65913
  substanceOnly species icg_feces in Vfeces = 0; icg_feces is "icg (feces)";  // SBO:0000247 inchikey:MOFVSTNWEDAEEK-UHFFFAOYSA-M CHEBI:31696 ncit:C65913

  // Parameters:
  ICGIM_Vmax = 0.03695988 mmole_per_min_l; ICGIM_Vmax is "Vmax for icg import";  // SBO:0000186
  ICGIM_Km = 0.02165918 mM; ICGIM_Km is "Km icg of icg import";  // SBO:0000322
  // bilirubin reference range:
  // ~ 0.1 - 5 [g/dl]
  // (10 [mg/l] /584.6623 [g/mole]) ~ 0.0171 mmole/l`
  // setting Ki in reference range
  ICGIM_ki_bil = 0.02 mM; ICGIM_ki_bil is "Ki bilirubin of icg import";  // SBO:0000261
  // Parameter for scaling transport protein amount.
  f_oatp1b3 = 1 dimensionless; f_oatp1b3 is "scaling factor protein amount";  // SBO:0000002
  ICGLI2CA_Vmax = 0.0009436728 mmole_per_min_l; ICGLI2CA_Vmax is "Vmax bile export icg";  // SBO:0000186
  ICGLI2CA_Km = 0.01238866 mM; ICGLI2CA_Km is "Km bile export icg";  // SBO:0000322
  ICGLI2BI_Vmax = 0.0001145966 per_min; ICGLI2BI_Vmax is "Vmax bile transport icg";  // SBO:0000186

  // Reactions:
  // Solute carrier organic anion transporter family member 1B3 (SLCO1B3). Often referred to as OATP1B3. Bilirubin effect was modeled as competitive inhibition.
  ICGIM: icg_ext => icg; f_oatp1b3*ICGIM_Vmax*Vli*icg_ext/(ICGIM_Km*(1 + bil_ext/ICGIM_ki_bil) + icg_ext); ICGIM is "ICG import";  // modifiers: bil_ext; SBO:0000655 uniprot:Q9NPD5 omit:0040643; isEncodedBy ncit:C106617
  // Phosphatidylcholine translocator ABCB4
  ICGLI2CA: icg => icg_bi; ICGLI2CA_Vmax*Vli*icg/(ICGLI2CA_Km + icg); ICGLI2CA is "ICG export (bile)";  // SBO:0000655; isVersionOf uniprot:P21439
  // As simplification transport directly into feces (no information on time course available). No transport proteins involved in the biliary secretion into the duodenum.
  ICGLI2BI: icg_bi => icg_feces; ICGLI2BI_Vmax*Vli*icg_bi; ICGLI2BI is "ICG bile transport";  // SBO:0000655

  // Unit definitions:
  unit m2 = metre^2; m2 is "meter^2";
  unit mM = 1e-3 mole / litre; mM is "mmole/liter";
  unit min = 60 second;
  unit mmole = 1e-3 mole;
  unit mmole_per_min = 1e-3 mole / (60 second); mmole_per_min is "mmole/min";
  unit mmole_per_min_l = 1e-3 mole / (60 second * litre); mmole_per_min_l is "mmole/min/l";
  unit per_min = 1 / (60 second); per_min is "1/min";
end
