// SBML level 3 version 2
// Created with https://github.com/matthiaskoenig/sbmlutils.

model spt_intestine(PODOSE_S, Ka_dis_S, Mr_S, Vext, Vgu, Vlumen, Vfeces, Vstomach, S_lumen, S_ext, S_feces)
  // Model for S absorption in the small intestine
  // Model for S absorption
  // Terms of use
  // The content of this model has been carefully created in a manual research effort. This file has been created by Matthias König using sbmlutils. For questions contact koenigmx@hu-berlin.de. Copyright © 2024 Matthias König.
  // This work is licensed under a Creative Commons Attribution 4.0 International License.
  // Redistribution and use of any part of this model, with or without modification, are permitted provided that the following conditions are met:
  // Redistributions of this SBML file must retain the above copyright notice, this list of conditions and the following disclaimer.
  // Redistributions in a different form must reproduce the above copyright notice, this list of conditions and the following disclaimer in the documentation and/or other materials provided with the distribution.
  // This model is distributed in the hope that it will be useful, but WITHOUT ANY WARRANTY; without even the implied warranty of MERCHANTABILITY or FITNESS FOR A PARTICULAR PURPOSE.
  // model units - substance: mmole, time: min, volume: litre, area: m2, length: metre, extent: mmole

  // Compartments:
  compartment Vext = 1 litre; Vext is "plasma";  // SBO:0000290 ncit:C13356 BTO:0000131
  compartment Vgu = 1.2825 litre; Vgu is "intestine";  // SBO:0000290 FMA:45615 BTO:0000545 ncit:C12736
  compartment Vlumen = 1.15425 litre; Vlumen is "intestinal lumen (inner part of intestine)";  // SBO:0000290 FMA:14586 UBERON:0018543
  compartment Vfeces = 1 litre;  // SBO:0000290 FMA:64183 ncit:C13234 BTO:0000440
  compartment Ventero = 1 litre; Ventero is "intestinal lining (enterocytes)";  // SBO:0000290
  compartment Vapical = NaN; Vapical has m2; Vapical is "apical membrane (intestinal membrane enterocytes)";  // SBO:0000290 FMA:84666 GO:0016324
  compartment Vbaso = NaN; Vbaso has m2; Vbaso is "basolateral membrane (intestinal membrane enterocytes)";  // SBO:0000290 FMA:84669 GO:0016323
  compartment Vstomach = 1 litre;  // SBO:0000290 FMA:7148 ncit:C12391 UBERON:0000945

  // Species:
  substanceOnly species $S_stomach in Vstomach = 0; S_stomach is "S (stomach)";  // SBO:0000247 SBO:0000015 ncit:C120264 bao:0003063
  species S_lumen in Vlumen = 0; S_lumen is "S (intestinal volume)";  // SBO:0000247 SBO:0000015 ncit:C120264 bao:0003063
  species S_ext in Vext = 0; S_ext is "S (plasma)";  // SBO:0000247 SBO:0000015 ncit:C120264 bao:0003063
  substanceOnly species S_feces in Vfeces = 0; S_feces is "S (feces)";  // SBO:0000247 SBO:0000015 ncit:C120264 bao:0003063

  // Parameters:
  // Fraction absorbed, i.e., only a fraction in the intestinal lumen is absorbed. This parameter determines how much of is excreted.
  // F_S_abs of dose is absorbed. (1-F_S_abs) is excreted in feces.
  F_S_abs = 1 dimensionless; F_S_abs is "fraction absorbed S";  // SBO:0000002
  SABS_k = 1 per_min; SABS_k is "rate of S absorption";  // SBO:0000009
  PODOSE_S = 0 mg; PODOSE_S is "oral dose S [mg]";  // SBO:0000002
  POSTOMACH_S = 0 mg; POSTOMACH_S is "oral dose in stomach S [mg]";  // SBO:0000002
  // Fast application to shift applied dose in the stomach.
  Ka_application_S = 1000 per_hr; Ka_application_S is "Ka [1/hr] application S";  // SBO:0000002
  Ka_dis_S = 2 per_hr; Ka_dis_S is "Ka_dis [1/hr] dissolution S";  // SBO:0000002
  Mr_S = 100 g_per_mole; Mr_S is "Molecular weight S [g/mole]";  // SBO:0000647
  absorption has mmole_per_min; absorption is "absorption S";

  // Assignment rules:
  absorption := SABS_k*Vgu*S_lumen;

  // Rate rules:
  PODOSE_S' = -application_S*Mr_S;
  POSTOMACH_S' = (application_S - dissolution_S)*Mr_S;

  // Reactions:
  SABS: S_lumen => S_ext; F_S_abs*absorption; SABS is "absorption S";  // SBO:0000655
  SEXC: S_lumen => S_feces; (1 - F_S_abs)*absorption; SEXC is "excretion S (feces)";  // SBO:0000655
  application_S: => $S_stomach; Ka_application_S/(60 min_per_hr)*PODOSE_S/Mr_S; application_S is "PO application S";
  dissolution_S: $S_stomach => S_lumen; Ka_dis_S/(60 min_per_hr)*POSTOMACH_S/Mr_S;

  // Unit definitions:
  unit g_per_mole = gram / mole; g_per_mole is "g/mole";
  unit l_per_min = litre / (60 second); l_per_min is "l/min";
  unit m2 = metre^2; m2 is "meter^2";
  unit mM = 1e-3 mole / litre; mM is "mmole/liter";
  unit mg = 1e-3 gram;
  unit mg_per_min = 1e-3 gram / (60 second); mg_per_min is "mg/min";
  unit mg_per_s_l = 1e-3 gram / (second * litre); mg_per_s_l is "mg/s/l";
  unit min = 60 second;
  unit min_per_hr = 60 second / (3600 second); min_per_hr is "min/hour";
  unit mmole = 1e-3 mole;
  unit mmole_per_min = 1e-3 mole / (60 second); mmole_per_min is "mmole/min";
  unit mmole_per_min_l = 1e-3 mole / (60 second * litre); mmole_per_min_l is "mmole/min/l";
  unit per_hr = 1 / (3600 second); per_hr is "1/hr";
  unit per_min = 1 / (60 second); per_min is "1/min";
  unit per_mmole = 1 / (1e-3 mole); per_mmole is "1/mmole";
end
