// SBML level 3 version 2
// Created with https://github.com/matthiaskoenig/sbmlutils.

model spt_kidney(Vext, Vki, Vurine, P_ext, P_urine)
  // Model for hepatic S -> P + T metabolism in the liver
  // Model for renal metabolism of product (P) encoded in SBML format.
  // The model consists of of a single kidney compartment which can excrete the product P.
  // version: 1
  // Changelog
  // version 1
  // initial model version
  // Terms of use
  // The content of this model has been carefully created in a manual research effort. This file has been created by Matthias König using sbmlutils. For questions contact koenigmx@hu-berlin.de. Copyright © 2024 Matthias König.
  // This work is licensed under a Creative Commons Attribution 4.0 International License.
  // Redistribution and use of any part of this model, with or without modification, are permitted provided that the following conditions are met:
  // Redistributions of this SBML file must retain the above copyright notice, this list of conditions and the following disclaimer.
  // Redistributions in a different form must reproduce the above copyright notice, this list of conditions and the following disclaimer in the documentation and/or other materials provided with the distribution.
  // This model is distributed in the hope that it will be useful, but WITHOUT ANY WARRANTY; without even the implied warranty of MERCHANTABILITY or FITNESS FOR A PARTICULAR PURPOSE.
  // model units - substance: mmole, time: min, volume: litre, area: m2, length: metre, extent: mmole

  // Compartments:
  compartment Vext = 4 litre; Vext is "plasma";  // SBO:0000290 ncit:C13356 BTO:0000131
  compartment Vki = 1.5 litre; Vki is "kidney";  // SBO:0000290 FMA:7203 BTO:0000671 ncit:C12415
  compartment Vurine = 1 litre;  // SBO:0000290 FMA:12274 ncit:C13283 BTO:0001419

  // Species:
  species P_ext in Vext = 0; P_ext is "product P (plasma)";  // SBO:0000247 SBO:0000011 ncit:C51980 bao:0003067
  // Urinary species are in amounts.
  substanceOnly species P_urine in Vurine = 0; P_urine is "product P (urine)";  // SBO:0000247 SBO:0000011 ncit:C51980 bao:0003067

  // Parameters:
  PEX_k = 1 per_min; PEX_k is "rate urinary excretion Pvastatin metabolites";  // SBO:0000009

  // Reactions:
  PEX: P_ext => P_urine; PEX_k*Vki*P_ext; PEX is "excretion P";  // SBO:0000655 ncit:C75913

  // Unit definitions:
  unit g_per_mole = gram / mole; g_per_mole is "g/mole";
  unit l_per_min = litre / (60 second); l_per_min is "l/min";
  unit m2 = metre^2; m2 is "meter^2";
  unit mM = 1e-3 mole / litre; mM is "mmole/liter";
  unit mg = 1e-3 gram;
  unit mg_per_s_l = 1e-3 gram / (second * litre); mg_per_s_l is "mg/s/l";
  unit min = 60 second;
  unit min_per_hr = 60 second / (3600 second); min_per_hr is "min/hour";
  unit mmole = 1e-3 mole;
  unit mmole_per_min = 1e-3 mole / (60 second); mmole_per_min is "mmole/min";
  unit mmole_per_min_l = 1e-3 mole / (60 second * litre); mmole_per_min_l is "mmole/min/l";
  unit per_min = 1 / (60 second); per_min is "1/min";
  unit per_mmole = 1 / (1e-3 mole); per_mmole is "1/mmole";
end
