// SBML level 3 version 2
// Created with https://github.com/matthiaskoenig/sbmlutils.

model spt_liver(f_metabolism, f_tpm, position, pattern, Vext, Vli, S_ext, P_ext)
  // Model for hepatic S -> P + T metabolism in the liver
  // Model for hepatic metabolism of substrate (S) to product (P) and toxic byproduct (T) encoded in SBML format.
  // The model consists of of a single liver compartment with single metabolic conversion reaction which converts the substrate S to the product P and a toxic byproduct T S -> P + T. The product P can be exported from the liver with the toxic side product T being confined to the liver.
  // If the hepatic concentration of the toxic substance T reaches a critical threshold necrosis is initiated.
  // version: 0.6.0
  // Changelog
  // version 0.6.0
  // inflows and outflows for model coupling added
  // version 0.5.4
  // typo fix: TDETOX_Km_napqi -> TDETOX_Km_T
  // version 0.5.3
  // fixed switching thresholds for C++ export
  // additional annotations and documentation
  // removed source reactions
  // version 0.5
  // updated gamma thresholds
  // version 0.1
  // initial model version based on minimal apap model
  // Terms of use
  // The content of this model has been carefully created in a manual research effort. This file has been created by Matthias König using sbmlutils. For questions contact koenigmx@hu-berlin.de. Copyright © 2024 Matthias König.
  // This work is licensed under a Creative Commons Attribution 4.0 International License.
  // Redistribution and use of any part of this model, with or without modification, are permitted provided that the following conditions are met:
  // Redistributions of this SBML file must retain the above copyright notice, this list of conditions and the following disclaimer.
  // Redistributions in a different form must reproduce the above copyright notice, this list of conditions and the following disclaimer in the documentation and/or other materials provided with the distribution.
  // This model is distributed in the hope that it will be useful, but WITHOUT ANY WARRANTY; without even the implied warranty of MERCHANTABILITY or FITNESS FOR A PARTICULAR PURPOSE.
  // model units - substance: mmole, time: min, volume: litre, area: m2, length: metre, extent: mmole

  // Compartments:
  compartment Vext = 1.5 litre; Vext is "plasma";  // SBO:0000290 ncit:C13356 BTO:0000131
  compartment Vli = 1.5 litre; Vli is "liver";  // SBO:0000290 FMA:7197 BTO:0000759 ncit:C12392

  // Species:
  // Molecular entity which serves as input for an enzymatic reaction that generates a product.
  species S_ext in Vext = 0; S_ext is "substrate S (plasma)";  // SBO:0000247 SBO:0000015 ncit:C120264 bao:0003063
  // Product which is generated by an enzymatic reaction.
  species P_ext in Vext = 0; P_ext is "product P (plasma)";  // SBO:0000247 SBO:0000011 ncit:C51980 bao:0003067
  species S in Vli = 0; S is "substrate S";  // SBO:0000247 SBO:0000015 ncit:C120264 bao:0003063
  species P in Vli = 0; P is "product P";  // SBO:0000247 SBO:0000011 ncit:C51980 bao:0003067
  species T in Vli = 0; T is "toxic product T";  // SBO:0000247 ncit:C28004
  // Enzyme that catalyzes the reactions of S -> P + T (e.g. cytochrome P450).
  substanceOnly species protein in Vli; protein is "protein (enzyme)";  // substance in dimensionless; conversionFactor cf_protein; SBO:0000245 ncit:C17021 FMA:67257

  // Parameters:
  f_metabolism = 1 dimensionless; f_metabolism is "flag to change rate of metabolism";  // SBO:0000002
  // Set to 1 if TPM simulation, set to 0 for ODE simulation.
  f_tpm = 0 dimensionless; f_tpm is "flag for porous media modifications";  // SBO:0000002
  // position: 0: periportal 1: perivenous/pericentral
  position = 0.5 dimensionless; position is "position within the lobulus in [0, 1] (pp, pv)";  // SBO:0000002
  // pattern: 0: constant (constant over position) 1: linear_increase (increase from periportal 0 to perivenious 1) 2: sharp_periveneous (high periveneous 1, low otherwise 0) 3: linear_decrease (decrease from periportal 1 to perivenious 0) 4: sharp_periportal (high periportal 1, low otherwise 0) 5: random
  pattern = 0 dimensionless; pattern is "flag for zonation pattern";  // SBO:0000002
  protein_random = 0.5 dimensionless; protein_random is "random value set via initial assignment";  // SBO:0000002
  cf_protein = 1 per_mmole; cf_protein is "conversion factor for dimensionless species";  // SBO:0000002
  T_threshold = 5 mM; T_threshold is "T threshold for necrosis [mM]";  // SBO:0000002
  // Damage status of the cell. Either alive or necrotic (dead).
  necrosis has dimensionless; necrosis is "necrosis state [0 (alive), 1 (death)]";  // SBO:0000002
  // debug parameter to track time in model coupling
  tsim = 0 min; tsim is "simulation time";  // SBO:0000002
  Qli = 0 l_per_min; Qli is "bloodlow of liver";
  SIM_Vmax has mmole_per_min_l; SIM_Vmax is "Vmax for S import";  // SBO:0000186
  SIM_Km_S = 0.5 mM; SIM_Km_S is "Km for S import";  // SBO:0000027
  PEX_Vmax has mmole_per_min_l; PEX_Vmax is "Vmax for P export";  // SBO:0000186
  PEX_Km_P = 0.5 mM; PEX_Km_P is "Km for P export";  // SBO:0000027
  S2PT_Vmax = 0.05 mmole_per_min_l; S2PT_Vmax is "Vmax for S to P + T conversion";  // SBO:0000186
  S2PT_Km_S = 0.5 mM; S2PT_Km_S is "Km for S to P + T conversion";  // SBO:0000027
  TDETOX_Vmax = 0.005 mmole_per_min_l; TDETOX_Vmax is "Vmax for T detoxification";  // SBO:0000186
  TDETOX_Km_T = 0.5 mM; TDETOX_Km_T is "Km for T detoxification";  // SBO:0000027
  flux_S_in = 0 mmole_per_min; flux_S_in is "inflow S";  // SBO:0000186
  flux_P_in = 0 mmole_per_min; flux_P_in is "inflow P";  // SBO:0000186

  // Assignment rules:
  SIM_Vmax := S2PT_Vmax*100;
  PEX_Vmax := S2PT_Vmax*100;
  necrosis := piecewise(1, T > T_threshold, 0);
  // Same protein amount for different patterns based on 2D lobulus geometry. Patterns are scaled via the scaling factors.
  protein := piecewise(1*0.5, abs(pattern - 0) < 1e-6, 1.1406136*position, abs(pattern - 1) < 1e-6, 4.552802*(1 - (1 - position)^10/((1 - position)^10 + 0.25^10)), abs(pattern - 2) < 1e-6, 0.8902508*(1 - position), abs(pattern - 3) < 1e-6, 2.3939743*(1 - position^10/(position^10 + 0.25^10)), abs(pattern - 4) < 1e-6, protein_random, abs(pattern - 4) < 1e-6, protein_random);

  // Rate rules:
  // debug rule to track time in model coupling
  tsim' = 1;

  // Reactions:
  SIM: S_ext -> S; f_metabolism*Vli*SIM_Vmax/SIM_Km_S*(S_ext - S)/(1 + S_ext/SIM_Km_S + S/SIM_Km_S); SIM is "substrate import (SIM)";  // SBO:0000655
  PEX: P -> P_ext; f_metabolism*Vli*PEX_Vmax/PEX_Km_P*(P - P_ext)/(1 + P_ext/PEX_Km_P + P/PEX_Km_P); PEX is "product export (PEX)";  // SBO:0000655
  S2PT: S => P + T; f_metabolism*(1 - necrosis)*Vli*protein*S2PT_Vmax*(S/(S + S2PT_Km_S)); S2PT is "substrate to product conversion (S2PT)";  // modifiers: protein; SBO:0000176
  TDETOX: T => ; f_metabolism*(1 - necrosis)*Vli*TDETOX_Vmax*(T/(T + TDETOX_Km_T)); TDETOX is "detoxification T (TDETOX)";  // SBO:0000176
  S_inflow: => S_ext; flux_S_in;  // SBO:0000176
  S_outflow: S_ext => ; Qli*S_ext;  // SBO:0000176
  P_inflow: => P_ext; flux_P_in;  // SBO:0000176
  P_outflow: P_ext => ; Qli*P_ext;  // SBO:0000176

  // Unit definitions:
  unit g_per_mole = gram / mole; g_per_mole is "g/mole";
  unit l_per_min = litre / (60 second); l_per_min is "l/min";
  unit m2 = metre^2; m2 is "meter^2";
  unit mM = 1e-3 mole / litre; mM is "mmole/liter";
  unit mg = 1e-3 gram;
  unit mg_per_s_l = 1e-3 gram / (second * litre); mg_per_s_l is "mg/s/l";
  unit min = 60 second;
  unit min_per_hr = 60 second / (3600 second); min_per_hr is "min/hour";
  unit ml = 1e-3 litre;
  unit mmole = 1e-3 mole;
  unit mmole_per_min = 1e-3 mole / (60 second); mmole_per_min is "mmole/min";
  unit mmole_per_min_l = 1e-3 mole / (60 second * litre); mmole_per_min_l is "mmole/min/l";
  unit mumole = 1e-6 mole; mumole is "µmole";
  unit per_min = 1 / (60 second); per_min is "1/min";
  unit per_mmole = 1 / (1e-3 mole); per_mmole is "1/mmole";
end
