// SBML level 3 version 1

model BIOMD0000000002()
  // Edelstein1996 - EPSP ACh species
  // Model of a nicotinic Excitatory Post-Synaptic Potential in a Torpedo electric organ. Acetylcholine is represented explicitely as a molecular species.
  // This model has initially been encoded using StochSim.
  // This model is described in the article:
  // A kinetic mechanism for nicotinic acetylcholine receptors based on multiple allosteric transitions.
  // Edelstein SJ, Schaad O, Henry E, Bertrand D, Changeux JP.
  // Biol. Cybern. 1996 Nov; 75(5):361-79
  // Abstract:
  // Nicotinic acetylcholine receptors are transmembrane oligomeric proteins that mediate interconversions between open and closed channel states under the control of neurotransmitters. Fast in vitro chemical kinetics and in vivo electrophysiological recordings are consistent with the following multi-step scheme. Upon binding of agonists, receptor molecules in the closed but activatable resting state (the Basal state, B) undergo rapid transitions to states of higher affinities with either open channels (the Active state, A) or closed channels (the initial Inactivatable and fully Desensitized states, I and D). In order to represent the functional properties of such receptors, we have developed a kinetic model that links conformational interconversion rates to agonist binding and extends the general principles of the Monod-Wyman-Changeux model of allosteric transitions. The crucial assumption is that the linkage is controlled by the position of the interconversion transition states on a hypothetical linear reaction coordinate. Application of the model to the peripheral nicotine acetylcholine receptor (nAChR) accounts for the main properties of ligand-gating, including single-channel events, and several new relationships are predicted. Kinetic simulations reveal errors inherent in using the dose-response analysis, but justify its application under defined conditions. The model predicts that (in order to overcome the intrinsic stability of the B state and to produce the appropriate cooperativity) channel activation is driven by an A state with a Kd in the 50 nM range, hence some 140-fold stronger than the apparent affinity of the open state deduced previously. According to the model, recovery from the desensitized states may occur via rapid transit through the A state with minimal channel opening, thus without necessarily undergoing a distinct recovery pathway, as assumed in the standard 'cycle' model. Transitions to the desensitized states by low concentration 'pre-pulses' are predicted to occur without significant channel opening, but equilibrium values of IC50 can be obtained only with long pre-pulse times. Predictions are also made concerning allosteric effectors and their possible role in coincidence detection. In terms of future developments, the analysis presented here provides a physical basis for constructing more biologically realistic models of synaptic modulation that may be applied to artificial neural networks.
  // This model is hosted on BioModels Database and identified by: BIOMD0000000002 .
  // To cite BioModels Database, please use: BioModels Database: An enhanced, curated and annotated resource for published quantitative kinetic models .
  // To the extent possible under law, all copyright and related or neighbouring rights to this encoded model have been dedicated to the public domain worldwide. Please refer to CC0 Public Domain Dedication for more information.
  // biomodels.db:MODEL6614086398
  // biomodels.db:BIOMD0000000002
  // isDescribedBy pubmed:8983160
  // hasTaxon taxonomy:7787
  // isVersionOf GO:0007166 GO:0007274 GO:0019226
  // model units - substance: substance, time: second, volume: volume, area: area, length: metre, extent: substance

  // Compartments:
  compartment comp1 = 1e-16 volume; comp1 is "compartment1";  // GO:0031594

  // Species:
  // biliganded basal state
  species BLL in comp1 = 0; BLL is "BasalACh2";  // isVersionOf interpro:IPR002394 GO:0005892
  // monoliganded intermediate
  species IL in comp1 = 0; IL is "IntermediateACh";  // isVersionOf interpro:IPR002394 GO:0005892
  // monoliganded active state
  species AL in comp1 = 0; AL is "ActiveACh";  // isVersionOf interpro:IPR002394 GO:0005892
  // unkiganded active state
  species A in comp1 = 0; A is "Active";  // isVersionOf GO:0005892
  // monoliganded basal state
  species BL in comp1 = 0; BL is "BasalACh";  // isVersionOf interpro:IPR002394 GO:0005892
  // unliganded basal state
  species B in comp1 = 1e-22/comp1; B is "Basal";  // isVersionOf interpro:IPR002394 GO:0005892
  // biliganded desensitised state
  species DLL in comp1 = 0; DLL is "DesensitisedACh2";  // isVersionOf GO:0005892
  // fully desensitised state
  species D in comp1 = 0; D is "Desensitised";  // isVersionOf interpro:IPR002394 GO:0005892
  // biliganded intermediate
  species ILL in comp1 = 0; ILL is "IntermediateACh2";  // isVersionOf interpro:IPR002394 GO:0005892
  // monoliganded desensitised state
  species DL in comp1 = 0; DL is "DesensitisedACh";  // isVersionOf interpro:IPR002394 GO:0005892
  // unliganted intermediate
  species I in comp1 = 0; I is "Intermediate";  // isVersionOf interpro:IPR002394 GO:0005892
  // biliganted active state
  species ALL in comp1 = 0; ALL is "ActiveACh2";  // isVersionOf interpro:IPR002394 GO:0005892
  // ligand
  species L in comp1 = 1e-21/comp1; L is "ACh";  // CHEBI:15355 kegg.compound:C01996

  // Parameters:
  kf_0 = 300000000;
  kr_0 = 8000;
  kf_1 = 150000000;
  kr_1 = 16000;
  kf_2 = 30000;
  kr_2 = 700;
  kf_3 = 300000000;
  kr_3 = 8.64;
  kf_4 = 150000000;
  kr_4 = 17.28;
  kf_5 = 0.54;
  kr_5 = 10800;
  kf_6 = 130;
  kr_6 = 2740;
  kf_7 = 300000000;
  kr_7 = 4;
  kf_8 = 150000000;
  kr_8 = 8;
  kf_9 = 19.7;
  kr_9 = 3.74;
  kf_10 = 19.85;
  kr_10 = 1.74;
  kf_11 = 20;
  kr_11 = 0.81;
  kf_12 = 300000000;
  kr_12 = 4;
  kf_13 = 150000000;
  kr_13 = 8;
  kf_14 = 0.05;
  kr_14 = 0.0012;
  kf_15 = 0.05;
  kr_15 = 0.0012;
  kf_16 = 0.05;
  kr_16 = 0.0012;

  // Reactions:
  // kf_0 * B * L - kr_0 * BL
  // first ligand on basal
  React0: B + L -> BL; comp1*(kf_0*B*L - kr_0*BL);  // GO:0042166
  // kf_1 * BL * L - kr_1 * BLL
  // second ligand on basal
  React1: BL + L -> BLL; comp1*(kf_1*BL*L - kr_1*BLL);  // GO:0042166
  // kf_2 * BLL - kr_2 * ALL
  // opening of biliganded
  React2: BLL -> ALL; comp1*(kf_2*BLL - kr_2*ALL);  // GO:0004889
  // kf_3 * A * L - kr_3 * AL
  // first ligand on active
  React3: A + L -> AL; comp1*(kf_3*A*L - kr_3*AL);  // GO:0042166
  // kf_4 * AL * L - kr_4 * ALL
  // second ligand on active
  React4: AL + L -> ALL; comp1*(kf_4*AL*L - kr_4*ALL);  // GO:0042166
  // kf_5 * B - kr_5 * A
  // opening of unliganded
  React5: B -> A; comp1*(kf_5*B - kr_5*A);  // GO:0004889
  // kf_6 * BL - kr_6 * AL
  // opening of monoliganded
  React6: BL -> AL; comp1*(kf_6*BL - kr_6*AL);  // GO:0004889
  // kf_7 * I * L - kr_7 * IL
  // first ligand on intermediate
  React7: I + L -> IL; comp1*(kf_7*I*L - kr_7*IL);  // GO:0042166
  // kf_8 * IL * L - kr_8 * ILL
  // second ligand on intermediate
  React8: IL + L -> ILL; comp1*(kf_8*IL*L - kr_8*ILL);  // GO:0042166
  // kf_9 * A - kr_9 * I
  // unlig act <=> unlig interm
  React9: A -> I; comp1*(kf_9*A - kr_9*I);  // GO:0004889
  // kf_10 * AL - kr_10 * IL
  // monolig act <=> monolig interm
  React10: AL -> IL; comp1*(kf_10*AL - kr_10*IL);  // GO:0004889
  // kf_11 * ALL - kr_11 * ILL
  // bilig act <=> bilig interm
  React11: ALL -> ILL; comp1*(kf_11*ALL - kr_11*ILL);  // GO:0004889
  // kf_12 * D * L - kr_12 * DL
  // first ligand on desensitised
  React12: D + L -> DL; comp1*(kf_12*D*L - kr_12*DL);  // GO:0042166
  // kf_13 * DL * L - kr_13 * DLL
  // second ligand on desensitised
  React13: DL + L -> DLL; comp1*(kf_13*DL*L - kr_13*DLL);  // GO:0042166
  // kf_14 * I - kr_14 * D
  // unlig interm <=> unlig desen
  React14: I -> D; comp1*(kf_14*I - kr_14*D);
  // kf_15 * IL - kr_15 * DL
  // monolig interm <=> monolig desen
  React15: IL -> DL; comp1*(kf_15*IL - kr_15*DL);
  // kf_16 * ILL - kr_16 * DLL
  // bilig interm <=> bilig desen
  React16: ILL -> DLL; comp1*(kf_16*ILL - kr_16*DLL);

  // Unit definitions:
  unit volume = litre;
  unit substance = mole;
  unit area = metre^2;
end
