// SBML level 2 version 4

model Bertram1995_PancreaticBetaCell_CRAC()
  // This a model from the article:
  // A role for calcium release-activated current (CRAC) in cholinergic modulation of electrical activity in pancreatic beta-cells.
  // Bertram R, Smolen P, Sherman A, Mears D, Atwater I, Martin F, Soria B. Biophys J1995 Jun;68(6):2323-32 7647236,
  // Abstract:
  // S. Bordin and colleagues have proposed that the depolarizing effects of acetylcholine and other muscarinic agonists on pancreatic beta-cells are mediated by a calcium release-activated current (CRAC). We support this hypothesis with additional data, and present a theoretical model which accounts for most known data on muscarinic effects. Additional phenomena, such as the biphasic responses of beta-cells to changes in glucose concentration and the depolarizing effects of the sarco-endoplasmic reticulum calcium ATPase pump poison thapsigargin, are also accounted for by our model. The ability of this single hypothesis, that CRAC is present in beta-cells, to explain so many phenomena motivates a more complete characterization of this current.
  // This model was taken from the CellML repository and automatically converted to SBML.
  // The original model was: Bertram R, Smolen P, Sherman A, Mears D, Atwater I, Martin F, Soria B. (1995) - version=1.0
  // The original CellML model was created by:
  // Catherine Lloyd
  // c.lloyd@auckland.ac.nz
  // The University of Auckland
  // This model originates from BioModels Database: A Database of Annotated Published Models (http://www.ebi.ac.uk/biomodels/). It is copyright (c) 2005-2011 The BioModels.net Team.
  // For more information see the terms of use.
  // To cite BioModels Database, please use: Li C, Donizelli M, Rodriguez N, Dharuri H, Endler L, Chelliah V, Li L, He E, Henry A, Stefan MI, Snoep JL, Hucka M, Le Novère N, Laibe C (2010) BioModels Database: An enhanced, curated and annotated resource for published quantitative kinetic models. BMC Syst Biol., 4:92.
  // biomodels.db:MODEL1006230051
  // biomodels.db:BIOMD0000000374
  // isDescribedBy pubmed:7647236
  // isDerivedFrom pubmed:3907728
  // occursIn BTO:0000783
  // isVersionOf GO:0061469 GO:0015278 GO:0044342

  // Compartments:
  compartment COMpartment = 1;

  // Species:
  species V_membrane in COMpartment = -61/COMpartment;  // PATO:0001462
  species n in COMpartment = 0.0005/COMpartment;  // GO:0005251
  species jm in COMpartment = 0.25/COMpartment;  // isVersionOf PATO:0001227
  species Ca_er_Ca_equations in COMpartment = 9/COMpartment; Ca_er_Ca_equations is "ca_er_ca_equations";  // CHEBI:29108
  species Ca_i in COMpartment = 0.11/COMpartment;  // CHEBI:29108

  // Parameters:
  Cm = 6158;
  g_K = 3900;
  lambda_n = 1.85;
  g_K_ATP = 150;
  V_Ca = 100;
  g_Ca_f = 810;
  g_Ca_s = 510;
  g_K_Ca = 1200;
  kdkca = 0.55;
  g_CRAC = 75;
  V_CRAC = 0;
  Ca_er_bar = 3;
  g_leak = 0;
  IP3 = 0;
  kerp = 0.1;
  verp = 0.24;
  dact = 0.1;
  dinh = 0.4;
  dip3 = 0.2;
  perl = 0.02;
  lambda_er = 250;
  sigma_er = 5;
  k_Ca = 0.07;
  gamma = 3.607e-6;
  f = 0.01;

  // Assignment rules:
  i_K := g_K*n*(V_membrane + 70);
  n_infinity := 1/(1 + exp((-15 - V_membrane)/6));
  tau_n := 9.09/(1 + exp((15 + V_membrane)/6));
  i_K_ATP := g_K_ATP*(V_membrane + 70);
  m_f_infinity := 1/(1 + exp((-20 - V_membrane)/7.5));
  i_Ca_f := g_Ca_f*m_f_infinity*(V_membrane - V_Ca);
  m_s_infinity := 1/(1 + exp((-16 - V_membrane)/10));
  i_Ca_s := g_Ca_s*m_s_infinity*(1 - jm)*(V_membrane - V_Ca);
  i_Ca := i_Ca_f + i_Ca_s;
  j := 1 - jm;
  jm_infinity := 1 - 1/(1 + exp((53 + V_membrane)/2));
  tau_j := 50000/(exp((53 + V_membrane)/4) + exp((-53 - V_membrane)/4)) + 1500;
  i_K_Ca := g_K_Ca*Ca_i^5/(Ca_i^5 + kdkca^5)*(V_membrane + 70);
  r_infinity := 1/(1 + exp(1*(Ca_er_Ca_equations - Ca_er_bar)));
  i_CRAC := g_CRAC*r_infinity*(V_membrane - V_CRAC);
  i_leak := g_leak*(V_membrane - V_CRAC);
  J_er_p := verp*Ca_i^2/(Ca_i^2 + kerp^2);
  a_infinity := 1/(1 + dact/Ca_i);
  b_infinity := IP3/(IP3 + dip3);
  h_infinity := 1/(1 + Ca_i/dinh);
  O := a_infinity^3*b_infinity^3*h_infinity^3*1;
  J_er_IP3 := O*(Ca_er_Ca_equations - Ca_i);
  J_er_leak := perl*(Ca_er_Ca_equations - Ca_i);
  J_er_tot := J_er_leak + J_er_IP3 - J_er_p;
  J_mem_tot := -f*(gamma*i_Ca + k_Ca*Ca_i);

  // Rate rules:
  V_membrane' = -(i_Ca + i_K + i_K_ATP + i_K_Ca + i_CRAC + i_leak)/Cm;
  n' = lambda_n*(n_infinity - n)/tau_n;
  jm' = (jm_infinity - jm)/tau_j;
  Ca_er_Ca_equations' = -J_er_tot/(lambda_er*sigma_er);
  Ca_i' = J_er_tot/lambda_er + J_mem_tot;
end
