// SBML level 2 version 4
// dcterms:bibliographicCitation: http://identifiers.org/pubmed/18171696

function function_1_1(a1, b1, g1)
  a1*(g1/(b1 + g1));
end

function function_1_2(a2, b2, g2)
  a2*(g2/(b2 + g2));
end

function function_2_1(C_Raf, C_Raf_inactive, E, FGFR, f13)
  f13*(E - C_Raf - C_Raf_inactive)*FGFR;
end

function function_3_1(C_Raf, C_Raf_inactive, E, MAPK, f53)
  f53*(E - C_Raf - C_Raf_inactive)*MAPK;
end

function function_4_1(FGFR, f14)
  f14*FGFR;
end

function function_4_2(MSH, f24)
  f24*MSH;
end

function function_4_3(C_Raf, f35)
  f35*C_Raf;
end

function function_4_4(B_Raf, f45)
  f45*B_Raf;
end

function function_5_1(C_Raf, MSH, h36_y3)
  h36_y3*MSH*C_Raf;
end

model Muller2008_MAPKactivation_Dynamics()
  // Muller2008 - Simplified MAPK activation Dynamics (Model B)
  // Simplified mathematical model (model B) for predicting MAPK signal expression.
  // This model is described in the article:
  // Network topology determines dynamics of the mammalian MAPK1,2 signaling network: bifan motif regulation of C-Raf and B-Raf isoforms by FGFR and MC1R.
  // Muller M, Obeyesekere M, Mills GB, Ram PT.
  // FASEB J. 2008 May; 22(5): 1393-1403
  // Abstract:
  // Activation of the fibroblast growth factor (FGFR) and melanocyte stimulating hormone (MC1R) receptors stimulates B-Raf and C-Raf isoforms that regulate the dynamics of MAPK1,2 signaling. Network topology motifs in mammalian cells include feed-forward and feedback loops and bifans where signals from two upstream molecules integrate to modulate the activity of two downstream molecules. We computationally modeled and experimentally tested signal processing in the FGFR/MC1R/B-Raf/C-Raf/MAPK1,2 network in human melanoma cells; identifying 7 regulatory loops and a bifan motif. Signaling from FGFR leads to sustained activation of MAPK1,2, whereas signaling from MC1R results in transient activation of MAPK1,2. The dynamics of MAPK activation depends critically on the expression level and connectivity to C-Raf, which is critical for a sustained MAPK1,2 response. A partially incoherent bifan motif with a feedback loop acts as a logic gate to integrate signals and regulate duration of activation of the MAPK signaling cascade. Further reducing a 106-node ordinary differential equations network encompassing the complete network to a 6-node network encompassing rate-limiting processes sustains the feedback loops and the bifan, providing sufficient information to predict biological responses.
  // This model is hosted on BioModels Database and identified by: BIOMD0000000664.
  // To cite BioModels Database, please use: Chelliah V et al. BioModels: ten-year anniversary. Nucl. Acids Res. 2015, 43(Database issue):D542-8.
  // To the extent possible under law, all copyright and related or neighbouring rights to this encoded model have been dedicated to the public domain worldwide. Please refer to CC0 Public Domain Dedication for more information.
  // biomodels.db:MODEL8687732743
  // isDescribedBy pubmed:18171696
  // isDescribedBy pubmed:18171696
  // biomodels.db:BIOMD0000000664
  // occursIn BTO:0000848
  // hasProperty GO:0043408

  // Compartments:
  compartment Compartment = 1;

  // Species:
  species FGFR in Compartment = 0;  // isVersionOf uniprot:P11362
  species MSH in Compartment = 0;  // isVersionOf PR:000001239
  species B_Raf in Compartment = 0; B_Raf is "B-Raf";  // isVersionOf uniprot:P15056
  species MAPK in Compartment = 0;  // isVersionOf uniprot:P28482
  species C_Raf_inactive in Compartment = 0; C_Raf_inactive is "C-Raf inactive";  // isVersionOf uniprot:P04049
  species $g2_0 in Compartment;  // isVersionOf FMA:74643; hasProperty ncit:C41210; hasProperty ncit:C41210
  species C_Raf in Compartment = 0; C_Raf is "C-Raf";  // isVersionOf uniprot:P04049
  species $g1_0 in Compartment;  // isVersionOf uniprot:P05230; hasProperty ncit:C41210; hasProperty ncit:C41210

  // Parameters:
  a1 = 10 unit_0;
  b1 = 10;
  d1 = 0.2 unit_1;
  a2 = 10 unit_0;
  b2 = 10;
  d2 = 0.1 unit_1;
  f53 = 1.5 unit_2;
  f13 = 0.6 unit_2;
  h36_y3 = 0.1 unit_2;
  d3 = 1 unit_1;
  E = 10;
  f14 = 0.1 unit_1;
  f24 = 0.8 unit_1;
  d4 = 1.1 unit_1;
  f35 = 0.3 unit_1;
  f45 = 0.1 unit_1;
  d5 = 1 unit_1;
  d6 = 0.001 unit_1;

  // Assignment rules:
  g1 := piecewise(0, (time >= 0) && (time < 5), piecewise(1, (time >= 5) && (time < 10), 0));
  g1_0 := g1;
  g2 := piecewise(1, (time >= 0) && (time < 5), 0);
  g2_0 := g2;

  // Reactions:
  FGFR_Activation: => FGFR; Compartment*function_1_1(a1, b1, g1); FGFR_Activation is "FGFR Stimulus";  // modifiers: g1_0
  FGFR_Degradation: FGFR => ; Compartment*d1*FGFR;
  MSH_Activation: => MSH; Compartment*function_1_2(a2, b2, g2); MSH_Activation is "MSH Stimulus";  // modifiers: g2_0
  MSH_Degradation: MSH => ; Compartment*d2*MSH;
  C_Raf_Activation_1: => C_Raf; Compartment*function_2_1(C_Raf, C_Raf_inactive, E, FGFR, f13); C_Raf_Activation_1 is "C-Raf Activation 1";  // modifiers: C_Raf_inactive, FGFR; isPartOf reactome:R-HSA-5673000; isVersionOf reactome:R-HSA-442726
  C_Raf_Activation_2: => C_Raf; Compartment*function_3_1(C_Raf, C_Raf_inactive, E, MAPK, f53);  // modifiers: C_Raf_inactive, MAPK; isPartOf reactome:R-HSA-5673000; isVersionOf reactome:R-HSA-442726
  C_Raf_Degradation: C_Raf => ; Compartment*d3*C_Raf; C_Raf_Degradation is "C-Raf Degradation";
  B_Raf_Activation_1: => B_Raf; Compartment*function_4_1(FGFR, f14); B_Raf_Activation_1 is "B-Raf Activation 1";  // modifiers: FGFR; isPartOf reactome:R-HSA-5673000; isVersionOf reactome:R-HSA-442726
  B_Raf_Activation_2: => B_Raf; Compartment*function_4_2(MSH, f24); B_Raf_Activation_2 is "B-Raf Activation 2";  // modifiers: MSH; isPartOf reactome:R-HSA-5673000; isVersionOf reactome:R-HSA-442726
  B_Raf_Degradation: B_Raf => ; Compartment*d4*B_Raf; B_Raf_Degradation is "B-Raf Degradation";
  MAPK_Activation_1: => MAPK; Compartment*function_4_3(C_Raf, f35);  // modifiers: C_Raf; isPartOf reactome:R-HSA-5674135; isVersionOf reactome:R-HSA-442737
  MAPK_Activation_2: => MAPK; Compartment*function_4_4(B_Raf, f45);  // modifiers: B_Raf; isPartOf reactome:R-HSA-5674135; isVersionOf reactome:R-HSA-442737
  MAPK_Degradation: MAPK => ; Compartment*d5*MAPK;
  C_Raf_Inactivation: C_Raf => C_Raf_inactive; Compartment*function_5_1(C_Raf, MSH, h36_y3); C_Raf_Inactivation is "C-Raf Inactivation";  // modifiers: MSH
  Inactive_C_Raf_degradation: C_Raf_inactive => ; Compartment*d6*C_Raf_inactive; Inactive_C_Raf_degradation is "Inactive C-Raf degradation";

  // Unit definitions:
  unit time = 60 second;
  unit unit_0 = 6e-5 mole / (litre * second); unit_0 is "0.06*mmol/(l*s)";
  unit unit_1 = 1 / (59.9999 second); unit_1 is "1/(59.9999*s)";
  unit unit_2 = 6e-5 litre / (mole * second); unit_2 is "0.06*ml/(mol*s)";
end
