// SBML level 2 version 4
// dcterms:bibliographicCitation: urn:miriam:pubmed:11027188

function Constant_flux__irreversible(v)
  v;
end
Constant_flux__irreversible is "Constant flux (irreversible)";

function modifier_function_1(parameter, modifier, substrate)
  parameter*modifier*substrate;
end

function function_for_Li(kf, Li, Ri, kre, Ci, Ve, Na)
  (kf*Li*Ri - kre*Ci)/(Ve*Na);
end

function function_for_L(kf, L, Rs, kr, Cs, kx, Li, Ve, Na, Y)
  (kf*L*Rs - kr*Cs - kx*Li*Ve*Na)*Y/Na;
end

function modifier_function_3(parameter, modifier)
  parameter*modifier;
end

model Fallon2000_IL2dynamics()
  // Fallon2000 - Interleukin-2 dynamics
  // This a model from the article:
  // Computational model for effects of ligand/receptor binding properties on interleukin-2 trafficking dynamics and T cell proliferation response.
  // Fallon EM, Lauffenburger DA. Biotechnol Prog 2000 Sep-Oct;16(5):905-16 11027188 ,
  // Abstract:
  // Multisubunit cytokine receptors such as the heterotrimeric receptor for interleukin-2 (IL-2) are ubiquitous in hematopoeitic cell types of importance in biotechnology and are crucial regulators of cell proliferation and differentiation behavior. Dynamics of cytokine/receptor endocytic trafficking can significantly impact cell responses through effects of receptor down-regulation and ligand depletion, and in turn are governed by ligand/receptor binding properties. We describe here a computational model for trafficking dynamics of the IL-2 receptor (IL-2R) system, which is able to predict T cell proliferation responses to IL-2. This model comprises kinetic equations describing binding, internalization, and postendocytic sorting of IL-2 and IL-2R, including an experimentally derived dependence of cell proliferation rate on these properties. Computational results from this model predict that IL-2 depletion can be reduced by decreasing its binding affinity for the IL-2R betagamma subunit relative to the alpha subunit at endosomal pH, as a result of enhanced ligand sorting to recycling vis-a-vis degradation, and that an IL-2 analogue with such altered binding properties should exhibit increased potency for stimulating the T cell proliferation response. These results are in agreement with our recent experimental findings for the IL-2 analogue termed 2D1 [Fallon, E. M. et al. J. Biol. Chem. 2000, 275, 6790-6797]. Thus, this type of model may enable prediction of beneficial cytokine/receptor binding properties to aid development of molecular design criteria for improvements in applications such as in vivo cytokine therapies and in vitro hematopoietic cell bioreactors.
  // This model was taken from the CellML repository and automatically converted to SBML.
  // The original model was: Fallon EM, Lauffenburger DA. (2000) - version=1.0
  // The original CellML model was created by:
  // Catherine Lloyd
  // c.lloyd@auckland.ac.nz
  // The University of Auckland
  // This model originates from BioModels Database: A Database of Annotated Published Models (http://www.ebi.ac.uk/biomodels/). It is copyright (c) 2005-2011 The BioModels.net Team.
  // To the extent possible under law, all copyright and related or neighbouring rights to this encoded model have been dedicated to the public domain worldwide. Please refer to CC0 Public Domain Dedication for more information.
  // In summary, you are entitled to use this encoded model in absolutely any manner you deem suitable, verbatim, or with modification, alone or embedded it in a larger context, redistribute it, commercially or not, in a restricted way or not..
  // To cite BioModels Database, please use: Li C, Donizelli M, Rodriguez N, Dharuri H, Endler L, Chelliah V, Li L, He E, Henry A, Stefan MI, Snoep JL, Hucka M, Le Novère N, Laibe C (2010) BioModels Database: An enhanced, curated and annotated resource for published quantitative kinetic models. BMC Syst Biol., 4:92.
  // biomodels.db:MODEL1006230001
  // biomodels.db:BIOMD0000000665
  // hasPart GO:0006897
  // isVersionOf reactome:R-HSA-449836
  // hasProperty mamo:MAMO_0000046
  // isDescribedBy pubmed:11027188

  // Compartments:
  compartment COMpartment = 1; COMpartment is "compartment";

  // Species:
  // Initial value of 1500 from paper
  species Rs_0 in COMpartment = 1500;  // hasPart uniprot:P14784; hasPart uniprot:P31785; isVersionOf ncit:C104679; occursIn GO:0005886
  // SBML file uploaded with initial value set to 1
  species Cs_0 in COMpartment = 1;  // hasPart uniprot:P31785; hasPart uniprot:P60568; hasPart uniprot:P14784; isVersionOf GO:0005893
  // Initial value of 300 from paper
  species Ri_0 in COMpartment = 300;  // hasPart uniprot:P31785; hasPart uniprot:P14784; isVersionOf ncit:C104679; occursIn GO:0044424
  // SBML file uploaded with initial value set to 1
  species Ci_0 in COMpartment = 1;  // hasPart uniprot:P31785; hasPart uniprot:P60568; hasPart uniprot:P14784; isVersionOf GO:0005893
  // SBML file uploaded with initial value set to 0.01
  species Li_0 in COMpartment = 0.01;  // isVersionOf uniprot:P60568; occursIn GO:0044424
  // SBML file uploaded with initial value set to 1
  species Ld_0 in COMpartment = 1;  // isVersionOf uniprot:P60568
  // SBML file uploaded with initial value set to 10
  species L_0 in COMpartment = 10;  // isVersionOf uniprot:P60568; occursIn GO:0005615
  species $Y_0 in COMpartment = 250000000;  // isVersionOf BTO:0000782

  // Parameters:
  kr = 0.0138 unit_0;
  kf has unit_1;
  kre has unit_0;
  kfe has unit_1;
  kt = 0.007 unit_0;
  Vs = 11 unit_0;
  ksyn = 0.0011 unit_0;
  ke = 0.04 unit_0;
  kx = 0.15 unit_0;
  kh = 0.035 unit_0;
  Ve = 1e-14 unit_2;
  // SBML file submitted with Initial condition: 6.022e+11
  NA = 6.022e11 unit_3;
  // SBML file submitted with Initial condition: 1
  IL2 = 1 unit_4;

  // Assignment rules:
  kf := piecewise(kr/11.1, IL2 == 1, kr/8.2);
  kre := piecewise(kr*8, IL2 == 1, kr*5);
  kfe := piecewise(kre/1000, IL2 == 1, kre/3000);

  // Rate rules:
  Y_0' = piecewise((600*Cs_0/(250 + Cs_0) - 200)*1000, 600*Cs_0/(250 + Cs_0) - 200 > 0, 0);

  // Reactions:
  Receptor_binding_to_Ligand: Rs_0 => Cs_0; COMpartment*modifier_function_1(kf, L_0, Rs_0);  // modifiers: L_0; isVersionOf GO:0005134
  Receptor_Ligand_complex_dissocation: Cs_0 => Rs_0; COMpartment*kr*Cs_0; Receptor_Ligand_complex_dissocation is "Receptor/Ligand complex dissocation";
  Upregulation_of_Receptor_Synthesis: => Rs_0; COMpartment*modifier_function_3(ksyn, Cs_0);  // modifiers: Cs_0; isVersionOf GO:0032800
  Receptor_Internalisation: Rs_0 => Ri_0; COMpartment*kt*Rs_0;  // isVersionOf GO:0031623
  Receptor_Synthesis: => Rs_0; COMpartment*Constant_flux__irreversible(Vs);  // isVersionOf GO:0032800
  Endocytosis_of_Receptor_Ligand_complex: Cs_0 => Ci_0; COMpartment*ke*Cs_0; Endocytosis_of_Receptor_Ligand_complex is "Endocytosis of Receptor/Ligand complex";  // isVersionOf GO:0006897
  IL_2_binding_to_free_BetaGamma_heterodimer_1: Ri_0 => Ci_0; COMpartment*modifier_function_1(kfe, Li_0, Ri_0); IL_2_binding_to_free_BetaGamma_heterodimer_1 is "IL-2 binding to free BetaGamma heterodimer";  // modifiers: Li_0; isVersionOf GO:0005134
  Dissocation_of_IL_2_Heterodimer_complex: Ci_0 => Ri_0; COMpartment*kre*Ci_0; Dissocation_of_IL_2_Heterodimer_complex is "Dissocation of IL-2/Heterodimer complex";
  Degradation_of_heterodimer: Ri_0 => ; COMpartment*kh*Ri_0;  // isVersionOf GO:0032801
  Degradation_of_IL_2_heterodimer_complex: Ci_0 => Ld_0; COMpartment*kh*Ci_0; Degradation_of_IL_2_heterodimer_complex is "Degradation of IL-2/heterodimer complex";
  IL_2_binding_dissociating: Li_0 => ; COMpartment*function_for_Li(kf, Li_0, Ri_0, kre, Ci_0, Ve, NA); IL_2_binding_dissociating is "IL-2 binding/dissociating";  // modifiers: Ri_0, Ci_0
  Ligand_recycling: Li_0 => ; COMpartment*kx*Li_0;  // isVersionOf ncit:C126395
  Ligand_Binding_Dissociation_Recycling: L_0 => ; COMpartment*function_for_L(kf, L_0, Rs_0, kr, Cs_0, kx, Li_0, Ve, NA, Y_0); Ligand_Binding_Dissociation_Recycling is "Ligand Binding/Dissociation/Recycling";  // modifiers: Rs_0, Cs_0, Li_0, Y_0; isVersionOf GO:0019976; isVersionOf ncit:C126395

  // Unit definitions:
  unit time = 60 second;
  unit unit_0 = 1 / (0.0166667 second); unit_0 is "1/(0.0166667*s)";
  unit unit_1 = 6e-11 litre / (mole * second); unit_1 is "0.06*nl/(mol*s)";
  unit unit_2 = litre; unit_2 is "l";
  unit unit_3 = 1 / (1e12 mole); unit_3 is "1/Tmol";
  unit unit_4 = dimensionless^0; unit_4 is "1";
end
