// SBML level 2 version 4
// dcterms:bibliographicCitation: urn:miriam:pubmed:26921070

model Murphy2016___Differences_in_predictions_of_ODE_models_of_tumor_growth()
  // Murphy2016 - Differences in predictions of ODE models of tumor growth
  // Comparison of 7 ODE models for tumour size. This models have been compared to experimental data.
  // This model is described in the article:
  // Differences in predictions of ODE models of tumor growth: a cautionary example.
  // Murphy H, Jaafari H, Dobrovolny HM.
  // BMC Cancer 2016 Feb; 16: 163
  // Abstract:
  // While mathematical models are often used to predict progression of cancer and treatment outcomes, there is still uncertainty over how to best model tumor growth. Seven ordinary differential equation (ODE) models of tumor growth (exponential, Mendelsohn, logistic, linear, surface, Gompertz, and Bertalanffy) have been proposed, but there is no clear guidance on how to choose the most appropriate model for a particular cancer.We examined all seven of the previously proposed ODE models in the presence and absence of chemotherapy. We derived equations for the maximum tumor size, doubling time, and the minimum amount of chemotherapy needed to suppress the tumor and used a sample data set to compare how these quantities differ based on choice of growth model.We find that there is a 12-fold difference in predicting doubling times and a 6-fold difference in the predicted amount of chemotherapy needed for suppression depending on which growth model was used.Our results highlight the need for careful consideration of model assumptions when developing mathematical models for use in cancer treatment planning.
  // This model is hosted on BioModels Database and identified by: BIOMD0000000671.
  // To cite BioModels Database, please use: Chelliah V et al. BioModels: ten-year anniversary. Nucl. Acids Res. 2015, 43(Database issue):D542-8.
  // To the extent possible under law, all copyright and related or neighbouring rights to this encoded model have been dedicated to the public domain worldwide. Please refer to CC0 Public Domain Dedication for more information.
  // biomodels.db:MODEL1708250001
  // biomodels.db:BIOMD0000000671
  // isDescribedBy pubmed:26921070
  // isPropertyOf efo:0000616
  // hasTaxon taxonomy:9606
  // isDescribedBy pubmed:26921070

  // Compartments:
  compartment tumour = 1; tumour is "compartment";

  // Species:
  species $V_exp in tumour = 220;  // isVersionOf ncit:C95157
  species $V_mend in tumour = 220;
  species $V_log in tumour = 220;
  species $V_lin in tumour = 220;
  species $V_surf in tumour = 220;
  species $V_gomp in tumour = 220;
  species $V_bert in tumour = 220;

  // Parameters:
  a_exp = 0.0246;
  a_mend = 0.105;
  a_log = 0.0295;
  a_lin = 132;
  a_surf = 0.291;
  a_gomp = 0.0919;
  a_bert = 0.2344;
  b_mend = 0.785;
  b_log = 6920;
  b_lin = 4300;
  b_surf = 708;
  b_gomp = 15500;
  b_bert = 3.46e-19;
  c_gomp = 10700;

  // Rate rules:
  V_exp' = a_exp*V_exp;
  V_mend' = a_mend*V_mend^b_mend;
  V_log' = a_log*V_log*(1 - V_log/b_log);
  V_lin' = a_lin*V_lin/(V_lin + b_lin);
  V_surf' = a_surf*V_surf/(V_surf + b_surf)^(1/3);
  V_gomp' = a_gomp*V_gomp*ln(b_gomp/(V_gomp + c_gomp));
  V_bert' = a_bert*V_bert^(2/3) - b_bert*V_bert;
end
