// SBML level 2 version 4
// dcterms:bibliographicCitation: http://identifiers.org/pubmed/17251133

model Wodarz2007_CTL_inflation_Model_A()
  // Wodarz2007 - Basic Model of Cytomegalovirus Infection
  // This a model from the article:
  // Dynamics of killer T cell inflation in viral infections.
  // Wodarz D, Sierro S, Klenerman P. J R Soc Interface 2007 Jun 22;4(14):533-43 17251133 ,
  // Abstract:
  // Upon acute viral infection, a typical cytotoxic T lymphocyte (CTL) response is characterized by a phase of expansion and contraction after which it settles at a relatively stable memory level. Recently, experimental data from mice infected with murine cytomegalovirus (MCMV) showed different and unusual dynamics. After acute infection had resolved, some antigen specific CTL started to expand over time despite the fact that no replicative virus was detectable. This phenomenon has been termed as "CTL memory inflation". In order to examine the dynamics of this system further, we developed a mathematical model analysing the impact of innate and adaptive immune responses. According to this model, a potentially important contributor to CTL inflation is competition between the specific CTL response and an innate natural killer (NK) cell response. Inflation occurs most readily if the NK cell response is more efficient than the CTL at reducing virus load during acute infection, but thereafter maintains a chronic virus load which is sufficient to induce CTL proliferation. The model further suggests that weaker NK cell mediated protection can correlate with more pronounced CTL inflation dynamics over time. We present experimental data from mice infected with MCMV which are consistent with the theoretical predictions. This model provides valuable information and may help to explain the inflation of CMV specific CD8+T cells seen in humans as they age.
  // This model was taken from the CellML repository and automatically converted to SBML.
  // The original model was: Wodarz D, Sierro S, Klenerman P. (2007) - version=1.0
  // The original CellML model was created by:
  // Catherine Lloyd
  // c.lloyd@auckland.ac.nz
  // The University of Auckland
  // This model originates from BioModels Database: A Database of Annotated Published Models (http://www.ebi.ac.uk/biomodels/). It is copyright (c) 2005-2011 The BioModels.net Team.
  // To the extent possible under law, all copyright and related or neighbouring rights to this encoded model have been dedicated to the public domain worldwide. Please refer to CC0 Public Domain Dedication for more information.
  // In summary, you are entitled to use this encoded model in absolutely any manner you deem suitable, verbatim, or with modification, alone or embedded it in a larger context, redistribute it, commercially or not, in a restricted way or not..
  // To cite BioModels Database, please use: Li C, Donizelli M, Rodriguez N, Dharuri H, Endler L, Chelliah V, Li L, He E, Henry A, Stefan MI, Snoep JL, Hucka M, Le Novère N, Laibe C (2010) BioModels Database: An enhanced, curated and annotated resource for published quantitative kinetic models. BMC Syst Biol., 4:92.
  // biomodels.db:MODEL1006230086
  // isDescribedBy pubmed:17251133
  // biomodels.db:BIOMD0000000686
  // isVersionOf GO:0009615
  // occursIn BTO:0000289
  // hasTaxon taxonomy:10088

  // Compartments:
  compartment COMpartment = 1; COMpartment is "Mouse";

  // Parameters:
  x = 1 unit_0;  // isVersionOf GO:0005623; isVersionOf CL:0000000; hasProperty ncit:C16505
  y0 = 0 unit_0;  // hasPart efo:0001062; isVersionOf BTO:0000152
  y1 = 0 unit_0;  // hasPart efo:0001062; isVersionOf BTO:0000152
  L = 0 unit_0;  // hasPart efo:0001062; isVersionOf BTO:0000152
  v = 1 unit_0;  // isVersionOf GO:0019012; isVersionOf efo:0001062
  R0 has unit_0;
  a0 = 0.1 unit_1;  // encodes GO:0008219
  a1 = 0.2 unit_1;  // encodes GO:0008219
  k = 1 unit_1;
  u = 1 unit_1;
  lambda = 10 unit_1;  // encodes GO:0008283
  d = 0.1 unit_1;  // encodes GO:0008219
  beta = 0.1 unit_1;  // encodes efo:0001062
  gamma = 0.5 unit_1;  // encodes efo:0001062
  phi = 0.1 unit_1;
  eta = 0.01 unit_1;

  // Assignment rules:
  R0 := lambda*eta/(d*a1*(a0 + eta))*(beta + gamma*phi/(phi + d));

  // Rate rules:
  x' = lambda - (d*x + beta*x*v + gamma*x*v);
  y0' = beta*x*v - (a0*y0 + eta*y0) + phi*L;
  y1' = eta*y0 - a1*y1;
  L' = gamma*x*v - (phi*L + d*L);
  v' = k*y1 - u*v;

  // Unit definitions:
  unit time = 3600 second;
  unit unit_0 = dimensionless^0; unit_0 is "1";
  unit unit_1 = 1 / (2.77778e-4 second); unit_1 is "1/(0.277778*ms)";
end
