// SBML level 2 version 4
// dcterms:bibliographicCitation: urn:miriam:pubmed:18068197

model Wang2008___Mimicking_the_inhibitory_effect_of_riluzole_on_membrane_conductance_in_skeletal_fibres()
  // Wang2008 - Mimicking the inhibitory effect of riluzole on membrane conductance in skeletal fibres
  // This model is described in the article:
  // Riluzole-induced block of voltage-gated Na+ current and activation of BKCa channels in cultured differentiated human skeletal muscle cells.
  // Wang YJ, Lin MW, Lin AA, Wu SN.
  // Life Sci. 2008 Jan; 82(1-2): 11-20
  // Abstract:
  // Riluzole is known to be of therapeutic use in the management of amyotrophic lateral sclerosis. In this study, we investigated the effects of riluzole on ion currents in cultured differentiated human skeletal muscle cells (dHSkMCs). Western blotting revealed the protein expression of alpha-subunits for both large-conductance Ca2+-activated K+ (BK(Ca)) channel and Na+ channel (Na(v)1.5) in these cells. Riluzole could reduce the frequency of spontaneous beating in dHSkMCs. In whole-cell configuration, riluzole suppressed voltage-gated Na+ current (I(Na)) in a concentration-dependent manner with an IC50 value of 2.3 microM. Riluzole (10 microM) also effectively increased Ca2+-activated K+ current (I(K(Ca))) which could be reversed by iberiotoxin (200 nM) and paxilline (1 microM), but not by apamin (200 nM). In inside-out patches, when applied to the inside of the cell membrane, riluzole (10 microM) increased BK(Ca)-channel activity with a decrease in mean closed time. Simulation studies also unraveled that both decreased conductance of I(Na) and increased conductance of I(K(Ca)) utilized to mimic riluzole actions in skeletal muscle cells could combine to decrease the amplitude of action potentials and increase the repolarization of action potentials. Taken together, inhibition of I(Na) and stimulation of BK(Ca)-channel activity caused by this drug are partly, if not entirely, responsible for its muscle relaxant actions in clinical setting.
  // This model is hosted on BioModels Database and identified by: BIOMD0000000693.
  // To cite BioModels Database, please use: Chelliah V et al. BioModels: ten-year anniversary. Nucl. Acids Res. 2015, 43(Database issue):D542-8.
  // To the extent possible under law, all copyright and related or neighbouring rights to this encoded model have been dedicated to the public domain worldwide. Please refer to CC0 Public Domain Dedication for more information.
  // biomodels.db:MODEL7817907010
  // hasInstance kegg.drug:D00775 biomodels.db:MODEL7817907010 modeldb:105528 GO:0022832 GO:0042493 DOID:332
  // isDescribedBy pubmed:18068197
  // biomodels.db:BIOMD0000000693
  // hasPart kegg.drug:D00775
  // modeldb:105528

  // Compartments:
  compartment Skeletal_Muscle_Cells = 1;  // isVersionOf BTO:0001103

  // Species:
  species $Vm in Skeletal_Muscle_Cells = -75;  // isVersionOf ncit:C82324
  species $m in Skeletal_Muscle_Cells = 0;
  species $h in Skeletal_Muscle_Cells = 1;
  species $n in Skeletal_Muscle_Cells = 0.1;
  species $Vt in Skeletal_Muscle_Cells = -70;
  species $d in Skeletal_Muscle_Cells = 0;
  species $o in Skeletal_Muscle_Cells = 0.1;
  species $c in Skeletal_Muscle_Cells = 0.15;
  species $cer in Skeletal_Muscle_Cells = 200;
  species $INa in Skeletal_Muscle_Cells;
  species $IT in Skeletal_Muscle_Cells;
  species $IKCa in Skeletal_Muscle_Cells;  // isVersionOf GO:0015269
  species $ICa in Skeletal_Muscle_Cells;
  species $IL in Skeletal_Muscle_Cells;
  species $IK in Skeletal_Muscle_Cells;
  species $Stimulus in Skeletal_Muscle_Cells;  // isVersionOf ncit:C41210
  species $beta_n in Skeletal_Muscle_Cells;
  species $beta_m in Skeletal_Muscle_Cells;
  species $beta_h in Skeletal_Muscle_Cells;
  species $alpha_n in Skeletal_Muscle_Cells;
  species $alpha_m in Skeletal_Muscle_Cells;
  species $alpha_h in Skeletal_Muscle_Cells;
  species $w in Skeletal_Muscle_Cells;
  species $jmem in Skeletal_Muscle_Cells;
  species $jleak in Skeletal_Muscle_Cells;
  species $jserca in Skeletal_Muscle_Cells;
  species $jer in Skeletal_Muscle_Cells;

  // Parameters:
  gNa_max = 0.9;
  gcabar = 0.05;
  gk_max = 0.42;
  gL_max = 0.0024;
  gKca = 0.5;
  ENa = 50;
  EK = -70;
  EL = -75;
  ECa = 50;
  En = -40;
  Em = -42;
  Eh = -41;
  Ct = 0.04;
  Cm = 0.009;
  Rs = 15;
  Am = 200;
  alpha_n_max = 0.0229;
  beta_n_max = 0.09616;
  v_alpha_m = 10;
  v_alpha_n = 7;
  v_alpha_h = 14.7;
  alpha_m_max = 0.208;
  beta_m_max = 2.081;
  v_beta_n = 40;
  v_beta_m = 18;
  v_beta_h = 7.6;
  alpha_h_max = 0.0156;
  beta_h_max = 3.382;
  kd = 0.18;
  alpha = 4.5e-6;
  kpmca = 0.2;
  pleak = 0.0005;
  kserca = 0.4;
  d1 = 0.84;
  d2 = 1;
  k1 = 0.18;
  k2 = 0.011;
  bbar = 0.28;
  abar = 0.48;
  fer = 0.01;
  vcytver = 5;
  fcyt = 0.01;
  Stimulus_Period = 50;
  Stimulus_Magnitude = 2;
  Stimulus_Start = 5;
  Stimulus_Duration = 1;

  // Assignment rules:
  IK := gk_max*n^4*(Vm - EK);
  INa := gNa_max*m^3*h*(Vm - ENa);
  Stimulus := piecewise(Stimulus_Magnitude, (time >= Stimulus_Start) && (time - Stimulus_Start - floor((time - Stimulus_Start)/Stimulus_Period)*Stimulus_Period < Stimulus_Duration), 0);
  IL := gL_max*(Vm - EL);
  IT := (Vm - Vt)/Rs;
  beta_n := beta_n_max*exp((En - Vm)/v_beta_n);
  alpha_n := alpha_n_max*(Vm - En)/(1 - exp((En - Vm)/v_alpha_n));
  beta_h := beta_h_max/(1 + exp((Eh - Vm)/v_beta_h));
  beta_m := beta_m_max*exp((Em - Vm)/v_beta_m);
  alpha_m := alpha_m_max*(Vm - Em)/(1 - exp((Em - Vm)/v_alpha_m));
  alpha_h := alpha_h_max*exp((Eh - Vm)/v_alpha_m);
  w := c^5/(c^5 + kd^5);
  IKCa := gKca*o*w*(Vm - EK);
  jleak := pleak*(cer - c);
  jserca := kserca*c;
  jer := jleak - jserca;
  alp := abar/(1 + k1*exp(-2*d1*96.485*Vm/8.313424/310)/c);
  beta := bbar/(1 + c/(k2*exp(-2*d2*96.485*Vm/8.313424/310)));
  tau := 1/(alp + beta);
  ooinf := alp*tau;
  dinf := 1/(1 + exp((-24.6 - Vm)/11.3));
  taud := 80/(1/cosh(-0.031*(Vm + 37.1)));
  alphad := dinf/taud;
  betad := (1 - dinf)/taud;
  gca := -gcabar*Vm/(exp(0.117*Vm) - 1);
  ICa := gca*d^2;
  jmem := -(alpha*ICa + kpmca*c);

  // Rate rules:
  Vm' = (Stimulus - (INa + ICa + IK + IL + IT + IKCa))/Cm;
  m' = alpha_m*(1 - m) - beta_m*m;
  h' = alpha_h*(1 - h) - beta_h*h;
  n' = alpha_n*(1 - n) - beta_n*n;
  Vt' = (Vm - Vt)/(Rs*Ct);
  d' = (1 - d)*alphad - d*betad;
  o' = (ooinf - o)/tau;
  c' = fcyt*(jmem + jer);
  cer' = -fer*vcytver*jer;

  // Unit definitions:
  unit volume = 1e-3 litre;
  unit time = 1e-3 second;
  unit substance = 1e-3 mole;
end
