// SBML level 2 version 4
// dcterms:bibliographicCitation: http://identifiers.org/doi/10.1073/pnas.1715345115

function Constant_flux__irreversible(v)
  v;
end
Constant_flux__irreversible is "Constant flux (irreversible)";

function rPhRb_2(Ca, Cd, Ce, RbE2f, kPhRbCa, kPhRbCd, kPhRbCe)
  (kPhRbCd*Cd + kPhRbCe*Ce + kPhRbCa*Ca)*RbE2f;
end

function rSyE2f_1(E2f, jSyE2f, kSyE2f, kSyE2fE2f)
  kSyE2f + kSyE2fE2f*E2f/(jSyE2f + E2f);
end

function rDeP21_1(Ca, Cdt2, Ce, CeP21, Skp2, aRc, kDeP21, kDeP21Cy, kDeP21aRc)
  (kDeP21 + kDeP21Cy*Skp2*(Ce + Ca) + kDeP21aRc*Cdt2*aRc)*CeP21;
end

function rDeP53_1(Dam, P53, jP53, kDeP53)
  kDeP53/(jP53 + Dam)*P53;
end

function rDeCa_2(Cdh1_C_APC_active, CaP21, kDeCa, kDeCaC1)
  (kDeCa + kDeCaC1*Cdh1_C_APC_active)*CaP21;
end

function rDeP21_5(Ca, Cdt2, Ce, Skp2, aRc, iRc, kDeP21, kDeP21Cy, kDeP21aRc)
  (kDeP21 + kDeP21Cy*Skp2*(Ce + Ca) + kDeP21aRc*Cdt2*aRc)*iRc;
end

function rPhRb_1(Ca, Cd, Ce, Rb, kPhRbCa, kPhRbCd, kPhRbCe)
  (kPhRbCd*Cd + kPhRbCe*Ce + kPhRbCa*Ca)*Rb;
end

function rSyP21_1(P53, kSyP21, kSyP21P53)
  kSyP21 + kSyP21P53*P53;
end

function rPhC1_1(Cdh1_C_APC_active, Ca, Ce, kPhC1, kPhC1Ca, kPhC1Ce)
  (kPhC1 + kPhC1Ce*Ce + kPhC1Ca*Ca)*Cdh1_C_APC_active;
end

function rDeP21_3(Ca, Cdt2, Ce, P21, Skp2, aRc, kDeP21, kDeP21Cy, kDeP21aRc)
  (kDeP21 + kDeP21Cy*Skp2*(Ce + Ca) + kDeP21aRc*Cdt2*aRc)*P21;
end

function rDsRc_3(Dna, aRc)
  piecewise(0, Dna < 1, piecewise(1*aRc, Dna > 1, 0.5*aRc));
end

function rDeCe_2(Ca, CeP21, kDeCe, kDeCeCa)
  (kDeCe + kDeCeCa*Ca)*CeP21;
end

function rDeCe_1(Ca, Ce, kDeCe, kDeCeCa)
  (kDeCe + kDeCeCa*Ca)*Ce;
end

function rReDam_1(Dam, P53, jDam, kReDam, kReDamP53)
  (kReDam + kReDamP53*P53/(jDam + Dam))*Dam;
end

function rPhC1_2(Ca, Ce, E1C1, kPhC1, kPhC1Ca, kPhC1Ce)
  (kPhC1 + kPhC1Ce*Ce + kPhC1Ca*Ca)*E1C1;
end

function rDeP21_2(Ca, CaP21, Cdt2, Ce, Skp2, aRc, kDeP21, kDeP21Cy, kDeP21aRc)
  (kDeP21 + kDeP21Cy*Skp2*(Ce + Ca) + kDeP21aRc*Cdt2*aRc)*CaP21;
end

function rPhRc_1(Ca, Ce, Rc, jCy, kPhRc, n)
  kPhRc*(Ce + Ca)^n/(jCy^n + (Ce + Ca)^n)*Rc;
end

function rDeCa_1(Cdh1_C_APC_active, Ca, kDeCa, kDeCaC1)
  (kDeCa + kDeCaC1*Cdh1_C_APC_active)*Ca;
end

function rDsRc_4(Dna, iRc)
  piecewise(0, Dna < 1, piecewise(1*iRc, Dna > 1, 0.5*iRc));
end

function rDeP21_4(Ca, Cdt2, Ce, Skp2, aRc, iPcna, kDeP21, kDeP21Cy, kDeP21aRc)
  (kDeP21 + kDeP21Cy*Skp2*(Ce + Ca) + kDeP21aRc*Cdt2*aRc)*iPcna;
end

function rDsRc_1(Dna, Rc)
  piecewise(0, Dna < 1, piecewise(1*Rc, Dna > 1, 0.5*Rc));
end

function rDePr_1(Cdh1_C_APC_active, Pr, kDeCaC1, kDePr)
  (kDePr + kDeCaC1*Cdh1_C_APC_active)*Pr;
end

function rDsRc_2(Dna, pRc)
  piecewise(0, Dna < 1, piecewise(1*pRc, Dna > 1, 0.5*pRc));
end

model Heldt2018___Proliferation_quiescence_decision_pormoted_by_p21_in_response_to_DNA_damage()
  // Heldt2018 - Proliferation-quiescence decision in response to DNA damage
  // This model is described in the article:
  // A comprehensive model for the proliferation-quiescence decision in response to endogenous DNA damage in human cells.
  // Heldt FS, Barr AR, Cooper S, Bakal C, Novák B.
  // Proc. Natl. Acad. Sci. U.S.A. 2018 Feb; :
  // Abstract:
  // Human cells that suffer mild DNA damage can enter a reversible state of growth arrest known as quiescence. This decision to temporarily exit the cell cycle is essential to prevent the propagation of mutations, and most cancer cells harbor defects in the underlying control system. Here we present a mechanistic mathematical model to study the proliferation-quiescence decision in nontransformed human cells. We show that two bistable switches, the restriction point (RP) and the G1/S transition, mediate this decision by integrating DNA damage and mitogen signals. In particular, our data suggest that the cyclin-dependent kinase inhibitor p21 (Cip1/Waf1), which is expressed in response to DNA damage, promotes quiescence by blocking positive feedback loops that facilitate G1 progression downstream of serum stimulation. Intriguingly, cells exploit bistability in the RP to convert graded p21 and mitogen signals into an all-or-nothing cell-cycle response. The same mechanism creates a window of opportunity where G1 cells that have passed the RP can revert to quiescence if exposed to DNA damage. We present experimental evidence that cells gradually lose this ability to revert to quiescence as they progress through G1 and that the onset of rapid p21 degradation at the G1/S transition prevents this response altogether, insulating S phase from mild, endogenous DNA damage. Thus, two bistable switches conspire in the early cell cycle to provide both sensitivity and robustness to external stimuli.
  // This model is hosted on BioModels Database and identified by: MODEL1703030000.
  // To cite BioModels Database, please use: Chelliah V et al. BioModels: ten-year anniversary. Nucl. Acids Res. 2015, 43(Database issue):D542-8.
  // To the extent possible under law, all copyright and related or neighbouring rights to this encoded model have been dedicated to the public domain worldwide. Please refer to CC0 Public Domain Dedication for more information.
  // biomodels.db:MODEL1703030000
  // biomodels.db:BIOMD0000000700
  // isDescribedBy pubmed:29463760
  // unknownQualifier mamo:MAMO_0000046
  // biomodels.db:MODEL1703030000
  // biomodels.db:BIOMD0000000700

  // Compartments:
  compartment Cell = 1; Cell is "cell";  // isVersionOf GO:0005623

  // Species:
  // (AU) hypo-phosphorylated Rb
  species Rb in Cell = 0; Rb is "Retinoblastoma_protein";  // isVersionOf uniprot:Q08999
  // (AU) hyper-phosphorylated Rb
  species pRb in Cell = 5; pRb is "Retinoblastoma_protein_hyperphosphorylated";  // isVersionOf uniprot:Q08999; hasProperty PATO:0002221
  // (AU) free, active E2F
  species E2f in Cell = 0; E2f is "E2f_active";  // isVersionOf uniprot:Q01094; hasProperty PATO:0002354
  // (AU) Rb:E2F complexes (inactive)
  species RbE2f in Cell = 0; RbE2f is "Retinoblastoma_protein_E2f_complex_inactive";  // hasPart uniprot:Q08999; hasProperty GO:0032991; hasPart uniprot:Q01094; hasProperty PATO:0002355
  // (AU) free Emi1
  species E1 in Cell = 0; E1 is "Emi1";  // isVersionOf uniprot:Q9UKT4
  // (AU) free, active APC/C^Cdh1
  species Cdh1_C_APC_active in Cell = 0;  // isVersionOf GO:0005680; hasProperty PATO:0002354
  // (AU) phosphorylated APC/C^Cdh1 (inactive)
  species pC1 in Cell = 1; pC1 is "C_Cdh1_APC_phosphorylated_inactive";  // isVersionOf GO:0005680; hasProperty PATO:0002220; hasProperty PATO:0002355
  // (AU) Emi1:APC/C^Cdh1 complexes (inactive) ; Emi1 is an APC_C_Cdh1 inhibitator
  species E1C1 in Cell = 0; E1C1 is "Emi1_C_Cdh1_complex_inactive";  // hasPart uniprot:Q9UKT4; hasProperty GO:0032991; hasPart GO:0005680; hasProperty PATO:0002355
  // (AU) free p21
  species P21 in Cell = 0.6;  // isVersionOf uniprot:P38936
  // (AU) free, active CycE:Cdk2
  species Ce in Cell = 0.5; Ce is "CyclinE_Cdk2_active";  // hasPart uniprot:P24941; hasProperty GO:0032991; hasPart uniprot:P24864; hasProperty PATO:0002354
  // (AU) free, active CycA:Cdk2
  species Ca in Cell = 1.2; Ca is "CyclinA_Cdk2";  // hasPart uniprot:P24941; hasPart uniprot:P20248; hasProperty GO:0032991
  // (AU) CycE:Cdk2:p21 complexes (inactive)
  species CeP21 in Cell = 0; CeP21 is "CyclinE_Cdk2_P21_complex_inactive";  // hasPart uniprot:P24941; hasProperty PATO:0002355; hasPart uniprot:P24864; hasProperty GO:0032991
  // (AU) CycA:Cdk2:p21 complexes (inactive)
  species CaP21 in Cell = 0; CaP21 is "CyclinA_Cdk2_P21_complex_inactive";  // hasPart uniprot:P20248; hasProperty PATO:0002355; hasPart uniprot:P38936; hasProperty GO:0032991
  // (AU) active, nuclear PCNA
  species aPcna in Cell = 0.5; aPcna is "Pcna_nuclear_active";  // isVersionOf uniprot:P12004; hasProperty PATO:0002354
  // (AU) inactive, nuclear PCNA
  species iPcna in Cell = 0; iPcna is "PCNA_Nuclear_inactive";  // isVersionOf uniprot:P12004; hasProperty PATO:0002355
  // (AU) pre-replication complexes
  species Rc in Cell = 1; Rc is "Pre_Replication_complex";  // isVersionOf ncit:C28685
  // (AU) primed replication complexes
  species pRc in Cell = 0; pRc is "Pre_Replication_complex_primed";  // isVersionOf ncit:C28685; hasProperty PATO:0002220
  // (AU) active replication complexes
  species aRc in Cell = 0; aRc is "Pre_Replication_complex_active";  // isVersionOf ncit:C28685; hasProperty PATO:0002354
  // (AU) inactive replication complexes
  species iRc in Cell = 0; iRc is "Pre_Replication_complex_inactive";  // isVersionOf ncit:C28685; hasProperty PATO:0002355
  // (AU) DNA
  species Dna in Cell = 0;  // isVersionOf ncit:C449
  // (AU) p53 transcription factor
  species P53 in Cell = 0;  // isVersionOf uniprot:P04637
  // (AU) DNA damage
  species Dam in Cell = 0; Dam is "Dna_damage";  // isVersionOf ncit:C449; hasProperty PATO:0001167
  // (AU) APC/C^Cdh1 activity probe
  species Pr in Cell = 0.5; Pr is "Activity_probe_of_APC_C_Cdh1";
  // (AU) total Rb protein
  species $tRb in Cell; tRb is "Retinoblastoma_protein_total";  // isVersionOf uniprot:Q08999
  // (AU) total E2F protein
  species $tE2f in Cell; tE2f is "E2f_total";  // isVersionOf uniprot:Q01094
  // (AU) total Emi1 protein
  species $tE1 in Cell; tE1 is "Emi1_total";  // isVersionOf uniprot:Q9UKT4
  // (AU) total APC/C^Cdh1 protein ; APC/C^Cdh1 protein ubiquitin E3 ligase that is active
  species $tC1 in Cell; tC1 is "C_Cdh1_APC_total";  // isVersionOf GO:0005680
  // (AU) total CycE:Cdk2
  species $tCe in Cell; tCe is "CyclinE_Cdk2_total";  // hasPart uniprot:P24941; hasProperty GO:0032991; hasPart uniprot:P24864
  // (AU) total CycA:Cdk2
  species $tCa in Cell; tCa is "CyclinA_Cdk2_total";  // hasPart uniprot:P20248; hasProperty GO:0032991; hasPart uniprot:P24941
  // (AU) total p21 protein
  species $tP21 in Cell; tP21 is "P21_total";  // isVersionOf uniprot:P38936

  // Parameters:
  // (AU) relative CycD:Cdk4/6 level
  Cd = 0.65;
  // (-) relative SCF^Skp2 level
  Skp2 = 1;
  // (-) relative CRL4^Cdt2 level
  Cdt2 = 1;
  // (AU/min) constitutive E2F synthesis
  kSyE2f = 0.03;
  // (AU/min) E2F-dependent E2F synthesis
  kSyE2fE2f = 0.04;
  // (AU) Michealis-Menten constant for E2F synthesis
  jSyE2f = 0.2;
  // (1/(AU*min)) association of Rb and E2F
  kAsRbE2f = 5;
  // (1/min) dissociation of Rb:E2F complexes
  kDsRbE2f = 0.005;
  // (1/min) constiutive E2F degradation
  kDeE2f = 0.05;
  // (1/(AU*min)) CycD:CDK4/6-mediated Rb phosphorylation
  kPhRbCd = 0.2;
  // (1/(AU*min)) CycE:CDK2-mediated Rb phosphorylation
  kPhRbCe = 0.3;
  // (1/(AU*min)) CycA:Cdk2-mediated Rb phosphorylation
  kPhRbCa = 0.3;
  // (1/min) dephosphorylation of Rb
  kDpRb = 0.05;
  // (1/min) constitutive Emi1 synthesis
  kSyE1 = 0.005;
  // (1/min) Cdh1-mediated Emi1 degradation
  kDeE1C1 = 0.005;
  // (1/min) constitutive Emi1 degradation
  kDeE1 = 0.0005;
  // (1/min) constitutive Cdh1 phosphorylation
  kPhC1 = 0;
  // (1/(AU*min)) CycE-mediated Cdh1 phosphorylation
  kPhC1Ce = 0.01;
  // (1/(AU*min)) CycA-mediated Cdh1 phosphorylation
  kPhC1Ca = 1;
  // (1/min) Cdh1 dephosphorylation
  kDpC1 = 0.05;
  // (1/(AU*min)) association of Emi1 and Cdh1
  kAsE1C1 = 10;
  // (1/min) dissociation of Emi1:Cdh1 complexes
  kDsE1C1 = 0.01;
  // (AU/min) constitutive p21 synthesis
  kSyP21 = 0.002;
  // (1/min) p53-dependent synthesis of p21
  kSyP21P53 = 0.008;
  // (1/min) constitutive p21 degradation
  kDeP21 = 0.0025;
  // (1/(AU*min)) cyclin:CDK2-mediated p21 degradation (Skp2-dependent)
  kDeP21Cy = 0.007;
  // (1/(AU*min)) aRC-mediated p21 degradation (Cdt2-dependent)
  kDeP21aRc = 1;
  // (1/min) constitutive CycE synthesis
  kSyCe = 0.01;
  // (1/min) constitutive CycA synthesis
  kSyCa = 0.02;
  // (1/(AU*min)) association of cyclin:CDK2 and p21
  kAsCyP21 = 1;
  // (1/min) dissociation of cyclin:CDK2:p21 complexes
  kDsCyP21 = 0.05;
  // (1/min) constitutive CycE degradation
  kDeCe = 0.004;
  // (1/min) constitutive CycA degradation
  kDeCa = 0.01;
  // (1/(AU*min)) CycA:CDK2-mediated CycE degradation (Skp2-dependent)
  kDeCeCa = 0.015;
  // (1/(AU*min)) Cdh1-mediated CycA degradation
  kDeCaC1 = 2;
  // (AU/min) PCNA import into the nucleus
  kImPc = 0.003;
  // (1/min) PCNA export from the nucleus
  kExPc = 0.006;
  // (1/min) cyclin:CDK2-mediated phosphorylation/priming of RCs
  kPhRc = 0.1;
  // (1/min) dephosphorylation of pRCs
  kDpRc = 0.05;
  // (AU) CDK2 threshold for the phosphorylation/priming of RCs
  jCy = 1.8;
  // (-) hill coefficient for the phosphorylation/priming of RCs
  n = 6;
  // (1/(AU*min)) association of phosphorylated/primed RCs and PCNA
  kAsRcPc = 0.01;
  // (1/min) dissociation of pRC:PCNA complexes
  kDsRcPc = 0.001;
  // (1/(AU*min)) association of PCNA and p21
  kAsPcP21 = 100;
  // (1/min) dissociation of PCNA:p21 complexes
  kDsPcP21 = 0.01;
  // (1/min) DNA synthesis by aRCs
  kSyDna = 0.0093;
  // (AU/min) constitutive p53 synthesis
  kSyP53 = 0.05;
  // (AU/min) DNA damage-dependent degradation of p53
  kDeP53 = 0.05;
  // (AU) inhibition constant of p53 degradation by DNA damage
  jP53 = 0.01;
  // (AU/min) replication-independent DNA damage
  kGeDam = 0.001;
  // (1/min) replication-dependent DNA damage
  kGeDamArc = 0.012;
  // (1/min) p53-independent DNA damage repair
  kReDam = 0.001;
  // (1/min) p53-dependent DNA damage repair
  kReDamP53 = 0.005;
  // (AU) DNA damage threshold for repair
  jDam = 0.5;
  // (AU/min) constitutive synthesis of Cdh1-activity probe
  kSyPr = 0.01;
  // (1/min) constitutive degradation of Cdh1-activity probe
  kDePr = 0.0001;

  // Assignment rules:
  tRb := Rb + pRb + RbE2f;
  tE2f := E2f + RbE2f;
  tE1 := E1 + E1C1;
  tC1 := Cdh1_C_APC_active + pC1 + E1C1;
  tCe := Ce + CeP21;
  tCa := Ca + CaP21;
  tP21 := P21 + CeP21 + CaP21 + iPcna + iRc;

  // Reactions:
  Phosphorylation_of_Rb: Rb => pRb; Cell*rPhRb_1(Ca, Cd, Ce, Rb, kPhRbCa, kPhRbCd, kPhRbCe);  // modifiers: Ce, Ca; isVersionOf GO:0006468
  Phosphorylation_Rb_in_Rb_E2F_complexes: RbE2f => pRb + E2f; Cell*rPhRb_2(Ca, Cd, Ce, RbE2f, kPhRbCa, kPhRbCd, kPhRbCe); Phosphorylation_Rb_in_Rb_E2F_complexes is "Phosphorylation Rb in Rb:E2F complexes";  // modifiers: Ce, Ca; isVersionOf GO:0006468
  Dephosphorylation_of_Rb: pRb => Rb; Cell*kDpRb*pRb;
  Synthesis_of_E2F: => E2f; Cell*rSyE2f_1(E2f, jSyE2f, kSyE2f, kSyE2fE2f);  // isVersionOf ncit:C61408
  Degradation_of_E2F: E2f => ; Cell*kDeE2f*E2f;
  Degradation_of_E2F_in_Rb_E2F_complexes: RbE2f => Rb; Cell*kDeE2f*RbE2f; Degradation_of_E2F_in_Rb_E2F_complexes is "Degradation of E2F in Rb:E2F complexes";
  Association_dissociation_of_Rb_and_E2F: Rb + E2f -> RbE2f; Cell*(kAsRbE2f*Rb*E2f - kDsRbE2f*RbE2f); Association_dissociation_of_Rb_and_E2F is "Association/dissociation of Rb and E2F";
  Synthesis_of_p21: => P21; Cell*rSyP21_1(P53, kSyP21, kSyP21P53);  // modifiers: P53; isVersionOf ncit:C61408
  Synthesis_of_CycE: E2f => E2f + Ce; Cell*kSyCe*E2f;  // isVersionOf ncit:C61408
  Synthesis_of_CycA: E2f => E2f + Ca; Cell*kSyCa*E2f;  // isVersionOf ncit:C61408
  Association_dissociation_of_CycE_Cdk2_and_p21: Ce + P21 -> CeP21; Cell*(kAsCyP21*Ce*P21 - kDsCyP21*CeP21); Association_dissociation_of_CycE_Cdk2_and_p21 is "Association/dissociation of CycE:Cdk2 and p21";
  Association_dissociation_of_CycA_Cdk2_and_p21: Ca + P21 -> CaP21; Cell*(kAsCyP21*Ca*P21 - kDsCyP21*CaP21); Association_dissociation_of_CycA_Cdk2_and_p21 is "Association/dissociation of CycA:Cdk2 and p21";
  Degradation_of_p21_in_CycE_Cdk2_p21_complexes: CeP21 => Ce; Cell*rDeP21_1(Ca, Cdt2, Ce, CeP21, Skp2, aRc, kDeP21, kDeP21Cy, kDeP21aRc); Degradation_of_p21_in_CycE_Cdk2_p21_complexes is "Degradation of p21 in CycE:Cdk2:p21 complexes";  // modifiers: Ca, aRc
  Degradation_of_p21_in_CycA_Cdk2_p21_complexes: CaP21 => Ca; Cell*rDeP21_2(Ca, CaP21, Cdt2, Ce, Skp2, aRc, kDeP21, kDeP21Cy, kDeP21aRc); Degradation_of_p21_in_CycA_Cdk2_p21_complexes is "Degradation of p21 in CycA:Cdk2:p21 complexes";  // modifiers: Ce, aRc
  Degradation_of_CycE_in_CycE_Cdk2_complexes: Ce => ; Cell*rDeCe_1(Ca, Ce, kDeCe, kDeCeCa); Degradation_of_CycE_in_CycE_Cdk2_complexes is "Degradation of CycE in CycE:Cdk2 complexes";  // modifiers: Ca
  Degradation_of_CycE_in_CycE_Cdk2_p21_complexes: CeP21 => P21; Cell*rDeCe_2(Ca, CeP21, kDeCe, kDeCeCa); Degradation_of_CycE_in_CycE_Cdk2_p21_complexes is "Degradation of CycE in CycE:Cdk2:p21 complexes";  // modifiers: Ca
  Degradation_of_CycA_in_CycA_Cdk2_complexes: Ca => ; Cell*rDeCa_1(Cdh1_C_APC_active, Ca, kDeCa, kDeCaC1); Degradation_of_CycA_in_CycA_Cdk2_complexes is "Degradation of CycA in CycA:Cdk2 complexes";  // modifiers: Cdh1_C_APC_active
  Degradation_of_CycA_in_CycA_Cdk2_p21_complexes: CaP21 => P21; Cell*rDeCa_2(Cdh1_C_APC_active, CaP21, kDeCa, kDeCaC1); Degradation_of_CycA_in_CycA_Cdk2_p21_complexes is "Degradation of CycA in CycA:Cdk2:p21 complexes";  // modifiers: Cdh1_C_APC_active
  Degradation_of_free_p21: P21 => ; Cell*rDeP21_3(Ca, Cdt2, Ce, P21, Skp2, aRc, kDeP21, kDeP21Cy, kDeP21aRc);  // modifiers: Ce, Ca, aRc
  Synthesis_of_Emi1: E2f => E2f + E1; Cell*kSyE1*E2f;  // isVersionOf ncit:C61408
  Degradation_of_Emi1: E1 => ; Cell*kDeE1*E1;
  Association_dissociation_of_Emi1_APC_C_Cdh1_complexes: E1 + Cdh1_C_APC_active -> E1C1; Cell*(kAsE1C1*E1*Cdh1_C_APC_active - kDsE1C1*E1C1); Association_dissociation_of_Emi1_APC_C_Cdh1_complexes is "Association/dissociation of Emi1:APC/C^Cdh1 complexes";
  Degradation_of_Emi1_in_Emi1_APC_C_Cdh1_complexes: E1C1 => Cdh1_C_APC_active; Cell*kDeE1C1*E1C1; Degradation_of_Emi1_in_Emi1_APC_C_Cdh1_complexes is "Degradation of Emi1 in Emi1:APC/C^Cdh1 complexes";
  Phosphorylation_of_free_APC_C_Cdh1: Cdh1_C_APC_active => pC1; Cell*rPhC1_1(Cdh1_C_APC_active, Ca, Ce, kPhC1, kPhC1Ca, kPhC1Ce); Phosphorylation_of_free_APC_C_Cdh1 is "Phosphorylation of free APC/C^Cdh1";  // modifiers: Ce, Ca; isVersionOf GO:0006468
  Phosphorylation_of_APC_C_Cdh1_in_Emi1_APC_C_Cdh1_complexes: E1C1 => E1 + pC1; Cell*rPhC1_2(Ca, Ce, E1C1, kPhC1, kPhC1Ca, kPhC1Ce); Phosphorylation_of_APC_C_Cdh1_in_Emi1_APC_C_Cdh1_complexes is "Phosphorylation of APC/C^Cdh1 in Emi1:APC/C^Cdh1 complexes";  // modifiers: Ce, Ca; isVersionOf GO:0006468
  Dephosphorylation_of_APC_C_Cdh1: pC1 => Cdh1_C_APC_active; Cell*kDpC1*pC1; Dephosphorylation_of_APC_C_Cdh1 is "Dephosphorylation of APC/C^Cdh1";
  Nuclear_import_of_active_PCNA: => aPcna; Cell*Constant_flux__irreversible(kImPc);  // isVersionOf GO:0051170
  Nuclear_export_of_active_PCNA: aPcna => ; Cell*kExPc*aPcna;  // isVersionOf GO:0051168
  Nuclear_export_of_inactive_PCNA: iPcna => P21; Cell*kExPc*iPcna;  // isVersionOf GO:0051168
  Association_dissociation_of_PCNA_and_p21: aPcna + P21 -> iPcna; Cell*(kAsPcP21*aPcna*P21 - kDsPcP21*iPcna); Association_dissociation_of_PCNA_and_p21 is "Association/dissociation of PCNA and p21";
  Degradation_of_p21_in_PCNA_p21_complexes: iPcna => aPcna; Cell*rDeP21_4(Ca, Cdt2, Ce, Skp2, aRc, iPcna, kDeP21, kDeP21Cy, kDeP21aRc); Degradation_of_p21_in_PCNA_p21_complexes is "Degradation of p21 in PCNA:p21 complexes";  // modifiers: Ce, Ca, aRc
  Association_dissociation_of_active_PCNA_and_replication_complexes: aPcna + pRc -> aRc; Cell*(kAsRcPc*aPcna*pRc - kDsRcPc*aRc); Association_dissociation_of_active_PCNA_and_replication_complexes is "Association/dissociation of active PCNA and replication complexes";
  Association_dissociation_of_inactive_PCNA_and_replication_complexes: iPcna + pRc -> iRc; Cell*(kAsRcPc*iPcna*pRc - kDsRcPc*iRc); Association_dissociation_of_inactive_PCNA_and_replication_complexes is "Association/dissociation of inactive PCNA and replication complexes";
  Phosphorylation_priming_of_replication_complexes: Rc => pRc; Cell*rPhRc_1(Ca, Ce, Rc, jCy, kPhRc, n); Phosphorylation_priming_of_replication_complexes is "Phosphorylation/priming of replication complexes";  // modifiers: Ce, Ca; isVersionOf GO:0006468
  Dephosphorylation_of_replication_complexes: pRc => Rc; Cell*kDpRc*pRc;
  Association_dissociation_of_p21_and_replication_complexes: aRc + P21 -> iRc; Cell*(kAsPcP21*aRc*P21 - kDsPcP21*iRc); Association_dissociation_of_p21_and_replication_complexes is "Association/dissociation of p21 and replication complexes";
  Degradation_of_p21_in_inactive_replication_complexes: iRc => aRc; Cell*rDeP21_5(Ca, Cdt2, Ce, Skp2, aRc, iRc, kDeP21, kDeP21Cy, kDeP21aRc);  // modifiers: Ce, Ca
  Dissassembly_of_RC: Rc => ; Cell*rDsRc_1(Dna, Rc);  // modifiers: Dna
  Dissassembly_of_pRC: pRc => ; Cell*rDsRc_2(Dna, pRc);  // modifiers: Dna
  Dissassembly_of_aRC: aRc => aPcna; Cell*rDsRc_3(Dna, aRc);  // modifiers: Dna; isVersionOf ncit:C52475
  Dissassembly_of_iRC: iRc => iPcna; Cell*rDsRc_4(Dna, iRc);  // modifiers: Dna; isVersionOf ncit:C52475
  Synthesis_of_DNA: aRc => aRc + Dna; Cell*kSyDna*aRc;  // isVersionOf ncit:C61408
  Synthesis_of_p53: => P53; Cell*Constant_flux__irreversible(kSyP53);  // isVersionOf ncit:C61408
  Degradation_of_p53: P53 => ; Cell*rDeP53_1(Dam, P53, jP53, kDeP53);  // modifiers: Dam
  Induction_of_DNA_damage: => Dam; Cell*Constant_flux__irreversible(kGeDam);  // isVersionOf ncit:C16507
  Induction_of_DNA_damage_by_replication: aRc => aRc + Dam; Cell*kGeDamArc*aRc;  // isVersionOf ncit:C16507
  Synthesis_of_APC_C_Cdh1_activity_probe: => Pr; Cell*Constant_flux__irreversible(kSyPr); Synthesis_of_APC_C_Cdh1_activity_probe is "Synthesis of APC/C^Cdh1 activity probe";  // isVersionOf ncit:C61408
  Degradation_of_APC_C_Cdh1_activity_probe: Pr => ; Cell*rDePr_1(Cdh1_C_APC_active, Pr, kDeCaC1, kDePr); Degradation_of_APC_C_Cdh1_activity_probe is "Degradation of APC/C^Cdh1 activity probe";  // modifiers: Cdh1_C_APC_active
  Repair_of_DNA_damage: Dam => ; Cell*rReDam_1(Dam, P53, jDam, kReDam, kReDamP53);  // modifiers: P53; isVersionOf GO:0006281

  // Unit definitions:
  unit volume = 1e-3 litre;
  unit time = 60 second;
  unit substance = 1e-3 mole;
end
