// SBML level 2 version 4
// dcterms:bibliographicCitation: http://identifiers.org/pubmed/27887851

function Constant_flux__irreversible_0(v)
  v;
end
Constant_flux__irreversible_0 is "Constant flux (irreversible)";

function Function_for_Reaction_1__1__1(K_a, S_a, r_a)
  r_a*S_a*(1 - S_a/K_a);
end
Function_for_Reaction_1__1__1 is "Function for Reaction 1 [1]_1";

function Function_for_Reaction_2_1(I_a, S_a, beta_a)
  beta_a*S_a*I_a;
end

function Function_for_Reaction_6_1(I_a, S_h, beta_h)
  beta_h*I_a*S_h;
end

model Liu2017___Dynamics_of_Avian_Influenza_with_Logistic_Growth()
  // Liu2017 - Dynamics of Avian Influenza with Logistic Growth
  // hasProperty mamo:MAMO_0000046
  // hasProperty efo:0005222
  // hasTaxon taxonomy:8782
  // hasTaxon taxonomy:9606
  // isDescribedBy pubmed:27887851
  // biomodels.db:MODEL1808240002 biomodels.db:BIOMD0000000708

  // Compartments:
  compartment compartment = 1; compartment is "Human population";  // OBI:0000181; hasTaxon taxonomy:9606; hasTaxon taxonomy:9606
  compartment Avian_population = 1;  // OBI:0000181; hasTaxon taxonomy:8782; hasTaxon taxonomy:8782

  // Species:
  species S_a in Avian_population = 100000; S_a is "Susceptible Avian (S_a)";  // isPropertyOf ido:0000514; hasTaxon taxonomy:8782
  species I_a in Avian_population = 1000; I_a is "Infected Avian (I_a)";  // isVersionOf ido:0000511; hasTaxon taxonomy:8782
  species S_h in compartment = 1000000; S_h is "Susceptible Human (S_h)";  // isVersionOf ido:0000514; hasTaxon taxonomy:9606
  species I_h in compartment = 0; I_h is "Infected Human (I_h)";  // isVersionOf ido:0000511; hasTaxon taxonomy:9606
  species R_h in compartment = 0; R_h is "Recovered Human (R_h)";  // hasProperty ncit:C49498; hasTaxon taxonomy:9606

  // Parameters:
  r_a = 0.005;
  K_a = 50000;
  beta_a = 2e-8;
  mu_a = 0.00034246;
  delta_a = 0.0004;
  pi_h = 30;
  beta_h = 6e-9;
  mu_h = 3.91e-5;
  gamma = 0.1;
  delta_h = 0.3445;
  M_a = 50000;
  m_a = 800;

  // Reactions:
  reaction_1: => S_a; Avian_population*Function_for_Reaction_1__1__1(K_a, S_a, r_a); reaction_1 is "Logistic growth of Susceptible Avian";
  Infection_of_Susceptible_Avian: S_a => I_a; Avian_population*Function_for_Reaction_2_1(I_a, S_a, beta_a);  // isVersionOf ncit:C128320
  Natural_death_of_Infected_Avian: I_a => ; Avian_population*mu_a*I_a;  // isVersionOf efo:0000480
  reaction_4: I_a => ; Avian_population*delta_a*I_a; reaction_4 is "Disease related death of Infected Avian";  // isVersionOf efo:0000480
  reaction_5: => S_h; compartment*Constant_flux__irreversible_0(pi_h); reaction_5 is "Population growth of Susceptible Human";
  Infection_of_Suceptible_Human: S_h => I_h; Function_for_Reaction_6_1(I_a, S_h, beta_h);  // modifiers: I_a; isVersionOf ncit:C128320
  reaction_7: S_h => ; compartment*mu_h*S_h; reaction_7 is "Natural death of susceptible human";  // isVersionOf efo:0000480
  Natural_death_of_Infected_human: I_h => ; compartment*mu_h*I_h;  // isVersionOf efo:0000480
  reaction_9: I_h => ; compartment*delta_h*I_h; reaction_9 is "Disease related death of Infected human";  // isVersionOf efo:0000480
  Recovery_of_infected_human: I_h => R_h; compartment*gamma*I_h;
  Natural_death_of_recovered_human: R_h => ; compartment*mu_h*R_h;  // isVersionOf efo:0000480

  // Unit definitions:
  unit volume = 1e-3 litre;
  unit time = 86400 second;
end
