// SBML level 2 version 4
// dcterms:bibliographicCitation: PDL-1 medaited inhibition of TCR and costimulatory signals. urn:miriam:pubmed:30356330
// dcterms:bibliographicCitation: urn:miriam:pubmed:30356330

function SMM_Enzyme_based(kcat, Enzyme, Substrate, Km)
  kcat*Enzyme*Substrate/(Km + Substrate);
end

function Equation_for_PD1_activation(kcat, Enzyme, Substrate, Km, X1, X2, Y1, k)
  kcat*Enzyme*Substrate/(Km + Substrate)*(1 - (X1 + X2)/(Y1*k));
end

function Equation_for_Enzymatic_Dephosphorylation(ka, Enzyme, Substrate)
  ka*Enzyme*Substrate;
end

model _30356330_Theinmozhi_PDL1_TCR_regulation()
  // Theinmozhi2018 - Mechanism of PD1 inhibiting TCR signaling in Tumor immune regulation
  // Its a Deterministic ODE model showcasing mechanism of PDL1 induced TCR and CD38 signalling inhibition. The model also contains the LCK activation and inactivation phenomenon dependent on the particular phosphorylation site. This model is relevant in immunotherapy.
  // biomodels.db:MODEL1812040008 biomodels.db:BIOMD0000000724
  // occursIn bto:0000782
  // hasProperty GO:0002840
  // hasProperty GO:0002418
  // hasProperty GO:0050852
  // isPropertyOf MAMO:0000046

  // Compartments:
  compartment Cell = 1;  // isVersionOf NCIT:C28699; isVersionOf NCIT:C12546; isDescribedBy pubmed:30356330

  // Species:
  species LCKi in Cell = 25;  // isVersionOf uniprot:P06239; hasProperty pato:0002355
  species LCKyi in Cell = 25;  // isVersionOf uniprot:P06239; hasProperty pato:0002355
  species LCKya in Cell = 25;  // isVersionOf uniprot:P06239; hasProperty pato:0002220
  species LCKyiya in Cell = 25;  // isVersionOf uniprot:P06239; hasProperty pato:0002220
  species LCKpi in Cell = 0;  // isVersionOf uniprot:P06239; hasProperty pato:0002220
  // {[LCKt]}-({[LCKyiya]}+{[LCKyi]}+{[LCKya]}+{[LCKpi]})
  species $LCKt in Cell;  // isVersionOf uniprot:P06239
  species $LCKactive in Cell;  // isVersionOf uniprot:P06239; hasProperty pato:0002220
  species PD1 in Cell = 500;  // isVersionOf uniprot:Q9NZQ7; hasProperty pato:0002355
  species PD1p1 in Cell = 0;  // isVersionOf uniprot:Q9NZQ7; hasProperty pato:0002220
  species PD1p2 in Cell = 0;  // isVersionOf uniprot:Q9NZQ7; hasProperty pato:0002220
  species CP1 in Cell = 0;  // hasPart uniprot:Q06124; hasPart uniprot:Q9NZQ7; hasProperty pato:0002220
  species SHP2 in Cell = 300;  // isVersionOf uniprot:Q06124
  species CP2 in Cell = 0;  // hasPart uniprot:Q9NZQ7; hasPart uniprot:Q06124; hasProperty pato:0002220
  species $CPactive in Cell;  // hasPart uniprot:Q06124; hasPart uniprot:Q9NZQ7; hasProperty pato:0002220
  species CD28a in Cell = 0;  // isVersionOf uniprot:P10747; hasProperty pato:0002220
  species CD28i in Cell = 250;  // isVersionOf uniprot:P10747; hasProperty pato:0002355
  species PI3K in Cell = 500;  // hasVersion uniprot:P27986; hasVersion uniprot:P42336
  species PI3Kb in Cell = 0;  // hasVersion uniprot:P27986; hasVersion uniprot:P42336; hasProperty pato:0002220
  // {[CD28t]}-({[CD28a]}+{[PI3Kb]})
  species $CD28t in Cell;  // isVersionOf uniprot:P10747
  species CD3a in Cell = 0;  // isVersionOf uniprot:P20963; hasProperty pato:0002220
  species CD3i in Cell = 50;  // isVersionOf uniprot:P20963; hasProperty pato:0002355
  species ZAP70a1 in Cell = 0;  // isVersionOf uniprot:P43403; hasProperty pato:0002220
  species ZAP70i in Cell = 0;  // hasPart uniprot:P20963; isVersionOf uniprot:P43403; hasProperty pato:0002355
  species ZAP70 in Cell = 300;  // isVersionOf uniprot:P43403
  species ZAP70a2 in Cell = 0;  // isVersionOf uniprot:P43403; hasProperty pato:0002220
  species $PI3Kt in Cell;  // hasVersion uniprot:P27986; hasVersion uniprot:P42336
  // {[ZAP70t]}-({[ZAP70i]}+{[ZAP70a1]}+{[ZAP70a2]})
  species $ZAP70t in Cell;  // isVersionOf uniprot:P43403
  species LATa in Cell = 0;  // isVersionOf uniprot:O43561; hasProperty pato:0002220
  species LATi in Cell = 300;  // isVersionOf uniprot:O43561; hasProperty pato:0002355
  // {[LATt]}-({[LATa]}+{[GADSa]}+{[SLP76i]}+{[SLP76a]})
  species $LATt in Cell;  // isVersionOf uniprot:O43561
  species GADS in Cell = 300;  // hasVersion uniprot:P62993; hasVersion uniprot:Q13588
  species SLP76 in Cell = 300;  // isVersionOf uniprot:Q13094
  species SLP76i in Cell = 0;  // isVersionOf uniprot:Q13094
  // {[GADSt]}-({[GADSa]}+{[SLP76i]}+{[SLP76a]})
  species $GADSt in Cell;  // hasVersion uniprot:Q13588; hasVersion uniprot:P62993
  species $SLP76t in Cell;  // isVersionOf uniprot:Q13094
  // {[CD3t]}-({[CD3a]}+{[ZAP70i]}+{[ZAP70a1]}+{[ZAP70a2]})
  species $CD3t in Cell;  // isVersionOf uniprot:P20963
  species SLP76a in Cell = 0;  // isVersionOf uniprot:Q13094
  species GADSa in Cell = 0;  // hasPart uniprot:O43561; hasPart uniprot:P62993; hasPart uniprot:Q13588
  species $LCKinactive in Cell;  // isVersionOf uniprot:P06239; hasProperty pato:0002355

  // Parameters:
  Kdpa_yiya has unit_0; Kdpa_yiya is "Kdpa,yiya";
  Kdpi_yi has unit_0; Kdpi_yi is "Kdpi,yi";
  Kdpi_yiya has unit_0; Kdpi_yiya is "Kdpi,yiya";
  Kdpa_ya has unit_0; Kdpa_ya is "Kdpa,ya";
  Kdpa_pi has unit_0; Kdpa_pi is "Kdpa,pi";
  Kpi_i = 6e-7 unit_1; Kpi_i is "Kpi,i";
  Kpi_ya = 6e-5 unit_1; Kpi_ya is "Kpi,ya";
  Kpa_i = 1e-6 unit_1; Kpa_i is "Kpa,i";
  Kpa_yi = 0.00075 unit_1; Kpa_yi is "Kpa,yi";
  k = 41;
  Kp_pd1 = 7.5 unit_1; Kp_pd1 is "Kp,pd1";
  KMp_pd1 = 1000 unit_2; KMp_pd1 is "KMp,pd1";
  Ka_shp = 0.0065 unit_0; Ka_shp is "Ka,shp";
  Kd1_shp = 10 unit_1; Kd1_shp is "Kd1,shp";
  Kd2_shp = 1 unit_1; Kd2_shp is "Kd2,shp";
  Kdp_cp2 = 5e-8 unit_1; Kdp_cp2 is "Kdp,cp2";
  Kp_cd28 = 1 unit_1; Kp_cd28 is "Kp,cd28";
  KMp_cd28 = 1000 unit_2; KMp_cd28 is "KMp,cd28";
  Kdp_cd28 = 5 unit_1; Kdp_cd28 is "Kdp,cd28";
  KMdp_cd28 = 500 unit_2; KMdp_cd28 is "KMdp,cd28";
  Ka_pi3k = 1.4e-6 unit_0; Ka_pi3k is "Ka,pi3k";
  Kd_pi3k = 0.0009 unit_1; Kd_pi3k is "Kd,pi3k";
  Kp_cd3 = 3.29 unit_1; Kp_cd3 is "Kp,cd3";
  KMp_cd3 = 80 unit_2; KMp_cd3 is "KMp,cd3";
  Kdp_cd3 = 5 unit_1; Kdp_cd3 is "Kdp,cd3";
  KMdp_cd3 = 150 unit_2; KMdp_cd3 is "KMdp,cd3";
  Ka_zap = 7e-5 unit_0; Ka_zap is "Ka,zap";
  Kd_zap = 0.001 unit_1; Kd_zap is "Kd,zap";
  Kp1_zap = 2e-6 unit_0; Kp1_zap is "Kp1,zap";
  Kp2_zap = 3e-5 unit_0; Kp2_zap is "Kp2,zap";
  Kp_lat = 0.001 unit_0; Kp_lat is "Kp,lat";
  Ka_gads = 0.0005 unit_0; Ka_gads is "Ka,gads";
  Kd_gads = 1.5 unit_1; Kd_gads is "Kd,gads";
  Ka_slp = 0.015 unit_0; Ka_slp is "Ka,slp";
  Kd_slp = 0.12 unit_1; Kd_slp is "Kd,slp";
  Kp_slp = 0.003 unit_0; Kp_slp is "Kp,slp";
  perc_SHP2_bound has unit_2;
  LCK_switch = 0;
  Initial_for_LCK_switch = LCK_switch;

  // Assignment rules:
  SLP76t := SLP76 + SLP76a + SLP76i;
  Kdpa_yiya := 2.4e-5*Initial_for_LCK_switch;
  ZAP70t := ZAP70 + ZAP70i + ZAP70a1 + ZAP70a2;
  CD28t := CD28i + CD28a + PI3Kb;
  Kdpi_yiya := 1.2e-5*Initial_for_LCK_switch;
  LCKactive := LCKya + LCKyiya;
  LATt := LATi + LATa + GADSa + SLP76i + SLP76a;
  LCKinactive := LCKi + LCKyi + LCKpi;
  Kdpa_pi := 1.2e-7*Initial_for_LCK_switch;
  PI3Kt := PI3K + PI3Kb;
  CD3t := CD3i + CD3a + ZAP70i + ZAP70a1 + ZAP70a2;
  Kdpi_yi := 2.4e-5*Initial_for_LCK_switch;
  perc_LCK_inactive := LCKinactive/(LCKi + LCKpi + LCKya + LCKyi + LCKyiya)*100;
  perc_LCK_active := LCKactive/(LCKi + LCKpi + LCKya + LCKyi + LCKyiya)*100;
  LAT_phosphorylated := LATa + GADSa + SLP76i + SLP76a;
  perc_ZAP70_free := ZAP70/(ZAP70 + ZAP70i + ZAP70a1 + ZAP70a2)*100;
  LCK_phos_Y394 := LCKya + LCKyiya + LCKpi;
  LCK_phos_Y505 := LCKyi + LCKyiya + LCKpi;
  ZAP70_phos_Y93 := ZAP70a2;
  CD28_phosphorylated := PI3Kb + CD28a;
  ZAP70_phos_Y315 := ZAP70a2 + ZAP70a2;
  LCKt := LCKi + LCKya + LCKyi + LCKyiya + LCKpi;
  perc_PI3K_free := PI3K/(PI3Kb + PI3K)*100;
  CD3z_phosphorylated := CD3a + ZAP70i + ZAP70a1 + ZAP70a2;
  GADSt := GADS + GADSa + SLP76i + SLP76a;
  Kdpa_ya := 6e-6*Initial_for_LCK_switch;
  CPactive := CP1 + CP2;
  perc_SHP2_free := SHP2/(SHP2 + CPactive)*100;
  perc_SHP2_bound := CPactive/(SHP2 + CPactive)*100;

  // Reactions:
  LCK_P_LCKyi_inh: LCKi => LCKyi; Cell*Kpi_i*LCKi;  // sbo:0000216
  LCK_P_LCKya_act: LCKi => LCKya; Cell*Kpa_i*LCKi;  // sbo:0000216
  LCKya_P_LCKyiya_act: LCKya => LCKyiya; Cell*Kpi_ya*LCKya;  // sbo:0000216
  LCKyi_P_LCKpi_inh: LCKyi => LCKpi; Cell*Kpa_yi*LCKyi;  // sbo:0000216
  LCKyiya_DP_LCKyi: LCKyiya => LCKyi; Cell*Equation_for_Enzymatic_Dephosphorylation(Kdpi_yiya, CPactive, LCKyiya);  // modifiers: CPactive; sbo:0000330
  LCKya_DP_LCKi: LCKya => LCKi; Cell*Equation_for_Enzymatic_Dephosphorylation(Kdpa_ya, CPactive, LCKya);  // modifiers: CPactive; sbo:0000330
  LCKyi_DP_LCKi: LCKyi => LCKi; Cell*Equation_for_Enzymatic_Dephosphorylation(Kdpi_yi, CPactive, LCKyi);  // modifiers: CPactive; sbo:0000330
  LCKyiya_DP_LCKya: LCKyiya => LCKya; Cell*Equation_for_Enzymatic_Dephosphorylation(Kdpi_yiya, CPactive, LCKyiya);  // modifiers: CPactive; sbo:0000330
  LCKpi_DP_LCKyi: LCKpi => LCKyi; Cell*Equation_for_Enzymatic_Dephosphorylation(Kdpa_pi, CPactive, LCKpi);  // modifiers: CPactive; sbo:0000330
  PD1_P_PD1p1_act: PD1 => PD1p1; Cell*Equation_for_PD1_activation(Kp_pd1, LCKactive, PD1, KMp_pd1, PD1p1, PD1p2, LCKt, k);  // modifiers: LCKactive, PD1p2, LCKt; sbo:0000216
  PD1p1_P_PD1p2_act: PD1p1 => PD1p2; Cell*SMM_Enzyme_based(Kp_pd1, LCKactive, PD1p1, KMp_pd1);  // modifiers: LCKactive; sbo:0000216
  PD1p1_Bd_SHP2: PD1p1 + SHP2 -> CP1; Cell*(Ka_shp*PD1p1*SHP2 - Kd1_shp*CP1);  // sbo:0000117
  PD1p2_Bd_SHP2: PD1p2 + SHP2 -> CP2; Cell*(Ka_shp*PD1p2*SHP2 - Kd1_shp*CP2);  // sbo:0000117
  CP2_Diss_SHP2_PD1p1: CP2 => SHP2 + PD1p1; Cell*Kd2_shp*CP2;  // sbo:0000180
  CP2_DP_CP1: CP2 => CP1; Cell*Kdp_cp2*CP2;  // sbo:0000330
  CP1_Diss_PD1_SHP2: CP1 => SHP2 + PD1; Cell*Kd2_shp*CP1;  // sbo:0000180
  CD28i_P_CD28a: CD28i => CD28a; Cell*SMM_Enzyme_based(Kp_cd28, LCKactive, CD28i, KMp_cd28);  // modifiers: LCKactive; sbo:0000216
  CD28a_DP_CD28i: CD28a => CD28i; Cell*SMM_Enzyme_based(Kdp_cd28, CPactive, CD28a, KMdp_cd28);  // modifiers: CPactive; sbo:0000330
  CD28a_Bd_PI3K: CD28a + PI3K -> PI3Kb; Cell*(Ka_pi3k*CD28a*PI3K - Kd_pi3k*PI3Kb);  // sbo:0000117
  CD3i_P_CD3a: CD3i => CD3a; Cell*SMM_Enzyme_based(Kp_cd3, LCKactive, CD3i, KMp_cd3);  // modifiers: LCKactive; sbo:0000216
  CD3a_DP_CD3i: CD3a => CD3i; Cell*SMM_Enzyme_based(Kdp_cd3, CPactive, CD3a, KMdp_cd3);  // modifiers: CPactive; sbo:0000330
  CD3a_Bd_ZAP70: CD3a + ZAP70 -> ZAP70i; Cell*(Ka_zap*CD3a*ZAP70 - Kd_zap*ZAP70i);  // sbo:0000117
  ZAP70i_P_ZAP70a1: ZAP70i => ZAP70a1; Cell*Equation_for_Enzymatic_Dephosphorylation(Kp1_zap, LCKactive, ZAP70i);  // modifiers: LCKactive; sbo:0000216
  ZAP70a1_P_ZAP70a2: ZAP70a1 => ZAP70a2; Cell*Equation_for_Enzymatic_Dephosphorylation(Kp2_zap, LCKactive, ZAP70a1);  // modifiers: LCKactive; sbo:0000216
  LATi_P_LATa: LATi => LATa; Cell*Equation_for_Enzymatic_Dephosphorylation(Kp_lat, ZAP70a2, LATi);  // modifiers: ZAP70a2; sbo:0000216
  LATa_Bd_GADS: LATa + GADS -> GADSa; Cell*(Ka_gads*LATa*GADS - Kd_gads*GADSa);  // sbo:0000117
  GADSa_Bd_SLP76: GADSa + SLP76 -> SLP76i; Cell*(Ka_slp*GADSa*SLP76 - Kd_slp*SLP76i);  // sbo:0000117
  SLP76i_P_SLC76a: SLP76i => SLP76a; Cell*Equation_for_Enzymatic_Dephosphorylation(Kp_slp, ZAP70a2, SLP76i);  // modifiers: ZAP70a2; sbo:0000216

  // Unit definitions:
  unit substance = 1e-9 mole;
  unit unit_0 = litre / (1e-9 mole * second); unit_0 is "l/(nmol*s)";
  unit unit_1 = 1 / second; unit_1 is "1/s";
  unit unit_2 = 1e-9 mole / litre; unit_2 is "nmol/l";
end
