// SBML level 2 version 4
// dcterms:bibliographicCitation: urn:miriam:doi:10.1039/C5MB00801H

function Rate_Law_for_R1_1(EP, PEP, kep, kpep, vmax)
  vmax*EP*PEP/(kpep*kep + kpep*EP + kep*PEP + EP*PEP);
end

function Henri_Michaelis_Menten__irreversible__1(DAHP, Km, V)
  V*DAHP/(Km + DAHP);
end
Henri_Michaelis_Menten__irreversible__1 is "Henri-Michaelis-Menten (irreversible)_1";

function Henri_Michaelis_Menten__irreversible__2(DHQ, Km, V)
  V*DHQ/(Km + DHQ);
end
Henri_Michaelis_Menten__irreversible__2 is "Henri-Michaelis-Menten (irreversible)_2";

function Rate_Law_for_R4_1(DHSK, NADPH, kdhsk, knadph, vmax)
  vmax*DHSK*NADPH/(kdhsk*knadph + kdhsk*NADPH + knadph*DHSK + DHSK*NADPH);
end

function Rate_Law_for_R5_1(ATP, SK, katp, ksk, vmax)
  vmax*SK*ATP/(ksk*katp + ksk*ATP + katp*SK + SK*ATP);
end

function Rate_Law_for_R6_1(PEP, SKP, kpep, kskp, vmax)
  vmax*SKP*PEP/(kpep*kskp + kpep*PEP + kskp*SKP + PEP*SKP);
end

function Henri_Michaelis_Menten__irreversible__3(CVPSK, Km, V)
  V*CVPSK/(Km + CVPSK);
end
Henri_Michaelis_Menten__irreversible__3 is "Henri-Michaelis-Menten (irreversible)_3";

function Rate_Law_for_R8_1(CM, Gln, kcm, kgln, vmax)
  vmax*CM*Gln/(kcm*kgln + kcm*Gln + kgln*CM + CM*Gln);
end

function Henri_Michaelis_Menten__irreversible__4(ADC, Km, V)
  V*ADC/(Km + ADC);
end
Henri_Michaelis_Menten__irreversible__4 is "Henri-Michaelis-Menten (irreversible)_4";

function Rate_Law_for_R10_1(GTP, THF, kgtp, kiTHF, vmax)
  vmax*GTP/(kgtp*(1 + THF/kiTHF) + GTP);
end

function Henri_Michaelis_Menten__irreversible__5(DHNTP, Km, V)
  V*DHNTP/(Km + DHNTP);
end
Henri_Michaelis_Menten__irreversible__5 is "Henri-Michaelis-Menten (irreversible)_5";

function Rate_Law_for_R12_1(AHMDHP, ATP, kahmdhp, katp, vmax)
  vmax*ATP*AHMDHP/(kahmdhp*katp + katp*ATP + kahmdhp*AHMDHP + ATP*AHMDHP);
end

function Rate_Law_for_R14_1(ATP, DHP, Glu, katp, kdhp, kglu, vmax)
  vmax*DHP*Glu*ATP/(kdhp*kglu*katp + kdhp*(Glu + ATP) + kglu*(DHP + ATP) + katp*(Glu + ATP) + DHP*Glu*ATP);
end

function Rate_Law_for_R15_1(DHF, NADPH, kdhf, knadph, vmax)
  vmax*DHF*NADPH/(kdhf*knadph + kdhf*NADPH + knadph*DHF + DHF*NADPH);
end

function Rate_Law_for_R16_1(ATP, DHF, Glu, THF, katp, kglu, kidhf, kthf, vmax)
  vmax*THF*Glu*ATP/(kthf*(1 + DHF/kidhf)*kglu*katp + kthf*(Glu + ATP) + kglu*(THF + ATP) + katp*(THF + Glu) + THF*Glu*ATP);
end

function Rate_Law_for_R17_1(Ser, THF, THFGlu, kithf, kser, kthfglu, vmax)
  vmax*THFGlu*Ser/(kthfglu*(1 + THF/kithf)*kser + kthfglu*Ser + kser*THFGlu + THFGlu*Ser);
end

function Rate_Law_for_R18b_1(DLp, Gly, kdlp, kgly, vmax)
  vmax*DLp*Gly/(kgly*kdlp + kgly*Gly + kdlp*DLp + DLp*Gly);
end

function Rate_Law_for_R19_1(DHF, NADPH, kidhf, kmythfglu, knadph, myTHFGlu, vmax)
  vmax*myTHFGlu*NADPH/(kmythfglu*(1 + DHF/kidhf)*knadph + kmythfglu*NADPH + knadph*myTHFGlu + myTHFGlu*NADPH);
end

function Rate_Law_for_R20_1(Hcy, MTHFGlu, khcy, kmthfglu, vmax)
  vmax*MTHFGlu*Hcy/(kmthfglu*khcy + kmthfglu*Hcy + khcy*MTHFGlu + MTHFGlu*Hcy);
end

function Rate_Law_for_R21_1(DHF, dUMP, kdump, kidhf, kmythfglu, myTHFGlu, vmax)
  vmax*myTHFGlu*dUMP/(kmythfglu*(1 + DHF/kidhf)*kdump + kmythfglu*dUMP + kdump*myTHFGlu + myTHFGlu*dUMP);
end

function Rate_Law_for_R22_1(DHF, NADP, kidhf, kmythfglu, knadp, myTHFGlu, vmax)
  vmax*myTHFGlu*NADP/(kmythfglu*(1 + DHF/kidhf)*knadp + kmythfglu*NADP + knadp*myTHFGlu + myTHFGlu*NADP);
end

function Rate_Law_for_R25_1(fTHFGlu, kfthfglu, kmtrna, mtRNA, vmax)
  vmax*fTHFGlu*mtRNA/(kfthfglu*kmtrna + kfthfglu*mtRNA + kmtrna*fTHFGlu + fTHFGlu*mtRNA);
end

function Rate_Law_for_R26_1(NADP, fTHFGlu, kfthfglu, knadp, vmax)
  vmax*fTHFGlu*NADP/(kfthfglu*knadp + kfthfglu*NADP + knadp*fTHFGlu + fTHFGlu*NADP);
end

function Rate_Law_for_R18c_1(SAmDLp, THFGlu, ksamdlp, kthfglu, vmax)
  vmax*THFGlu*SAmDLp/(kthfglu*ksamdlp + kthfglu*SAmDLp + ksamdlp*THFGlu + THFGlu*SAmDLp);
end

function Rate_Law_for_R18a_1(Lp, NADH, klp, knadh, vmax)
  vmax*NADH*Lp/(knadh*klp + knadh*Lp + klp*NADH + NADH*Lp);
end

function Rate_Law_for_R13_1(AHMDPP, kahmdpp, kpaba, pABA, vmax)
  vmax*AHMDPP*pABA/(kahmdpp*kpaba + kpaba*AHMDPP + kahmdpp*pABA + AHMDPP*pABA);
end

function Rate_Law_for_R24_1(ADP, Pi, fTHFGlu, katp, kformyl, kthfglu, vmax)
  vmax*fTHFGlu*ADP*Pi/(kthfglu*kformyl*katp + kthfglu*(ADP + Pi) + kformyl*(fTHFGlu + Pi) + katp*(ADP + fTHFGlu) + fTHFGlu*ADP*Pi);
end

function Henri_Michaelis_Menten__irreversible__6(Km, V, meTHFGlu)
  V*meTHFGlu/(Km + meTHFGlu);
end
Henri_Michaelis_Menten__irreversible__6 is "Henri-Michaelis-Menten (irreversible)_6";

function Rate_Law_for_R29_1(ATP, ffTHFGlu, katp, kffthfglu, vmax)
  vmax*ATP*ffTHFGlu/(katp*kffthfglu + katp*ffTHFGlu + kffthfglu*ATP + ATP*ffTHFGlu);
end

model Salcedo_Sora2016___Microbial_folate_biosynthesis_and_utilisation()
  // Salcedo-Sora2016 - Microbial folate biosynthesis and utilisation
  // This model is described in the article:
  // A mathematical model of microbial folate biosynthesis and utilisation: implications for antifolate development.
  // Enrique Salcedo-Sora J, Mc Auley MT.
  // Mol Biosyst. 2016 Jan 21.
  // Abstract:
  // The metabolic biochemistry of folate biosynthesis and utilisation has evolved into a complex network of reactions. Although this complexity represents challenges to the field of folate research it has also provided a renewed source for antimetabolite targets. A range of improved folate chemotherapy continues to be developed and applied particularly to cancer and chronic inflammatory diseases. However, new or better antifolates against infectious diseases remain much more elusive. In this paper we describe the assembly of a generic deterministic mathematical model of microbial folate metabolism. Our aim is to explore how a mathematical model could be used to explore the dynamics of this inherently complex set of biochemical reactions. Using the model it was found that: (1) a particular small set of folate intermediates are overrepresented, (2) inhibitory profiles can be quantified by the level of key folate products, (3) using the model to scan for the most effective combinatorial inhibitions of folate enzymes we identified specific targets which could complement current antifolates, and (4) the model substantiates the case for a substrate cycle in the folinic acid biosynthesis reaction. Our model is coded in the systems biology markup language and has been deposited in the BioModels Database (MODEL1511020000), this makes it accessible to the community as a whole.
  // This model is hosted on BioModels Database and identified by: MODEL1511020000.
  // To cite BioModels Database, please use: BioModels Database: An enhanced, curated and annotated resource for published quantitative kinetic models.
  // To the extent possible under law, all copyright and related or neighbouring rights to this encoded model have been dedicated to the public domain worldwide. Please refer to CC0 Public Domain Dedication for more information.
  // biomodels.db:MODEL1511020000
  // hasProperty ncit:C38809
  // hasProperty ncit:C14329
  // hasProperty PW:0001369
  // hasProperty efo:0005741
  // hasProperty mamo:MAMO_0000046

  // Compartments:
  compartment compartment = 1; compartment is "Single celled micro-organism";

  // Species:
  species DAHP in compartment = 0.9796079;  // kegg.compound:C04691
  species $PEP in compartment = 16.01032;  // kegg.compound:C00074
  species Pi in compartment = 2.725541;  // kegg.compound:C00009
  species DHQ in compartment = 0.9994088;  // kegg.compound:C00944
  species $EP in compartment = 107.502052;  // kegg.compound:C00279
  species DHSK in compartment = 1.92788104;  // kegg.compound:C02637
  species SK in compartment = 5.06777189;  // kegg.compound:C00493
  species SKP in compartment = 2;  // kegg.compound:C03175
  species CVPSK in compartment = 0.9174313;  // kegg.compound:C01269
  species CM in compartment = 1.009196;  // kegg.compound:C00251
  species $Gln in compartment = 381.0009;  // kegg.compound:C00064
  species Glu in compartment = 959.9999;  // kegg.compound:C00025
  species ADC in compartment = 0.9907047;  // kegg.compound:C11355
  species Pyr in compartment = 1.000007;  // kegg.compound:C00022
  species pABA in compartment = 1.00378139;  // kegg.compound:C00568
  species DHNTP in compartment = 4;  // kegg.compound:C04895
  species $GTP in compartment = 487.4867;  // kegg.compound:C00044
  species AHMDHP in compartment = 2.01877235;  // kegg.compound:C01300
  species HAD in compartment = 2.002306;  // kegg.compound:C00266
  species PTHP in compartment = 1.002299;  // kegg.compound:C03684
  species AHMDPP in compartment = 0.9873083;  // kegg.compound:C04807
  species DHP in compartment = 0.9963801;  // kegg.compound:C00921
  species DHF in compartment = 1.142744;  // kegg.compound:C00415
  species THF in compartment = 8;  // kegg.compound:C00101
  species THFGlu in compartment = 1;  // kegg.compound:C03541
  species $Gly in compartment = 499.9975;  // kegg.compound:C00037
  species $Ser in compartment = 6.803577;  // kegg.compound:C00065
  species myTHFGlu in compartment = 1.04350884;  // kegg.compound:C00143
  species MTHFGlu in compartment = 1.000096;  // kegg.compound:C00440
  species $Hcy in compartment = 1.000183;  // kegg.compound:C00155
  species Met in compartment = 0.9998172;  // kegg.compound:C00073
  species dTMP in compartment = 0.9974701;  // kegg.compound:C00364
  species $dUMP in compartment = 20.00253;  // kegg.compound:C00365
  species meTHFGlu in compartment = 0.9082384;  // kegg.compound:C00445
  species fTHFGlu in compartment = 1.83347183;  // kegg.compound:C00234
  species fmtRNA in compartment = 0.9968761;  // kegg.compound:C03294
  species $mtRNA in compartment = 1.003124;  // kegg.compound:C02430
  species COTwo in compartment = 0.988683328;
  species ADP in compartment = 2.828115;  // kegg.compound:C00008
  species $ATP in compartment = 963.0188;  // kegg.compound:C00002
  species NADP in compartment = 2;  // kegg.compound:C00006
  species $NADPH in compartment = 12.19849;  // kegg.compound:C00005
  species AMP in compartment = 0.983533495;  // kegg.compound:C00020
  species DLp in compartment = 0.7017503;  // kegg.compound:C02972
  species SAmDLp in compartment = 1.000015;  // kegg.compound:C01242
  species $Lp in compartment = 1.298234;  // kegg.compound:C02051
  species NAD in compartment = 0.7017656;  // kegg.compound:C00003
  species $NADH in compartment = 8.349823;  // kegg.compound:C00004
  species Ammonia in compartment = 0.9895374;  // kegg.compound:C00014
  species Formyl in compartment = 8;  // kegg.compound:C00058
  species ffTHFGlu in compartment = 1;  // kegg.compound:C03479

  // Reactions:
  R1: $PEP + $EP => DAHP + Pi; compartment*Rate_Law_for_R1_1(EP, PEP, kep, R1_kpep, R1_vmax); R1 is "R1 - Synthesis of 3-Deoxy-7-phosphoheptulonate";  // isVersionOf kegg.reaction:R01826
    kep = 285; R1_kpep = 36; R1_vmax = 578.76;
  R2: DAHP => DHQ + Pi; compartment*Henri_Michaelis_Menten__irreversible__1(DAHP, R2_Km, R2_V); R2 is "R2 - 2-Dehydro-3-deoxy-D-arabino-heptonate 7-phosphate phosphate-lyase (3-Dehydroquinate synthase)";  // isVersionOf kegg.reaction:R03083
    R2_Km = 4.7; R2_V = 7.462;
  R3: DHQ => DHSK; compartment*Henri_Michaelis_Menten__irreversible__2(DHQ, R3_Km, R3_V); R3 is "R3 - 3-Dehydroquinate hydro-lyase (3-Dehydroquinate dehydratase)";  // isVersionOf kegg.reaction:R03084
    R3_Km = 58; R3_V = 116.48;
  R4: DHSK + $NADPH => SK + NADP; compartment*Rate_Law_for_R4_1(DHSK, NADPH, kdhsk, R4_knadph, R4_vmax); R4 is "R4 - Shikimate:NADP + 3-oxidoreductase (Shikimate 5-dehydrogenase)";  // isVersionOf kegg.reaction:R02413
    kdhsk = 30; R4_knadph = 11; R4_vmax = 17290;
  R5: SK + $ATP => SKP + ADP + Pi; compartment*Rate_Law_for_R5_1(ATP, SK, R5_katp, ksk, R5_vmax); R5 is "R5 - ATP:Shikimate 3-phosphotransferase (Shikimate kinase)";  // isVersionOf kegg.reaction:R02412
    R5_katp = 151.5; ksk = 200; R5_vmax = 18200;
  R6: SKP + $PEP => CVPSK + Pi; compartment*Rate_Law_for_R6_1(PEP, SKP, R6_kpep, kskp, R6_vmax); R6 is "R6 - Phosphoenolpyruvate:3-phosphoshikimate 5-O-(1-carboxyvinyl)-transferase";  // isVersionOf kegg.reaction:R03460
    R6_kpep = 93; kskp = 80; R6_vmax = 1547;
  R7: CVPSK => CM + Pi; compartment*Henri_Michaelis_Menten__irreversible__3(CVPSK, R7_Km, R7_V); R7 is "R7 - 5-O-(1-Carboxyvinyl)-3-phosphoshikimate phosphate-lyase (chorismate synthase)";  // isVersionOf kegg.reaction:R01714
    R7_Km = 12.7; R7_V = 728;
  R8_Aminodeoxychorismate_synthase: CM + $Gln => ADC + Glu; compartment*Rate_Law_for_R8_1(CM, Gln, kcm, kgln, R8_Aminodeoxychorismate_synthase_vmax); R8_Aminodeoxychorismate_synthase is "R8 - Aminodeoxychorismate synthase";  // isVersionOf kegg.reaction:R01716
    kcm = 13; kgln = 1100; R8_Aminodeoxychorismate_synthase_vmax = 26;
  R9_Aminodeoxychorismate_lyase: ADC => pABA + Pyr; compartment*Henri_Michaelis_Menten__irreversible__4(ADC, R9_Aminodeoxychorismate_lyase_Km, R9_Aminodeoxychorismate_lyase_V); R9_Aminodeoxychorismate_lyase is "R9 - Aminodeoxychorismate lyase";  // isVersionOf kegg.reaction:R05553
    R9_Aminodeoxychorismate_lyase_Km = 1.1; R9_Aminodeoxychorismate_lyase_V = 2.2;
  R10: $GTP => DHNTP + Formyl; compartment*Rate_Law_for_R10_1(GTP, THF, kgtp, kiTHF, R10_vmax); R10 is "R10 - GTP 7,8,9-dihydrolase (GTP cyclohydrolase I)";  // modifiers: THF; isVersionOf kegg.reaction:R00424
    kgtp = 17.6; kiTHF = 0.157; R10_vmax = 1515.15;
  R11_Dihydroneopterin_aldolase: DHNTP => AHMDHP + HAD + Pi; compartment*Henri_Michaelis_Menten__irreversible__5(DHNTP, R11_Dihydroneopterin_aldolase_Km, R11_Dihydroneopterin_aldolase_V); R11_Dihydroneopterin_aldolase is "R11 - Dihydroneopterin aldolase";  // isVersionOf kegg.reaction:R03504
    R11_Dihydroneopterin_aldolase_Km = 7.4; R11_Dihydroneopterin_aldolase_V = 792.064;
  R27: DHNTP => PTHP + Pi; compartment*Henri_Michaelis_Menten__irreversible__5(DHNTP, R27_Km, R27_V); R27 is "R27 - 6-Pyruvoyltetrahydropterin synthase";  // isVersionOf kegg.reaction:R04286
    R27_Km = 10; R27_V = 22.659;
  R12: AHMDHP + $ATP => AHMDPP + AMP; compartment*Rate_Law_for_R12_1(AHMDHP, ATP, kahmdhp, R12_katp, R12_vmax); R12 is "R12 - 2-Amino-4-hydroxy-6-hydroxymethyldihydropteridine pyrophosphokinase";  // isVersionOf kegg.reaction:R03503
    kahmdhp = 3.6; R12_katp = 15; R12_vmax = 382.2;
  R14_7_8_Dihydrofolate_synthase: DHP + Glu + $ATP => DHF + ADP + Pi; compartment*Rate_Law_for_R14_1(ATP, DHP, Glu, R14_7_8_Dihydrofolate_synthase_katp, kdhp, R14_7_8_Dihydrofolate_synthase_kglu, R14_7_8_Dihydrofolate_synthase_vmax); R14_7_8_Dihydrofolate_synthase is "R14 - 7,8-Dihydrofolate synthase";  // isVersionOf kegg.reaction:R02237
    R14_7_8_Dihydrofolate_synthase_katp = 100; kdhp = 1; R14_7_8_Dihydrofolate_synthase_kglu = 1380; R14_7_8_Dihydrofolate_synthase_vmax = 2.821;
  R15_Dihydrofolate_reductase: DHF + $NADPH => THF + NADP; compartment*Rate_Law_for_R15_1(DHF, NADPH, kdhf, R15_Dihydrofolate_reductase_knadph, R15_Dihydrofolate_reductase_vmax); R15_Dihydrofolate_reductase is "R15 - Dihydrofolate reductase";  // isVersionOf kegg.reaction:R00939
    kdhf = 3; R15_Dihydrofolate_reductase_knadph = 6.12; R15_Dihydrofolate_reductase_vmax = 3000;
  R16: THF + Glu + $ATP => THFGlu + ADP + Pi; compartment*Rate_Law_for_R16_1(ATP, DHF, Glu, THF, R16_katp, R16_kglu, R16_kidhf, kthf, R16_vmax); R16 is "R16 - Folylpoly-gamma-glutamate synthase";  // modifiers: DHF; isVersionOf kegg.reaction:R04241
    R16_katp = 128; R16_kglu = 740; R16_kidhf = 3.1; kthf = 26; R16_vmax = 84.63;
  R17: THFGlu + $Ser -> myTHFGlu + $Gly; compartment*Rate_Law_for_R17_1(Ser, THF, THFGlu, kithf, kser, R17_kthfglu, R17_vmax); R17 is "R17 - Serine hydroxymethyltransferase";  // modifiers: THF; isVersionOf kegg.reaction:R00945
    kithf = 0.157; kser = 700; R17_kthfglu = 40; R17_vmax = 682.5;
  R18b: DLp + $Gly -> SAmDLp + COTwo; compartment*Rate_Law_for_R18b_1(DLp, Gly, kdlp, kgly, R18b_vmax); R18b is "R18b - Glycine decarboxylase (P protein)";  // isVersionOf kegg.reaction:R03425
    kdlp = 290; kgly = 4505; R18b_vmax = 751.66;
  R19: myTHFGlu + $NADPH => MTHFGlu + NADP; compartment*Rate_Law_for_R19_1(DHF, NADPH, R19_kidhf, R19_kmythfglu, R19_knadph, myTHFGlu, R19_vmax); R19 is "R19 - 5,10-Methylenetetrahydrofolate reductase";  // modifiers: DHF; isVersionOf kegg.reaction:R01224
    R19_kidhf = 0.428; R19_kmythfglu = 33; R19_knadph = 19; R19_vmax = 738.92;
  R20_Methionine_synthase: MTHFGlu + $Hcy => THFGlu + Met; compartment*Rate_Law_for_R20_1(Hcy, MTHFGlu, khcy, kmthfglu, R20_Methionine_synthase_vmax); R20_Methionine_synthase is "R20 - Methionine synthase";  // isVersionOf kegg.reaction:R00946
    khcy = 17; kmthfglu = 30; R20_Methionine_synthase_vmax = 379.925;
  R21_Thymidylate_synthase: myTHFGlu + $dUMP => dTMP + DHF; compartment*Rate_Law_for_R21_1(DHF, dUMP, kdump, R21_Thymidylate_synthase_kidhf, R21_Thymidylate_synthase_kmythfglu, myTHFGlu, R21_Thymidylate_synthase_vmax); R21_Thymidylate_synthase is "R21 - Thymidylate synthase";  // isVersionOf kegg.reaction:R02101
    kdump = 5.4; R21_Thymidylate_synthase_kidhf = 0.428; R21_Thymidylate_synthase_kmythfglu = 17; R21_Thymidylate_synthase_vmax = 49.14;
  R22: myTHFGlu + NADP -> meTHFGlu + $NADPH; compartment*Rate_Law_for_R22_1(DHF, NADP, R22_kidhf, R22_kmythfglu, R22_knadp, myTHFGlu, R22_vmax); R22 is "R22 - 5,10-Methylenetetrahydrofolate dehydrogenase";  // modifiers: DHF; isVersionOf kegg.reaction:R01220
    R22_kidhf = 0.428; R22_kmythfglu = 25; R22_knadp = 22; R22_vmax = 1892.8;
  R25: fTHFGlu + $mtRNA -> fmtRNA + THFGlu; compartment*Rate_Law_for_R25_1(fTHFGlu, R25_kfthfglu, kmtrna, mtRNA, R25_vmax); R25 is "R25 - Methionyl-tRNA formyltransferase";  // isVersionOf kegg.reaction:R03940
    R25_kfthfglu = 12.15; kmtrna = 1.07; R25_vmax = 116.48;
  R26: fTHFGlu + NADP -> THFGlu + COTwo + $NADPH; compartment*Rate_Law_for_R26_1(NADP, fTHFGlu, R26_kfthfglu, R26_knadp, R26_vmax); R26 is "R26 - 10-Formyltetrahydrofolate dehydrogenase";  // isVersionOf kegg.reaction:R00941
    R26_kfthfglu = 7.85; R26_knadp = 0.9; R26_vmax = 59.332;
  R18c: THFGlu + SAmDLp -> myTHFGlu + $Lp + Ammonia; compartment*Rate_Law_for_R18c_1(SAmDLp, THFGlu, ksamdlp, R18c_kthfglu, R18c_vmax); R18c is "R18c - S-Aminomethyldihydrolipoylprotein:tetrahydrofolate aminomethyltransferase (T protein)";  // isVersionOf kegg.reaction:R04125
    ksamdlp = 290; R18c_kthfglu = 67.7; R18c_vmax = 196.56;
  R18a: $Lp + $NADH -> DLp + NAD; compartment*Rate_Law_for_R18a_1(Lp, NADH, klp, knadh, R18a_vmax); R18a is "R18a - Dihydrolipoamide dehydrogenase";  // isVersionOf kegg.reaction:R03815
    klp = 1280; knadh = 58; R18a_vmax = 5432.7;
  R13_Dihydropteroate_synthase: AHMDPP + pABA => DHP + Pi; compartment*Rate_Law_for_R13_1(AHMDPP, kahmdpp, kpaba, pABA, R13_Dihydropteroate_synthase_vmax); R13_Dihydropteroate_synthase is "R13 - Dihydropteroate synthase";  // isVersionOf kegg.reaction:R03067
    kahmdpp = 3.15; kpaba = 2.6; R13_Dihydropteroate_synthase_vmax = 105.014;
  R24: fTHFGlu + ADP + Pi -> THFGlu + $ATP + Formyl; compartment*Rate_Law_for_R24_1(ADP, Pi, fTHFGlu, R24_katp, kformyl, R24_kthfglu, R24_vmax); R24 is "R24 - 10-Formyltetrahydrofolate synthetase";  // isVersionOf kegg.reaction:R00943
    R24_katp = 74.5; kformyl = 3190; R24_kthfglu = 134; R24_vmax = 1.53153e4;
  R23: meTHFGlu -> fTHFGlu; compartment*(k1*meTHFGlu - k2*fTHFGlu); R23 is "R23 - 5,10-Methenyltetrahydrofolate cyclohydrolase";  // isVersionOf kegg.reaction:R01655
    k1 = 0.08; k2 = 0.031;
  R28: meTHFGlu => ffTHFGlu; compartment*Henri_Michaelis_Menten__irreversible__6(R28_Km, R28_V, meTHFGlu); R28 is "R28 - S-Aminomethyldihydrolipoylprotein:tetrahydrofolate aminomethyltransferase (T protein)";  // isVersionOf kegg.reaction:R02300
    R28_Km = 67; R28_V = 200;
  R29: $ATP + ffTHFGlu => ADP + Pi + meTHFGlu; compartment*Rate_Law_for_R29_1(ATP, ffTHFGlu, R29_katp, kffthfglu, R29_vmax); R29 is "R29 - 5-formyltetrahydrofolate cyclo-ligase";  // isVersionOf kegg.reaction:R02301
    R29_katp = 50; kffthfglu = 5; R29_vmax = 500;

  // Unit definitions:
  unit time = 60 second;
  unit substance = 1e-6 mole;
end
