// SBML level 2 version 4
// dcterms:bibliographicCitation: http://identifiers.org/pubmed/20007375
// dcterms:bibliographicCitation: http://identifiers.org/doi/10.1073/pnas.0903827106

function scaled_Michaelis_Menten_1_1(GF, Kagf, eps, vsap1)
  vsap1*(GF/(Kagf + GF))*eps;
end
scaled_Michaelis_Menten_1_1 is "scaled Michaelis-Menten 1_1";

function function_for_1k_1M_1(AP1, eps, kdap1)
  kdap1*AP1*eps;
end

function function_for_1k_1(eps, vsprb)
  vsprb*eps;
end

function function_for_1k_2M_1(E2F, eps, kpc1, pRB)
  kpc1*pRB*E2F*eps;
end

function function_for_1k_1M_2(eps, kpc2, pRBc1)
  kpc2*pRBc1*eps;
end

function modified_Michaelis_Menten_2_1(K1, Md, Mdp27, V1, eps, pRB)
  V1*(pRB/(K1 + pRB))*(Md + Mdp27)*eps;
end

function scaled_Michaelis_Menten_2_1(K2, V2, eps, pRBp)
  V2*(pRBp/(K2 + pRBp))*eps;
end

function function_for_1k_1M_3(eps, kdprb, pRBp)
  kdprb*pRBp*eps;
end

function modified_Michaelis_Menten_1_1(K3, Me, V3, eps, pRBp)
  V3*(pRBp/(K3 + pRBp))*Me*eps;
end

function scaled_Michaelis_Menten_2_2(K4, V4, eps, pRBpp)
  V4*(pRBpp/(K4 + pRBpp))*eps;
end

function function_for_1k_2M_2(E2F, eps, kpc3, pRBp)
  kpc3*pRBp*E2F*eps;
end

function function_for_1k_1M_4(eps, kpc4, pRBc2)
  kpc4*pRBc2*eps;
end

function function_for_1k_1M_5(eps, kdprbp, pRBp)
  kdprbp*pRBp*eps;
end

function function_for_1k_1M_6(eps, kdprbpp, pRBpp)
  kdprbpp*pRBpp*eps;
end

function function_for_1k_2(eps, vse2f)
  vse2f*eps;
end

function modified_Michaelis_Menten_1_2(E2F, K1e2f, Ma, V1e2f, eps)
  V1e2f*(E2F/(K1e2f + E2F))*Ma*eps;
end

function scaled_Michaelis_Menten_2_3(E2Fp, K2e2f, V2e2f, eps)
  V2e2f*(E2Fp/(K2e2f + E2Fp))*eps;
end

function function_for_1k_1M_7(E2F, eps, kde2f)
  kde2f*E2F*eps;
end

function function_for_1k_1M_8(E2Fp, eps, kde2fp)
  kde2fp*E2Fp*eps;
end

function function_for_1k_1M_9(AP1, eps, kcd1)
  kcd1*AP1*eps;
end

function double_michaelis_menten_like_1(E2F, Ki7, Ki8, eps, kcd2, pRB, pRBp)
  kcd2*E2F*(Ki7/(Ki7 + pRB))*(Ki8/(Ki8 + pRBp))*eps;
end

function function_for_Cd_to_Mdi_1(Cd, Cdk4_tot, Md, Mdi, Mdp27, eps, kcom1)
  kcom1*Cd*(Cdk4_tot - (Mdi + Md + Mdp27))*eps;
end

function function_for_1k_1M_10(Mdi, eps, kdecom1)
  kdecom1*Mdi*eps;
end

function scaled_Michaelis_Menten_2_4(Cd, Kdd, Vdd, eps)
  Vdd*(Cd/(Kdd + Cd))*eps;
end

function function_for_1k_1M_11(Cd, eps, kddd)
  kddd*Cd*eps;
end

function scaled_Michaelis_Menten_2_5(K2d, Md, Vm2d, eps)
  Vm2d*(Md/(K2d + Md))*eps;
end

function scaled_Michaelis_Menten_2_6(K1d, Mdi, Vm1d, eps)
  Vm1d*(Mdi/(K1d + Mdi))*eps;
end

function function_for_1k_2M_3(Md, eps, kc1, p27)
  kc1*Md*p27*eps;
end

function function_for_1k_1M_12(Mdp27, eps, kc2)
  kc2*Mdp27*eps;
end

function double_michaelis_menten_like_2_0(E2F, Ki10, Ki9, eps, kce, pRB, pRBp)
  kce*E2F*(Ki9/(Ki9 + pRB))*(Ki10/(Ki10 + pRBp))*eps;
end

function function_for_M__to_M_i_1(Cdk2_tot, Ce, Ma, Mai, Map27, Me, Mei, Mep27, eps, kcom2)
  kcom2*Ce*(Cdk2_tot - (Mei + Me + Mep27 + Mai + Ma + Map27))*eps;
end

function function_for_1k_1M_13(Mei, eps, kdecom2)
  kdecom2*Mei*eps;
end

function double_michaelis_menten_like_2_1(Ce, Kdceskp2, Kde, Skp2, Vde, eps)
  Vde*(Skp2/(Kdceskp2 + Skp2))*(Ce/(Kde + Ce))*eps;
end

function function_for_1k_1M_14(Ce, eps, kdde)
  kdde*Ce*eps;
end

function function_for_M_i_to_M__1(K2e, Me, Vm2e, Wee1, eps, ib1)
  Vm2e*(Wee1 + ib1)*(Me/(K2e + Me))*eps;
end

function modified_Michaelis_Menten_1_3(K1e, Mei, Pe, Vm1e, eps)
  Vm1e*(Mei/(K1e + Mei))*Pe*eps;
end

function function_for_1k_2M_4(Me, eps, kc3, p27)
  kc3*Me*p27*eps;
end

function function_for_1k_1M_15(Mep27, eps, kc4)
  kc4*Mep27*eps;
end

function function_for_1k_3(eps, vsskp2)
  vsskp2*eps;
end

function double_michaelis_menten_like_2_2(Cdh1a, Kcdh1, Kdskp2, Skp2, Vdskp2, eps)
  Vdskp2*(Skp2/(Kdskp2 + Skp2))*(Cdh1a/(Kcdh1 + Cdh1a))*eps;
end

function function_for_1k_1M_16(Skp2, eps, kddskp2)
  kddskp2*Skp2*eps;
end

function function_for_1k_4(eps, vspei)
  vspei*eps;
end

function function_for_Pe_to_Pei_1(Chk1, K6e, Pe, V6e, eps, xe1, xe2)
  V6e*(xe1 + xe2*Chk1)*(Pe/(K6e + Pe))*eps;
end

function function_for_M_i_to_M__2(K5e, Me, Pei, Vm5e, ae, eps)
  Vm5e*(Me + ae)*(Pei/(K5e + Pei))*eps;
end

function function_for_1k_1M_17(Pei, eps, kdpei)
  kdpei*Pei*eps;
end

function function_for_1k_1M_18(Pe, eps, kdpe)
  kdpe*Pe*eps;
end

function double_michaelis_menten_like_3(E2F, Ki11, Ki12, eps, kca, pRB, pRBp)
  kca*E2F*(Ki11/(Ki11 + pRB))*(Ki12/(Ki12 + pRBp))*eps;
end

function function_for_M__to_M_i_2(Ca, Cdk2_tot, Ma, Mai, Map27, Me, Mei, Mep27, eps, kcom3)
  kcom3*Ca*(Cdk2_tot - (Mei + Me + Mep27 + Mai + Ma + Map27))*eps;
end

function function_for_1k_1M_19(Mai, eps, kdecom3)
  kdecom3*Mai*eps;
end

function double_michaelis_menten_like_2_3(Ca, Cdc20a, Kacdc20, Kda, Vda, eps)
  Vda*(Ca/(Kda + Ca))*(Cdc20a/(Kacdc20 + Cdc20a))*eps;
end

function function_for_1k_1M_20(Ca, eps, kdda)
  kdda*Ca*eps;
end

function function_for_M_i_to_M__3(K2a, Ma, Vm2a, Wee1, eps, ib2)
  Vm2a*(Wee1 + ib2)*(Ma/(K2a + Ma))*eps;
end

function modified_Michaelis_Menten_1_4(K1a, Mai, Pa, Vm1a, eps)
  Vm1a*(Mai/(K1a + Mai))*Pa*eps;
end

function function_for_1k_2M_5(Ma, eps, kc5, p27)
  kc5*Ma*p27*eps;
end

function function_for_1k_1M_21(Map27, eps, kc6)
  kc6*Map27*eps;
end

function function_for_1k_5(eps, vs1p27)
  vs1p27*eps;
end

function double_michaelis_menten_like_4(E2F, Ki13, Ki14, eps, pRB, pRBp, vs2p27)
  vs2p27*E2F*(Ki13/(Ki13 + pRB))*(Ki14/(Ki14 + pRBp))*eps;
end

function function_for_1k_2M_6(Mb, eps, kc7, p27)
  kc7*Mb*p27*eps;
end

function function_for_1k_1M_22(Mbp27, eps, kc8)
  kc8*Mbp27*eps;
end

function modified_Michaelis_Menten_1_5(K1p27, Me, V1p27, eps, p27)
  V1p27*(p27/(K1p27 + p27))*Me*eps;
end

function scaled_Michaelis_Menten_2_7(K2p27, V2p27, eps, p27p)
  V2p27*(p27p/(K2p27 + p27p))*eps;
end

function function_for_1k_1M_23(eps, kddp27, p27)
  kddp27*p27*eps;
end

function double_michaelis_menten_like_2_4(Kdp27p, Kdp27skp2, Skp2, Vdp27p, eps, p27p)
  Vdp27p*(Skp2/(Kdp27skp2 + Skp2))*(p27p/(Kdp27p + p27p))*eps;
end

function function_for_1k_1M_24(eps, kddp27p, p27p)
  kddp27p*p27p*eps;
end

function modified_Michaelis_Menten_2_2(Cdh1a, K2cdh1, Ma, Mb, V2cdh1, eps)
  V2cdh1*(Cdh1a/(K2cdh1 + Cdh1a))*(Ma + Mb)*eps;
end

function scaled_Michaelis_Menten_2_8(Cdh1i, K1cdh1, V1cdh1, eps)
  V1cdh1*(Cdh1i/(K1cdh1 + Cdh1i))*eps;
end

function function_for_1k_1M_25(Cdh1i, eps, kdcdh1i)
  kdcdh1i*Cdh1i*eps;
end

function function_for_1k_1M_26(Cdh1a, eps, kdcdh1a)
  kdcdh1a*Cdh1a*eps;
end

function function_for_1k_6(eps, vscdh1a)
  vscdh1a*eps;
end

function function_for_Pe_to_Pei_2(Chk1, K6a, Pa, V6a, eps, xa1, xa2)
  V6a*(xa1 + xa2*Chk1)*(Pa/(K6a + Pa))*eps;
end

function function_for_M_i_to_M__4(K5a, Ma, Pai, Vm5a, aa, eps)
  Vm5a*(Ma + aa)*(Pai/(K5a + Pai))*eps;
end

function function_for_1k_1M_27(Pai, eps, kdpai)
  kdpai*Pai*eps;
end

function function_for_1k_7(eps, vspai)
  vspai*eps;
end

function function_for_1k_1M_28(Pa, eps, kdpa)
  kdpa*Pa*eps;
end

function function_for_1k_8(eps, vcb)
  vcb*eps;
end

function function_for_Cd_to_Mdi_2(Cb, Cdk1_tot, Mb, Mbi, Mbp27, eps, kcom4)
  kcom4*Cb*(Cdk1_tot - (Mbi + Mb + Mbp27))*eps;
end

function function_for_1k_1M_29(Mbi, eps, kdecom4)
  kdecom4*Mbi*eps;
end

function double_michaelis_menten_like_2_5(Cb, Cdc20a, Kdb, Kdbcdc20, Vdb, eps)
  Vdb*(Cb/(Kdb + Cb))*(Cdc20a/(Kdbcdc20 + Cdc20a))*eps;
end

function function_for_1k_1M_30(Cb, eps, kddb)
  kddb*Cb*eps;
end

function double_michaelis_menten_like_2_6(Cb, Cdh1a, Kdb, Kdbcdh1, Vdb, eps)
  Vdb*(Cb/(Kdb + Cb))*(Cdh1a/(Kdbcdh1 + Cdh1a))*eps;
end

function function_for_M_i_to_M__5(K2b, Mb, Vm2b, Wee1, eps, ib3)
  Vm2b*(Wee1 + ib3)*(Mb/(K2b + Mb))*eps;
end

function modified_Michaelis_Menten_1_6(K1b, Mbi, Pb, Vm1b, eps)
  Vm1b*(Mbi/(K1b + Mbi))*Pb*eps;
end

function function_for_1k_9(eps, vscdc20i)
  vscdc20i*eps;
end

function modified_Michaelis_Menten_1_7(Cdc20i, K3b, Mb, Vm3b, eps)
  Vm3b*(Cdc20i/(K3b + Cdc20i))*Mb*eps;
end

function scaled_Michaelis_Menten_2_9(Cdc20a, K4b, Vm4b, eps)
  Vm4b*(Cdc20a/(K4b + Cdc20a))*eps;
end

function function_for_1k_1M_31(Cdc20i, eps, kdcdc20i)
  kdcdc20i*Cdc20i*eps;
end

function function_for_1k_1M_32(Cdc20a, eps, kdcdc20a)
  kdcdc20a*Cdc20a*eps;
end

function function_for_1k_10(eps, vspbi)
  vspbi*eps;
end

function function_for_Pe_to_Pei_3(Chk1, K6b, Pb, V6b, eps, xb1, xb2)
  V6b*(xb1 + xb2*Chk1)*(Pb/(K6b + Pb))*eps;
end

function function_for_M_i_to_M__6(K5b, Mb, Pbi, Vm5b, ab, eps)
  Vm5b*(Mb + ab)*(Pbi/(K5b + Pbi))*eps;
end

function function_for_1k_1M_33(Pbi, eps, kdpbi)
  kdpbi*Pbi*eps;
end

function function_for_1k_1M_34(Pb, eps, kdpb)
  kdpb*Pb*eps;
end

function function_for_1k_11(eps, vswee1)
  vswee1*eps;
end

function function_for_1k_1M_35(Mw, eps, ksW)
  ksW*Mw*eps;
end

function function_for_M_i_to_M__7(K7b, Mb, Vm7b, Wee1, eps, ib)
  Vm7b*(Mb + ib)*(Wee1/(K7b + Wee1))*eps;
end

function scaled_Michaelis_Menten_2_10(K8b, Vm8b, Wee1p, eps)
  Vm8b*(Wee1p/(K8b + Wee1p))*eps;
end

function function_for_1k_1M_36(Wee1, eps, kdwee1)
  kdwee1*Wee1*eps;
end

function function_for_1k_1M_37(Wee1p, eps, kdwee1p)
  kdwee1p*Wee1p*eps;
end

function function_for_Cdc45_synthesis_1(Cdc45, Cdc45_tot, K1cdc45, Me, V1cdc45, eps)
  V1cdc45*Me*((Cdc45_tot - Cdc45)/(K1cdc45 + Cdc45_tot - Cdc45))*eps;
end

function scaled_Michaelis_Menten_2_11(Cdc45, K2cdc45, V2cdc45, eps)
  V2cdc45*(Cdc45/(K2cdc45 + Cdc45))*eps;
end

function function_for_1k_M_tot___M___M2_1(Cdc45, Pol, Pol_tot, eps, kspol)
  kspol*(Pol_tot - Pol)*Cdc45*eps;
end
function_for_1k_M_tot___M___M2_1 is "function for 1k M_tot - M , M2_1";

function function_for_1k_1M_38(Pol, eps, kdpol)
  kdpol*Pol*eps;
end

function function_for_1k_1M_39(Pol, eps, ksprim)
  ksprim*Pol*eps;
end

function function_for_1k_1M_40(Primer, eps, kdprim)
  kdprim*Primer*eps;
end

function function_for_1k_M_tot___M___M2_2(ATR, ATR_tot, Primer, eps, kaatr)
  kaatr*(ATR_tot - ATR)*Primer*eps;
end
function_for_1k_M_tot___M___M2_2 is "function for 1k M_tot - M , M2_2";

function function_for_1k_1M_41(ATR, eps, kdatr)
  kdatr*ATR*eps;
end

function function_for_Cdc45_synthesis_2(ATR, Chk1, Chk1_tot, K1chk, V1chk, eps)
  V1chk*ATR*((Chk1_tot - Chk1)/(K1chk + Chk1_tot - Chk1))*eps;
end

function scaled_Michaelis_Menten_2_12(Chk1, K2chk, V2chk, eps)
  V2chk*(Chk1/(K2chk + Chk1))*eps;
end

model Gerard2009()
  // Gerard2009 - An Integrated Mammalian Cell Cycle Model
  // We propose an integrated computational model for the network of cyclin-dependent kinases (Cdks) that controls the dynamics of the mammalian cell cycle. The model contains four Cdk modules regulated by reversible phosphorylation, Cdk inhibitors, and protein synthesis or degradation. Growth factors (GFs) trigger the transition from a quiescent, stable steady state to self-sustained oscillations in the Cdk network. These oscillations correspond to the repetitive, transient activation of cyclin D/Cdk4-6 in G(1), cyclin E/Cdk2 at the G(1)/S transition, cyclin A/Cdk2 in S and at the S/G(2) transition, and cyclin B/Cdk1 at the G(2)/M transition. The model accounts for the following major properties of the mammalian cell cycle: (i) repetitive cell cycling in the presence of suprathreshold amounts of GF; (ii) control of cell-cycle progression by the balance between antagonistic effects of the tumor suppressor retinoblastoma protein (pRB) and the transcription factor E2F; and (iii) existence of a restriction point in G(1), beyond which completion of the cell cycle becomes independent of GF. The model also accounts for endoreplication. Incorporating the DNA replication checkpoint mediated by kinases ATR and Chk1 slows down the dynamics of the cell cycle without altering its oscillatory nature and leads to better separation of the S and M phases. The model for the mammalian cell cycle shows how the regulatory structure of the Cdk network results in its temporal self-organization, leading to the repetitive, sequential activation of the four Cdk modules that brings about the orderly progression along cell-cycle phases.
  // hasProperty mamo:MAMO_0000046
  // hasProperty GO:0000278
  // hasTaxon taxonomy:40674
  // hasProperty mamo:MAMO_0000046
  // hasProperty GO:0000278
  // hasTaxon taxonomy:40674

  // Compartments:
  compartment cell = 1;  // hasTaxon taxonomy:40674; hasTaxon taxonomy:40674

  // Species:
  species pRB in cell = 1;  // isVersionOf uniprot:P06400
  species pRBp in cell = 0.25;  // hasProperty ncit:C1897; isVersionOf uniprot:P06400; hasProperty ncit:C1897
  species pRBpp in cell = 0.1;  // hasProperty ncit:C1897; isVersionOf uniprot:P06400; hasProperty ncit:C1897
  species E2F in cell = 0.1;  // isVersionOf uniprot:Q01094
  species E2Fp in cell = 0.001;  // hasProperty ncit:C1897; isVersionOf uniprot:Q01094; hasProperty ncit:C1897
  species pRBc1 in cell = 0.1;  // hasPart uniprot:P06400; hasPart uniprot:Q01094
  species pRBc2 in cell = 0.05;  // hasPart uniprot:P06400; hasPart uniprot:Q01094
  species Cd in cell = 0.01;  // isVersionOf uniprot:P30279; isVersionOf uniprot:P30281; isVersionOf uniprot:P24385
  species Mdi in cell = 0.01;  // hasPart uniprot:P30279; hasPart uniprot:P30281; hasPart uniprot:Q00534; isVersionOf uniprot:P24385
  species Md in cell = 0.01;  // hasPart uniprot:Q00534; hasPart uniprot:P24385; hasPart uniprot:P30279; isVersionOf uniprot:P11802
  species Mdp27 in cell = 0.01;  // hasPart uniprot:P11802; hasPart uniprot:P30287; hasPart uniprot:P24385; hasPart uniprot:P30279
  species Ce in cell = 0.01;  // isVersionOf uniprot:P24864; isVersionOf uniprot:O96020
  species Mei in cell = 0.01;  // hasPart uniprot:P24864; isVersionOf uniprot:O96020; isVersionOf uniprot:P24941
  species Me in cell = 0.01;  // hasPart uniprot:P24941; isVersionOf uniprot:P24864; isVersionOf uniprot:O96020
  species Skp2 in cell = 0.01;  // isVersionOf uniprot:Q13309
  species Mep27 in cell = 0.01;  // hasPart uniprot:P46527; hasPart uniprot:P24941; hasPart uniprot:P24864; hasPart uniprot:O96020
  species Pei in cell = 0.01;  // isVersionOf uniprot:P30307; isVersionOf uniprot:P30305; isVersionOf uniprot:P30304
  species Pe in cell = 0.01;  // hasProperty ncit:C1897; isVersionOf uniprot:P30305; isVersionOf uniprot:P30307; isVersionOf uniprot:P30304
  species Ca in cell = 0.01;  // isVersionOf uniprot:P20248
  species Mai in cell = 0.01;  // hasPart uniprot.isoform:P24941; hasPart uniprot:P20248
  species Ma in cell = 0.01;  // hasPart uniprot:P20248; hasPart uniprot:P24941
  species Map27 in cell = 0.01;  // hasPart uniprot:P20248; hasPart uniprot:P24941; hasPart uniprot:P46527
  species p27 in cell = 0.25;  // isVersionOf uniprot:P46527
  species p27p in cell = 0.01;  // hasProperty ncit:C1897; isVersionOf uniprot:P46527; hasProperty ncit:C1897
  species Cdh1i in cell = 0.01;  // isVersionOf uniprot:P12830
  species Cdh1a in cell = 0.01;  // isVersionOf uniprot:P12830
  species Pai in cell = 0.01;  // isVersionOf uniprot:P30305; isVersionOf uniprot:P30304; isVersionOf uniprot:P30307
  species Pa in cell = 0.01;  // hasProperty ncit:C1897; isVersionOf uniprot:P30307; isVersionOf uniprot:P30304; isVersionOf uniprot:P30305
  species Cb in cell = 0.01;  // isVersionOf uniprot:P14635
  species Mbi in cell = 0.01;  // hasPart uniprot:P14635; hasPart uniprot:P06493
  species Mb in cell = 0.01;  // hasPart uniprot:P14635; hasPart uniprot:P06493
  species Mbp27 in cell = 0.01;  // hasPart uniprot:P14635; hasPart uniprot:P06493; hasPart uniprot:P46527
  species Cdc20i in cell = 0.01;  // isVersionOf uniprot:Q12834
  species Cdc20a in cell = 0.01;  // isVersionOf uniprot:Q12834
  species Pbi in cell = 0.01;  // isVersionOf uniprot:P30305; isVersionOf uniprot:P30307; isVersionOf uniprot:P30304
  species Pb in cell = 0.1;  // hasProperty ncit:C1897; isVersionOf uniprot:P30307; isVersionOf uniprot:P30304; isVersionOf uniprot:P30305
  species Wee1 in cell = 0.1;  // isVersionOf uniprot:P30291
  species Wee1p in cell = 0.01;  // hasProperty ncit:C1897; isVersionOf uniprot:P30291; hasProperty ncit:C1897
  species Pol in cell = 0.01;  // isVersionOf uniprot:P09884
  species Cdc45 in cell = 0.01;  // isVersionOf uniprot:O75419
  species Primer in cell = 0.01;
  species Chk1 in cell = 0.01;  // isVersionOf uniprot:O14757
  species ATR in cell = 0.01;  // isVersionOf uniprot:Q13535
  species AP1 in cell = 0.01;  // hasProperty ncit:C17207; hasProperty ncit:C17207
  species Mw in cell = 0;  // isVersionOf ensembl:ENST00000450114; isVersionOf ensembl:ENST00000299613

  // Parameters:
  GF = 1;  // hasProperty ncit:C41185; hasProperty ncit:C41185
  Kagf = 0.1;
  kdap1 = 0.15;
  eps = 17;  // hasProperty ncit:C64638; hasProperty ncit:C64638
  vsap1 = 1;  // hasProperty ncit:C25636; hasProperty ncit:C25636
  kde2f = 0.002;
  kde2fp = 1.1;
  kdprb = 0.01;
  kdprbp = 0.06;
  kdprbpp = 0.04;
  kpc1 = 0.05;
  kpc2 = 0.5;  // hasProperty ncit:C94967; hasProperty ncit:C94967
  kpc3 = 0.025;
  kpc4 = 0.5;  // hasProperty ncit:C94967; hasProperty ncit:C94967
  K1 = 0.1;
  K2 = 0.1;
  K3 = 0.1;
  K4 = 0.1;
  V1 = 2.2;  // hasProperty ncit:C94967; hasProperty ncit:C94967
  V2 = 2;  // hasProperty ncit:C25636; hasProperty ncit:C25636
  V3 = 1;  // hasProperty ncit:C94967; hasProperty ncit:C94967
  V4 = 2;  // hasProperty ncit:C25636; hasProperty ncit:C25636
  K1e2f = 5;
  K2e2f = 5;
  V1e2f = 4;  // hasProperty ncit:C94967; hasProperty ncit:C94967
  V2e2f = 0.75;  // hasProperty ncit:C25636; hasProperty ncit:C25636
  vse2f = 0.15;  // hasProperty ncit:C25636; hasProperty ncit:C25636
  vsprb = 0.8;  // hasProperty ncit:C25636; hasProperty ncit:C25636
  Cdk4_tot = 1.5;  // hasProperty ncit:C41182; hasProperty ncit:C41182
  Ki7 = 0.1;  // hasProperty ncit:C64638; hasProperty ncit:C64638
  Ki8 = 2;  // hasProperty ncit:C64638; hasProperty ncit:C64638
  kcd1 = 0.4;  // hasProperty ncit:C94967; hasProperty ncit:C94967
  kcd2 = 0.005;  // hasProperty ncit:C94967; hasProperty ncit:C94967
  kdecom1 = 0.1;  // hasProperty ncit:C94967; hasProperty ncit:C94967
  kcom1 = 0.175;
  kc1 = 0.15;
  kc2 = 0.05;  // hasProperty ncit:C94967; hasProperty ncit:C94967
  kddd = 0.005;
  Kdd = 0.1;
  K1d = 0.1;
  K2d = 0.1;
  Vdd = 5;  // hasProperty ncit:C25636; hasProperty ncit:C25636
  Vm1d = 1;  // hasProperty ncit:C25636; hasProperty ncit:C25636
  Vm2d = 0.2;  // hasProperty ncit:C25636; hasProperty ncit:C25636
  ae = 0.25;  // hasProperty ncit:C64638; hasProperty ncit:C64638
  Cdk2_tot = 2;  // hasProperty ncit:C41182; hasProperty ncit:C41182
  ib1 = 0.5;  // hasProperty ncit:C64638; hasProperty ncit:C64638
  Ki9 = 0.1;  // hasProperty ncit:C64638; hasProperty ncit:C64638
  Ki10 = 2;  // hasProperty ncit:C64638; hasProperty ncit:C64638
  kce = 0.25;  // hasProperty ncit:C94967; hasProperty ncit:C94967
  kc3 = 0.2;
  kc4 = 0.1;  // hasProperty ncit:C94967; hasProperty ncit:C94967
  kdecom2 = 0.1;  // hasProperty ncit:C94967; hasProperty ncit:C94967
  kcom2 = 0.2;
  kdde = 0.005;
  kddskp2 = 0.005;
  kdpe = 0.075;
  kdpei = 0.15;
  Kde = 0.1;
  Kdceskp2 = 2;
  Kdskp2 = 0.5;
  Kcdh1 = 0.4;
  K1e = 0.1;
  K2e = 0.1;
  K5e = 0.1;
  K6e = 0.1;
  Vde = 3;  // hasProperty ncit:C25636; hasProperty ncit:C25636
  Vdskp2 = 1.1;  // hasProperty neurolex:C25636; hasProperty neurolex:C25636
  Vm1e = 2;  // hasProperty ncit:C94967; hasProperty ncit:C94967
  Vm2e = 1.4;  // hasProperty ncit:C94967; hasProperty ncit:C94967
  Vm5e = 5;  // hasProperty ncit:C94967; hasProperty ncit:C94967
  V6e = 0.8;  // hasProperty ncit:C25636; hasProperty ncit:C25636
  vspei = 0.13;  // hasProperty ncit:C25636; hasProperty ncit:C25636
  vsskp2 = 0.15;  // hasProperty ncit:C25636; hasProperty ncit:C25636
  xe1 = 1;  // hasProperty ncit:C64638; hasProperty ncit:C64638
  xe2 = 1;  // hasProperty ncit:C64638; hasProperty ncit:C64638
  aa = 0.2;  // hasProperty ncit:C64638; hasProperty ncit:C64638
  ib2 = 0.5;  // hasProperty ncit:C64638; hasProperty ncit:C64638
  Ki11 = 0.1;  // hasProperty ncit:C64638; hasProperty ncit:C64638
  Ki12 = 2;  // hasProperty ncit:C64638; hasProperty ncit:C64638
  Ki13 = 0.1;  // hasProperty ncit:C64638; hasProperty ncit:C64638
  Ki14 = 2;  // hasProperty ncit:C64638; hasProperty ncit:C64638
  kca = 0.0375;  // hasProperty ncit:C94967; hasProperty ncit:C94967
  kdecom3 = 0.1;  // hasProperty ncit:C94967; hasProperty ncit:C94967
  kcom3 = 0.2;
  kc5 = 0.15;
  kc6 = 0.125;  // hasProperty ncit:C94967; hasProperty ncit:C94967
  kdda = 0.005;
  kddp27 = 0.06;
  kddp27p = 0.01;
  kdcdh1a = 0.1;
  kdcdh1i = 0.2;
  kdpa = 0.075;
  kdpai = 0.15;
  Kda = 1.1;
  Kdp27p = 0.1;
  Kdp27skp2 = 0.1;
  Kacdc20 = 2;
  K1a = 0.1;
  K2a = 0.1;
  K1cdh1 = 0.01;
  K2cdh1 = 0.01;
  K5a = 0.1;
  K6a = 0.1;
  K1p27 = 0.5;
  K2p27 = 0.5;
  Vdp27p = 5;  // hasProperty ncit:C25636; hasProperty ncit:C25636
  Vda = 2.5;  // hasProperty ncit:C25636; hasProperty ncit:C25636
  Vm1a = 2;  // hasProperty ncit:C94967; hasProperty ncit:C94967
  Vm2a = 1.85;  // hasProperty ncit:C94967; hasProperty ncit:C94967
  Vm5a = 4;  // hasProperty ncit:C94967; hasProperty ncit:C94967
  V6a = 1;  // hasProperty ncit:C25636; hasProperty ncit:C25636
  vscdh1a = 0.11;  // hasProperty ncit:C25636; hasProperty ncit:C25636
  vspai = 0.105;  // hasProperty ncit:C25636; hasProperty ncit:C25636
  vs1p27 = 0.8;  // hasProperty ncit:C25636; hasProperty ncit:C25636
  vs2p27 = 0.1;  // hasProperty ncit:C25636; hasProperty ncit:C25636
  V1cdh1 = 1.25;  // hasProperty ncit:C94967; hasProperty ncit:C94967
  V2cdh1 = 8;  // hasProperty ncit:C94967; hasProperty ncit:C94967
  V1p27 = 100;  // hasProperty ncit:C94967; hasProperty ncit:C94967
  V2p27 = 0.1;  // hasProperty ncit:C25636; hasProperty ncit:C25636
  xa1 = 1;  // hasProperty ncit:C64638; hasProperty ncit:C64638
  xa2 = 1;  // hasProperty ncit:C64638; hasProperty ncit:C64638
  ab = 0.11;  // hasProperty ncit:C64638; hasProperty ncit:C64638
  Cdk1_tot = 0.5;  // hasProperty ncit:C41182; hasProperty ncit:C41182
  ib = 0.75;  // hasProperty ncit:C64638; hasProperty ncit:C64638
  ib3 = 0.5;  // hasProperty ncit:C64638; hasProperty ncit:C64638
  kc7 = 0.12;
  kc8 = 0.2;  // hasProperty ncit:C94967; hasProperty ncit:C94967
  kdecom4 = 0.1;  // hasProperty ncit:C94967; hasProperty ncit:C94967
  kcom4 = 0.25;
  kdcdc20a = 0.05;
  kdcdc20i = 0.14;
  kddb = 0.005;
  kdpb = 0.1;
  kdpbi = 0.2;
  kdwee1 = 0.1;
  kdwee1p = 0.2;
  Kdb = 0.005;
  Kdbcdc20 = 0.2;
  Kdbcdh1 = 0.1;
  ksW = 5;
  K1b = 0.1;
  K2b = 0.1;
  K3b = 0.1;
  K4b = 0.1;
  K5b = 0.1;
  K6b = 0.1;
  K7b = 0.1;
  K8b = 0.1;
  vcb = 0.05;  // hasProperty ncit:C25636; hasProperty ncit:C25636
  Vdb = 0.06;  // hasPart ncit:C25636
  Vm1b = 3.9;  // hasProperty ncit:C94967; hasProperty ncit:C94967
  Vm2b = 2.1;  // hasProperty ncit:C94967; hasProperty ncit:C94967
  vscdc20i = 0.1;  // hasPart ncit:C25636
  Vm3b = 8;  // hasProperty ncit:C94967; hasProperty ncit:C94967
  Vm4b = 0.7;  // hasProperty ncit:C25636; hasProperty ncit:C25636
  Vm5b = 5;  // hasProperty ncit:C94967; hasProperty ncit:C94967
  V6b = 1;  // hasProperty ncit:C25636; hasProperty ncit:C25636
  Vm7b = 1.2;  // hasProperty ncit:C94967; hasProperty ncit:C94967
  Vm8b = 1;  // hasProperty ncit:C25636; hasProperty ncit:C25636
  vspbi = 0.12;  // hasProperty ncit:C25636; hasProperty ncit:C25636
  vswee1 = 0.06;  // hasProperty ncit:C25636; hasProperty ncit:C25636
  xb1 = 1;  // hasProperty ncit:C64638; hasProperty ncit:C64638
  xb2 = 1;  // hasProperty ncit:C64638; hasProperty ncit:C64638
  ATR_tot = 0.5;  // hasProperty ncit:C41185; hasProperty ncit:C41185
  Chk1_tot = 0.5;  // hasProperty ncit:C41182; hasProperty ncit:C41182
  Cdc45_tot = 0.5;  // hasProperty ncit:C41182; hasProperty ncit:C41182
  kaatr = 0.022;
  kdatr = 0.15;  // hasProperty ncit:C94967; hasProperty ncit:C94967
  kdpol = 0.2;  // hasProperty ncit:C94967; hasProperty ncit:C94967
  kdprim = 0.15;
  kspol = 0.8;
  ksprim = 0.05;
  K1cdc45 = 0.02;
  K2cdc45 = 0.02;
  K1chk = 0.5;
  K2chk = 0.5;
  Pol_tot = 0.5;  // hasProperty ncit:C41185; hasProperty ncit:C41185
  V1cdc45 = 0.8;  // hasProperty ncit:C94967; hasProperty ncit:C94967
  V2cdc45 = 0.12;  // hasProperty ncit:C25636; hasProperty ncit:C25636
  V1chk = 4;  // hasProperty ncit:C94967; hasProperty ncit:C94967
  V2chk = 0.1;  // hasProperty ncit:C25636; hasProperty ncit:C25636
  Kdw = 0.5;
  Kiw = 0.001;  // hasProperty ncit:C64638; hasProperty ncit:C64638
  n = 4;  // hasProperty ncit:C64638; hasProperty ncit:C64638
  vdw = 0.5;  // hasProperty ncit:C25636; hasProperty ncit:C25636
  vsw = 0;  // hasProperty ncit:C25636; hasProperty ncit:C25636

  // Reactions:
  AP1_simulation_by_growth_factor: => AP1; cell*scaled_Michaelis_Menten_1_1(GF, Kagf, eps, vsap1);
  AP1_decay: AP1 => ; cell*function_for_1k_1M_1(AP1, eps, kdap1);
  pRB_synthesis: => pRB; cell*function_for_1k_1(eps, vsprb);
  pRB_and_E2F_complex_formation: pRB + E2F => pRBc1; cell*function_for_1k_2M_1(E2F, eps, kpc1, pRB);
  pRB_and_E2f_complex_dissociation: pRBc1 => pRB + E2F; cell*function_for_1k_1M_2(eps, kpc2, pRBc1);
  pRB_phosphorylation_through_cyclin_D: pRB => pRBp; cell*modified_Michaelis_Menten_2_1(K1, Md, Mdp27, V1, eps, pRB);  // modifiers: Md, Mdp27
  pRBp_dephosphorylation: pRBp => pRB; cell*scaled_Michaelis_Menten_2_1(K2, V2, eps, pRBp);
  pRB_decay: pRB => ; cell*function_for_1k_1M_3(eps, kdprb, pRBp);  // modifiers: pRBp
  pRBp_phosphorylation: pRBp => pRBpp; cell*modified_Michaelis_Menten_1_1(K3, Me, V3, eps, pRBp);  // modifiers: Me
  pRBpp_dephosphorylation: pRBpp => pRBp; cell*scaled_Michaelis_Menten_2_2(K4, V4, eps, pRBpp);
  pRBp_and_E2F_complex_formation: pRBp + E2F => pRBc2; cell*function_for_1k_2M_2(E2F, eps, kpc3, pRBp);
  PRBp_and_E2F_complex_dissociation: pRBc2 => pRBp + E2F; cell*function_for_1k_1M_4(eps, kpc4, pRBc2);
  pRBp_decay: pRBp => ; cell*function_for_1k_1M_5(eps, kdprbp, pRBp);
  pRBpp_decay: pRBpp => ; cell*function_for_1k_1M_6(eps, kdprbpp, pRBpp);
  E2F_synthesis: => E2F; cell*function_for_1k_2(eps, vse2f);
  E2F_phosphorylation: E2F => E2Fp; cell*modified_Michaelis_Menten_1_2(E2F, K1e2f, Ma, V1e2f, eps);  // modifiers: Ma
  E2Fp_dephosphorylation: E2Fp => E2F; cell*scaled_Michaelis_Menten_2_3(E2Fp, K2e2f, V2e2f, eps);
  E2F_decay: E2F => ; cell*function_for_1k_1M_7(E2F, eps, kde2f);
  E2Fp_decay: E2Fp => ; cell*function_for_1k_1M_8(E2Fp, eps, kde2fp);
  Cd_synthesis: => Cd; cell*function_for_1k_1M_9(AP1, eps, kcd1);  // modifiers: AP1
  Cd_synthesis_through_E2F: => Cd; cell*double_michaelis_menten_like_1(E2F, Ki7, Ki8, eps, kcd2, pRB, pRBp);  // modifiers: E2F, pRB, pRBp
  Cd_cdk4_6_complex_formation: Cd => Mdi; cell*function_for_Cd_to_Mdi_1(Cd, Cdk4_tot, Md, Mdi, Mdp27, eps, kcom1); Cd_cdk4_6_complex_formation is "Cd cdk4/6 complex formation";  // modifiers: Md, Mdp27
  Cd_cdk4_6_complex_dissociation: Mdi => Cd; cell*function_for_1k_1M_10(Mdi, eps, kdecom1); Cd_cdk4_6_complex_dissociation is "Cd cdk4/6 complex dissociation";
  Cd_degradation: Cd => ; cell*scaled_Michaelis_Menten_2_4(Cd, Kdd, Vdd, eps);
  Cd_decay: Cd => ; cell*function_for_1k_1M_11(Cd, eps, kddd);
  Md_complex_inactivation: Md => Mdi; cell*scaled_Michaelis_Menten_2_5(K2d, Md, Vm2d, eps);
  Md_complex_activation: Mdi => Md; cell*scaled_Michaelis_Menten_2_6(K1d, Mdi, Vm1d, eps);
  Md_p27_complex_formation: Md + p27 => Mdp27; cell*function_for_1k_2M_3(Md, eps, kc1, p27);
  Md_p27_complex_dissociation: Mdp27 => Md + p27; cell*function_for_1k_1M_12(Mdp27, eps, kc2);
  Ce_synthesis: => Ce; cell*double_michaelis_menten_like_2_0(E2F, Ki10, Ki9, eps, kce, pRB, pRBp);  // modifiers: E2F, pRB, pRBp
  Ce_cdk2_complex_formation: Ce => Mei; cell*function_for_M__to_M_i_1(Cdk2_tot, Ce, Ma, Mai, Map27, Me, Mei, Mep27, eps, kcom2);  // modifiers: Me, Mep27, Mai, Ma, Map27
  Ce_cdk2_complex_dissociation: Mei => Ce; cell*function_for_1k_1M_13(Mei, eps, kdecom2);
  Ce_degradation_through_Skp2: Ce => ; cell*double_michaelis_menten_like_2_1(Ce, Kdceskp2, Kde, Skp2, Vde, eps);  // modifiers: Skp2
  Ce_decay: Ce => ; cell*function_for_1k_1M_14(Ce, eps, kdde);
  Me_complex_deactivation: Me => Mei; cell*function_for_M_i_to_M__1(K2e, Me, Vm2e, Wee1, eps, ib1);  // modifiers: Wee1
  Me_complex_activation: Mei => Me; cell*modified_Michaelis_Menten_1_3(K1e, Mei, Pe, Vm1e, eps);  // modifiers: Pe
  Me_p27_complex_formation: Me + p27 => Mep27; cell*function_for_1k_2M_4(Me, eps, kc3, p27);
  Me_p27_complex_dissociation: Mep27 => Me + p27; cell*function_for_1k_1M_15(Mep27, eps, kc4);
  Skp2_synthesis: => Skp2; cell*function_for_1k_3(eps, vsskp2);
  Skp2_degradation_through_Cdh1: Skp2 => ; cell*double_michaelis_menten_like_2_2(Cdh1a, Kcdh1, Kdskp2, Skp2, Vdskp2, eps);  // modifiers: Cdh1a
  Skp2_decay: Skp2 => ; cell*function_for_1k_1M_16(Skp2, eps, kddskp2);
  inactive_dephosphorylated_cdc25_synthesis: => Pei; cell*function_for_1k_4(eps, vspei);
  Cdc25_deactivation_through_dephosphorylation: Pe => Pei; cell*function_for_Pe_to_Pei_1(Chk1, K6e, Pe, V6e, eps, xe1, xe2);  // modifiers: Chk1
  Cdc25_activation_through_phosphorylation: Pei => Pe; cell*function_for_M_i_to_M__2(K5e, Me, Pei, Vm5e, ae, eps);  // modifiers: Me
  inactive_Cdc25_decay: Pei => ; cell*function_for_1k_1M_17(Pei, eps, kdpei);
  active_Cdc2__decay: Pe => ; cell*function_for_1k_1M_18(Pe, eps, kdpe); active_Cdc2__decay is "active Cdc2 decay";
  Ca_synthesis_through_E2F: => Ca; cell*double_michaelis_menten_like_3(E2F, Ki11, Ki12, eps, kca, pRB, pRBp);  // modifiers: E2F, pRB, pRBp
  Ca_cdk2_complex_formation: Ca => Mai; cell*function_for_M__to_M_i_2(Ca, Cdk2_tot, Ma, Mai, Map27, Me, Mei, Mep27, eps, kcom3);  // modifiers: Mei, Me, Mep27, Ma, Map27
  Ca_cdk2_complex_dissociation: Mai => Ca; cell*function_for_1k_1M_19(Mai, eps, kdecom3);
  Ca_degradation: Ca => ; cell*double_michaelis_menten_like_2_3(Ca, Cdc20a, Kacdc20, Kda, Vda, eps);  // modifiers: Cdc20a
  Ca_decay: Ca => ; cell*function_for_1k_1M_20(Ca, eps, kdda);
  Ma_inactivation: Ma => Mai; cell*function_for_M_i_to_M__3(K2a, Ma, Vm2a, Wee1, eps, ib2);  // modifiers: Wee1
  Ma_activation: Mai => Ma; cell*modified_Michaelis_Menten_1_4(K1a, Mai, Pa, Vm1a, eps);  // modifiers: Pa
  Ma_p27_complex_formation: Ma + p27 => Map27; cell*function_for_1k_2M_5(Ma, eps, kc5, p27);
  Ma_p27_complex_dissociation: Map27 => Ma + p27; cell*function_for_1k_1M_21(Map27, eps, kc6);
  p27_synthesis: => p27; cell*function_for_1k_5(eps, vs1p27);
  p27_synthesis_through_E2F: => p27; cell*double_michaelis_menten_like_4(E2F, Ki13, Ki14, eps, pRB, pRBp, vs2p27);  // modifiers: E2F, pRB, pRBp
  Mb_p27_complex_formation: Mb + p27 => Mbp27; cell*function_for_1k_2M_6(Mb, eps, kc7, p27);
  Mb_p26_complex_dissociation: Mbp27 => Mb + p27; cell*function_for_1k_1M_22(Mbp27, eps, kc8);
  p27_phosphorylation: p27 => p27p; cell*modified_Michaelis_Menten_1_5(K1p27, Me, V1p27, eps, p27);  // modifiers: Me
  p27_dephosphorylation: p27p => p27; cell*scaled_Michaelis_Menten_2_7(K2p27, V2p27, eps, p27p);
  p27_decay: p27 => ; cell*function_for_1k_1M_23(eps, kddp27, p27);
  p27_degradation: p27p => ; cell*double_michaelis_menten_like_2_4(Kdp27p, Kdp27skp2, Skp2, Vdp27p, eps, p27p);  // modifiers: Skp2
  p27p_decay: p27p => ; cell*function_for_1k_1M_24(eps, kddp27p, p27p);
  cdh1_inactivation: Cdh1a => Cdh1i; cell*modified_Michaelis_Menten_2_2(Cdh1a, K2cdh1, Ma, Mb, V2cdh1, eps);  // modifiers: Ma, Mb
  cdh1_activation: Cdh1i => Cdh1a; cell*scaled_Michaelis_Menten_2_8(Cdh1i, K1cdh1, V1cdh1, eps);
  inactive_cdh1_decay: Cdh1i => ; cell*function_for_1k_1M_25(Cdh1i, eps, kdcdh1i);
  active_cdh1_decay: Cdh1a => ; cell*function_for_1k_1M_26(Cdh1a, eps, kdcdh1a);
  active_cdh1_synthesis: => Cdh1a; cell*function_for_1k_6(eps, vscdh1a);
  cdc25_inactivation: Pa => Pai; cell*function_for_Pe_to_Pei_2(Chk1, K6a, Pa, V6a, eps, xa1, xa2);  // modifiers: Chk1
  cdc25_activation: Pai => Pa; cell*function_for_M_i_to_M__4(K5a, Ma, Pai, Vm5a, aa, eps);  // modifiers: Ma
  inactive_cdc25_decay: Pai => ; cell*function_for_1k_1M_27(Pai, eps, kdpai);
  inactive_cdc25_syntehsis: => Pai; cell*function_for_1k_7(eps, vspai);
  active_cdc25_decay: Pa => ; cell*function_for_1k_1M_28(Pa, eps, kdpa);
  Cb_synthesis: => Cb; cell*function_for_1k_8(eps, vcb);
  Cb_degradation: Cb => Mbi; cell*function_for_Cd_to_Mdi_2(Cb, Cdk1_tot, Mb, Mbi, Mbp27, eps, kcom4);  // modifiers: Mb, Mbp27
  Mbi_complex_dissociation: Mbi => Cb; cell*function_for_1k_1M_29(Mbi, eps, kdecom4);
  Cb_degradation_through_Cdc20: Cb => ; cell*double_michaelis_menten_like_2_5(Cb, Cdc20a, Kdb, Kdbcdc20, Vdb, eps);  // modifiers: Cdc20a
  Cb_decay: Cb => ; cell*function_for_1k_1M_30(Cb, eps, kddb);
  Cb_degradation_through_cdh1: Cb => ; cell*double_michaelis_menten_like_2_6(Cb, Cdh1a, Kdb, Kdbcdh1, Vdb, eps);  // modifiers: Cdh1a
  Mb_inactivation: Mb => Mbi; cell*function_for_M_i_to_M__5(K2b, Mb, Vm2b, Wee1, eps, ib3);  // modifiers: Wee1
  Mv_activation: Mbi => Mb; cell*modified_Michaelis_Menten_1_6(K1b, Mbi, Pb, Vm1b, eps);  // modifiers: Pb
  inactive_cdc20_synthesis: => Cdc20i; cell*function_for_1k_9(eps, vscdc20i);
  cdc20_activation: Cdc20i => Cdc20a; cell*modified_Michaelis_Menten_1_7(Cdc20i, K3b, Mb, Vm3b, eps);  // modifiers: Mb
  Cdc20_deactivation: Cdc20a => Cdc20i; cell*scaled_Michaelis_Menten_2_9(Cdc20a, K4b, Vm4b, eps);
  inactive_cdc20_decay: Cdc20i => ; cell*function_for_1k_1M_31(Cdc20i, eps, kdcdc20i);
  actice_cdc20_decay: Cdc20a => ; cell*function_for_1k_1M_32(Cdc20a, eps, kdcdc20a);
  inactive_cdc25_synthesis: => Pbi; cell*function_for_1k_10(eps, vspbi);
  cdc25_deactivation_2: Pb => Pbi; cell*function_for_Pe_to_Pei_3(Chk1, K6b, Pb, V6b, eps, xb1, xb2);  // modifiers: Chk1
  cdc25_activation_2: Pbi => Pb; cell*function_for_M_i_to_M__6(K5b, Mb, Pbi, Vm5b, ab, eps);  // modifiers: Mb
  inactive_cdc25_decay_2: Pbi => ; cell*function_for_1k_1M_33(Pbi, eps, kdpbi);
  active_cdc25_decay_2: Pb => ; cell*function_for_1k_1M_34(Pb, eps, kdpb);
  Wee1_synthesis: => Wee1; cell*function_for_1k_11(eps, vswee1);
  Wee1_translation: => Wee1; cell*function_for_1k_1M_35(Mw, eps, ksW);  // modifiers: Mw
  Wee1_phosphorylation: Wee1 => Wee1p; cell*function_for_M_i_to_M__7(K7b, Mb, Vm7b, Wee1, eps, ib);  // modifiers: Mb
  Wee1_dephosphorylation: Wee1p => Wee1; cell*scaled_Michaelis_Menten_2_10(K8b, Vm8b, Wee1p, eps);
  Wee1_decay: Wee1 => ; cell*function_for_1k_1M_36(Wee1, eps, kdwee1);
  Wee1p_decay: Wee1p => ; cell*function_for_1k_1M_37(Wee1p, eps, kdwee1p);
  Cdc45_synthesis: => Cdc45; cell*function_for_Cdc45_synthesis_1(Cdc45, Cdc45_tot, K1cdc45, Me, V1cdc45, eps);  // modifiers: Me
  Cdc45_decay: Cdc45 => ; cell*scaled_Michaelis_Menten_2_11(Cdc45, K2cdc45, V2cdc45, eps);
  Polymerase_activation: Cdc45 => Pol; cell*function_for_1k_M_tot___M___M2_1(Cdc45, Pol, Pol_tot, eps, kspol);
  Polymerase_deactivation: Pol => Cdc45; cell*function_for_1k_1M_38(Pol, eps, kdpol);
  RNA_Primer_synthesis: => Primer; cell*function_for_1k_1M_39(Pol, eps, ksprim);  // modifiers: Pol
  RNA_Primer_degradation: Primer => ; cell*function_for_1k_1M_40(Primer, eps, kdprim);
  ATR_activation_by_Primer: Primer => ATR; cell*function_for_1k_M_tot___M___M2_2(ATR, ATR_tot, Primer, eps, kaatr);
  Atr_deactivation_by_Primer: ATR => Primer; cell*function_for_1k_1M_41(ATR, eps, kdatr);
  Chk1_synthesis: => Chk1; cell*function_for_Cdc45_synthesis_2(ATR, Chk1, Chk1_tot, K1chk, V1chk, eps);  // modifiers: ATR
  Chk1_decay: Chk1 => ; cell*scaled_Michaelis_Menten_2_12(Chk1, K2chk, V2chk, eps);

  // Unit definitions:
  unit time = 3600 second;
  unit substance = 1e-6 mole;
end
