// SBML level 3 version 1
// dcterms:bibliographicCitation: urn:miriam:pubmed:29379572

function t_g(r, x)
  r*x;
end
t_g is "t-g";

function t_k(c, y, z)
  c*y*z;
end
t_k is "t-k";

function inft_d(y)
  y;
end
inft_d is "inft-d";

function t_d(r, x)
  r*x*x;
end
t_d is "t-d";

function t_cross(r, x, y)
  r*x*y;
end
t_cross is "t-cross";

function v_rep(b, y)
  b*y;
end
v_rep is "v-rep";

function infection_0(a, x, v)
  a*x*v;
end

function v_k(d, v, z)
  d*v*z;
end
v_k is "v-k";

function v_clear(e, v)
  e*v;
end
v_clear is "v-clear";

function imm_s(m, y, z)
  m*y*z;
end
imm_s is "imm-s";

function imm_d(n, z)
  n*z;
end
imm_d is "imm-d";

model Phan2017___innate_immune_in_oncolytic_virotherapy()
  // Phan2017 - innate immune in oncolytic virotherapy
  // The paper describes a model on the key components for tumor–immune dynamics in multiple myeloma. Created by COPASI 4.25 (Build 207) This model is described in the article: The Role of the Innate Immune System in Oncolytic Virotherapy Tuan Anh Phan and Jianjun Paul Tian Computational and Mathematical Methods in Medicine (2017) 6587258 Abstract: The complexity of the immune responses is a major challenge in current virotherapy. This study incorporates the innate immune response into our basic model for virotherapy and investigates how the innate immunity affects the outcome of virotherapy. The viral therapeutic dynamics is largely determined by the viral burst size, relative innate immune killing rate, and relative innate immunity decay rate. The innate immunity may complicate virotherapy in the way of creating more equilibria when the viral burst size is not too big, while the dynamics is similar to the system without innate immunity when the viral burst size is big. To cite BioModels Database, please use: BioModels Database: An enhanced, curated and annotated resource for published quantitative kinetic models . To the extent possible under law, all copyright and related or neighbouring rights to this encoded model have been dedicated to the public domain worldwide. Please refer to CC0 Public Domain Dedication for more information.
  // isDescribedBy pubmed:29379572
  // isVersionOf ncit:C62713
  // hasProperty mamo:MAMO_0000046
  // hasTaxon taxonomy:9606
  // biomodels.db:MODEL1907110001 biomodels.db:BIOMD0000000748
  // model units - substance: substance, time: time, volume: volume, area: area, length: length, extent: substance

  // Compartments:
  compartment tumor_microenvironment = 1 volume;  // isVersionOf ncit:C94498

  // Species:
  // relative uninfected tumor cell
  // =x/Capacity
  species x in tumor_microenvironment = 0.99;  // isVersionOf CL:0001063
  // relative infected tumor cell
  // =y/Capacity
  species y in tumor_microenvironment = 0.01;  // isVersionOf CL:0001063
  // relative free virus
  // =v/Capacity
  species v in tumor_microenvironment = 0.01;  // isVersionOf ncit:C717
  // relative immune cell population
  // =z/Capacity
  species z in tumor_microenvironment = 0.01;  // isVersionOf ncit:C28241

  // Parameters:
  // =l/delta
  // tumor growth rate/death rate of infected cell
  r = 0.36 unit_0;
  // =Capacity*beta/delta
  // =infection rate/death rate of infected cell
  a = 0.11 unit_0;  // isVersionOf ncit:C94967
  // =Capacity*u/delta
  // =immune killing rate of infected cells/death rate of infected cell
  c = 0.48 unit_0;  // isVersionOf ncit:C94967
  // =Capacity*k/delta
  // =immune killing rate of virus/death rate of infected cell
  d = 0.16 unit_0;  // isVersionOf ncit:C94967
  // =gamma/delta
  // =clearance rate of tumor/death rate of infected cell
  e = 0.2 unit_0;  // isVersionOf ncit:C94967
  // =s*Capacity/delta
  // =stimulation rate of virus/death rate of infected cell
  m = 0.6 unit_0;
  // =rho/delta
  // =immune clearance rate/death rate of infected cell
  n = 0.036 unit_0;  // isVersionOf ncit:C94967
  // burst size of free virus
  b = 9 unit_0;  // isPropertyOf GO:0019058

  // Reactions:
  tumor_growth: => x; tumor_microenvironment*t_g(r, x);  // isVersionOf GO:0008283
  tumor_death: x => ; tumor_microenvironment*t_d(r, x);  // isVersionOf GO:0008219
  tumor_cross_infection: x => ; tumor_microenvironment*t_cross(r, x, y); tumor_cross_infection is "tumor cross-infection";  // modifiers: y
  infected_tumor_killing: y => ; tumor_microenvironment*t_k(c, y, z);  // modifiers: z; isVersionOf GO:0002418
  infected_tumor_death: y => ; tumor_microenvironment*inft_d(y);  // isVersionOf GO:0008219
  virus_multiplication_in_infected_tumor: => v; tumor_microenvironment*v_rep(b, y);  // modifiers: y; isVersionOf ncit:C94345
  virus_clearing: v => ; tumor_microenvironment*v_clear(e, v);
  virus_killing_by_immune: v => ; tumor_microenvironment*v_k(d, v, z);  // modifiers: z; isVersionOf GO:0006955
  immune_stimulation: => z; tumor_microenvironment*imm_s(m, y, z);  // modifiers: y; isVersionOf GO:0070661
  immune_cell_death: z => ; tumor_microenvironment*imm_d(n, z);  // isVersionOf GO:0008219
  infection: x + v => y; tumor_microenvironment*infection_0(a, x, v);  // isVersionOf ncit:C3439

  // Unit definitions:
  unit length = metre;
  unit area = metre^2;
  unit volume = 1e-3 litre;
  unit time = second;
  unit substance = 1e-3 mole;
  unit unit_0 = dimensionless^0; unit_0 is "1";
end
