// SBML level 3 version 1
// dcterms:bibliographicCitation: urn:miriam:pubmed:23734575

function is_il2(p1, E, I, g1)
  p1*E*I/(g1 + I);
end
is_il2 is "is-il2";

function IL2(p2, E, T, g3)
  p2*E*T/(g3 + T);
end

function kill(aa, E, T, g2)
  aa*E*T/(g2 + T);
end

function is_tumor(c, T)
  c*T;
end
is_tumor is "is-tumor";

function Constant_flux__irreversible(v)
  v;
end
Constant_flux__irreversible is "Constant flux (irreversible)";

function t_d(a, b, T)
  a*b*T*T;
end
t_d is "t-d";

function growth(a, T)
  a*T;
end

model Figueredo2013_2___immunointeraction_model_with_IL2()
  // Figueredo2013/2 - immunointeraction model with IL2
  // The paper describes a model of immune-itumor interaction with IL2. Created by COPASI 4.25 (Build 207) This model is described in the article: Investigating mathematical models of immuno-interactions with early-stage cancer under an agent-based modelling perspective Grazziela P Figueredo, Peer-Olaf Siebers, Uwe Aickelin Kathleen BMC Bioinformatics 2013, 14(Suppl 6):S6 Abstract: Many advances in research regarding immuno-interactions with cancer were developed with the help of ordinary differential equation (ODE) models. These models, however, are not effectively capable of representing problems involving individual localisation, memory and emerging properties, which are common characteristics of cells and molecules of the immune system. Agent-based modelling and simulation is an alternative paradigm to ODE models that overcomes these limitations. In this paper we investigate the potential contribution of agent-based modelling and simulation when compared to ODE modelling and simulation. We seek answers to the following questions: Is it possible to obtain an equivalent agent-based model from the ODE formulation? Do the outcomes differ? Are there any benefits of using one method compared to the other? To answer these questions, we have considered three case studies using established mathematical models of immune interactions with early-stage cancer. These case studies were re-conceptualised under an agent-based perspective and the simulation results were then compared with those from the ODE models. Our results show that it is possible to obtain equivalent agent-based models (i.e. implementing the same mechanisms); the simulation output of both types of models however might differ depending on the attributes of the system to be modelled. In some cases, additional insight from using agent-based modelling was obtained. Overall, we can confirm that agent-based modelling is a useful addition to the tool set of immunologists, as it has extra features that allow for simulations with characteristics that are closer to the biological phenomena. To cite BioModels Database, please use: BioModels Database: An enhanced, curated and annotated resource for published quantitative kinetic models . To the extent possible under law, all copyright and related or neighbouring rights to this encoded model have been dedicated to the public domain worldwide. Please refer to CC0 Public Domain Dedication for more information.
  // isDescribedBy pubmed:23734575
  // isVersionOf GO:0002418
  // hasProperty mamo:MAMO_0000046
  // hasTaxon taxonomy:9606
  // biomodels.db:MODEL1907180002 biomodels.db:BIOMD0000000754
  // model units - substance: substance, time: time, volume: volume, area: area, length: length, extent: substance

  // Compartments:
  compartment tumor_microenvironment = 1 volume;  // isVersionOf ncit:C94498

  // Species:
  // tumor cell
  species T in tumor_microenvironment = 50;  // isVersionOf CL:0001064
  // effector cell
  species E in tumor_microenvironment = 10;  // isVersionOf ncit:C28241
  species I in tumor_microenvironment = 0;  // isVersionOf uniprot:P60568

  // Parameters:
  // proliferation rate of tumor
  a = 0.18 unit_0;
  // =0.002/0.004
  // death rate of tumor
  b = 1e-9 unit_0;  // isVersionOf ncit:C53346
  // immune growth rate
  c = 0.05 unit_0;
  // tumor cell killing rate
  aa = 1 unit_0;  // isVersionOf ncit:C53346
  // tumor killing half saturation constant
  g2 = 100000 unit_0;
  // effector cell injection
  s1 = 0 unit_0;  // isVersionOf ncit:C122632
  // IL2 injection
  s2 = 0 unit_0;  // isVersionOf ncit:C122632
  // immune death rate
  u2 = 0.03 unit_0;  // isVersionOf ncit:C53346
  // immune stimulation rate
  p1 = 0.1245 unit_0;
  // immune stimulation half saturation constant
  g1 = 20000000 unit_0;
  // IL2 production rate
  p2 = 5 unit_0;  // isVersionOf ncit:C25636
  // IL2 production half saturation constant
  g3 = 1000 unit_0;
  // IL2 decay rate
  u3 = 10 unit_0;  // isVersionOf ncit:C25636

  // Reactions:
  tumor_growth: => T; tumor_microenvironment*growth(a, T);  // isVersionOf GO:0008283
  tumor_death: T => ; tumor_microenvironment*t_d(a, b, T);  // isVersionOf GO:0008219
  tumor_killing: T => ; tumor_microenvironment*kill(aa, E, T, g2);  // modifiers: E; isVersionOf GO:0002419
  immune_death: E => ; tumor_microenvironment*u2*E;  // isVersionOf GO:0008219
  immune_stimulation_tumor: => E; tumor_microenvironment*is_tumor(c, T); immune_stimulation_tumor is "immune stimulation-tumor";  // modifiers: T; isVersionOf GO:0008283
  immune_stimulation_IL2: => E; tumor_microenvironment*is_il2(p1, E, I, g1); immune_stimulation_IL2 is "immune stimulation-IL2";  // modifiers: I; isVersionOf GO:0008283
  immune_injection: => E; tumor_microenvironment*Constant_flux__irreversible(s1);
  IL2_injection: => I; tumor_microenvironment*Constant_flux__irreversible(s2);
  IL2_loss: I => ; tumor_microenvironment*u3*I;  // isVersionOf ncit:C75947
  IL2_production: => I; tumor_microenvironment*IL2(p2, E, T, g3);  // modifiers: E, T; isVersionOf GO:0001816

  // Unit definitions:
  unit length = metre;
  unit area = metre^2;
  unit volume = 1e-3 litre;
  unit time = second;
  unit substance = 1e-3 mole;
  unit unit_0 = dimensionless^0; unit_0 is "1";
end
