// SBML level 2 version 4
// dcterms:bibliographicCitation: Reduced model of Blood co-agulation urn:miriam:pubmed:31161687

model New_Model()
  // Hansen2019 - Nine species reduced model of blood coagulation
  // its a nine species reduced model of Hockin 2002. Model uses different level of reduction (5,7,9,11) and testing the best alignment with Hockin model results)
  // isDescribedBy pubmed:31161687
  // hasProperty GO:0007596
  // hasProperty mamo:MAMO_0000046
  // hasTaxon taxonomy:9606
  // biomodels.db:MODEL1907180004 biomodels.db:BIOMD0000000755

  // Compartments:
  compartment compartment = 1;

  // Species:
  // tissue factor
  species TF in compartment = 1e-9;  // uniprot.isoform:P13726
  // factor X
  species X in compartment = 1.6e-7;  // uniprot.isoform:P00742
  // Complex of Factor X and Factor V
  species Xa_Va in compartment = 0;  // hasPart uniprot:P00742; hasPart uniprot:P12259
  // Prothrombin
  species II in compartment = 1.4e-6;  // uniprot:P00734
  // thrombin
  species IIa in compartment = 0;  // isVersionOf uniprot:P00734
  // Complex of Factor X, Factor V and prothrombin
  species Xa_Va_II in compartment = 0;  // hasPart uniprot:P12259; hasPart uniprot:P00742; hasPart unists:P00734
  // membrane located IIa
  species mIIa in compartment = 0;  // isVersionOf uniprot.isoform:P00734
  // membrane located IIa bound with ATIII
  species mIIa_ATIII in compartment = 0;  // hasPart uniprot:P00734; hasPart uniprot:P01008
  // Thrombin ATIII inhibition complex
  species IIa_ATIII in compartment = 0;  // hasPart uniprot:P01008; hasPart uniprot:P00734

  // Reactions:
  reaction_1: TF + X => Xa_Va; compartment*reaction_1_k1*TF*X;
    reaction_1_k1 = 121.267;
  reaction_2: TF + X + II => TF + X + IIa; compartment*reaction_2_k1*TF*X*II;
    reaction_2_k1 = 4.74645e-16;
  reaction_3: Xa_Va + II => Xa_Va_II; compartment*reaction_3_k1*Xa_Va*II;
    reaction_3_k1 = 2.56984e12;
  reaction_4: Xa_Va_II => Xa_Va + mIIa; compartment*reaction_4_k1*Xa_Va_II;
    reaction_4_k1 = 7.75402e4;
  reaction_5: Xa_Va + mIIa => Xa_Va + IIa; compartment*reaction_5_k1*Xa_Va*mIIa;
    reaction_5_k1 = 6.96794e10;
  reaction_6: mIIa => mIIa_ATIII; compartment*reaction_6_k1*mIIa;
    reaction_6_k1 = 0.00472749;
  reaction_7: IIa => IIa_ATIII; compartment*reaction_7_k1*IIa;
    reaction_7_k1 = 0.0201671;

  // Unit definitions:
  unit volume = 1e-3 litre;
end
