// SBML level 3 version 1
// dcterms:bibliographicCitation: urn:miriam:pubmed:26551154

function kill(d, K, T)
  d*K*T;
end

function Tn_stim(rmn, Tn, M2)
  rmn*Tn*M2;
end

function m_growth(a1, T, a2, Th, P, M, bm)
  (a1*T + a2*Th)*P*(1 - (P + M)/bm);
end

function stim_Th(ah, M)
  ah*M;
end

function M_transition(k, S, P)
  k*S*P;
end

function Th_growth(rh, M, P, Mod, bth)
  rh*M*P*(1 - (P + Mod)/bth);
end

function tumor_growth(r, X, Y, bt)
  r*X*(1 - (X + Y)/bt);
end

model den_Breems2015___macrophage_in_cancer()
  // den Breems2015 - macrophage in cancer
  // The paper describes a model of re-polarisation of M2 and M1 macrophages and its role on cancer outcomes. Created by COPASI 4.25 (Build 207) This model is described in the article: The re-polarisation of M2 and M1 macrophages and its role on cancer outcomes den Breems, Nicoline Y.; Eftimie, Raluca Journal of Theoretical Biology, 390, 23-39 Abstract: The anti-tumour and pro-tumour roles of Th1/Th2 immune cells and M1/M2 macrophages have been documented by numerous experimental studies. How- ever, it is still unknown how these immune cells interact with each other to control tumour dynamics. Here, we use a mathematical model for the inter- actions between mouse melanoma cells, Th2/Th1 cells and M2/M1 macro- phages, to investigate the unknown role of the re-polarisation between M1 and M2 macrophages on tumour growth. The results show that tumour growth is associated with a type-II immune response described by large num- bers of Th2 and M2 cells. Moreover, we show that: (i) the ratio k of the transition rates k12 (for the re-polarisation M1→M2) and k21 (for the re- polarisation M2→M1) is important in reducing tumour population, and (ii) the particular values of these transition rates control the delay in tumour growth and the final tumour size. We also perform a sensitivity analysis to investigate the effect of various model parameters on changes in the tumour cell population, and confirm that the ratio k alone and the ratio of M2 and M1 macrophage populations at earlier times (e.g., day 7), cannot always predict the final tumour size. To cite BioModels Database, please use: BioModels Database: An enhanced, curated and annotated resource for published quantitative kinetic models . To the extent possible under law, all copyright and related or neighbouring rights to this encoded model have been dedicated to the public domain worldwide. Please refer to CC0 Public Domain Dedication for more information.
  // isDescribedBy pubmed:26551154
  // hasProperty GO:0002418
  // hasProperty mamo:MAMO_0000046
  // hasTaxon taxonomy:9606
  // biomodels.db:MODEL1907240004 biomodels.db:BIOMD0000000759
  // model units - substance: substance, time: time, volume: volume, area: area, length: length, extent: substance

  // Compartments:
  compartment tumor_microenvironment = 1 volume;  // isVersionOf ncit:C94498

  // Species:
  // non-immunogenic tumor cell
  species Tn in tumor_microenvironment = 1000;  // isVersionOf CL:0001064
  // immunogenic tumor cell
  species Ts in tumor_microenvironment = 1000000;  // isVersionOf CL:0001064
  // M1 macropahge
  species M1 in tumor_microenvironment = 100;  // isVersionOf ncit:C156004
  // M2 macrophage
  species M2 in tumor_microenvironment = 100;  // isVersionOf ncit:C123783
  // Th1 helper cell
  species Th1 in tumor_microenvironment = 0;  // isVersionOf CL:0000545
  // Th2 helper cell
  species Th2 in tumor_microenvironment = 0;  // isVersionOf CL:0000546

  // Parameters:
  // proliferation rate of tumour cells
  r = 0.565 unit_0;
  // carrying capacity of tumour cells
  bt = 2000000000 unit_1;
  ksn = 0.1 unit_0;  // isVersionOf ncit:C25636
  // killing rate of Tn by M1
  dmn = 2e-6 unit_0;  // isVersionOf ncit:C25636
  // killing rate of Ts by M1
  dms = 2e-6 unit_0;  // isVersionOf ncit:C25636
  // proliferation rate of Tn cells in the presence of M2 cells
  rmn = 1e-7 unit_0;
  // killing rate of Ts by Th1
  dts = 5.3e-8 unit_0;  // isVersionOf ncit:C25636
  // activation rate of M1 triggered by Ts antigens
  as = 1e-6 unit_0;
  // activation rate of M2 mediated by cytokines and growth factors
  an = 5e-8 unit_0;
  // activation rate of M1 by type-I cytokines produced by Th1
  am1 = 5e-8 unit_0;
  // activation rate of M2 by type-I cytokines produced by Th2
  am2 = 5e-8 unit_0;
  // carrying capacity of M1,M2 cells
  bm = 100000 unit_1;
  // death rate of M1 cells
  dm1 = 0.2 unit_0;  // isVersionOf ncit:C25636
  // death rate of M1 cells
  dm2 = 0.2 unit_0;  // isVersionOf ncit:C25636
  // M1-M2 transition rate
  k12 = 5e-5 unit_0;  // isVersionOf ncit:C25636
  // M2-M1 transition rate
  k21 = 4e-5 unit_0;  // isVersionOf ncit:C25636
  // activation rate of Th1 by type-I cytokines produced by M1
  ah1 = 0.008 unit_0;
  // activation rate of Th2 by type-II cytokines produced by M2
  ah2 = 0.008 unit_0;
  // proliferation rate of Th1 in the presence of type-I cytokines produced by M1 cells
  rh1 = 9e-6 unit_0;
  // proliferation rate of Th2 in the presence of type-II cytokines produced by M2 cells
  rh2 = 9e-6 unit_0;
  // natural death rate of Th1 cells
  dh1 = 0.05 unit_0;  // isVersionOf ncit:C25636
  // natural death rate of Th2 cells
  dh2 = 0.05 unit_0;  // isVersionOf ncit:C25636
  // carrying capacity of Th cells
  bth = 100000000 unit_1;
  Tumor has unit_1;

  // Assignment rules:
  Tumor := Tn + Ts;

  // Reactions:
  Tn_growth: => Tn; tumor_microenvironment*tumor_growth(r, Tn, Ts, bt);  // modifiers: Ts; isVersionOf GO:0008283
  Ts_Tn_transition: Ts => Tn; tumor_microenvironment*ksn*Ts; Ts_Tn_transition is "Ts-Tn transition";  // isVersionOf ncit:C75958
  Tn_killing: Tn => ; tumor_microenvironment*kill(dmn, M1, Tn);  // modifiers: M1; isVersionOf GO:0006909
  Tn_stimulation: => Tn; tumor_microenvironment*Tn_stim(rmn, Tn, M2);  // modifiers: M2; isVersionOf GO:0008283
  Ts_growth: => Ts; tumor_microenvironment*tumor_growth(r, Ts, Tn, bt);  // modifiers: Tn; isVersionOf GO:0008283
  Ts_killing_M1: Ts => ; tumor_microenvironment*kill(dms, M1, Ts); Ts_killing_M1 is "Ts killing-M1";  // modifiers: M1; isVersionOf GO:0006909
  Ts_killing_Th1: Ts => ; tumor_microenvironment*kill(dts, Th1, Ts); Ts_killing_Th1 is "Ts killing-Th1";  // modifiers: Th1; isVersionOf GO:0002419
  M1_growth: => M1; tumor_microenvironment*m_growth(as, Ts, am1, Th1, M1, M2, bm);  // modifiers: Ts, Th1, M2; isVersionOf GO:0008283
  M1_death: M1 => ; tumor_microenvironment*dm1*M1;  // isVersionOf GO:0008219
  M1_M2_transition: M1 => M2; tumor_microenvironment*M_transition(k12, M1, M2); M1_M2_transition is "M1-M2 transition";  // isVersionOf ncit:C75958
  M2_M1_transition: M2 => M1; tumor_microenvironment*M_transition(k21, M2, M1); M2_M1_transition is "M2-M1 transition";  // isVersionOf ncit:C75958
  M2_growth: => M2; tumor_microenvironment*m_growth(an, Tn, am2, Th2, M2, M1, bm);  // modifiers: Tn, Th2, M1; isVersionOf GO:0008283
  M2_death: M2 => ; tumor_microenvironment*dm2*M2;  // isVersionOf GO:0008219
  Th1_growth: => Th1; tumor_microenvironment*Th_growth(rh1, M1, Th1, Th2, bth);  // modifiers: M1, Th2; isVersionOf GO:0008283
  Th1_death: Th1 => ; tumor_microenvironment*dh1*Th1;  // isVersionOf GO:0008219
  Th1_stimulation: => Th1; tumor_microenvironment*stim_Th(ah1, M1);  // modifiers: M1; isVersionOf GO:0008283
  Th2_growth: => Th2; tumor_microenvironment*Th_growth(rh2, M2, Th2, Th1, bth);  // modifiers: M2, Th1; isVersionOf GO:0008283
  Th2_death: Th2 => ; tumor_microenvironment*dh2*Th2;  // isVersionOf GO:0008219
  Th2_stimulation: => Th2; tumor_microenvironment*stim_Th(ah2, M2);  // modifiers: M2; isVersionOf GO:0008283

  // Unit definitions:
  unit length = metre;
  unit area = metre^2;
  unit volume = 1e-3 litre;
  unit time = 86400 second;
  unit substance = 1e-3 mole;
  unit unit_0 = 1 / (8640 second); unit_0 is "1/d";
  unit unit_1 = dimensionless^0;
end
