// SBML level 3 version 1
// dcterms:bibliographicCitation: urn:miriam:pubmed:21647303

function t_0(b, r0, N, r1)
  b*r0*N/(r1 + N);
end
t_0 is "t-";

function stim(k, T, t)
  k*T*(1 - T/t);
end

function log(r, C, k)
  r*C*(1 - C/k);
end

model Feizabadi2011_1___immunodeficiency_in_cancer_core_model()
  // Feizabadi2011 - immunodeficiency in cancer core model
  // The paper describes a basic model of immune-cancer interaction. Created by COPASI 4.25 (Build 207) This model is described in the article: Modeling the Effects of a Simple Immune System and Immunodeficiency on the Dynamics of Conjointly Growing Tumor and Normal Cells Mitra Shojania Feizabadi and Tarynn M. Witten International Journal of Biological Sciences 2011; 7(6):700-707 Abstract: In this paper, we develop a theoretical contribution towards the understanding of the complex behavior of conjoint tumor-normal cell growth under the influence of immuno-chemotheraputic agents under simple immune system response. In particular, we consider a core model for the interaction of tumor cells with the surrounding normal cells. We then add the effects of a simple immune system, and both immune-suppression factors and immuno-chemotherapeutic agents as well. Through a series of numerical simulations, we illustrate that the interdependency of tumor-normal cells, together with choice of drug and the nature of the immunodeficiency, leads to a variety of interesting patterns in the evolution of both the tumor and the normal cell populations. To cite BioModels Database, please use: BioModels Database: An enhanced, curated and annotated resource for published quantitative kinetic models . To the extent possible under law, all copyright and related or neighbouring rights to this encoded model have been dedicated to the public domain worldwide. Please refer to CC0 Public Domain Dedication for more information.
  // isDescribedBy pubmed:21647303
  // biomodels.db:MODEL1907250001 biomodels.db:BIOMD0000000760
  // hasProperty mamo:MAMO_0000046
  // hasProperty GO:0002418
  // hasTaxon taxonomy:9606
  // model units - substance: substance, time: time, volume: volume, area: area, length: length, extent: substance

  // Compartments:
  compartment tumor_microenvironment = 1 volume;  // isVersionOf ncit:C94498

  // Species:
  species T in tumor_microenvironment = 1;  // isVersionOf CL:0001064
  species N in tumor_microenvironment = 1;  // isVersionOf CL:0000000

  // Parameters:
  // tumor growth rate
  rt = 0.3 unit_0;
  // carrying capacity of tumor cell
  kt = 1200000 unit_0;
  // =0 for no interaction
  // =1 for interaction
  // normal cell inhibition rate of tumor
  b = 1 unit_0;  // isVersionOf ncit:C25636
  // tumor cell inhibition constant by normal cell
  r0 = 1 unit_0;  // isVersionOf ncit:C67363
  // half saturation constant of tumor inhibition
  r1 = 1000 unit_0;
  // normal cell proliferation rate
  rn = 0.4 unit_0;
  // carrying capacity of normal cell
  kn = 1000000 unit_0;
  // =0 for no interaction
  // =0.028 for interaction
  // tumor-normal cell coupling constant (rate)
  k = 0.028 unit_0;
  // tumor critical size
  t = 300000 unit_0;

  // Reactions:
  tumor_growth: => T; tumor_microenvironment*log(rt, T, kt);  // isVersionOf GO:0008283
  normal_cell_growth: => N; tumor_microenvironment*log(rn, N, kn);  // isVersionOf GO:0008283
  tumor_inhibition: T => ; tumor_microenvironment*t_0(b, r0, N, r1);  // modifiers: N; isVersionOf GO:0008219
  normal_cell_stimulation: => N; tumor_microenvironment*stim(k, T, t);  // modifiers: T; isVersionOf GO:0008283

  // Unit definitions:
  unit length = metre;
  unit area = metre^2;
  unit volume = 1e-3 litre;
  unit time = second;
  unit substance = 1e-3 mole;
  unit unit_0 = dimensionless^0; unit_0 is "1";
end
