// SBML level 3 version 1
// dcterms:bibliographicCitation: urn:miriam:pubmed:20450922

function cyt(i, Th, c, T, h2, kp, Cp)
  (i*Th + c)*T/((h2 + T)*(1 + kp*Cp));
end

function tp2(i3t, T, h1)
  i3t*T^2/(h1^2 + T^2);
end

function tp1(i31, Th, c, T, h2)
  (i31*Th + c)*T/(h2 + T);
end

function thd(cth, f)
  cth*f;
end

function the(dth, T, Th)
  dth*T*Th;
end

function thg(bth, Th, kth, kp, Cp)
  bth*Th*(1 - kth*Th)/(1 + kp*Cp);
end

function ths(ath, C, T, h2, kp, Cp)
  ath*C*T/((h2 + T)*(1 + kp*Cp));
end

function td(gtum, Cs, T, h0)
  gtum*Cs*T/(h0 + T);
end

function tg(atum, T, kp, Cp, ktum, ks, Cs)
  atum*T*(1 + kp*Cp)*(1 - ktum*T)/(1 + ks*Cs);
end

model Eftimie2010___immunity_to_melanoma()
  // Eftimie2010 - immunity to melanoma
  // The paper describes a model of immunity to melanoma. Created by COPASI 4.25 (Build 207) This model is described in the article: Modeling anti-tumor Th1 and Th2 immunity in the rejection of melanoma Raluca Eftimie, Jonathan L. Bramson, David J.D. Earn Journal of Theoretical Biology 265 (2010) 467–480 Abstract: Recent experiments indicate that CD4+ Th2 cells can reject skin tumors in mice, while CD4+ Th1 cells cannot (Mattes et al., 2003; Zhang et al., 2009). These results are surprising because CD4+ Th1 cells are typically considered to be capable of tumor rejection. We used mathematical models to investigate this unexpected outcome. We found that neither CD4+ Th1 nor CD4+ Th2 cells could eliminate the cancer cells when acting alone, but that tumor elimination could be induced by recruitment of eosinophils by the Th2 cells. These recruited eosinophils had unexpected indirect effects on the decay rate of type 2 cytokines and the rate at which Th2 cells are inactivated through interactions with cancer cells. Strikingly, the presence of eosinophils impacted tumor growth more significantly than the release of tumor-suppressing cytokines such as IFN-g and TNF-a. Our simulations suggest that novel strategies to enhance eosinophil recruitment into skin tumors may improve cancer immunotherapies. To cite BioModels Database, please use: BioModels Database: An enhanced, curated and annotated resource for published quantitative kinetic models . To the extent possible under law, all copyright and related or neighbouring rights to this encoded model have been dedicated to the public domain worldwide. Please refer to CC0 Public Domain Dedication for more information.
  // isDescribedBy pubmed:20450922
  // hasProperty mamo:MAMO_0000046
  // hasProperty GO:0002418
  // hasProperty efo:0000756
  // hasTaxon taxonomy:9606
  // biomodels.db:MODEL1907300001 biomodels.db:BIOMD0000000768
  // model units - substance: substance, time: time, volume: volume, area: area, length: length, extent: substance

  // Compartments:
  compartment tme = 1 volume;  // isVersionOf ncit:C94498

  // Species:
  // Th cells
  species Th in tme = 0;  // isVersionOf CL:0000912
  // tumor cell
  species T in tme = 100000;  // isVersionOf CL:0001064
  // tumor suppressing cytokine
  species Cs in tme = 0;  // isVersionOf ncit:C20464
  // tumor promoting cytokine
  species Cp in tme = 0;  // isVersionOf ncit:C20464
  // cytokine produced by Th cells
  species C in tme = 0;  // isVersionOf ncit:C20464

  // Parameters:
  // Activation rate of Th cells
  ath = 0.008 unit_0;
  // Proliferation rate of Th cells
  bth = 0.09 unit_0;
  // Apoptosis rate of Th cells
  cth = 0.1 unit_0;  // isVersionOf ncit:C25636
  // 1/carrying capacity of Th cells
  kth = 1e-8 unit_1;
  // 1/concentration of IL-2 (which inhibits the apoptosis of Th1 cells) at half-maximum
  k1 = 1e-8 unit_1;
  // 1/concentration of Ctp at half-maximum (scaled value)
  kp = 1 unit_1;
  // 1/concentration of Cts at half-maximum (scaled value)
  ks = 1 unit_1;
  // Inactivation rate of Th cells by the tumor
  dth = 1e-7 unit_0;  // isVersionOf ncit:C25636
  // Tumor growth rate
  atum = 0.514 unit_0;
  // 1/carrying capacity of tumor cells
  ktum = 1.02e-9 unit_1;
  // Tumor killing rate by the cytokines
  gtum = 0.2 unit_0;  // isVersionOf ncit:C25636
  // Half-saturation constant for the tumor cell population detected by the T cells
  h2 = 1000 unit_1;
  // Half-saturation constant for the Tumor cell population producing tumor- promoting cytokines
  h1 = 1000000 unit_1;
  // Half-saturation constant for the tumor cell population killed by the immune cells and cytokines
  h0 = 100000 unit_1;
  // Decay rate of type 1 and type 2 cytokines
  j0 = 34 unit_0;  // isVersionOf ncit:C25636
  // Decay rate of tumor-suppressing cytokines
  jts = 34 unit_0;  // isVersionOf ncit:C25636
  // Decay rate of tumor-promoting cytokines
  jtp = 34 unit_0;  // isVersionOf ncit:C25636
  // =9 for Thh1
  // =5.4 for Th2
  // Production rate of type 1/2 cytokines by the Th cells
  i11 = 5.4 unit_0;  // isVersionOf ncit:C25636
  // =6 for Thh1
  // =8.6 for Th2
  // Production rate of tumor-suppressing cytokines by the Th cells
  i21 = 8.6 unit_0;  // isVersionOf ncit:C25636
  // =2.3e-4 for Th1
  // =3.8e-4 for Th2
  // Production rate of tumor-promoting cytokines by the Th cells
  i31 = 0.00038 unit_0;  // isVersionOf ncit:C25636
  // Production rate of tumor-promoting cytokines by the tumor
  i3t = 10 unit_0;  // isVersionOf ncit:C25636
  // Production rate of cytokines by other cells in the microenvironment (cells that are not included specifically in this model)
  c = 1 unit_0;  // isVersionOf ncit:C25636
  // =Th for Th2
  // =Th/(1+k1*C) for Th1
  // apoptosis function for Th ceoos
  f has unit_1;

  // Assignment rules:
  f := Th;

  // Reactions:
  Th_stimulation: => Th; tme*ths(ath, C, T, h2, kp, Cp);  // modifiers: C, T, Cp; isVersionOf GO:0042098
  Th_growth: => Th; tme*thg(bth, Th, kth, kp, Cp);  // modifiers: Cp; isVersionOf GO:0042098
  Th_death: Th => ; tme*thd(cth, f);  // isVersionOf GO:0008219
  Th_exhaustion: Th => ; tme*the(dth, T, Th);  // modifiers: T; isVersionOf GO:0008219
  tumor_growth: => T; tme*tg(atum, T, kp, Cp, ktum, ks, Cs);  // modifiers: Cp, Cs; isVersionOf GO:0008283
  tumor_death: T => ; tme*td(gtum, Cs, T, h0);  // modifiers: Cs; isVersionOf GO:0008219
  cytokine_decay: C => ; tme*j0*C;  // isVersionOf GO:0030163
  Th_cytokine_secretion: => C; tme*cyt(i11, Th, c, T, h2, kp, Cp);  // modifiers: Th, T, Cp; isVersionOf GO:0050663
  TS_cytokine_decay: Cs => ; tme*jts*Cs;  // isVersionOf GO:0030163
  TS_cytokine_secretion: => Cs; tme*cyt(i21, Th, c, T, h2, kp, Cp);  // modifiers: Th, T, Cp; isVersionOf GO:0050663
  TP_cytokine_decay: Cp => ; tme*jtp*Cp;  // isVersionOf GO:0030163
  TP_cytokine_secretion: => Cp; tme*tp1(i31, Th, c, T, h2);  // modifiers: Th, T; isVersionOf GO:0050663
  TP_cytokine_by_tumor: => Cp; tme*tp2(i3t, T, h1);  // modifiers: T; isVersionOf GO:0050663

  // Unit definitions:
  unit length = metre;
  unit area = metre^2;
  unit volume = 1e-3 litre;
  unit time = 86400 second;
  unit substance = 1e-3 mole;
  unit unit_0 = 1 / (8640 second); unit_0 is "1/d";
  unit unit_1 = dimensionless^0;
end
