// SBML level 2 version 4
// dcterms:bibliographicCitation: urn:miriam:doi:10.1016/S0167-2789(03)00005-8

function Constant_flux__irreversible(v)
  v;
end
Constant_flux__irreversible is "Constant flux (irreversible)";

function Function_for_Malignant_Cells_Growth(alpha, x)
  alpha*x;
end

function Function_for_Lymphocyte_Elimination_1(y, alpha)
  y/alpha;
end

function Function_for_Lymphocyte_Elimination_Malignant_Cells(k, x)
  k*x;
end

function Function_for_Malignant_Cells_Death_Lymphocytes(x, y)
  x*y;
end

model Sotolongo_Costa2003___Behavior_of_tumors_under_nonstationary_therapy()
  // Sotolongo-Costa2003 - Behavior of tumors under nonstationary therapy
  // This model describes the interaction dynamics of a lymphocyte-tumor cell population.
  // isDescribedBy doi:10.1016/S0167-2789(03)00005-8
  // hasProperty mamo:MAMO_0000046
  // hasProperty GO:0002424
  // biomodels.db:MODEL1908090002 biomodels.db:BIOMD0000000785

  // Compartments:
  compartment compartment = 1;  // isVersionOf ncit:C94498

  // Species:
  species x_Malignant_Cells in compartment = 5.3;  // isVersionOf CL:0001063
  species y_Lymphocytes in compartment = 6.7;  // CL:0000542

  // Parameters:
  alpha = 2;
  k = 0.2;
  sigma = 0.25;

  // Reactions:
  Malignant_Cells_Growth: => x_Malignant_Cells; compartment*Function_for_Malignant_Cells_Growth(alpha, x_Malignant_Cells);  // isVersionOf ncit:C18081
  Malignant_Cells_Death_Lymphocytes: x_Malignant_Cells => y_Lymphocytes; compartment*Function_for_Malignant_Cells_Death_Lymphocytes(x_Malignant_Cells, y_Lymphocytes);  // isVersionOf GO:0001906
  Lymphocytes_Production: => y_Lymphocytes; compartment*Constant_flux__irreversible(sigma);  // isVersionOf ncit:C18081
  Lymphocyte_Death: y_Lymphocytes => ; compartment*Function_for_Lymphocyte_Elimination_1(y_Lymphocytes, alpha);  // isVersionOf GO:0008219
  Lymphocyte_Elimination_Malignant_Cells: y_Lymphocytes => ; compartment*Function_for_Lymphocyte_Elimination_Malignant_Cells(k, x_Malignant_Cells);  // modifiers: x_Malignant_Cells; isVersionOf go:cell death

  // Unit definitions:
  unit volume = 1e-3 litre;
  unit substance = 1e-3 mole;
end
