// SBML level 3 version 1
// dcterms:bibliographicCitation: urn:miriam:pubmed:22438084

function tgfb(a1, T, c2)
  a1*T^2/(c2 + T^2);
end

function induced(d0, T, V)
  d0*T*V;
end

function es(f, E, T, c3, B)
  f*E*T/(1 + c3*T*B);
end

function imm(d0, E, T, c1, B)
  d0*E*T/(1 + c1*B);
end

function er(d0, R, E)
  d0*R*E;
end

function tg(a0, T, c0)
  a0*T*(1 - c0*T);
end

model Wilson2012___tumor_vaccine_efficacy()
  // Wilson2012 - tumor vaccine efficacy
  // The paper describes a model of antitumor vaccine therapy. Created by COPASI 4.25 (Build 207) This model is described in the article: A Mathematical Model of the Enhancement of Tumor Vaccine Efficacy by Immunotherapy Shelby Wilson and Doron Levy Bull Math Biol. 2012 July ; 74(7) Abstract: TGF-β is an immunoregulatory protein that contributes to inadequate antitumor immune responses in cancer patients. Recent experimental data suggests that TGF-β inhibition alone, provides few clinical benefits, yet it can significantly amplify the anti-tumor immune response when combined with a tumor vaccine. We develop a mathematical model in order to gain insight into the cooperative interaction between anti-TGF-β and vaccine treatments. The mathematical model follows the dynamics of the tumor size, TGF-β concentration, activated cytotoxic effector cells, and regulatory T cells. Using numerical simulations and stability analysis, we study the following scenarios: a control case of no treatment, anti-TGF-β treatment, vaccine treatment, and combined anti-TGF-β vaccine treatments. We show that our model is capable of capturing the observed experimental results, and hence can be potentially used in designing future experiments involving this approach to immunotherapy. To cite BioModels Database, please use: BioModels Database: An enhanced, curated and annotated resource for published quantitative kinetic models . To the extent possible under law, all copyright and related or neighbouring rights to this encoded model have been dedicated to the public domain worldwide. Please refer to CC0 Public Domain Dedication for more information.
  // isDescribedBy pubmed:22438084
  // hasProperty mamo:MAMO_0000046
  // hasProperty GO:0002418
  // hasTaxon taxonomy:9606
  // biomodels.db:MODEL1908120004 biomodels.db:BIOMD0000000791
  // model units - substance: substance, time: time, volume: volume, area: area, length: length, extent: substance

  // Compartments:
  compartment tme = 1 volume;  // isVersionOf ncit:C94498

  // Species:
  // tumor size mm2
  species T in tme = 3;  // isVersionOf CL:0001064
  // TGFb
  species B in tme = 0;  // uniprot:P01137
  // effector cell
  species E in tme = 100;  // isVersionOf CL:0000911
  // regulatory T cell
  species R in tme = 1;  // isPropertyOf CL:0000815
  // vaccine stimulated T cell
  species V in tme = 0;  // isVersionOf CL:0000911

  // Parameters:
  // 0 or 5000
  // vaccine dose
  g0 = 0 unit_0;  // isPartOf ncit:C25488
  // tumor growth rate
  a0 = 0.1946 unit_1;
  // tumor carrying capacity inversed
  c0 has unit_0;
  // effector T-cell induced tumor death rate/removal rate of CTLs by Tregs
  d0 = 1e-5 unit_1;  // isPropertyOf ncit:C25636
  // TGF-β inhibitory parameter for CTL induction of tumor death
  c1 = 100 unit_0;  // isVersionOf ncit:C48922
  // maximal production rate of TGF-β
  a1 = 0.3 unit_1;  // isVersionOf ncit:C25636
  // steepness coefficient of TGF-β production
  c2 = 300 unit_0;  // isVersionOf ncit:C48922
  // degradation rate of TGF-β
  d = 0.0007 unit_1;  // isVersionOf ncit:C25636
  // tumor antigenicity rate
  f = 0.62 unit_1;  // isVersionOf ncit:C25636
  // combined tumor growth and TGF-β inhibitory parameter for activation of CTLs
  c3 = 300 unit_0;  // isVersionOf ncit:C48922
  // rate of effector T cells that become regulatory T cells
  r = 0.01 unit_1;  // isVersionOf ncit:C25636
  // natural death of CTLs, Vaccine cells, and Tregs
  d1 = 1e-5 unit_1;  // isVersionOf ncit:C25636
  // tumor carrying capacity
  c0inv = 369 unit_0;

  // Assignment rules:
  c0 := 1/c0inv;

  // Reactions:
  tumor_growth: => T; tme*tg(a0, T, c0);  // isVersionOf GO:0008283
  tumor_immune: T => ; tme*imm(d0, E, T, c1, B);  // modifiers: E, B; isVersionOf GO:0002419
  tumor_immune_induced: T => ; tme*induced(d0, T, V); tumor_immune_induced is "tumor immune-induced";  // modifiers: V; isVersionOf GO:0002419
  tgfb_secretion: => B; tme*tgfb(a1, T, c2);  // modifiers: T; isVersionOf GO:0050663
  tgfb_decay: B => ; tme*d*B;  // isVersionOf GO:0030163
  effector_stimulation: => E; tme*es(f, E, T, c3, B);  // modifiers: T, B; isVersionOf GO:0008283
  effector_death: E => ; tme*d1*E;  // isVersionOf GO:0008219
  effector_regulation: E => ; tme*er(d0, R, E);  // modifiers: R; isVersionOf GO:0008219
  effector_conversion: E => R; tme*r*E;
  Treg_death: R => ; tme*d1*R;  // isVersionOf GO:0008219
  vaccine_decay: V => ; tme*d1*V;  // isVersionOf GO:0008219

  // Events:
  vaccine_administration: at (time >= 3), t0=false, persistent=false: V = ;  // isVersionOf ncit:C923

  // Unit definitions:
  unit length = metre;
  unit area = metre^2;
  unit volume = 1e-3 litre;
  unit time = 86400 second;
  unit substance = 1e-3 mole;
  unit unit_0 = dimensionless^0; unit_0 is "1";
  unit unit_1 = 1 / (8640 second); unit_1 is "1/d";
end
