// SBML level 2 version 4
// dcterms:bibliographicCitation: urn:miriam:pubmed:30183728

function Function_for_Growth_of_S(gamma_S, p_1, p_2, S)
  gamma_S*(1 - p_1 - p_2)*S;
end

function Function_for_natural_death_of_S(delta_S, S)
  delta_S*S;
end

function Function_for_mutation_of_S(gamma_S, m_S, p_1, p2, S)
  gamma_S*m_S*(1 - p_1/2 - p2)*S;
end

function Function_for_asymmetric_differentiation_of_S(gamma_S, p_1, S)
  gamma_S*p_1*S;
end

function Function_for_symmetric_differentiation_of_S(p_2, gamma_S, S)
  p_2*gamma_S*S;
end

function Function_for_growth_of_SR(gamma_S, p_1, p_2, S_R)
  gamma_S*(1 - p_1 - p_2)*S_R;
end

function Function_for_natural_death_of_SR(delta_S, S_R)
  delta_S*S_R;
end

function Function_for_asymmetric_differentiation_of_SR(p_1, gamma_S, S_R)
  p_1*gamma_S*S_R;
end

function Function_for_symmetric_differentiation_of_SR(p_2, gamma_S, S_R)
  p_2*gamma_S*S_R;
end

function Function_for_Gompertzian_growth_of_C(gamma_C, m_C, K_tumor, C, r_1)
  gamma_C*(1 - m_C)*ln(0.5*K_tumor/(C + r_1));
end

function Function_for_natural_death_of_C(delta_C, C)
  delta_C*C;
end

function Function_of_mutation_of_C(m_C, gamma_C, C)
  m_C*gamma_C*C;
end

function Function_of_Gompertzian_growth_of_CR(gamma_C, C_R, K_tumor, r_2)
  gamma_C*C_R*ln(0.5*K_tumor/(C_R + r_2));
end

function Function_of_natural_death_of_CR(delta_CR, C_R)
  delta_CR*C_R;
end

function Function_of_activation_of_M1(gamma_M1, M_1, C, C_R, lambda_M1)
  gamma_M1*M_1*(C + C_R)/(M_1 + lambda_M1);
end

function Function_of_activation_of_M2(gamma_M2, M_2, C, C_R, lambda_M2)
  gamma_M2*M_2*(C + C_R)/(M_2 + lambda_M2);
end

function Function_of_activation_of_T_H1(lambda_TH1, T_H1, M_1, gamma_TH1)
  gamma_TH1*T_H1*M_1/(lambda_TH1 + T_H1);
end

function Function_of_activation_of_T_H2(lambda_TH2, T_H2, M_2, gamma_TH2)
  gamma_TH2*T_H2*M_2/(lambda_TH2 + T_H2);
end

function Function_of_natural_death_of_M1(delta_M1, M_1)
  delta_M1*M_1;
end

function Function_of_natural_death_of_M2(delta_M2, M_2)
  delta_M2*M_2;
end

function Function_of_natural_death_of_T_H1(delta_TH1, T_H1)
  delta_TH1*T_H1;
end

function Function_of_natural_death_of_T_H2(delta_TH2, T_H2)
  delta_TH2*T_H2;
end

function Function_of_Activation_of_T_C_Cancer(gamma_Tc, T_C, C, C_R, lambda_Tc1)
  gamma_Tc*T_C*(C + C_R)/(T_C + lambda_Tc1);
end
Function_of_Activation_of_T_C_Cancer is "Function of Activation of T_C;Cancer";

function Function_of_Acitvation_of_T_C__T_H1(gamma_Tc, T_C, T_H1, lambda_Tc4)
  gamma_Tc*T_C*T_H1/(T_C + lambda_Tc4);
end
Function_of_Acitvation_of_T_C__T_H1 is "Function of Acitvation of T_C; T_H1";

function Function_of_Elimination_of_T_C_by_T_reg(myu_TcTreg, T_C, T_reg, lambda_Tc3)
  myu_TcTreg*T_C*T_reg/(lambda_Tc3 + T_reg);
end

function Function_of_inhibition_of_T_C(myu_TcS, T_C, S, S_R, lambda_Tc2)
  myu_TcS*T_C*(S + S_R)/(T_C + lambda_Tc2);
end

function Function_of_natural_death_of_T_C(delta_Tc, T_C)
  delta_Tc*T_C;
end

function Function_of_Activation_of_T_reg(gamma_Treg, T_reg, M_2, lambda_Treg2)
  gamma_Treg*T_reg*M_2/(T_reg + lambda_Treg2);
end

function Function_of_natural_death_of_T_reg(delta_Treg, T_reg)
  delta_Treg*T_reg;
end

function Function_of_Production_of_IL2(beta_ThiCK3, T_H1)
  beta_ThiCK3*T_H1;
end

function Function_of_Degradation_of_IL2(delta_Ck3, IL2)
  delta_Ck3*IL2;
end

function Function_of_Positive_Feedback_from_IL2_to_TH1(myu_Th1Ck3, IL2, T_H1, k9)
  myu_Th1Ck3*IL2*T_H1/(IL2 + k9);
end

function Function_of_Production_of_IFN_gamma__T_C(beta_Tc, T_C)
  beta_Tc*T_C;
end
Function_of_Production_of_IFN_gamma__T_C is "Function of Production of IFN_gamma; T_C";

function Function_of_Production_of_IFN_gamma__T_H1(beta_Th1CK2, T_H1)
  beta_Th1CK2*T_H1;
end
Function_of_Production_of_IFN_gamma__T_H1 is "Function of Production of IFN_gamma; T_H1";

function Function_of_Degradation_of_IFN_gamma(delta_Ck2, IFN_gamma)
  delta_Ck2*IFN_gamma;
end

function Function_of_Activation_of_M1__IFN_gamma(myu_M1Ck2, M_1, IFN_gamma, k7)
  myu_M1Ck2*M_1*IFN_gamma/(IFN_gamma + k7);
end
Function_of_Activation_of_M1__IFN_gamma is "Function of Activation of M1; IFN_gamma";

function Function_of_Negative_feedback_on_C__IFN_gamma(myu_C2, C, IFN_gamma, k4)
  myu_C2*C*IFN_gamma/(IFN_gamma + k4);
end
Function_of_Negative_feedback_on_C__IFN_gamma is "Function of Negative feedback on C; IFN_gamma";

function Function_of_Negative_feedback_on_CR__IFN_gamma(myu_C2, C_R, IFN_gamma, k6)
  myu_C2*C_R*IFN_gamma/(IFN_gamma + k6);
end
Function_of_Negative_feedback_on_CR__IFN_gamma is "Function of Negative feedback on CR; IFN_gamma";

function Function_of_Negative_feedback_on_S__IFN_gamma(myu_S, S, IFN_gamma, k1)
  myu_S*S*IFN_gamma/(IFN_gamma + k1);
end
Function_of_Negative_feedback_on_S__IFN_gamma is "Function of Negative feedback on S; IFN_gamma";

function Function_of_Negative_feedback_on_SR__IFN_gamma(myu_SR, S_R, IFN_gamma, k2)
  myu_SR*S_R*IFN_gamma/(IFN_gamma + k2);
end
Function_of_Negative_feedback_on_SR__IFN_gamma is "Function of Negative feedback on SR; IFN_gamma";

function Function_of_Production_of_IL10__M2(beta_M2, M_2)
  beta_M2*M_2;
end
Function_of_Production_of_IL10__M2 is "Function of Production of IL10; M2";

function Function_of_Production_of_IL10__Treg(beta_Treg, T_reg)
  beta_Treg*T_reg;
end
Function_of_Production_of_IL10__Treg is "Function of Production of IL10; Treg";

function Function_of_Production_of_IL10__T_H2(beta_Th2, T_H2)
  beta_Th2*T_H2;
end
Function_of_Production_of_IL10__T_H2 is "Function of Production of IL10; T_H2";

function Function_of_Degradation_of_IL10(delta_Ck1, IL10)
  delta_Ck1*IL10;
end

function Function_of_Proliferation_on_C__IL10(myu_C1, C, IL10, k3)
  myu_C1*C*IL10/(IL10 + k3);
end
Function_of_Proliferation_on_C__IL10 is "Function of Proliferation on C; IL10";

function Function_of_Proliferation_CR__IL10(myu_C1, C_R, IL10, k5)
  myu_C1*C_R*IL10/(IL10 + k5);
end
Function_of_Proliferation_CR__IL10 is "Function of Proliferation CR; IL10";

function Function_of_Positive_feedback_on_M2__IL10(myu_M2Ck1, M2, IL10, k10)
  myu_M2Ck1*M2*IL10/(IL10 + k10);
end
Function_of_Positive_feedback_on_M2__IL10 is "Function of Positive feedback on M2; IL10";

function Function_of_Positive_feedback_on_Treg__IL10(IL10, myu_TregCk1, T_reg, k11)
  myu_TregCk1*IL10*T_reg/(T_reg + k11);
end
Function_of_Positive_feedback_on_Treg__IL10 is "Function of Positive feedback on Treg; IL10";

function Function_for_inhibition_on_T_H1__IL10(myu_Th1Ck1, IL10, T_H1, k8)
  myu_Th1Ck1*IL10*T_H1/(IL10 + k8);
end
Function_for_inhibition_on_T_H1__IL10 is "Function for inhibition on T_H1; IL10";

function Function_of_Elimination_of_Cancer_Stem_Cells_S(tck, S, T_C, ktc1)
  tck*S*T_C/(ktc1 + T_C);
end

function Function_of_Elimination_of_Cancer_Cells_C(tck, C, T_C, ktc3)
  tck*C*T_C/(ktc3 + T_C);
end

function Function_of_Elimination_of_Resistant_Cancer_Cells_CR(tck, C_R, T_C, ktc4)
  tck*C_R*T_C/(ktc4 + T_C);
end

function Function_of_Elimination_of_Resistant_Stem_Cells_SR(tck, S_R, T_C, ktc2)
  tck*S_R*T_C/(ktc2 + T_C);
end

model New_Model()
  // Ganguli2018-immuno regulatory mechanisms in tumor microenvironment
  // This model describes the concept of Cancer Stem Cells(CSC) differentiation and tumor-immune interaction into a generic model that has been validated with known experimental data. Created by COPASI 4.24(Build197) Abstract: The tumor microenvironment comprising of the immune cells and cytokines acts as the 'soil' that nourishes a developing tumor. Lack of a comprehensive study of the interactions of this tumor microenvironment with the heterogeneous sub-population of tumor cells that arise from the differentiation of Cancer Stem Cells (CSC), i.e. the 'seed', has limited our understanding of the development of drug resistance and treatment failures in Cancer. Based on this seed and soil hypothesis, for the very first time, we have captured the concept of CSC differentiation and tumor-immune interaction into a generic model that has been validated with known experimental data. Using this model we report that as the CSC differentiation shifts from symmetric to asymmetric pattern, resistant cancer cells start accumulating in the tumor that makes it refractory to therapeutic interventions. Model analyses unveiled the presence of feedback loops that establish the dual role of M2 macrophages in regulating tumor proliferation. The study further revealed oscillations in the tumor sub-populations in the presence of TH1 derived IFN-γ that eliminates CSC; and the role of IL10 feedback in the regulation of TH1/TH2 ratio. These analyses expose important observations that are indicative of Cancer prognosis. Further, the model has been used for testing known treatment protocols to explore the reasons of failure of conventional treatment strategies and propose an improvised protocol that shows promising results in suppressing the proliferation of all the cellular sub-populations of the tumor and restoring a healthy TH1/TH2 ratio that assures better Cancer remission.
  // biomodels.db:MODEL1909110001 biomodels.db:BIOMD0000000810
  // hasProperty GO:0002837
  // hasProperty DOID:162
  // hasProperty ncit:C15262
  // hasProperty mamo:MAMO_0000046
  // hasProperty efo:0000311

  // Compartments:
  compartment compartment = 1;  // isVersionOf ncit:C13413

  // Species:
  species Cancer_Stem_Cells_S in compartment = 1;  // isVersionOf ncit:C68706
  species Cancer_Cells_C in compartment = 0;  // isVersionOf ncit:C12917
  species Resistant_Stem_Cells_S_R in compartment = 0;  // isVersionOf ncit:C102626; isVersionOf ncit:C68706
  species Resistant_Cancer_Cells_C_R in compartment = 0;  // isVersionOf ncit:C12917; isVersionOf ncit:C102626
  species M1_Tumor_Associated_Macrophages in compartment = 85000; M1_Tumor_Associated_Macrophages is "M1-Tumor Associated Macrophages";  // isVersionOf ncit:C116387; isVersionOf ncit:C156004
  species M2_Tumor_Associated_Macrophages in compartment = 15000; M2_Tumor_Associated_Macrophages is "M2-Tumor Associated Macrophages";  // isVersionOf ncit:C123783; isVersionOf ncit:C116387
  species Type_I_T_helper_Cell_T_H1 in compartment = 71000; Type_I_T_helper_Cell_T_H1 is "Type I T-helper Cell T_H1";  // isVersionOf FMA:84382; isPropertyOf GO:0045063
  species Type_II_T_helper_cells_T_H2 in compartment = 12000; Type_II_T_helper_cells_T_H2 is "Type II T-helper cells T_H2";  // isPartOf GO:0045064; isVersionOf FMA:84385
  species Cytotoxic_T_Cells_T_C in compartment = 56000; Cytotoxic_T_Cells_T_C is "Cytotoxic T-Cells T_C";  // isVersionOf ncit:C104174
  species Regulatory_T_Cells_T_reg in compartment = 8000; Regulatory_T_Cells_T_reg is "Regulatory T-Cells T_reg";  // isVersionOf ncit:C104174
  species Interferon_gamma in compartment = 0.12;  // isVersionOf ncit:C20496; isVersionOf ncit:C20464
  species Cytokine_IL10 in compartment = 0.0085;  // isVersionOf ncit:C20464; isVersionOf ncit:C20512
  species Cytokine_IL2 in compartment = 0.0094;  // isVersionOf ncit:C20464; isVersionOf ncit:C20507
  species $_100000_SR in compartment; _100000_SR is "100000*SR";

  // Parameters:
  gamma_C = 0.1282 unit_0;  // isVersionOf efo:0004804
  gamma_CR = 0.1282 unit_0;  // isVersionOf efo:0004804
  gamma_M1 = 0.7 unit_0;  // isVersionOf efo:0004804
  gamma_M2 = 0.01 unit_0;  // isVersionOf efo:0004804
  gamma_S = 0.15 unit_0;  // isVersionOf efo:0004804
  gamma_Th1 = 2 unit_0;  // isPropertyOf efo:0004804
  gamma_Th2 = 2 unit_1;  // isVersionOf efo:0004804
  gamma_Tc = 1 unit_0;  // isVersionOf efo:0004804
  gamma_Treg = 0.3 unit_0;  // isVersionOf efo:0004804
  delta_C = 0.8055 unit_0;
  delta_CR = 5.37e-5 unit_0;
  delta_M1 = 1.02 unit_0;  // isVersionOf ncit:C53346
  delta_M2 = 0.05 unit_0;  // isVersionOf ncit:C53346
  delta_S = 2e-7 unit_0;  // isVersionOf ncit:C53346
  delta_Tc = 5.2939 unit_0;  // isVersionOf ncit:C53346
  delta_Th1 = 2 unit_0;  // isVersionOf ncit:C53346
  delta_Th2 = 2 unit_0;  // isVersionOf ncit:C53346
  delta_Treg = 1 unit_0;  // isVersionOf ncit:C53346
  m_C = 0.01;
  m_S = 4e-7;
  p_1 = 0.2;
  p_2 = 0.05;
  r_1 = 0.0001;
  r_2 = 1e-5;
  K_tumor = 2e10;
  lambda_M1 = 100000000 unit_2;
  lambda_M2 = 1000000 unit_2;
  lambda_Th1 = 100000 unit_2;
  lambda_Th2 = 100000 unit_2;
  lambda_Tc1 = 100000 unit_2;
  lambda_Tc2 = 500000 unit_2;
  lambda_Tc3 = 5e10 unit_2;
  lambda_Tc4 = 100000 unit_2;
  lambda_Treg2 = 10000000 unit_2;
  myu_TcS = 1e-10 unit_0;
  myu_TcTreg = 1.5e-5 unit_0;
  myu_Th1Ck3 = 0.1245 unit_0;
  k9 = 0.001 unit_2;
  beta_Th1CK3 = 1e-8 unit_0;
  delta_Ck3 = 8.664339 unit_0;
  myu_S = 0.17 unit_0;
  myu_SR = 0.18 unit_0;
  myu_C2 = 0.9 unit_0;
  myu_M1Ck2 = 0.01 unit_0;
  beta_Th1CK2 = 1e-7 unit_0;
  beta_Tc = 1e-8 unit_0;
  delta_Ck2 = 6.1212 unit_0;
  k1 = 10 unit_2;
  k2 = 10 unit_2;
  k3 = 2.0531 unit_2;
  k4 = 3.02 unit_2;
  k5 = 6.7979 unit_2;
  k6 = 6.9937 unit_2;
  k7 = 0.2 unit_2;
  k8 = 0.01 unit_2;
  k10 = 0.01 unit_2;
  k11 = 0.001 unit_2;
  beta_M2 = 1e-15 unit_0;
  beta_Treg = 1e-10 unit_0;
  beta_Th2 = 1e-9 unit_0;
  delta_Ck1 = 19.757 unit_0;
  myu_TregCk1 = 1e-7 unit_0;
  myu_Th1Ck1 = 1e-9 unit_0;
  myu_M2Ck1 = 0.01 unit_0;
  myu_C1 = 0.75 unit_0;
  ktc1 = 1000000000 unit_2;
  ktc2 = 100000000 unit_2;
  ktc3 = 1000000000 unit_2;
  ktc4 = 1000000000 unit_2;
  tck = 0.1 unit_0;

  // Assignment rules:
  _100000_SR := 100000*Resistant_Stem_Cells_S_R;

  // Reactions:
  growth_of_Cancer_Stem_Cells_S: => Cancer_Stem_Cells_S; compartment*Function_for_Growth_of_S(gamma_S, p_1, p_2, Cancer_Stem_Cells_S);  // isVersionOf GO:0040007
  natural_death_of_Cancer_Stem_Cells_S: Cancer_Stem_Cells_S => ; compartment*Function_for_natural_death_of_S(delta_S, Cancer_Stem_Cells_S);
  mutation_of_Cancer_Stem_Cells_S: Cancer_Stem_Cells_S => Resistant_Stem_Cells_S_R; compartment*Function_for_mutation_of_S(gamma_S, m_S, p_1, p_2, Cancer_Stem_Cells_S);
  asymmetric_differentiation_of_Cancer_Stem_Cells_S: Cancer_Stem_Cells_S => Cancer_Stem_Cells_S + Cancer_Cells_C; compartment*Function_for_asymmetric_differentiation_of_S(gamma_S, p_1, Cancer_Stem_Cells_S);  // isVersionOf GO:0098722
  symmetric_differentiation_of_Cancer_Stem_Cells_S: Cancer_Stem_Cells_S => Cancer_Cells_C; compartment*Function_for_symmetric_differentiation_of_S(p_2, gamma_S, Cancer_Stem_Cells_S);  // isVersionOf GO:0098724
  growth_of_Resistant_Stem_Cells_SR: => Resistant_Stem_Cells_S_R; compartment*Function_for_growth_of_SR(gamma_S, p_1, p_2, Resistant_Stem_Cells_S_R);  // isVersionOf GO:0040007
  natural_death_of_Resistant_Stem_Cells_SR: Resistant_Stem_Cells_S_R => ; compartment*Function_for_natural_death_of_SR(delta_S, Resistant_Stem_Cells_S_R);
  asymmetric_differentiation_of_Resistant_Stem_Cells_SR: Resistant_Stem_Cells_S_R => Resistant_Stem_Cells_S_R + Resistant_Cancer_Cells_C_R; compartment*Function_for_asymmetric_differentiation_of_SR(p_1, gamma_S, Resistant_Stem_Cells_S_R);  // isVersionOf GO:0098722
  symmetric_differentiation_of_Resistant_Stem_Cells_SR: Resistant_Stem_Cells_S_R => Resistant_Cancer_Cells_C_R; compartment*Function_for_symmetric_differentiation_of_SR(p_2, gamma_S, Resistant_Stem_Cells_S_R);  // isVersionOf GO:0098724
  Gompertzian_growth_of_Cancer_Cells_C: => Cancer_Cells_C; compartment*Function_for_Gompertzian_growth_of_C(gamma_C, m_C, K_tumor, Cancer_Cells_C, r_1);  // isVersionOf GO:0040007
  natural_death_of_Cancer_Cells_C: Cancer_Cells_C => ; compartment*Function_for_natural_death_of_C(delta_C, Cancer_Cells_C);
  mutation_of_Cancer_Cells_C: Cancer_Cells_C => Resistant_Cancer_Cells_C_R; compartment*Function_of_mutation_of_C(m_C, gamma_C, Cancer_Cells_C);
  Gompertzian_growth_of_Resistant_Cancer_Cells_CR: => Resistant_Cancer_Cells_C_R; compartment*Function_of_Gompertzian_growth_of_CR(gamma_C, Resistant_Cancer_Cells_C_R, K_tumor, r_2);  // isVersionOf GO:0040007
  natural_death_of_Resistant_Cancer_Cells_CR: Resistant_Cancer_Cells_C_R => ; compartment*Function_of_natural_death_of_CR(delta_CR, Resistant_Cancer_Cells_C_R);
  Activation_of_M1: => M1_Tumor_Associated_Macrophages; compartment*Function_of_activation_of_M1(gamma_M1, M1_Tumor_Associated_Macrophages, Cancer_Cells_C, Resistant_Cancer_Cells_C_R, lambda_M1);  // modifiers: Cancer_Cells_C, Resistant_Cancer_Cells_C_R; isVersionOf GO:0042116
  Activation_of_M2: => M2_Tumor_Associated_Macrophages; compartment*Function_of_activation_of_M2(gamma_M2, M2_Tumor_Associated_Macrophages, Cancer_Cells_C, Resistant_Cancer_Cells_C_R, lambda_M2);  // modifiers: Cancer_Cells_C, Resistant_Cancer_Cells_C_R; isVersionOf GO:0042116
  natural_death_of_M1: M1_Tumor_Associated_Macrophages => ; compartment*Function_of_natural_death_of_M1(delta_M1, M1_Tumor_Associated_Macrophages);
  natural_death_of_M2: M2_Tumor_Associated_Macrophages => ; compartment*Function_of_natural_death_of_M2(delta_M2, M2_Tumor_Associated_Macrophages);
  Activation_of_T_H1: => Type_I_T_helper_Cell_T_H1; compartment*Function_of_activation_of_T_H1(lambda_Th1, Type_I_T_helper_Cell_T_H1, M1_Tumor_Associated_Macrophages, gamma_Th1);  // modifiers: M1_Tumor_Associated_Macrophages; isVersionOf GO:0042110; isVersionOf GO:0035711; isVersionOf GO:0045063
  Activation_of_T_H2: => Type_II_T_helper_cells_T_H2; compartment*Function_of_activation_of_T_H2(lambda_Th2, Type_II_T_helper_cells_T_H2, M2_Tumor_Associated_Macrophages, gamma_Th2);  // modifiers: M2_Tumor_Associated_Macrophages; isVersionOf GO:0045064; isVersionOf GO:0035712; isVersionOf GO:2000569
  natural_death_of_T_H1: Type_I_T_helper_Cell_T_H1 => ; compartment*Function_of_natural_death_of_T_H1(delta_Th1, Type_I_T_helper_Cell_T_H1);
  natural_death_of_T_H2: Type_II_T_helper_cells_T_H2 => ; compartment*Function_of_natural_death_of_T_H2(delta_Th2, Type_II_T_helper_cells_T_H2);
  Activation_of_T_C__Cancer: => Cytotoxic_T_Cells_T_C; compartment*Function_of_Activation_of_T_C_Cancer(gamma_Tc, Cytotoxic_T_Cells_T_C, Cancer_Cells_C, Resistant_Cancer_Cells_C_R, lambda_Tc1); Activation_of_T_C__Cancer is "Activation of T_C; Cancer";  // modifiers: Cancer_Cells_C, Resistant_Cancer_Cells_C_R; isVersionOf GO:0042110
  Activation_of_T_C__T_H1: => Cytotoxic_T_Cells_T_C; compartment*Function_of_Acitvation_of_T_C__T_H1(gamma_Tc, Cytotoxic_T_Cells_T_C, Type_I_T_helper_Cell_T_H1, lambda_Tc4); Activation_of_T_C__T_H1 is "Activation of T_C; T_H1";  // modifiers: Type_I_T_helper_Cell_T_H1; isVersionOf GO:0042110
  Inhibition_of_T_C: Cytotoxic_T_Cells_T_C => ; compartment*Function_of_inhibition_of_T_C(myu_TcS, Cytotoxic_T_Cells_T_C, Cancer_Stem_Cells_S, Resistant_Stem_Cells_S_R, lambda_Tc2);  // modifiers: Cancer_Stem_Cells_S, Resistant_Stem_Cells_S_R
  natural_death_of_T_C: Cytotoxic_T_Cells_T_C => ; compartment*Function_of_natural_death_of_T_C(delta_Tc, Cytotoxic_T_Cells_T_C);
  Elimination_of_T_C_by_T_reg: Cytotoxic_T_Cells_T_C => ; compartment*Function_of_Elimination_of_T_C_by_T_reg(myu_TcTreg, Cytotoxic_T_Cells_T_C, Regulatory_T_Cells_T_reg, lambda_Tc3);  // modifiers: Regulatory_T_Cells_T_reg
  Activation_of_T_reg: => Regulatory_T_Cells_T_reg; compartment*Function_of_Activation_of_T_reg(gamma_Treg, Regulatory_T_Cells_T_reg, M2_Tumor_Associated_Macrophages, lambda_Treg2);  // modifiers: M2_Tumor_Associated_Macrophages; isVersionOf GO:0042110
  natural_death_of_T_reg: Regulatory_T_Cells_T_reg => ; compartment*Function_of_natural_death_of_T_reg(delta_Treg, Regulatory_T_Cells_T_reg);
  Production_of_IL2__T_H1: => Cytokine_IL2; compartment*Function_of_Production_of_IL2(beta_Th1CK3, Type_I_T_helper_Cell_T_H1); Production_of_IL2__T_H1 is "Production of IL2; T_H1";  // modifiers: Type_I_T_helper_Cell_T_H1; isVersionOf GO:0032623; isVersionOf GO:0032663
  Degradation_of_IL2: Cytokine_IL2 => ; compartment*Function_of_Degradation_of_IL2(delta_Ck3, Cytokine_IL2);
  Positive_feedback_from_IL2_to_T_H1: => Type_I_T_helper_Cell_T_H1; compartment*Function_of_Positive_Feedback_from_IL2_to_TH1(myu_Th1Ck3, Cytokine_IL2, Type_I_T_helper_Cell_T_H1, k9);  // modifiers: Cytokine_IL2; isVersionOf GO:0052131
  Production_of_IFN_gamma__T_H1: => Interferon_gamma; compartment*Function_of_Production_of_IFN_gamma__T_H1(beta_Th1CK2, Type_I_T_helper_Cell_T_H1); Production_of_IFN_gamma__T_H1 is "Production of IFN_gamma; T_H1";  // modifiers: Type_I_T_helper_Cell_T_H1; isVersionOf GO:0032649; isVersionOf GO:0032609
  Production_of_IFN_gamma__T_C: => Interferon_gamma; compartment*Function_of_Production_of_IFN_gamma__T_C(beta_Tc, Cytotoxic_T_Cells_T_C); Production_of_IFN_gamma__T_C is "Production of IFN_gamma; T_C";  // modifiers: Cytotoxic_T_Cells_T_C; isVersionOf GO:0032649; isVersionOf GO:0032609
  Degradation_of_IFN_gamma: Interferon_gamma => ; compartment*Function_of_Degradation_of_IFN_gamma(delta_Ck2, Interferon_gamma);
  Activation_of_M1__IFN_gamma: => M1_Tumor_Associated_Macrophages; compartment*Function_of_Activation_of_M1__IFN_gamma(myu_M1Ck2, M1_Tumor_Associated_Macrophages, Interferon_gamma, k7); Activation_of_M1__IFN_gamma is "Activation of M1; IFN_gamma";  // modifiers: Interferon_gamma; isVersionOf GO:0042116; isVersionOf GO:0034341
  Negative_feedback_on_S__IFN_gamma: Cancer_Stem_Cells_S => ; compartment*Function_of_Negative_feedback_on_S__IFN_gamma(myu_S, Cancer_Stem_Cells_S, Interferon_gamma, k1); Negative_feedback_on_S__IFN_gamma is "Negative feedback on S; IFN_gamma";  // modifiers: Interferon_gamma; isVersionOf GO:0050919; isVersionOf GO:0034341
  Negative_feedback_on_SR__IFN_gamma: Resistant_Stem_Cells_S_R => ; compartment*Function_of_Negative_feedback_on_SR__IFN_gamma(myu_SR, Resistant_Stem_Cells_S_R, Interferon_gamma, k2); Negative_feedback_on_SR__IFN_gamma is "Negative feedback on SR; IFN_gamma";  // modifiers: Interferon_gamma; isVersionOf GO:0050919; isVersionOf GO:0034341
  Negative_feedback_on_C__IFN_gamma: Cancer_Cells_C => ; compartment*Function_of_Negative_feedback_on_C__IFN_gamma(myu_C2, Cancer_Cells_C, Interferon_gamma, k4); Negative_feedback_on_C__IFN_gamma is "Negative feedback on C; IFN_gamma";  // modifiers: Interferon_gamma; isVersionOf GO:0034341; isVersionOf GO:0050919
  Negative_feedback_on_CR__IFN_gamma: Resistant_Cancer_Cells_C_R => ; compartment*Function_of_Negative_feedback_on_CR__IFN_gamma(myu_C2, Resistant_Cancer_Cells_C_R, Interferon_gamma, k6); Negative_feedback_on_CR__IFN_gamma is "Negative feedback on CR; IFN_gamma";  // modifiers: Interferon_gamma; isVersionOf GO:0050919; isVersionOf GO:0034341
  Production_of_IL10__M2: => Cytokine_IL10; compartment*Function_of_Production_of_IL10__M2(beta_M2, M2_Tumor_Associated_Macrophages); Production_of_IL10__M2 is "Production of IL10; M2";  // modifiers: M2_Tumor_Associated_Macrophages; isVersionOf GO:0035745; isVersionOf GO:0032613
  Production_of_IL10__Treg: => Cytokine_IL10; compartment*Function_of_Production_of_IL10__Treg(beta_Treg, Regulatory_T_Cells_T_reg); Production_of_IL10__Treg is "Production of IL10; Treg";  // modifiers: Regulatory_T_Cells_T_reg; isVersionOf GO:0032613
  Production_of_IL10__T_H2: => Cytokine_IL10; compartment*Function_of_Production_of_IL10__T_H2(beta_Th2, Type_II_T_helper_cells_T_H2); Production_of_IL10__T_H2 is "Production of IL10; T_H2";  // modifiers: Type_II_T_helper_cells_T_H2; isVersionOf GO:0032613
  Degradation_of_IL10: Cytokine_IL10 => ; compartment*Function_of_Degradation_of_IL10(delta_Ck1, Cytokine_IL10);
  Positive_feedback_on_Treg__IL10: => Regulatory_T_Cells_T_reg; compartment*Function_of_Positive_feedback_on_Treg__IL10(Cytokine_IL10, myu_TregCk1, Regulatory_T_Cells_T_reg, k11); Positive_feedback_on_Treg__IL10 is "Positive feedback on Treg; IL10";  // modifiers: Cytokine_IL10; isVersionOf GO:0052131
  Inhibition_on_T_H1__IL10: Type_I_T_helper_Cell_T_H1 => ; compartment*Function_for_inhibition_on_T_H1__IL10(myu_Th1Ck1, Cytokine_IL10, Type_I_T_helper_Cell_T_H1, k8); Inhibition_on_T_H1__IL10 is "Inhibition on T_H1; IL10";  // modifiers: Cytokine_IL10
  Positive_feedback_on_M2__IL10: => M2_Tumor_Associated_Macrophages; compartment*Function_of_Positive_feedback_on_M2__IL10(myu_M2Ck1, M2_Tumor_Associated_Macrophages, Cytokine_IL10, k10); Positive_feedback_on_M2__IL10 is "Positive feedback on M2; IL10";  // modifiers: Cytokine_IL10; isVersionOf GO:0052131
  Proliferation_on_Cancer_Cells_C__IL10: => Cancer_Cells_C; compartment*Function_of_Proliferation_on_C__IL10(myu_C1, Cancer_Cells_C, Cytokine_IL10, k3); Proliferation_on_Cancer_Cells_C__IL10 is "Proliferation on Cancer Cells C; IL10";  // modifiers: Cytokine_IL10; isVersionOf GO:0040007
  Proliferation_on_Resistant_Cancer_Cells_CR__IL10: => Resistant_Cancer_Cells_C_R; compartment*Function_of_Proliferation_CR__IL10(myu_C1, Resistant_Cancer_Cells_C_R, Cytokine_IL10, k5); Proliferation_on_Resistant_Cancer_Cells_CR__IL10 is "Proliferation on Resistant Cancer Cells CR; IL10";  // modifiers: Cytokine_IL10; isVersionOf GO:0040007
  Elimination_of_Cancer_Stem_Cells_S: Cancer_Stem_Cells_S => ; compartment*Function_of_Elimination_of_Cancer_Stem_Cells_S(tck, Cancer_Stem_Cells_S, Cytotoxic_T_Cells_T_C, ktc1);  // modifiers: Cytotoxic_T_Cells_T_C
  Elimination_of_Resistant_Stem_Cells_SR: Resistant_Stem_Cells_S_R => ; compartment*Function_of_Elimination_of_Resistant_Stem_Cells_SR(tck, Resistant_Stem_Cells_S_R, Cytotoxic_T_Cells_T_C, ktc2);  // modifiers: Cytotoxic_T_Cells_T_C
  Elimination_of_Cancer_Cells_C: Cancer_Cells_C => ; compartment*Function_of_Elimination_of_Cancer_Cells_C(tck, Cancer_Cells_C, Cytotoxic_T_Cells_T_C, ktc3);  // modifiers: Cytotoxic_T_Cells_T_C
  Elimination_of_Resistant_Cancer_Cells_CR: Resistant_Cancer_Cells_C_R => ; compartment*Function_of_Elimination_of_Resistant_Cancer_Cells_CR(tck, Resistant_Cancer_Cells_C_R, Cytotoxic_T_Cells_T_C, ktc4);  // modifiers: Cytotoxic_T_Cells_T_C

  // Unit definitions:
  unit volume = 1e-3 litre;
  unit time = 86400 second;
  unit substance = 1e-3 mole;
  unit unit_0 = 1 / (8640 second); unit_0 is "1/d";
  unit unit_1 = 1 / (4320 second); unit_1 is "2/d";
  unit unit_2 = 1 / (1e-3 litre); unit_2 is "1/ml";
end
