// SBML level 2 version 4
// dcterms:bibliographicCitation: urn:miriam:doi:10.1002/mma.3370

function Constant_flux__irreversible(v)
  v;
end
Constant_flux__irreversible is "Constant flux (irreversible)";

function Function_for_Tumor_Growth(r, x, K)
  r*x*(1 - x/K);
end

function Function_for_Tumor_Killing(delta, x, z, m)
  delta*x*z/(m + x);
end

function Function_for_Cytokine_Production(alpha, x, y, b)
  alpha*x*y/(b + x);
end

function Function_for_CD4_Production(beta, x, y, k)
  beta*x*y/(k + x);
end

model Anderson2015___Qualitative_behavior_of_systems_of_tumor_CD4__cytokine_interactions_with_treatments()
  // Anderson2015 - Qualitative behavior of systems of tumor-CD4+-cytokine interactions with treatments
  // This is a mathematical model describing tumor-CD4+-cytokine interactions, with specific emphasis on the role that CD4+ T lymphocytes play in tumor regression.
  // isDescribedBy doi:10.1002/mma.3370
  // hasProperty ncit:C15411
  // hasProperty mamo:MAMO_0000046
  // hasProperty taxonomy:9606
  // biomodels.db:MODEL1909170001 biomodels.db:BIOMD0000000813

  // Compartments:
  compartment compartment = 1;  // isVersionOf ncit:C94498

  // Species:
  species x_Tumor_Cells in compartment = 0.5;  // CL:0001063
  species y_CD4_T_Cells in compartment = 0.01;  // CL:0000492
  species z_Cytokine in compartment = 0;  // ncit:C20464

  // Parameters:
  r = 0.03;
  K = 1000;
  delta = 0.1;
  m = 1;
  beta = 0.02;
  k = 10;
  a = 0.02;
  alpha = 0.1;
  b = 0.1;
  mu = 47;
  I_1 = 10;
  I_2 = 0;

  // Reactions:
  Tumor_Growth: => x_Tumor_Cells; compartment*Function_for_Tumor_Growth(r, x_Tumor_Cells, K);  // isVersionOf ncit:C36294
  Tumor_Killing: x_Tumor_Cells => ; compartment*Function_for_Tumor_Killing(delta, x_Tumor_Cells, z_Cytokine, m);  // modifiers: z_Cytokine; isVersionOf GO:0008219; isVersionOf GO:0002418
  CD4_Production: => y_CD4_T_Cells; compartment*Function_for_CD4_Production(beta, x_Tumor_Cells, y_CD4_T_Cells, k);  // modifiers: x_Tumor_Cells; isVersionOf ncit:C18081
  CD4_Death: y_CD4_T_Cells => ; compartment*a*y_CD4_T_Cells;  // GO:0008219
  CD4_Treatment: => y_CD4_T_Cells; compartment*Constant_flux__irreversible(I_1);  // isVersionOf ncit:C15351
  Cytokine_Production: => z_Cytokine; compartment*Function_for_Cytokine_Production(alpha, x_Tumor_Cells, y_CD4_T_Cells, b);  // modifiers: x_Tumor_Cells, y_CD4_T_Cells; isVersionOf GO:0002374
  Cytokine_Loss: z_Cytokine => ; compartment*mu*z_Cytokine;
  Cytokine_Treatment: => z_Cytokine; compartment*Constant_flux__irreversible(I_2);  // isVersionOf ncit:C15411

  // Unit definitions:
  unit volume = 1e-3 litre;
  unit time = 86400 second;
  unit substance = item;
end
