// SBML level 2 version 4
// dcterms:bibliographicCitation: A rule-based model of insulin signalling pathway urn:miriam:pubmed:27245161

function Function_for_R69(S52, cell, f40)
  f40*S52/cell;
end

function Function_for_R10(S9, cell, k10)
  k10*S9/cell;
end

function Function_for_R71(S56, cell, k_2)
  k_2*S56/cell;
end

function Function_for_R46(mTORC2_S2481_p, cell, k_19)
  k_19*mTORC2_S2481_p/cell;
end

function Function_for_R60(S50, cell, k_8)
  k_8*S50/cell;
end

function Function_for_R78(S59, cell, f40)
  f40*S59/cell;
end

function Function_for_R34(IRS1_S636_u_Y_p_Y896_YXXM, cell, f_7)
  f_7*IRS1_S636_u_Y_p_Y896_YXXM/cell;
end

function Function_for_R11(S8, _rateLaw2, cell)
  _rateLaw2*S8/cell;
end

function Function_for_R22(TSC1_TSC2_S1387_u_T1462_p, cell, f21)
  f21*TSC1_TSC2_S1387_u_T1462_p/cell;
end

function Function_for_R36(IRS1_S636_u_Y_p_Y896_YXXM, PI3K_SH2, cell, k8)
  k8*PI3K_SH2*IRS1_S636_u_Y_p_Y896_YXXM/cell;
end

function Function_for_R65(S52, cell, k_26)
  k_26*S52/cell;
end

function Function_for_R75(RasGAP_bs, S56, cell, k22)
  k22*RasGAP_bs*S56/cell;
end

function Function_for_R52(Raf_state_a, cell, f31)
  f31*Raf_state_a/cell;
end

function Function_for_R8(PI45, cell, f9)
  f9*PI45/cell;
end

function Function_for_R13(PKC_T410_u, cell, f12)
  f12*PKC_T410_u/cell;
end

function Function_for_R53(Mek_S218_S222_p, cell, f34)
  f34*Mek_S218_S222_p/cell;
end

function Function_for_R72(S56, cell, k4p)
  k4p*S56/cell;
end

function Function_for_R70(S53, cell, k41)
  k41*S53/cell;
end

function Function_for_R45(mTORC1_S2448_p, cell, f_18)
  f_18*mTORC1_S2448_p/cell;
end

function Function_for_R1(I_bs, IR_NPXY_Y999_u_alpha_beta_loc_m, cell, k1)
  k1*I_bs*IR_NPXY_Y999_u_alpha_beta_loc_m/cell;
end

function Function_for_R43(Akt_S474_p_T309_u, cell, k_17)
  k_17*Akt_S474_p_T309_u/cell;
end

function Function_for_R39(PKC_T410_p, cell, k_12)
  k_12*PKC_T410_p/cell;
end

function Function_for_R59(S49, cell, k4p)
  k4p*S49/cell;
end

function Function_for_R77(S59, cell, k_26)
  k_26*S59/cell;
end

function Function_for_R31(GS_SH2_state_a, cell, f39)
  f39*GS_SH2_state_a/cell;
end

function Function_for_R42(Akt_S474_u_T309_p, cell, f17)
  f17*Akt_S474_u_T309_p/cell;
end

function Function_for_R25(p70S6K_T389_u, cell, f20)
  f20*p70S6K_T389_u/cell;
end

function Function_for_R21(Akt_S474_u_T309_u, cell, f17)
  f17*Akt_S474_u_T309_u/cell;
end

function Function_for_R56(GS_SH2_state_i, cell, f_39)
  f_39*GS_SH2_state_i/cell;
end

function Function_for_R20(AMPK_T172_u, cell, f16)
  f16*AMPK_T172_u/cell;
end

function Function_for_R47(p70S6K_T389_p, cell, k_20)
  k_20*p70S6K_T389_p/cell;
end

function Function_for_R14(GLUT4_loc_c, cell, f13)
  f13*GLUT4_loc_c/cell;
end

function Function_for_R63(RasGAP_bs, S49, cell, k22)
  k22*RasGAP_bs*S49/cell;
end

function Function_for_R67(Raf_state_aa, cell, f32)
  f32*Raf_state_aa/cell;
end

function Function_for_R27(Ras_state_GDP, cell, f28)
  f28*Ras_state_GDP/cell;
end

function Function_for_R24(mTORC2_S2481_u, cell, f19)
  f19*mTORC2_S2481_u/cell;
end

function Function_for_R33(S30, cell, k3)
  k3*S30/cell;
end

function Function_for_R7(IRS1_S636_u_Y_u_Y896_YXXM, cell, f7p)
  f7p*IRS1_S636_u_Y_u_Y896_YXXM/cell;
end

function Function_for_R15(GLUT4_loc_m, cell, k_13)
  k_13*GLUT4_loc_m/cell;
end

function Function_for_R82(S61, cell, k_22)
  k_22*S61/cell;
end

function Function_for_R38(Akt_S474_u_T309_p, cell, k_11)
  k_11*Akt_S474_u_T309_p/cell;
end

function Function_for_R58(S49, cell, f_3)
  f_3*S49/cell;
end

function Function_for_R37(Akt_S474_p_T309_u, cell, f11)
  f11*Akt_S474_p_T309_u/cell;
end

function Function_for_R74(S57, cell, f6)
  f6*S57/cell;
end

function Function_for_R12(Akt_S474_u_T309_u, cell, f11)
  f11*Akt_S474_u_T309_u/cell;
end

function Function_for_R79(S58, cell, f42)
  f42*S58/cell;
end

function Function_for_R83(S61, cell, f42)
  f42*S61/cell;
end

function Function_for_R2(IR_NPXY_Y999_u_alpha_beta_loc_m, cell, k4)
  k4*IR_NPXY_Y999_u_alpha_beta_loc_m/cell;
end

function Function_for_R16(SynthG4, cell, k14)
  k14*SynthG4/cell;
end

function Function_for_R51(Ras_state_GTP, cell, f29)
  f29*Ras_state_GTP/cell;
end

function Function_for_R68(Erk_T202_T185_p_Y204_Y187_p, cell, f37)
  f37*Erk_T202_T185_p_Y204_Y187_p/cell;
end

function Function_for_R54(Erk_T202_T185_p_Y204_Y187_u, cell, f38)
  f38*Erk_T202_T185_p_Y204_Y187_u/cell;
end

function Function_for_R5(IR_NPXY_Y999_u_alpha_beta_loc_c, cell, k_5)
  k_5*IR_NPXY_Y999_u_alpha_beta_loc_c/cell;
end

function Function_for_R35(IRS1_S636_p_Y_u_Y896_YXXM, cell, k_7p)
  k_7p*IRS1_S636_p_Y_u_Y896_YXXM/cell;
end

function Function_for_R62(Akt_S474_p_T309_p, cell, k_17)
  k_17*Akt_S474_p_T309_p/cell;
end

function Function_for_R44(TSC1_TSC2_S1387_p_T1462_u, cell, f_21)
  f_21*TSC1_TSC2_S1387_p_T1462_u/cell;
end

function Function_for_R76(S58, cell, k_22)
  k_22*S58/cell;
end

function Function_for_R4(SynthIR, cell, k5)
  k5*SynthIR/cell;
end

function Function_for_R73(S57, cell, k_4p)
  k_4p*S57/cell;
end

function Function_for_R57(I_bs, S49, cell, k2)
  k2*I_bs*S49/cell;
end

function Function_for_R19(IRS1_S636_u_Y_u_Y896_YXXM, cell, f15)
  f15*IRS1_S636_u_Y_u_Y896_YXXM/cell;
end

function Function_for_R55(Erk_T202_T185_p_Y204_Y187_u, cell, f36)
  f36*Erk_T202_T185_p_Y204_Y187_u/cell;
end

function Function_for_R81(S60, cell, f6)
  f6*S60/cell;
end

function Function_for_R32(S30, cell, k_1)
  k_1*S30/cell;
end

function Function_for_R30(Erk_T202_T185_u_Y204_Y187_u, cell, f35)
  f35*Erk_T202_T185_u_Y204_Y187_u/cell;
end

function Function_for_R9(S8, _rateLaw1, cell)
  _rateLaw1*S8/cell;
end

function Function_for_R41(AMPK_T172_p, cell, k_16)
  k_16*AMPK_T172_p/cell;
end

function Function_for_R18(PI3K_variant_Y_u, cell, fp15)
  fp15*PI3K_variant_Y_u/cell;
end

function Function_for_R64(GS_SH2_state_a, S50, cell, k26)
  k26*GS_SH2_state_a*S50/cell;
end

function Function_for_R17(GLUT4_loc_c, cell, k_14)
  k_14*GLUT4_loc_c/cell;
end

function Function_for_R48(Src_state_a, cell, f25)
  f25*Src_state_a/cell;
end

function Function_for_R28(Raf_state_i, cell, f30)
  f30*Raf_state_i/cell;
end

function Function_for_R66(S53, cell, k_27)
  k_27*S53/cell;
end

function Function_for_R61(Akt_S474_p_T309_p, cell, k_11)
  k_11*Akt_S474_p_T309_p/cell;
end

function Function_for_R26(Src_state_i, cell, f24)
  f24*Src_state_i/cell;
end

function Function_for_R29(Mek_S218_S222_u, cell, f33)
  f33*Mek_S218_S222_u/cell;
end

function Function_for_R49(GS_SH2_state_a, IRS1_S636_u_Y_p_Y896_YXXM, cell, k26)
  k26*GS_SH2_state_a*IRS1_S636_u_Y_p_Y896_YXXM/cell;
end

function Function_for_R23(mTORC1_S2448_u, cell, f18)
  f18*mTORC1_S2448_u/cell;
end

function Function_for_R80(S60, cell, k_4p)
  k_4p*S60/cell;
end

function Function_for_R6(IRS1_S636_u_Y_u_Y896_YXXM, cell, f7)
  f7*IRS1_S636_u_Y_u_Y896_YXXM/cell;
end

function Function_for_R3(IR_NPXY_Y999_u_alpha_beta_loc_c, cell, k_4)
  k_4*IR_NPXY_Y999_u_alpha_beta_loc_c/cell;
end

function Function_for_R50(SHP2_SH2, IRS1_S636_u_Y_p_Y896_YXXM, cell, k27)
  k27*SHP2_SH2*IRS1_S636_u_Y_p_Y896_YXXM/cell;
end

function Function_for_R40(PI3K_variant_Y_p, cell, p_15)
  p_15*PI3K_variant_Y_p/cell;
end

model DiCamillo2016___Insulin_signalling_pathway___Rule_based_model()
  // DiCamillo2016 - Insulin signalling pathway - Rule-based model
  // isInstanceOf biomodels.db:MODEL1604100005 taxonomy:9606 GO:0008286
  // isDescribedBy GO:0008286 pubmed:27245161
  // hasProperty biomodels.db:MODEL1604100005
  // hasProperty taxonomy:9606
  // biomodels.db:MODEL1604100005 biomodels.db:BIOMD0000000833

  // Compartments:
  compartment cell = 1; cell is "Vol_cell";

  // Species:
  species I_bs in cell = 6020000; I_bs is "I(bs)";  // uniprot:P01308
  species IR_NPXY_Y999_u_alpha_beta_loc_m in cell = 270900; IR_NPXY_Y999_u_alpha_beta_loc_m is "IR(NPXY,Y999~u,alpha,beta,loc~m)";  // uniprot:P06213
  species IR_NPXY_Y999_u_alpha_beta_loc_c in cell = 30100; IR_NPXY_Y999_u_alpha_beta_loc_c is "IR(NPXY,Y999~u,alpha,beta,loc~c)";  // uniprot:P06213
  species IRS1_S636_u_Y_u_Y896_YXXM in cell = 541800; IRS1_S636_u_Y_u_Y896_YXXM is "IRS1(S636~u,Y~u,Y896,YXXM)";  // uniprot:P35568
  species PI3K_SH2 in cell = 361200; PI3K_SH2 is "PI3K(SH2)";
  species PI3K_variant_Y_u in cell = 5.4192432e5; PI3K_variant_Y_u is "PI3K_variant(Y~u)";
  species PI45 in cell = 5.385492e5; PI45 is "PI45()";
  species S8 in cell = 1679.58; S8 is "PI345()";
  species S9 in cell = 1571.22; S9 is "PI34()";
  species PKC_T410_u in cell = 180600; PKC_T410_u is "PKC(T410~u)";  // uniprot:P17252
  species GLUT4_loc_c in cell = 52012800; GLUT4_loc_c is "GLUT4(loc~c)";  // uniprot:P14672
  species GLUT4_loc_m in cell = 2167200; GLUT4_loc_m is "GLUT4(loc~m)";  // uniprot:P14672
  species Amino_Acids in cell = 286212; Amino_Acids is "Amino_Acids()";
  species AMPK_T172_u in cell = 5.8691506e5; AMPK_T172_u is "AMPK(T172~u)";  // uniprot:Q13131
  species Akt_S474_u_T309_u in cell = 180600; Akt_S474_u_T309_u is "Akt(S474~u,T309~u)";  // uniprot:P31748
  species mTORC1_S2448_u in cell = 7.1953194e5; mTORC1_S2448_u is "mTORC1(S2448~u)";  // uniprot:P42345
  species mTORC2_S2481_u in cell = 5.3795681e5; mTORC2_S2481_u is "mTORC2(S2481~u)";  // uniprot:P42345
  species p70S6K_T389_u in cell = 4.0930787e5; p70S6K_T389_u is "p70S6K(T389~u)";
  species TSC1_TSC2_S1387_u_T1462_p in cell = 4.2695377e5; TSC1_TSC2_S1387_u_T1462_p is "TSC1_TSC2(S1387~u,T1462~p)";  // uniprot:P49815
  species GS_SH2_state_a in cell = 361200; GS_SH2_state_a is "GS(SH2,state~a)";
  species RasGAP_bs in cell = 90300; RasGAP_bs is "RasGAP(bs)";
  species SHP2_SH2 in cell = 541800; SHP2_SH2 is "SHP2(SH2)";
  species Src_state_i in cell = 935508; Src_state_i is "Src(state~i)";
  species Ras_state_GDP in cell = 270900; Ras_state_GDP is "Ras(state~GDP)";
  species Raf_state_i in cell = 180600; Raf_state_i is "Raf(state~i)";  // uniprot:P04049
  species Mek_S218_S222_u in cell = 361200; Mek_S218_S222_u is "Mek(S218_S222~u)";  // uniprot:Q02750
  species Erk_T202_T185_u_Y204_Y187_u in cell = 722400; Erk_T202_T185_u_Y204_Y187_u is "Erk(T202_T185~u,Y204_Y187~u)";  // uniprot:P28482
  species SynthG4 in cell = 1; SynthG4 is "SynthG4()";
  species SynthIR in cell = 1; SynthIR is "SynthIR()";
  species S30 in cell = 0; S30 is "I(bs!1).IR(NPXY,Y999~u,alpha!1,beta,loc~m)";  // uniprot:P01308
  species Degr in cell = 3.6068052e6; Degr is "Degr()";
  species IRS1_S636_u_Y_p_Y896_YXXM in cell = 0; IRS1_S636_u_Y_p_Y896_YXXM is "IRS1(S636~u,Y~p,Y896,YXXM)";  // uniprot:P35568
  species IRS1_S636_p_Y_u_Y896_YXXM in cell = 0; IRS1_S636_p_Y_u_Y896_YXXM is "IRS1(S636~p,Y~u,Y896,YXXM)";  // uniprot:P35568
  species Akt_S474_u_T309_p in cell = 0; Akt_S474_u_T309_p is "Akt(S474~u,T309~p)";  // uniprot:P31748
  species PKC_T410_p in cell = 0; PKC_T410_p is "PKC(T410~p)";  // uniprot:P17252
  species PI3K_variant_Y_p in cell = 0; PI3K_variant_Y_p is "PI3K_variant(Y~p)";
  species AMPK_T172_p in cell = 0; AMPK_T172_p is "AMPK(T172~p)";  // uniprot:Q13131
  species Akt_S474_p_T309_u in cell = 0; Akt_S474_p_T309_u is "Akt(S474~p,T309~u)";  // uniprot:P31748
  species TSC1_TSC2_S1387_p_T1462_u in cell = 0; TSC1_TSC2_S1387_p_T1462_u is "TSC1_TSC2(S1387~p,T1462~u)";  // uniprot:P49815
  species mTORC1_S2448_p in cell = 0; mTORC1_S2448_p is "mTORC1(S2448~p)";  // uniprot:P42345
  species mTORC2_S2481_p in cell = 0; mTORC2_S2481_p is "mTORC2(S2481~p)";  // uniprot:P42345
  species p70S6K_T389_p in cell = 0; p70S6K_T389_p is "p70S6K(T389~p)";
  species Src_state_a in cell = 0; Src_state_a is "Src(state~a)";
  species Ras_state_GTP in cell = 0; Ras_state_GTP is "Ras(state~GTP)";
  species Raf_state_a in cell = 0; Raf_state_a is "Raf(state~a)";  // uniprot:P04049
  species Mek_S218_S222_p in cell = 0; Mek_S218_S222_p is "Mek(S218_S222~p)";  // uniprot:Q02750
  species Erk_T202_T185_p_Y204_Y187_u in cell = 0; Erk_T202_T185_p_Y204_Y187_u is "Erk(T202_T185~p,Y204_Y187~u)";  // uniprot:P28482
  species GS_SH2_state_i in cell = 0; GS_SH2_state_i is "GS(SH2,state~i)";
  species S49 in cell = 0; S49 is "I(bs!1).IR(NPXY,Y999~p,alpha!1,beta,loc~m)";  // uniprot:P01308
  species S50 in cell = 0; S50 is "IRS1(S636~u,Y~p,Y896,YXXM!1).PI3K(SH2!1)";  // uniprot:P35568
  species Akt_S474_p_T309_p in cell = 0; Akt_S474_p_T309_p is "Akt(S474~p,T309~p)";  // uniprot:P31748
  species S52 in cell = 0; S52 is "GS(SH2!1,state~a).IRS1(S636~u,Y~p,Y896!1,YXXM)";
  species S53 in cell = 0; S53 is "IRS1(S636~u,Y~p,Y896!1,YXXM).SHP2(SH2!1)";  // uniprot:P35568
  species Raf_state_aa in cell = 0; Raf_state_aa is "Raf(state~aa)";  // uniprot:P04049
  species Erk_T202_T185_p_Y204_Y187_p in cell = 0; Erk_T202_T185_p_Y204_Y187_p is "Erk(T202_T185~p,Y204_Y187~p)";  // uniprot:P28482
  species S56 in cell = 0; S56 is "I(bs!1).I(bs!2).IR(NPXY,Y999~p,alpha!1,beta!2,loc~m)";  // uniprot:P01308
  species S57 in cell = 0; S57 is "I(bs!1).IR(NPXY,Y999~p,alpha!1,beta,loc~c)";  // uniprot:P01308
  species S58 in cell = 0; S58 is "I(bs!1).IR(NPXY!2,Y999~p,alpha!1,beta,loc~m).RasGAP(bs!2)";  // uniprot:P01308
  species S59 in cell = 0; S59 is "GS(SH2!1,state~a).IRS1(S636~u,Y~p,Y896!1,YXXM!2).PI3K(SH2!2)";
  species S60 in cell = 0; S60 is "I(bs!1).I(bs!2).IR(NPXY,Y999~p,alpha!1,beta!2,loc~c)";  // uniprot:P01308
  species S61 in cell = 0; S61 is "I(bs!1).I(bs!2).IR(NPXY!3,Y999~p,alpha!1,beta!2,loc~m).RasGAP(bs!3)";  // uniprot:P01308

  // Parameters:
  NA = 6.02e23;
  Vo = 1e-10;
  V = 3e-12;
  nM = 1e-9;
  SF2 = 28621;
  PTP = 1;
  PTEN = 1;
  SHIP = 1;
  I_init = 0;
  Amino_Acids_input = 0;
  SynthG4_init = 1;
  SynthIR_init = 1;
  k_1 = 0.2;
  k_2 = 20;
  k3 = 2500;
  k_3 = 0.2;
  Kd_akt = 2.955e12;
  Kd_pkc = 2.955e12;
  Kd_p70 = 400000000;
  n = 4;
  n_p70 = 2;
  Vmax = 1;
  k4 = 0.00033333333;
  k_4 = 0.003;
  k4p = 0.0021;
  k_4p = 0.00021;
  k_5 = 0.0012836059;
  k5 = 38.636537;
  k6 = 0.461;
  k7 = 4.16;
  k_7 = 2.22;
  k7p = 0.34657359;
  k_7p = 1.386;
  k8 = 5.18091e-6;
  k_8 = 10;
  k9s = 1.3862944;
  k9a = 1.99817e-5;
  k_10 = 2.7725887;
  k11 = 0.34657359;
  k12 = 0.34657359;
  k13 = 0.0069583333;
  k_13 = 0.167;
  k13p = 0.104375;
  k_14 = 0.001155;
  p15 = 6.1129552e-7;
  p_15 = 10;
  k15 = 12;
  k_16 = 0.0107215;
  k17 = 0.0004592;
  k_19 = 0.0183735;
  k_20 = 0.69314718;
  k_21 = 1.7650066e-5;
  kcat24 = 399.6;
  alpha24 = 0.00025;
  kcat28 = 319.8;
  kcat29 = 1200000;
  kcat30 = 6;
  kcat31 = 199.8;
  kcat32 = 39.96;
  beta32 = 2;
  kcat33 = 7.98;
  kcat35 = 19.98;
  kcat36 = 39.96;
  kcat39 = 2.796;
  k_39 = 0.003996;
  k41 = 39.96;
  u = NA*V*nM;
  IR_free_memb_init = 1*150*u;
  IR_free_cyt_init = 0.1*150*u/0.9;
  IRS1_init = 300*u;
  PI3K_init = 200*u;
  PI45_init = 0.994*IRS1_init;
  PI345_init = 0.0031*IRS1_init;
  PI34_init = 0.0029*IRS1_init;
  PKC_init = 100*u;
  GLUT4_memb_init = 4*IRS1_init;
  GLUT4_cyt_init = 96*IRS1_init;
  AMPK_init = 20.5064*SF2;
  mTORC1_init = 25.14*SF2;
  mTORC2_init = 18.7959*SF2;
  p70S6K_init = 14.301*SF2;
  TSC1_TSC2_pT1462_init = 14.9175*SF2;
  PI3K_variant_init = 18.9345*SF2;
  GS_init = 200*u;
  RasGAP_init = 50*u;
  SHP2_init = 300*u;
  iSrc_init = 518*u;
  RasGDP_init = 150*u;
  Raf_init = 100*u;
  Mek_init = 200*u;
  Erk_init = 400*u;
  Akt_init = 100*u;
  k1 = 60000000/(NA*Vo);
  k2 = 60000000/(NA*Vo);
  k_9 = 94/3.1*k9s;
  k9b = 0.31/99.4*k_9;
  k10 = 3.1/2.9*k_10;
  k_11 = 10*k11;
  k_12 = 10*k12;
  k14 = 0.001155*GLUT4_cyt_init;
  k16 = 9.79766/SF2;
  k_17 = 0.00640216*SF2/5365.42;
  k_18 = 0.0106652/SF2;
  k18 = 0.000424/SF2;
  k19 = 0.375353/SF2;
  k20 = 0.00184043*(k_20/0.0113512)/SF2;
  k21 = 0.0365589/SF2;
  k22 = 6.66e-8/(u*1/60);
  k_22 = 2000000*k22*u;
  Km24 = 110*u; Km24 is "v25";
  V25 = 6.66*u/(1/60);
  Km25 = 50*u;
  k26 = 0.000666/(u*1/60);
  k_26 = 100000*k26*u;
  k27 = 0.000666/(u*1/60);
  k_27 = 1000*u*k27;
  Km28 = 50*u;
  bRasGAP = 1e-5*u;
  Km29 = 50*u;
  Km30 = 400*u;
  Km31 = 10*u;
  PKA = 100*u;
  Km32 = 10000*u;
  alpha32 = 1e-6/(u*(1/60));
  Km33 = 50*u;
  V34 = 16.6*u/(1/60);
  Km34 = 675.299*u;
  Km35 = 500*u;
  Km36 = 500*u;
  V37 = 33.3*u/(1/60);
  Km37 = 500*u;
  Km38 = 500*u;
  V38 = 23.33*u/(1/60);
  Km39 = 5000*u;
  V40 = 333*u/(1/60);
  Km40 = 143.3*u;
  k42 = 0.0133/(u*1/60);
  _rateLaw1 = k_9*PTEN;
  _rateLaw2 = k_10*SHIP;

  // Assignment rules:
  IRS1_GS_complex := S52 + S59;
  Akt_pS474 := 0 + Akt_S474_p_T309_u;
  IRS1_unphos := 0 + IRS1_S636_u_Y_u_Y896_YXXM;
  GLUT4_cyt := 0 + GLUT4_loc_c;
  RasGDP := 0 + Ras_state_GDP;
  IRS1_pYtot := IRS1_S636_u_Y_p_Y896_YXXM + S50 + S52 + S53 + S59;
  Aminoacids := 0 + Amino_Acids;
  f18 := k18*Aminoacids;
  TSC1_TSC2_pS1387 := 0 + TSC1_TSC2_S1387_p_T1462_u;
  f_18 := k_18*TSC1_TSC2_pS1387;
  IR_bound2_memb := S56 + S61;
  mTORC2_pS2481 := 0 + mTORC2_S2481_p;
  IR_unphos_memb := 0 + IR_NPXY_Y999_u_alpha_beta_loc_m;
  IR_bound1_memb := S49 + S58;
  TSC1_TSC2_pT1462 := 0 + TSC1_TSC2_S1387_u_T1462_p;
  p70S6K_pT389 := 0 + p70S6K_T389_p;
  Akt_pS := Akt_S474_p_T309_u + Akt_S474_p_T309_p;
  IRS1_pS636 := 0 + IRS1_S636_p_Y_u_Y896_YXXM;
  PI34 := 0 + S9;
  Akt_pT := Akt_S474_u_T309_p + Akt_S474_p_T309_p;
  f40 := V40/(Km40 + IRS1_GS_complex);
  mTORC1_pS2448 := 0 + mTORC1_S2448_p;
  f20 := k20*mTORC1_pS2448;
  Mek_pS218_S222 := 0 + Mek_S218_S222_p;
  PI345 := 0 + S8;
  f11 := k11*(PI345 - PI345_init)/(PI345_init*10 - PI345_init);
  GLUT4_memb := 0 + GLUT4_loc_m;
  f12 := k12*(PI345 - PI345_init)/(PI345_init*10 - PI345_init);
  Akt_pT309 := 0 + Akt_S474_u_T309_p;
  mTORC1 := 0 + mTORC1_S2448_u;
  AMPK_pT172 := 0 + AMPK_T172_p;
  IRS1_pY := 0 + IRS1_S636_u_Y_p_Y896_YXXM;
  f16 := k16*IRS1_pY;
  Akt_pp := 0 + Akt_S474_p_T309_p;
  IR_bound_memb := S49 + S56 + S58 + S61;
  PKC_pT410 := 0 + PKC_T410_p;
  f13 := k13 + k13p*(0.2*(Akt_pT309 + Akt_pS474 + Akt_pp)/Akt_init + 0.8*PKC_pT410/PKC_init);
  f_21 := k_21*Akt_pT;
  f17 := k17*mTORC2_pS2481;
  f28 := kcat28*IRS1_GS_complex/(Km28 + RasGDP);
  f21 := k21*AMPK_pT172;
  iSrc := 0 + Src_state_i;
  IR_phos_memb := S49 + S56 + S58 + S61;
  f24 := 0.1/10*kcat24*alpha24*IR_phos_memb/(Km24 + iSrc);
  fp15 := p15*IR_phos_memb;
  Insulin := 0 + I_bs;
  RasGTP := 0 + Ras_state_GTP;
  f_39 := k_39;
  f15 := k15*Vmax*p70S6K_pT389^n_p70/(Kd_p70 + p70S6K_pT389^n_p70);
  f34 := V34/(Km34 + Mek_pS218_S222);
  aRaf := 0 + Raf_state_a;
  Raf := 0 + Raf_state_i;
  f30 := kcat30*RasGTP/(Km30 + Raf);
  aSrc := 0 + Src_state_a;
  f25 := V25/(Km25 + aSrc);
  IRS1_PI3K_complex := S50 + S59;
  Mek := 0 + Mek_S218_S222_u;
  f7p := k7p*Vmax*PKC_pT410^n/(Kd_pkc + PKC_pT410^n);
  PI3K_variant_p := 0 + PI3K_variant_Y_p;
  f19 := k19*PI3K_variant_p;
  aaRaf := 0 + Raf_state_aa;
  f32 := kcat32*PKA/(Km32 + aaRaf) + alpha32*(Akt_pT309 + beta32*Akt_pp);
  f7 := k7*IR_phos_memb/IR_free_memb_init;
  f6 := k6*PTP*(1 - Vmax/2*Akt_pT^n/(Kd_akt + Akt_pT^n));
  iGS := 0 + GS_SH2_state_i;
  IR_RasGAP_complex := S58 + S61;
  f29 := kcat29*(bRasGAP + IR_RasGAP_complex)/(Km29 + RasGTP);
  f_7 := k_7*PTP*(1 - Vmax/2*Akt_pT^n/(Kd_akt + Akt_pT^n));
  GS := 0 + GS_SH2_state_a;
  Erk_ppY204_Y187 := 0 + Erk_T202_T185_p_Y204_Y187_p;
  f39 := kcat39*Erk_ppY204_Y187/(Km39 + GS);
  f_3 := k_3*PTP*(1 - Vmax/2*Akt_pT^n/(Kd_akt + Akt_pT^n));
  Erk_pT202_T185 := 0 + Erk_T202_T185_p_Y204_Y187_u;
  f37 := V37/(Km37 + Erk_ppY204_Y187 + Erk_pT202_T185*Km37/Km38);
  f38 := V38/(Km38 + Erk_pT202_T185 + Erk_ppY204_Y187*Km38/Km37);
  Erk := 0 + Erk_T202_T185_u_Y204_Y187_u;
  f36 := kcat36*Mek_pS218_S222/(Km36 + Erk_pT202_T185 + Erk*Km36/Km35);
  f35 := kcat35*Mek_pS218_S222/(Km35 + Erk + Erk_pT202_T185*Km35/Km36);
  IRS1_SHP2_complex := 0 + S53;
  f42 := k42*IRS1_SHP2_complex;
  f31 := kcat31*aSrc/(Km31 + aRaf);
  f9 := k9a*IRS1_PI3K_complex + k9b;
  f33 := kcat33*aaRaf/(Km33 + Mek);

  // Reactions:
  R1: I_bs + IR_NPXY_Y999_u_alpha_beta_loc_m => S30; cell*Function_for_R1(I_bs, IR_NPXY_Y999_u_alpha_beta_loc_m, cell, k1); R1 is "Receptor binding to 1st insulin molecule";
  Free_receptor_internalization: IR_NPXY_Y999_u_alpha_beta_loc_m => IR_NPXY_Y999_u_alpha_beta_loc_c; cell*Function_for_R2(IR_NPXY_Y999_u_alpha_beta_loc_m, cell, k4);
  Free_receptor_externalization: IR_NPXY_Y999_u_alpha_beta_loc_c => IR_NPXY_Y999_u_alpha_beta_loc_m; cell*Function_for_R3(IR_NPXY_Y999_u_alpha_beta_loc_c, cell, k_4);
  receptor_synthesis: SynthIR => IR_NPXY_Y999_u_alpha_beta_loc_c + SynthIR; cell*Function_for_R4(SynthIR, cell, k5);
  Receptor_Degradation: IR_NPXY_Y999_u_alpha_beta_loc_c => Degr; cell*Function_for_R5(IR_NPXY_Y999_u_alpha_beta_loc_c, cell, k_5);
  IRS_1_phosphorylation_in_Tyr: IRS1_S636_u_Y_u_Y896_YXXM => IRS1_S636_u_Y_p_Y896_YXXM; cell*Function_for_R6(IRS1_S636_u_Y_u_Y896_YXXM, cell, f7); IRS_1_phosphorylation_in_Tyr is "IRS-1 phosphorylation in Tyr";
  IRS_1_phosphorylation_in_Ser: IRS1_S636_u_Y_u_Y896_YXXM => IRS1_S636_p_Y_u_Y896_YXXM; cell*Function_for_R7(IRS1_S636_u_Y_u_Y896_YXXM, cell, f7p); IRS_1_phosphorylation_in_Ser is "IRS-1 phosphorylation in Ser";
  Lipid_formation_145: PI45 => S8; cell*Function_for_R8(PI45, cell, f9);
  PI45_formation: S8 => PI45; cell*Function_for_R9(S8, _rateLaw1, cell);
  Lipids_formation_134: S9 => S8; cell*Function_for_R10(S9, cell, k10);
  Lipid_formation_rate: S8 => S9; cell*Function_for_R11(S8, _rateLaw2, cell);
  Akt_phosphorylation: Akt_S474_u_T309_u => Akt_S474_u_T309_p; cell*Function_for_R12(Akt_S474_u_T309_u, cell, f11);
  PKC_phosphorylation: PKC_T410_u => PKC_T410_p; cell*Function_for_R13(PKC_T410_u, cell, f12);
  GLUT4_translocation_externalize: GLUT4_loc_c => GLUT4_loc_m; cell*Function_for_R14(GLUT4_loc_c, cell, f13);
  GLUT4_translocation_internalize: GLUT4_loc_m => GLUT4_loc_c; cell*Function_for_R15(GLUT4_loc_m, cell, k_13);
  GLUT4_synthesis: SynthG4 => GLUT4_loc_c + SynthG4; cell*Function_for_R16(SynthG4, cell, k14);
  GLUT4_degradation: GLUT4_loc_c => Degr; cell*Function_for_R17(GLUT4_loc_c, cell, k_14);
  PI3k_variant_phosphorylation: PI3K_variant_Y_u => PI3K_variant_Y_p; cell*Function_for_R18(PI3K_variant_Y_u, cell, fp15);
  IRS1_phosphorylation_by_P70S6K: IRS1_S636_u_Y_u_Y896_YXXM => IRS1_S636_p_Y_u_Y896_YXXM; cell*Function_for_R19(IRS1_S636_u_Y_u_Y896_YXXM, cell, f15);
  AMPK_T172_phosphorylation: AMPK_T172_u => AMPK_T172_p; cell*Function_for_R20(AMPK_T172_u, cell, f16);
  R21: Akt_S474_u_T309_u => Akt_S474_p_T309_u; cell*Function_for_R21(Akt_S474_u_T309_u, cell, f17); R21 is "Akt phosphorylation in Ser mediated by mTORC2_pS2481";
  R22: TSC1_TSC2_S1387_u_T1462_p => TSC1_TSC2_S1387_p_T1462_u; cell*Function_for_R22(TSC1_TSC2_S1387_u_T1462_p, cell, f21); R22 is "TSC1-TSC2 S1387_phosphorylation_by_AMPK_pT172 and T1462_phosphorylation_by_Akt_pT308";
  R23: mTORC1_S2448_u => mTORC1_S2448_p; cell*Function_for_R23(mTORC1_S2448_u, cell, f18); R23 is "mTORC1 phosphorylation mediated by TSC1_TSC2_pS1387 and Aminoacids";
  R24: mTORC2_S2481_u => mTORC2_S2481_p; cell*Function_for_R24(mTORC2_S2481_u, cell, f19); R24 is "mTORC2 phosphorylation mediated by phosphorylated PI3K_variant";
  R25: p70S6K_T389_u => p70S6K_T389_p; cell*Function_for_R25(p70S6K_T389_u, cell, f20); R25 is "p70S6K phosphorylation mediated by mTORC1_pS2448";
  Src_module_active: Src_state_i => Src_state_a; cell*Function_for_R26(Src_state_i, cell, f24);
  RAS_module_GTP: Ras_state_GDP => Ras_state_GTP; cell*Function_for_R27(Ras_state_GDP, cell, f28);
  RAF_module_active: Raf_state_i => Raf_state_a; cell*Function_for_R28(Raf_state_i, cell, f30);
  Mek_phosphorylated: Mek_S218_S222_u => Mek_S218_S222_p; cell*Function_for_R29(Mek_S218_S222_u, cell, f33);
  ERK_module_phosphorylated_1: Erk_T202_T185_u_Y204_Y187_u => Erk_T202_T185_p_Y204_Y187_u; cell*Function_for_R30(Erk_T202_T185_u_Y204_Y187_u, cell, f35);
  GS_inhibition: GS_SH2_state_a => GS_SH2_state_i; cell*Function_for_R31(GS_SH2_state_a, cell, f39);
  R32: S30 => I_bs + IR_NPXY_Y999_u_alpha_beta_loc_m; cell*Function_for_R32(S30, cell, k_1); R32 is "Receptor releasing1st insulin molecule";
  Receptor_phosphorylation: S30 => S49; cell*Function_for_R33(S30, cell, k3);
  IRS_1_dephosphorylation_in_Tyr: IRS1_S636_u_Y_p_Y896_YXXM => IRS1_S636_u_Y_u_Y896_YXXM; cell*Function_for_R34(IRS1_S636_u_Y_p_Y896_YXXM, cell, f_7); IRS_1_dephosphorylation_in_Tyr is "IRS-1 dephosphorylation in Tyr";
  IRS_1_dephosphorylation_in_Ser: IRS1_S636_p_Y_u_Y896_YXXM => IRS1_S636_u_Y_u_Y896_YXXM; cell*Function_for_R35(IRS1_S636_p_Y_u_Y896_YXXM, cell, k_7p); IRS_1_dephosphorylation_in_Ser is "IRS-1 dephosphorylation in Ser";
  R36: PI3K_SH2 + IRS1_S636_u_Y_p_Y896_YXXM => S50; cell*Function_for_R36(IRS1_S636_u_Y_p_Y896_YXXM, PI3K_SH2, cell, k8); R36 is "IRS-1_PI3-K complex formation (PI3-K activation)";
  Akt_phosphorylation_in_Tyr: Akt_S474_p_T309_u => Akt_S474_p_T309_p; cell*Function_for_R37(Akt_S474_p_T309_u, cell, f11);
  Akt_dephosphorylation_in_Tyr: Akt_S474_u_T309_p => Akt_S474_u_T309_u; cell*Function_for_R38(Akt_S474_u_T309_p, cell, k_11);
  PKC_dephosphorylation: PKC_T410_p => PKC_T410_u; cell*Function_for_R39(PKC_T410_p, cell, k_12);
  R40: PI3K_variant_Y_p => PI3K_variant_Y_u; cell*Function_for_R40(PI3K_variant_Y_p, cell, p_15); R40 is "PI3K_variant dephosphorylation by IRp";
  R41: AMPK_T172_p => AMPK_T172_u; cell*Function_for_R41(AMPK_T172_p, cell, k_16); R41 is "AMPK_T172_dephosphorylation mediated by IRS1_pY";
  R42: Akt_S474_u_T309_p => Akt_S474_p_T309_p; cell*Function_for_R42(Akt_S474_u_T309_p, cell, f17); R42 is "Akt phosphorylation in Ser mediated by mTORC2_pS2481_2";
  R43: Akt_S474_p_T309_u => Akt_S474_u_T309_u; cell*Function_for_R43(Akt_S474_p_T309_u, cell, k_17); R43 is "Akt dephosphorylation in Ser mediated by mTORC2_pS2481";
  R44: TSC1_TSC2_S1387_p_T1462_u => TSC1_TSC2_S1387_u_T1462_p; cell*Function_for_R44(TSC1_TSC2_S1387_p_T1462_u, cell, f_21); R44 is "TSC1-TSC2 S1387_dephosphorylation_by_AMPK_pT172 and T1462_phosphorylation_by_Akt_pT308";
  R45: mTORC1_S2448_p => mTORC1_S2448_u; cell*Function_for_R45(mTORC1_S2448_p, cell, f_18); R45 is "mTORC1 dephosphorylation mediated by TSC1_TSC2_pS1387 and Aminoacids";
  R46: mTORC2_S2481_p => mTORC2_S2481_u; cell*Function_for_R46(mTORC2_S2481_p, cell, k_19); R46 is "mTORC2 dephosphorylation mediated by phosphorylated PI3K_variant";
  R47: p70S6K_T389_p => p70S6K_T389_u; cell*Function_for_R47(p70S6K_T389_p, cell, k_20); R47 is "p70S6K dephosphorylation mediated by mTORC1_pS2448";
  Src_module_inactive: Src_state_a => Src_state_i; cell*Function_for_R48(Src_state_a, cell, f25);
  IRS1_GS_complex_formation: GS_SH2_state_a + IRS1_S636_u_Y_p_Y896_YXXM => S52; cell*Function_for_R49(GS_SH2_state_a, IRS1_S636_u_Y_p_Y896_YXXM, cell, k26); IRS1_GS_complex_formation is "IRS1-GS complex formation";
  IRS1_SHP2_complex_formation: SHP2_SH2 + IRS1_S636_u_Y_p_Y896_YXXM => S53; cell*Function_for_R50(SHP2_SH2, IRS1_S636_u_Y_p_Y896_YXXM, cell, k27); IRS1_SHP2_complex_formation is "IRS1-SHP2 complex formation";
  Ras_module_GDP: Ras_state_GTP => Ras_state_GDP; cell*Function_for_R51(Ras_state_GTP, cell, f29);
  RAF_module_active_active: Raf_state_a => Raf_state_aa; cell*Function_for_R52(Raf_state_a, cell, f31); RAF_module_active_active is "RAF module active-active";
  MEK_dephosphorylation: Mek_S218_S222_p => Mek_S218_S222_u; cell*Function_for_R53(Mek_S218_S222_p, cell, f34);
  ERK_module_dephosphorylation: Erk_T202_T185_p_Y204_Y187_u => Erk_T202_T185_u_Y204_Y187_u; cell*Function_for_R54(Erk_T202_T185_p_Y204_Y187_u, cell, f38);
  R55: Erk_T202_T185_p_Y204_Y187_u => Erk_T202_T185_p_Y204_Y187_p; cell*Function_for_R55(Erk_T202_T185_p_Y204_Y187_u, cell, f36); R55 is "ERK module y204_y187 dephosphorylation";
  GS_activation: GS_SH2_state_i => GS_SH2_state_a; cell*Function_for_R56(GS_SH2_state_i, cell, f_39);
  R57: I_bs + S49 => S56; cell*Function_for_R57(I_bs, S49, cell, k2); R57 is "Receptor binding 2nd insulin molecule";
  R58: S49 => I_bs + IR_NPXY_Y999_u_alpha_beta_loc_m; cell*Function_for_R58(S49, cell, f_3); R58 is "Receptor unbinding and dephosphorylation (on the cell membrane)";
  R59: S49 => S57; cell*Function_for_R59(S49, cell, k4p); R59 is "Phosphorylated receptor internalization";
  R60: S50 => PI3K_SH2 + IRS1_S636_u_Y_p_Y896_YXXM; cell*Function_for_R60(S50, cell, k_8); R60 is "IRS-1_PI3-K complex dissociation (PI3-K inactivation)";
  R61: Akt_S474_p_T309_p => Akt_S474_p_T309_u; cell*Function_for_R61(Akt_S474_p_T309_p, cell, k_11); R61 is "Akt phosphorylation/dephosphorylation in Tyr";
  R62: Akt_S474_p_T309_p => Akt_S474_u_T309_p; cell*Function_for_R62(Akt_S474_p_T309_p, cell, k_17); R62 is "Akt dephosphorylation in Tyr phosphorylated form";
  RasGAP_module_forward: RasGAP_bs + S49 => S58; cell*Function_for_R63(RasGAP_bs, S49, cell, k22);
  IRS1_GS_complex_formation_2: GS_SH2_state_a + S50 => S59; cell*Function_for_R64(GS_SH2_state_a, S50, cell, k26); IRS1_GS_complex_formation_2 is "IRS1-GS complex formation_2";
  IRS1_GS_complex_dissociation: S52 => GS_SH2_state_a + IRS1_S636_u_Y_p_Y896_YXXM; cell*Function_for_R65(S52, cell, k_26); IRS1_GS_complex_dissociation is "IRS1-GS complex dissociation";
  IRS1_SHP2_complex_dissociation: S53 => SHP2_SH2 + IRS1_S636_u_Y_p_Y896_YXXM; cell*Function_for_R66(S53, cell, k_27); IRS1_SHP2_complex_dissociation is "IRS1-SHP2 complex dissociation";
  RAF_module_inactivation: Raf_state_aa => Raf_state_i; cell*Function_for_R67(Raf_state_aa, cell, f32);
  R68: Erk_T202_T185_p_Y204_Y187_p => Erk_T202_T185_p_Y204_Y187_u; cell*Function_for_R68(Erk_T202_T185_p_Y204_Y187_p, cell, f37); R68 is "ERK module phosphorylated and Y187 dephosphorylated";
  R69: S52 => GS_SH2_state_a + IRS1_S636_u_Y_p_Y896_YXXM; cell*Function_for_R69(S52, cell, f40); R69 is "IRS1-GS and IRS1-SHP2 complex disruption and IRS1 dephosphorylation";
  R70: S53 => SHP2_SH2 + IRS1_S636_u_Y_p_Y896_YXXM; cell*Function_for_R70(S53, cell, k41); R70 is "IRS1-GS and IRS1-SHP2 complex formation and IRS1 phosphorylation";
  R71: S56 => I_bs + S49; cell*Function_for_R71(S56, cell, k_2); R71 is "Receptor dissociating 2nd insulin molecule";
  R72: S56 => S60; cell*Function_for_R72(S56, cell, k4p); R72 is "Phosphorylated receptor internalization_ 2";
  R73: S57 => S49; cell*Function_for_R73(S57, cell, k_4p); R73 is "Phosphorylated receptor externalization";
  R74: S57 => IR_NPXY_Y999_u_alpha_beta_loc_c; cell*Function_for_R74(S57, cell, f6); R74 is "Receptor unbinding and dephosphorylation (inside the cell)";
  RasGAP_module_activation: RasGAP_bs + S56 => S61; cell*Function_for_R75(RasGAP_bs, S56, cell, k22);
  RasGAP_module_inactivation: S58 => RasGAP_bs + S49; cell*Function_for_R76(S58, cell, k_22);
  IRS1_GS_complex_formation_3: S59 => GS_SH2_state_a + S50; cell*Function_for_R77(S59, cell, k_26); IRS1_GS_complex_formation_3 is "IRS1-GS complex formation_3";
  R78: S59 => GS_SH2_state_a + S50; cell*Function_for_R78(S59, cell, f40); R78 is "IRS1-GS and IRS1-SHP2 complex disruption and IRS1 dephosphorylation _2";
  SHP2_activity_against_RasGAP: S58 => RasGAP_bs + S49; cell*Function_for_R79(S58, cell, f42);
  R80: S60 => S56; cell*Function_for_R80(S60, cell, k_4p); R80 is "Phosphorylated receptor internalization_3";
  R81: S60 => IR_NPXY_Y999_u_alpha_beta_loc_c; cell*Function_for_R81(S60, cell, f6); R81 is "Receptor unbinding and dephosphorylation (inside the cell) _2";
  RasGAP_module__2: S61 => RasGAP_bs + S56; cell*Function_for_R82(S61, cell, k_22);
  SHP2_activity_against_RasGAP_2: S61 => RasGAP_bs + S56; cell*Function_for_R83(S61, cell, f42);

  // Unit definitions:
  unit time = 60 second;
  unit substance = item;
end
