// SBML level 2 version 4
// dcterms:bibliographicCitation: Computational modeling of Spatio-temporal Ca2+ Signal Propagation along Hepatocyte Cords urn:miriam:pubmed:27076052

function Constant_flux__reversible(v)
  v;
end
Constant_flux__reversible is "Constant flux (reversible)";

function function_4_r127(D, IP3_15)
  0.5*D*IP3_15;
end

function function_4_r139(G, IP3_10, IP3_11, cytosol11)
  G*(IP3_11 + (-IP3_10))*cytosol11;
end

function function_4_r134(A, CaI_14, CaT_14, IP3_14, L, g_14, k1, store14)
  (1 + (-g_14))*(A*(0.5*IP3_14)^4*(1/(k1 + 0.5*IP3_14)^4) + L)*(CaT_14 + (-CaI_14))*store14;
end

function function_4_r141(G, IP3_12, IP3_13, cytosol13)
  G*(IP3_13 + (-IP3_12))*cytosol13;
end

function function_4_r143(G, IP3_11, IP3_12, cytosol12)
  G*(IP3_12 + (-IP3_11))*cytosol12;
end

function function_4_r1(H, k_HR, k_d, k_r1, total_receptor_levels__r_1)
  k_d*total_receptor_levels__r_1 + k_HR*H*total_receptor_levels__r_1 + k_r1*total_receptor_levels__r_1;
end

function function_4_r4(D, IP3_1)
  0.5*D*IP3_1;
end

function function_4_r3(A, CaI_1, CaT_1, IP3_1, L, g_1, k1, store1)
  (1 + (-g_1))*(A*(0.5*IP3_1)^4*(1/(k1 + 0.5*IP3_1)^4) + L)*(CaT_1 + (-CaI_1))*store1;
end

function function_4_r14(D, IP3_2)
  0.5*D*IP3_2;
end

function function_4_r12(H, k_HR, k_d, k_r2, total_receptor_levels__r_2)
  k_d*total_receptor_levels__r_2 + k_HR*H*total_receptor_levels__r_2 + k_r2*total_receptor_levels__r_2;
end

function function_4_r13(CaI_2, E, g_2)
  E*CaI_2^4*(1 + (-g_2));
end

function function_4_r9(A, CaI_2, CaT_2, IP3_2, L, g_2, k1, store2)
  (1 + (-g_2))*(A*(0.5*IP3_2)^4*(1/(k1 + 0.5*IP3_2)^4) + L)*(CaT_2 + (-CaI_2))*store2;
end

function function_4_r0(CaI_1, H, k3, k_ip31, kcat, total_receptor_levels__r_1)
  k_ip31*H*total_receptor_levels__r_1*(1 + (-(k3*(1/(CaI_1 + k3)))))*(1/(kcat + total_receptor_levels__r_1));
end

function function_4_r5(B, CaI_1, cytosol1, k2)
  B*CaI_1^2*(1/(k2^2 + CaI_1^2))*cytosol1;
end

function function_4_r6(CaI_1, E, g_1)
  E*CaI_1^4*(1 + (-g_1));
end

function function_4_r8(CaI_2, H, k3, k_ip32, kcat, total_receptor_levels__r_2)
  k_ip32*H*total_receptor_levels__r_2*(1 + (-(k3*(1/(CaI_2 + k3)))))*(1/(kcat + total_receptor_levels__r_2));
end

function function_4_r25(CaI_3, E, g_3)
  E*CaI_3^4*(1 + (-g_3));
end

function function_4_r19(A, CaI_3, CaT_3, IP3_3, L, g_3, k1, store3)
  (1 + (-g_3))*(A*(0.5*IP3_3)^4*(1/(k1 + 0.5*IP3_3)^4) + L)*(CaT_3 + (-CaI_3))*store3;
end

function function_4_r15(B, CaI_2, cytosol2, k2)
  B*CaI_2^2*(1/(k2^2 + CaI_2^2))*cytosol2;
end

function function_4_r16(G, IP3_1, IP3_2, cytosol1)
  G*(IP3_1 + (-IP3_2))*cytosol1;
end

function function_4_r18(CaI_3, H, k3, k_ip33, kcat, total_receptor_levels__r_3)
  k_ip33*H*total_receptor_levels__r_3*(1 + (-(k3*(1/(CaI_3 + k3)))))*(1/(kcat + total_receptor_levels__r_3));
end

function function_4_r21(H, k_HR, k_d, k_r3, total_receptor_levels__r_3)
  k_d*total_receptor_levels__r_3 + k_HR*H*total_receptor_levels__r_3 + k_r3*total_receptor_levels__r_3;
end

function function_4_r23(D, IP3_3)
  0.5*D*IP3_3;
end

function function_4_r30(D, IP3_4)
  0.5*D*IP3_4;
end

function function_4_r33(CaI_4, E, g_4)
  E*CaI_4^4*(1 + (-g_4));
end

function function_4_r34(A, CaI_4, CaT_4, IP3_4, L, g_4, k1, store4)
  (1 + (-g_4))*(A*(0.5*IP3_4)^4*(1/(k1 + 0.5*IP3_4)^4) + L)*(CaT_4 + (-CaI_4))*store4;
end

function function_4_r24(B, CaI_3, cytosol3, k2)
  B*CaI_3^2*(1/(k2^2 + CaI_3^2))*cytosol3;
end

function function_4_r27(G, IP3_2, IP3_3, cytosol3)
  G*(IP3_3 + (-IP3_2))*cytosol3;
end

function function_4_r28(H, k_HR, k_d, k_r4, total_receptor_levels__r_4)
  k_d*total_receptor_levels__r_4 + k_HR*H*total_receptor_levels__r_4 + k_r4*total_receptor_levels__r_4;
end

function function_4_r29(CaI_4, H, k3, k_ip34, kcat, total_receptor_levels__r_4)
  k_ip34*H*total_receptor_levels__r_4*(1 + (-(k3*(1/(CaI_4 + k3)))))*(1/(kcat + total_receptor_levels__r_4));
end

function function_4_r43(D, IP3_5)
  0.5*D*IP3_5;
end

function function_4_r40(A, CaI_5, CaT_5, IP3_5, L, g_5, k1, store5)
  (1 + (-g_5))*(A*(0.5*IP3_5)^4*(1/(k1 + 0.5*IP3_5)^4) + L)*(CaT_5 + (-CaI_5))*store5;
end

function function_4_r35(B, CaI_4, cytosol4, k2)
  B*CaI_4^2*(1/(k2^2 + CaI_4^2))*cytosol4;
end

function function_4_r37(G, IP3_3, IP3_4, cytosol4)
  G*(IP3_4 + (-IP3_3))*cytosol4;
end

function function_4_r38(H, k_HR, k_d, k_r5, total_receptor_levels__r_5)
  k_d*total_receptor_levels__r_5 + k_HR*H*total_receptor_levels__r_5 + k_r5*total_receptor_levels__r_5;
end

function function_4_r39(CaI_5, E, g_5)
  E*CaI_5^4*(1 + (-g_5));
end

function function_4_r42(CaI_5, H, k3, k_ip35, kcat, total_receptor_levels__r_5)
  k_ip35*H*total_receptor_levels__r_5*(1 + (-(k3*(1/(CaI_5 + k3)))))*(1/(kcat + total_receptor_levels__r_5));
end

function function_4_r55(CaI_6, H, k3, k_ip36, kcat, total_receptor_levels__r_6)
  k_ip36*H*total_receptor_levels__r_6*(1 + (-(k3*(1/(CaI_6 + k3)))))*(1/(kcat + total_receptor_levels__r_6));
end

function function_4_r54(D, IP3_6)
  0.5*D*IP3_6;
end

function function_4_r64(B, CaI_7, cytosol7, k2)
  B*CaI_7^2*(1/(k2^2 + CaI_7^2))*cytosol7;
end

function function_4_r57(G, IP3_5, IP3_6, cytosol6)
  G*(IP3_6 + (-IP3_5))*cytosol6;
end

function function_4_r58(CaI_7, E, g_7)
  E*CaI_7^4*(1 + (-g_7));
end

function function_4_r60(CaI_7, H, k3, k_ip37, kcat, total_receptor_levels__r_7)
  k_ip37*H*total_receptor_levels__r_7*(1 + (-(k3*(1/(CaI_7 + k3)))))*(1/(kcat + total_receptor_levels__r_7));
end

function function_4_r45(B, CaI_5, cytosol5, k2)
  B*CaI_5^2*(1/(k2^2 + CaI_5^2))*cytosol5;
end

function function_4_r47(G, IP3_4, IP3_5, cytosol5)
  G*(IP3_5 + (-IP3_4))*cytosol5;
end

function function_4_r51(CaI_6, E, g_6)
  E*CaI_6^4*(1 + (-g_6));
end

function function_4_r53(H, k_HR, k_d, k_r6, total_receptor_levels__r_6)
  k_d*total_receptor_levels__r_6 + k_HR*H*total_receptor_levels__r_6 + k_r6*total_receptor_levels__r_6;
end

function function_4_r62(D, IP3_7)
  0.5*D*IP3_7;
end

function function_4_r63(H, k_HR, k_d, k_r7, total_receptor_levels__r_7)
  k_d*total_receptor_levels__r_7 + k_HR*H*total_receptor_levels__r_7 + k_r7*total_receptor_levels__r_7;
end

function function_4_r68(D, IP3_8)
  0.5*D*IP3_8;
end

function function_4_r71(H, k_HR, k_d, k_r8, total_receptor_levels__r_8)
  k_d*total_receptor_levels__r_8 + k_HR*H*total_receptor_levels__r_8 + k_r8*total_receptor_levels__r_8;
end

function function_4_r70(CaI_8, E, g_8)
  E*CaI_8^4*(1 + (-g_8));
end

function function_4_r67(G, IP3_6, IP3_7, cytosol7)
  G*(IP3_7 + (-IP3_6))*cytosol7;
end

function function_4_r48(B, CaI_6, cytosol6, k2)
  B*CaI_6^2*(1/(k2^2 + CaI_6^2))*cytosol6;
end

function function_4_r50(A, CaI_6, CaT_6, IP3_6, L, g_6, k1, store6)
  (1 + (-g_6))*(A*(0.5*IP3_6)^4*(1/(k1 + 0.5*IP3_6)^4) + L)*(CaT_6 + (-CaI_6))*store6;
end

function function_4_r73(CaI_8, H, k3, k_ip38, kcat, total_receptor_levels__r_8)
  k_ip38*H*total_receptor_levels__r_8*(1 + (-(k3*(1/(CaI_8 + k3)))))*(1/(kcat + total_receptor_levels__r_8));
end

function function_4_r61(A, CaI_7, CaT_7, IP3_7, L, g_7, k1, store7)
  (1 + (-g_7))*(A*(0.5*IP3_7)^4*(1/(k1 + 0.5*IP3_7)^4) + L)*(CaT_7 + (-CaI_7))*store7;
end

function function_4_r78(CaI_9, E, g_9)
  E*CaI_9^4*(1 + (-g_9));
end

function function_4_r81(CaI_9, H, k3, k_ip39, kcat, total_receptor_levels__r_9)
  k_ip39*H*total_receptor_levels__r_9*(1 + (-(k3*(1/(CaI_9 + k3)))))*(1/(kcat + total_receptor_levels__r_9));
end

function function_4_r72(A, CaI_8, CaT_8, IP3_8, L, g_8, k1, store8)
  (1 + (-g_8))*(A*(0.5*IP3_8)^4*(1/(k1 + 0.5*IP3_8)^4) + L)*(CaT_8 + (-CaI_8))*store8;
end

function function_4_r75(B, CaI_8, cytosol8, k2)
  B*CaI_8^2*(1/(k2^2 + CaI_8^2))*cytosol8;
end

function function_4_r77(G, IP3_7, IP3_8, cytosol8)
  G*(IP3_8 + (-IP3_7))*cytosol8;
end

function function_4_r87(G, IP3_8, IP3_9, cytosol9)
  G*(IP3_9 + (-IP3_8))*cytosol9;
end

function function_4_r91(H, k_HR, k_d, k_r10, total_receptor_levels__r_10)
  k_d*total_receptor_levels__r_10 + k_HR*H*total_receptor_levels__r_10 + k_r10*total_receptor_levels__r_10;
end

function function_4_r89(CaI_10, H, k3, k_ip310, kcat, total_receptor_levels__r_10)
  k_ip310*H*total_receptor_levels__r_10*(1 + (-(k3*(1/(CaI_10 + k3)))))*(1/(kcat + total_receptor_levels__r_10));
end

function function_4_r94(A, CaI_10, CaT_10, IP3_10, L, g_10, k1, store10)
  (1 + (-g_10))*(A*(0.5*IP3_10)^4*(1/(k1 + 0.5*IP3_10)^4) + L)*(CaT_10 + (-CaI_10))*store10;
end

function function_4_r95(B, CaI_10, cytosol10, k2)
  B*CaI_10^2*(1/(k2^2 + CaI_10^2))*cytosol10;
end

function function_4_r82(H, k_HR, k_d, k_r9, total_receptor_levels__r_9)
  k_d*total_receptor_levels__r_9 + k_HR*H*total_receptor_levels__r_9 + k_r9*total_receptor_levels__r_9;
end

function function_4_r83(D, IP3_9)
  0.5*D*IP3_9;
end

function function_4_r84(A, CaI_9, CaT_9, IP3_9, L, g_9, k1, store9)
  (1 + (-g_9))*(A*(0.5*IP3_9)^4*(1/(k1 + 0.5*IP3_9)^4) + L)*(CaT_9 + (-CaI_9))*store9;
end

function function_4_r85(B, CaI_9, cytosol9, k2)
  B*CaI_9^2*(1/(k2^2 + CaI_9^2))*cytosol9;
end

function function_4_r96(G, IP3_10, IP3_9, cytosol10)
  G*(IP3_10 + (-IP3_9))*cytosol10;
end

function function_4_r98(CaI_11, H, k3, k_ip311, kcat, total_receptor_levels__r_11)
  k_ip311*H*total_receptor_levels__r_11*(1 + (-(k3*(1/(CaI_11 + k3)))))*(1/(kcat + total_receptor_levels__r_11));
end

function function_4_r110(CaI_13, H, k3, k_ip313, kcat, total_receptor_levels__r_13)
  k_ip313*H*total_receptor_levels__r_13*(1 + (-(k3*(1/(CaI_13 + k3)))))*(1/(kcat + total_receptor_levels__r_13));
end

function function_4_r109(D, IP3_12)
  0.5*D*IP3_12;
end

function function_4_r107(H, k_HR, k_d, k_r12, total_receptor_levels__r_12)
  k_d*total_receptor_levels__r_12 + k_HR*H*total_receptor_levels__r_12 + k_r12*total_receptor_levels__r_12;
end

function function_4_r105(CaI_12, E, g_12)
  E*CaI_12^4*(1 + (-g_12));
end

function function_4_r92(CaI_10, E, g_10)
  E*CaI_10^4*(1 + (-g_10));
end

function function_4_r93(D, IP3_10)
  0.5*D*IP3_10;
end

function function_4_r121(D, IP3_14)
  0.5*D*IP3_14;
end

function function_4_r119(H, k_HR, k_d, k_r14, total_receptor_levels__r_14)
  k_d*total_receptor_levels__r_14 + k_HR*H*total_receptor_levels__r_14 + k_r14*total_receptor_levels__r_14;
end

function function_4_r117(CaI_14, E, g_14)
  E*CaI_14^4*(1 + (-g_14));
end

function function_4_r99(CaI_11, E, g_11)
  E*CaI_11^4*(1 + (-g_11));
end

function function_4_r101(H, k_HR, k_d, k_r11, total_receptor_levels__r_11)
  k_d*total_receptor_levels__r_11 + k_HR*H*total_receptor_levels__r_11 + k_r11*total_receptor_levels__r_11;
end

function function_4_r103(D, IP3_11)
  0.5*D*IP3_11;
end

function function_4_r104(CaI_12, H, k3, k_ip312, kcat, total_receptor_levels__r_12)
  k_ip312*H*total_receptor_levels__r_12*(1 + (-(k3*(1/(CaI_12 + k3)))))*(1/(kcat + total_receptor_levels__r_12));
end

function function_4_r122(CaI_15, H, k3, k_ip315, kcat, total_receptor_levels__r_15)
  k_ip315*H*total_receptor_levels__r_15*(1 + (-(k3*(1/(CaI_15 + k3)))))*(1/(kcat + total_receptor_levels__r_15));
end

function function_4_r128(A, CaI_11, CaT_11, IP3_11, L, g_11, k1, store11)
  (1 + (-g_11))*(A*(0.5*IP3_11)^4*(1/(k1 + 0.5*IP3_11)^4) + L)*(CaT_11 + (-CaI_11))*store11;
end

function function_4_r129(B, CaI_11, cytosol11, k2)
  B*CaI_11^2*(1/(k2^2 + CaI_11^2))*cytosol11;
end

function function_4_r130(A, CaI_12, CaT_12, IP3_12, L, g_12, k1, store12)
  (1 + (-g_12))*(A*(0.5*IP3_12)^4*(1/(k1 + 0.5*IP3_12)^4) + L)*(CaT_12 + (-CaI_12))*store12;
end

function function_4_r111(CaI_13, E, g_13)
  E*CaI_13^4*(1 + (-g_13));
end

function function_4_r113(H, k_HR, k_d, k_r13, total_receptor_levels__r_13)
  k_d*total_receptor_levels__r_13 + k_HR*H*total_receptor_levels__r_13 + k_r13*total_receptor_levels__r_13;
end

function function_4_r115(D, IP3_13)
  0.5*D*IP3_13;
end

function function_4_r116(CaI_14, H, k3, k_ip314, kcat, total_receptor_levels__r_14)
  k_ip314*H*total_receptor_levels__r_14*(1 + (-(k3*(1/(CaI_14 + k3)))))*(1/(kcat + total_receptor_levels__r_14));
end

function function_4_r123(CaI_15, E, g_15)
  E*CaI_15^4*(1 + (-g_15));
end

function function_4_r125(H, k_HR, k_d, k_r15, total_receptor_levels__r_15)
  k_d*total_receptor_levels__r_15 + k_HR*H*total_receptor_levels__r_15 + k_r15*total_receptor_levels__r_15;
end

function function_4_r137(B, CaI_15, cytosol15, k2)
  B*CaI_15^2*(1/(k2^2 + CaI_15^2))*cytosol15;
end

function function_4_r131(B, CaI_12, cytosol12, k2)
  B*CaI_12^2*(1/(k2^2 + CaI_12^2))*cytosol12;
end

function function_4_r132(A, CaI_13, CaT_13, IP3_13, L, g_13, k1, store13)
  (1 + (-g_13))*(A*(0.5*IP3_13)^4*(1/(k1 + 0.5*IP3_13)^4) + L)*(CaT_13 + (-CaI_13))*store13;
end

function function_4_r133(B, CaI_13, cytosol13, k2)
  B*CaI_13^2*(1/(k2^2 + CaI_13^2))*cytosol13;
end

function function_4_r135(B, CaI_14, cytosol14, k2)
  B*CaI_14^2*(1/(k2^2 + CaI_14^2))*cytosol14;
end

function function_4_r136(A, CaI_15, CaT_15, IP3_15, L, g_15, k1, store15)
  (1 + (-g_15))*(A*(0.5*IP3_15)^4*(1/(k1 + 0.5*IP3_15)^4) + L)*(CaT_15 + (-CaI_15))*store15;
end

function function_4_r145(G, IP3_13, IP3_14, cytosol14)
  G*(IP3_14 + (-IP3_13))*cytosol14;
end

function function_4_r147(G, IP3_14, IP3_15, cytosol15)
  G*(IP3_15 + (-IP3_14))*cytosol15;
end

model Verma2016___Ca_2___Signal_Propagation_Along_Hepatocyte_Cords()
  // Verma2016 - Ca(2+) Signal Propagation Along Hepatocyte Cords
  // This model is described in the article:
  // Computational Modeling of Spatiotemporal Ca(2+) Signal Propagation Along Hepatocyte Cords.
  // Verma A, Makadia H, Hoek JB, Ogunnaike BA, Vadigepalli R.
  // IEEE Trans Biomed Eng 2016 Oct; 63(10): 2047-2055
  // Abstract:
  // The purpose of this study is to model the dynamics of lobular Ca(2+) wave propagation induced by an extracellular stimulus, and to analyze the effect of spatially systematic variations in cell-intrinsic signaling parameters on sinusoidal Ca(2+) response.We developed a computational model of lobular scale Ca(2+) signaling that accounts for receptor- mediated initiation of cell-intrinsic Ca(2+) signal in hepatocytes and its propagation to neighboring hepatocytes through gap junction-mediated molecular exchange.Analysis of the simulations showed that a pericentral-to-periportal spatial gradient in hormone sensitivity and/or rates of IP3 synthesis underlies the Ca(2+) wave propagation. We simulated specific cases corresponding to localized disruptions in the graded pattern of these parameters along a hepatic sinusoid. Simulations incorporating locally altered parameters exhibited Ca(2+) waves that do not propagate throughout the hepatic plate. Increased gap junction coupling restored normal Ca(2+) wave propagation when hepatocytes with low Ca(2+) signaling ability were localized in the midlobular or the pericentral region.Multiple spatial patterns in intracellular signaling parameters can lead to Ca(2+) wave propagation that is consistent with the experimentally observed spatial patterns of Ca(2+) dynamics. Based on simulations and analysis, we predict that increased gap junction-mediated intercellular coupling can induce robust Ca(2+) signals in otherwise poorly responsive hepatocytes, at least partly restoring the sinusoidally oriented Ca (2+) waves.Our bottom-up model of agonist-evoked spatial Ca(2+) patterns can be integrated with detailed descriptions of liver histology to study Ca(2+) regulation at the tissue level.
  // This model is hosted on BioModels Database and identified by: MODEL1603110003.
  // To cite BioModels Database, please use: BioModels Database: An enhanced, curated and annotated resource for published quantitative kinetic models.
  // To the extent possible under law, all copyright and related or neighbouring rights to this encoded model have been dedicated to the public domain worldwide. Please refer to CC0 Public Domain Dedication for more information.
  // isInstanceOf GO:0019722 biomodels.db:MODEL1603110003 taxonomy:9606
  // isInstanceOf BTO:0000575
  // isDescribedBy taxonomy:9606 BTO:0000575 pubmed:27076052
  // hasProperty GO:0019722
  // hasProperty biomodels.db:MODEL1603110003
  // biomodels.db:MODEL1603110003 biomodels.db:BIOMD0000000834

  // Compartments:
  compartment cytosol5 = 1;
  compartment store5 = 1;
  compartment cytosol4 = 1;
  compartment cytosol1 = 1;
  compartment cytosol6 = 1;
  compartment store6 = 1;
  compartment store1 = 1;
  compartment store3 = 1;
  compartment cytosol3 = 1;
  compartment cytosol7 = 1;
  compartment store7 = 1;
  compartment cytosol8 = 1;
  compartment store8 = 1;
  compartment cytosol2 = 1;
  compartment store2 = 1;
  compartment cytosol9 = 1;
  compartment store9 = 1;
  compartment cytosol10 = 1;
  compartment store10 = 1;
  compartment cytosol11 = 1;
  compartment store11 = 1;
  compartment cytosol13 = 1;
  compartment store13 = 1;
  compartment cytosol14 = 1;
  compartment store14 = 1;
  compartment cytosol15 = 1;
  compartment store15 = 1;
  compartment store4 = 1;
  compartment cytosol12 = 1;
  compartment store12 = 1;

  // Species:
  species CaI_1 in cytosol1 = 0.2; CaI_1 is "cytosolic Ca2+_CaI_1";  // kegg.compound:C00076
  species g_1 in cytosol1 = 0.25; g_1 is "total IP3R_g_1";  // uniprot:P29995
  species IP3_1 in cytosol1 = 0.1; IP3_1 is "cytosolic IP3_IP3_1";  // kegg.compound:C01245
  species total_receptor_levels__r_1 in cytosol1 = 0.5;  // uniprot:P30560
  species CaT_1 in store1 = 500; CaT_1 is "total intracellular store Ca2+ content_CaT_1";  // kegg.compound:C00076; ensembl:NewID
  species g_2 in cytosol2 = 0.25; g_2 is "total IP3R_g_2";
  species total_receptor_levels__r_2 in cytosol2 = 0.5;
  species CaI_2 in cytosol2 = 0.2; CaI_2 is "cytosolic Ca2+_CaI_2";
  species IP3_2 in cytosol2 = 0.1; IP3_2 is "cytosolic IP3_IP3_2";
  species CaT_2 in store2 = 500; CaT_2 is "total intracellular store Ca2+ content_CaT_2";
  species CaI_3 in cytosol3 = 0.2; CaI_3 is "cytosolic Ca2+_CaI_3";
  species IP3_3 in cytosol3 = 0.1; IP3_3 is "cytosolic IP3_IP3_3";
  species g_3 in cytosol3 = 0.25; g_3 is "total IP3R_g_3";
  species total_receptor_levels__r_3 in cytosol3 = 0.5;
  species CaT_3 in store3 = 500; CaT_3 is "total intracellular store Ca2+ content_CaT_3";
  species CaI_4 in cytosol4 = 0.2; CaI_4 is "cytosolic Ca2+_CaI_4";
  species IP3_4 in cytosol4 = 0.1; IP3_4 is "cytosolic IP3_IP3_4";
  species total_receptor_levels__r_4 in cytosol4 = 0.5;
  species g_4 in cytosol4 = 0.25; g_4 is "total IP3R_g_4";
  species CaT_4 in store4 = 500; CaT_4 is "total intracellular store Ca2+ content_CaT_4";
  species total_receptor_levels__r_5 in cytosol5 = 0.5;
  species IP3_5 in cytosol5 = 0.1; IP3_5 is "cytosolic IP3_IP3_5";
  species g_5 in cytosol5 = 0.25; g_5 is "total IP3R_g_5";
  species CaI_5 in cytosol5 = 0.2; CaI_5 is "cytosolic Ca2+_CaI_5";
  species CaT_5 in store5 = 500; CaT_5 is "total intracellular store Ca2+ content_CaT_5";
  species CaI_6 in cytosol6 = 0.2; CaI_6 is "cytosolic Ca2+_CaI_6";
  species g_6 in cytosol6 = 0.25; g_6 is "total IP3R_g_6";
  species total_receptor_levels__r_6 in cytosol6 = 0.5;
  species IP3_6 in cytosol6 = 0.1; IP3_6 is "cytosolic IP3_IP3_6";
  species CaT_6 in store6 = 500; CaT_6 is "total intracellular store Ca2+ content_CaT_6";
  species CaI_7 in cytosol7 = 0.2; CaI_7 is "cytosolic Ca2+_CaI_7";
  species g_7 in cytosol7 = 0.25; g_7 is "total IP3R_g_7";
  species total_receptor_levels__r_7 in cytosol7 = 0.5;
  species IP3_7 in cytosol7 = 0.1; IP3_7 is "cytosolic IP3_IP3_7";
  species CaT_7 in store7 = 500; CaT_7 is "total intracellular store Ca2+ content_CaT_7";
  species total_receptor_levels__r_8 in cytosol8 = 0.5;
  species IP3_8 in cytosol8 = 0.1; IP3_8 is "cytosolic IP3_IP3_8";
  species g_8 in cytosol8 = 0.25; g_8 is "total IP3R_g_8";
  species CaI_8 in cytosol8 = 0.2; CaI_8 is "cytosolic Ca2+_CaI_8";
  species CaT_8 in store8 = 500; CaT_8 is "total intracellular store Ca2+ content_CaT_8";
  species IP3_9 in cytosol9 = 0.1; IP3_9 is "cytosolic IP3_IP3_9";
  species CaI_9 in cytosol9 = 0.2; CaI_9 is "cytosolic Ca2+_CaI_9";
  species total_receptor_levels__r_9 in cytosol9 = 0.5;
  species g_9 in cytosol9 = 0.25; g_9 is "total IP3R_g_9";
  species CaT_9 in store9 = 500; CaT_9 is "total intracellular store Ca2+ content_CaT_9";
  species total_receptor_levels__r_10 in cytosol10 = 0.5;
  species IP3_10 in cytosol10 = 0.1; IP3_10 is "cytosolic IP3_IP3_10";
  species g_10 in cytosol10 = 0.25; g_10 is "total IP3R_g_10";
  species CaI_10 in cytosol10 = 0.2; CaI_10 is "cytosolic Ca2+_CaI_10";
  species CaT_10 in store10 = 500; CaT_10 is "total intracellular store Ca2+ content_CaT_10";
  species IP3_11 in cytosol11 = 0.1; IP3_11 is "cytosolic IP3_IP3_11";
  species g_11 in cytosol11 = 0.25; g_11 is "total IP3R_g_11";
  species CaI_11 in cytosol11 = 0.2; CaI_11 is "cytosolic Ca2+_CaI_11";
  species total_receptor_levels__r_11 in cytosol11 = 0.5;
  species IP3_12 in cytosol12 = 0.1; IP3_12 is "cytosolic IP3_IP3_12";
  species g_12 in cytosol12 = 0.25; g_12 is "total IP3R_g_12";
  species CaI_12 in cytosol12 = 0.2; CaI_12 is "cytosolic Ca2+_CaI_12";
  species total_receptor_levels__r_12 in cytosol12 = 0.5;
  species IP3_13 in cytosol13 = 0.1; IP3_13 is "cytosolic IP3_IP3_13";
  species g_13 in cytosol13 = 0.25; g_13 is "total IP3R_g_13";
  species CaI_13 in cytosol13 = 0.2; CaI_13 is "cytosolic Ca2+_CaI_13";
  species total_receptor_levels__r_13 in cytosol13 = 0.5;
  species IP3_14 in cytosol14 = 0.1; IP3_14 is "cytosolic IP3_IP3_14";
  species g_14 in cytosol14 = 0.25; g_14 is "total IP3R_g_14";
  species CaI_14 in cytosol14 = 0.2; CaI_14 is "cytosolic Ca2+_CaI_14";
  species total_receptor_levels__r_14 in cytosol14 = 0.5;
  species IP3_15 in cytosol15 = 0.1; IP3_15 is "cytosolic IP3_IP3_15";
  species g_15 in cytosol15 = 0.25; g_15 is "total IP3R_g_15";
  species CaI_15 in cytosol15 = 0.2; CaI_15 is "cytosolic Ca2+_CaI_15";
  species total_receptor_levels__r_15 in cytosol15 = 0.5;
  species CaT_11 in store11 = 500; CaT_11 is "total intracellular store Ca2+ content_CaT_11";
  species CaT_12 in store12 = 500; CaT_12 is "total intracellular store Ca2+ content_CaT_12";
  species CaT_13 in store13 = 500; CaT_13 is "total intracellular store Ca2+ content_CaT_13";
  species CaT_14 in store14 = 500; CaT_14 is "total intracellular store Ca2+ content_CaT_14";
  species CaT_15 in store15 = 500; CaT_15 is "total intracellular store Ca2+ content_CaT_15";

  // Parameters:
  H = 0.00018;
  k_d = 0.34;
  k_HR = 1;
  kcat = 0.45;
  k3 = 1;
  D = 1.6;
  E = 1;
  F = 0.01;
  A = 0.2;
  k1 = 0.5;
  L = 0.00015;
  B = 0.082;
  k2 = 0.15;
  k_r1 = 1;
  G = 0.9;
  k_r2 = 1.5;
  k_r = 2;
  k_r3 = 1.928571;
  k_r4 = 1.357143;
  k_r5 = 1.857143;
  k_r6 = 1.785714;
  k_r7 = 1.571429;
  k_r8 = 1.714286;
  k_r9 = 1.142857;
  k_r10 = 1.642857;
  k_r11 = 1.428571;
  k_r12 = 2;
  k_r13 = 1.214286;
  k_r14 = 1.071429;

  // Reactions:
  r0: -> IP3_1; cytosol1*function_4_r0(CaI_1, H, k3, k_ip31, kcat, total_receptor_levels__r_1);  // modifiers: CaI_1, total_receptor_levels__r_1
    k_ip31 = 0.785714;
  r1: total_receptor_levels__r_1 -> ; cytosol1*function_4_r1(H, k_HR, k_d, k_r1, total_receptor_levels__r_1);
  r3: CaT_1 -> CaI_1; function_4_r3(A, CaI_1, CaT_1, IP3_1, L, g_1, k1, store1);  // modifiers: IP3_1, g_1
  r4: IP3_1 -> ; cytosol1*function_4_r4(D, IP3_1);
  r5: CaI_1 -> CaT_1; function_4_r5(B, CaI_1, cytosol1, k2);
  r6: -> g_1; cytosol1*function_4_r6(CaI_1, E, g_1);  // modifiers: CaI_1
  r7: g_1 -> ; cytosol1*Constant_flux__reversible(F);  // modifiers: CaI_1
  r2: -> total_receptor_levels__r_1; cytosol1*Constant_flux__reversible(k_r1);
  r8: -> IP3_2; cytosol2*function_4_r8(CaI_2, H, k3, k_ip32, kcat, total_receptor_levels__r_2);  // modifiers: CaI_2, total_receptor_levels__r_2
    k_ip32 = 0.885714;
  r10: g_2 -> ; cytosol2*Constant_flux__reversible(F);  // modifiers: CaI_2
  r11: -> total_receptor_levels__r_2; cytosol2*Constant_flux__reversible(k_r2);
  r12: total_receptor_levels__r_2 -> ; cytosol2*function_4_r12(H, k_HR, k_d, k_r2, total_receptor_levels__r_2);
  r13: -> g_2; cytosol2*function_4_r13(CaI_2, E, g_2);  // modifiers: CaI_2
  r14: IP3_2 -> ; cytosol2*function_4_r14(D, IP3_2);
  r9: CaT_2 -> CaI_2; function_4_r9(A, CaI_2, CaT_2, IP3_2, L, g_2, k1, store2);  // modifiers: g_2, IP3_2
  r15: CaI_2 -> CaT_2; function_4_r15(B, CaI_2, cytosol2, k2);
  r16: IP3_1 -> IP3_2; function_4_r16(G, IP3_1, IP3_2, cytosol1);
  r18: -> IP3_3; cytosol3*function_4_r18(CaI_3, H, k3, k_ip33, kcat, total_receptor_levels__r_3);  // modifiers: CaI_3, total_receptor_levels__r_3
    k_ip33 = 0.757143;
  r20: -> total_receptor_levels__r_3; cytosol3*Constant_flux__reversible(k_r3);
  r21: total_receptor_levels__r_3 -> ; cytosol3*function_4_r21(H, k_HR, k_d, k_r3, total_receptor_levels__r_3);
  r22: g_3 -> ; cytosol3*Constant_flux__reversible(F);  // modifiers: CaI_3
  r23: IP3_3 -> ; cytosol3*function_4_r23(D, IP3_3);
  r25: -> g_3; cytosol3*function_4_r25(CaI_3, E, g_3);  // modifiers: CaI_3
  r19: CaT_3 -> CaI_3; function_4_r19(A, CaI_3, CaT_3, IP3_3, L, g_3, k1, store3);  // modifiers: g_3, IP3_3
  r24: CaI_3 -> CaT_3; function_4_r24(B, CaI_3, cytosol3, k2);
  r27: IP3_3 -> IP3_2; function_4_r27(G, IP3_2, IP3_3, cytosol3);
  r28: total_receptor_levels__r_4 -> ; cytosol4*function_4_r28(H, k_HR, k_d, k_r4, total_receptor_levels__r_4);
  r29: -> IP3_4; cytosol4*function_4_r29(CaI_4, H, k3, k_ip34, kcat, total_receptor_levels__r_4);  // modifiers: CaI_4, total_receptor_levels__r_4
    k_ip34 = 0.857143;
  r30: IP3_4 -> ; cytosol4*function_4_r30(D, IP3_4);
  r31: g_4 -> ; cytosol4*Constant_flux__reversible(F);  // modifiers: CaI_4
  r32: -> total_receptor_levels__r_4; cytosol4*Constant_flux__reversible(k_r4);
  r33: -> g_4; cytosol4*function_4_r33(CaI_4, E, g_4);  // modifiers: CaI_4
  r34: CaT_4 -> CaI_4; function_4_r34(A, CaI_4, CaT_4, IP3_4, L, g_4, k1, store4);  // modifiers: g_4, IP3_4
  r35: CaI_4 -> CaT_4; function_4_r35(B, CaI_4, cytosol4, k2);
  r37: IP3_4 -> IP3_3; function_4_r37(G, IP3_3, IP3_4, cytosol4);
  r38: total_receptor_levels__r_5 -> ; cytosol5*function_4_r38(H, k_HR, k_d, k_r5, total_receptor_levels__r_5);
  r39: -> g_5; cytosol5*function_4_r39(CaI_5, E, g_5);  // modifiers: CaI_5
  r41: g_5 -> ; cytosol5*Constant_flux__reversible(F);  // modifiers: CaI_5
  r42: -> IP3_5; cytosol5*function_4_r42(CaI_5, H, k3, k_ip35, kcat, total_receptor_levels__r_5);  // modifiers: CaI_5, total_receptor_levels__r_5
    k_ip35 = 0.842857;
  r43: IP3_5 -> ; cytosol5*function_4_r43(D, IP3_5);
  r44: -> total_receptor_levels__r_5; cytosol5*Constant_flux__reversible(k_r5);
  r40: CaT_5 -> CaI_5; function_4_r40(A, CaI_5, CaT_5, IP3_5, L, g_5, k1, store5);  // modifiers: g_5, IP3_5
  r45: CaI_5 -> CaT_5; function_4_r45(B, CaI_5, cytosol5, k2);
  r47: IP3_5 -> IP3_4; function_4_r47(G, IP3_4, IP3_5, cytosol5);
  r49: g_6 -> ; cytosol6*Constant_flux__reversible(F);  // modifiers: CaI_6
  r51: -> g_6; cytosol6*function_4_r51(CaI_6, E, g_6);  // modifiers: CaI_6
  r52: -> total_receptor_levels__r_6; cytosol6*Constant_flux__reversible(k_r6);
  r53: total_receptor_levels__r_6 -> ; cytosol6*function_4_r53(H, k_HR, k_d, k_r6, total_receptor_levels__r_6);
  r54: IP3_6 -> ; cytosol6*function_4_r54(D, IP3_6);
  r55: -> IP3_6; cytosol6*function_4_r55(CaI_6, H, k3, k_ip36, kcat, total_receptor_levels__r_6);  // modifiers: CaI_6, total_receptor_levels__r_6
    k_ip36 = 0.814286;
  r48: CaI_6 -> CaT_6; function_4_r48(B, CaI_6, cytosol6, k2);
  r50: CaT_6 -> CaI_6; function_4_r50(A, CaI_6, CaT_6, IP3_6, L, g_6, k1, store6);  // modifiers: IP3_6, g_6
  r57: IP3_6 -> IP3_5; function_4_r57(G, IP3_5, IP3_6, cytosol6);
  r58: -> g_7; cytosol7*function_4_r58(CaI_7, E, g_7);  // modifiers: CaI_7
  r59: -> total_receptor_levels__r_7; cytosol7*Constant_flux__reversible(k_r7);
  r60: -> IP3_7; cytosol7*function_4_r60(CaI_7, H, k3, k_ip37, kcat, total_receptor_levels__r_7);  // modifiers: CaI_7, total_receptor_levels__r_7
    k_ip37 = 0.742857;
  r62: IP3_7 -> ; cytosol7*function_4_r62(D, IP3_7);
  r63: total_receptor_levels__r_7 -> ; cytosol7*function_4_r63(H, k_HR, k_d, k_r7, total_receptor_levels__r_7);
  r65: g_7 -> ; cytosol7*Constant_flux__reversible(F);  // modifiers: CaI_7
  r61: CaT_7 -> CaI_7; function_4_r61(A, CaI_7, CaT_7, IP3_7, L, g_7, k1, store7);  // modifiers: g_7, IP3_7
  r64: CaI_7 -> CaT_7; function_4_r64(B, CaI_7, cytosol7, k2);
  r67: IP3_7 -> IP3_6; function_4_r67(G, IP3_6, IP3_7, cytosol7);
  r68: IP3_8 -> ; cytosol8*function_4_r68(D, IP3_8);
  r69: g_8 -> ; cytosol8*Constant_flux__reversible(F);  // modifiers: CaI_8
  r70: -> g_8; cytosol8*function_4_r70(CaI_8, E, g_8);  // modifiers: CaI_8
  r71: total_receptor_levels__r_8 -> ; cytosol8*function_4_r71(H, k_HR, k_d, k_r8, total_receptor_levels__r_8);
  r73: -> IP3_8; cytosol8*function_4_r73(CaI_8, H, k3, k_ip38, kcat, total_receptor_levels__r_8);  // modifiers: CaI_8, total_receptor_levels__r_8
    k_ip38 = 0.828571;
  r74: -> total_receptor_levels__r_8; cytosol8*Constant_flux__reversible(k_r8);
  r72: CaT_8 -> CaI_8; function_4_r72(A, CaI_8, CaT_8, IP3_8, L, g_8, k1, store8);  // modifiers: g_8, IP3_8
  r75: CaI_8 -> CaT_8; function_4_r75(B, CaI_8, cytosol8, k2);
  r77: IP3_8 -> IP3_7; function_4_r77(G, IP3_7, IP3_8, cytosol8);
  r78: -> g_9; cytosol9*function_4_r78(CaI_9, E, g_9);  // modifiers: CaI_9
  r79: g_9 -> ; cytosol9*Constant_flux__reversible(F);  // modifiers: CaI_9
  r80: -> total_receptor_levels__r_9; cytosol9*Constant_flux__reversible(k_r9);
  r81: -> IP3_9; cytosol9*function_4_r81(CaI_9, H, k3, k_ip39, kcat, total_receptor_levels__r_9);  // modifiers: CaI_9, total_receptor_levels__r_9
    k_ip39 = 0.771429;
  r82: total_receptor_levels__r_9 -> ; cytosol9*function_4_r82(H, k_HR, k_d, k_r9, total_receptor_levels__r_9);
  r83: IP3_9 -> ; cytosol9*function_4_r83(D, IP3_9);
  r84: CaT_9 -> CaI_9; function_4_r84(A, CaI_9, CaT_9, IP3_9, L, g_9, k1, store9);  // modifiers: g_9, IP3_9
  r85: CaI_9 -> CaT_9; function_4_r85(B, CaI_9, cytosol9, k2);
  r87: IP3_9 -> IP3_8; function_4_r87(G, IP3_8, IP3_9, cytosol9);
  r88: -> total_receptor_levels__r_10; cytosol10*Constant_flux__reversible(k_r10);
  r89: -> IP3_10; cytosol10*function_4_r89(CaI_10, H, k3, k_ip310, kcat, total_receptor_levels__r_10);  // modifiers: CaI_10, total_receptor_levels__r_10
    k_ip310 = 0.728571;
  r90: g_10 -> ; cytosol10*Constant_flux__reversible(F);  // modifiers: CaI_10
  r91: total_receptor_levels__r_10 -> ; cytosol10*function_4_r91(H, k_HR, k_d, k_r10, total_receptor_levels__r_10);
  r92: -> g_10; cytosol10*function_4_r92(CaI_10, E, g_10);  // modifiers: CaI_10
  r93: IP3_10 -> ; cytosol10*function_4_r93(D, IP3_10);
  r94: CaT_10 -> CaI_10; function_4_r94(A, CaI_10, CaT_10, IP3_10, L, g_10, k1, store10);  // modifiers: g_10, IP3_10
  r95: CaI_10 -> CaT_10; function_4_r95(B, CaI_10, cytosol10, k2);
  r96: IP3_10 -> IP3_9; function_4_r96(G, IP3_10, IP3_9, cytosol10);
  r98: -> IP3_11; cytosol11*function_4_r98(CaI_11, H, k3, k_ip311, kcat, total_receptor_levels__r_11);  // modifiers: CaI_11, total_receptor_levels__r_11
    k_ip311 = 0.714286;
  r99: -> g_11; cytosol11*function_4_r99(CaI_11, E, g_11);  // modifiers: CaI_11
  r100: g_11 -> ; cytosol11*Constant_flux__reversible(F);  // modifiers: CaI_11
  r101: total_receptor_levels__r_11 -> ; cytosol11*function_4_r101(H, k_HR, k_d, k_r11, total_receptor_levels__r_11);
  r102: -> total_receptor_levels__r_11; cytosol11*Constant_flux__reversible(k_r11);
  r103: IP3_11 -> ; cytosol11*function_4_r103(D, IP3_11);
  r104: -> IP3_12; cytosol12*function_4_r104(CaI_12, H, k3, k_ip312, kcat, total_receptor_levels__r_12);  // modifiers: CaI_12, total_receptor_levels__r_12
    k_ip312 = 0.871429;
  r105: -> g_12; cytosol12*function_4_r105(CaI_12, E, g_12);  // modifiers: CaI_12
  r106: g_12 -> ; cytosol12*Constant_flux__reversible(F);  // modifiers: CaI_12
  r107: total_receptor_levels__r_12 -> ; cytosol12*function_4_r107(H, k_HR, k_d, k_r12, total_receptor_levels__r_12);
  r108: -> total_receptor_levels__r_12; cytosol12*Constant_flux__reversible(k_r12);
  r109: IP3_12 -> ; cytosol12*function_4_r109(D, IP3_12);
  r110: -> IP3_13; cytosol13*function_4_r110(CaI_13, H, k3, k_ip313, kcat, total_receptor_levels__r_13);  // modifiers: CaI_13, total_receptor_levels__r_13
    k_ip313 = 0.9;
  r111: -> g_13; cytosol13*function_4_r111(CaI_13, E, g_13);  // modifiers: CaI_13
  r112: g_13 -> ; cytosol13*Constant_flux__reversible(F);  // modifiers: CaI_13
  r113: total_receptor_levels__r_13 -> ; cytosol13*function_4_r113(H, k_HR, k_d, k_r13, total_receptor_levels__r_13);
  r114: -> total_receptor_levels__r_13; cytosol13*Constant_flux__reversible(k_r13);
  r115: IP3_13 -> ; cytosol13*function_4_r115(D, IP3_13);
  r116: -> IP3_14; cytosol14*function_4_r116(CaI_14, H, k3, k_ip314, kcat, total_receptor_levels__r_14);  // modifiers: CaI_14, total_receptor_levels__r_14
    k_ip314 = 0.7;
  r117: -> g_14; cytosol14*function_4_r117(CaI_14, E, g_14);  // modifiers: CaI_14
  r118: g_14 -> ; cytosol14*Constant_flux__reversible(F);  // modifiers: CaI_14
  r119: total_receptor_levels__r_14 -> ; cytosol14*function_4_r119(H, k_HR, k_d, k_r14, total_receptor_levels__r_14);
  r120: -> total_receptor_levels__r_14; cytosol14*Constant_flux__reversible(k_r14);
  r121: IP3_14 -> ; cytosol14*function_4_r121(D, IP3_14);
  r122: -> IP3_15; cytosol15*function_4_r122(CaI_15, H, k3, k_ip315, kcat, total_receptor_levels__r_15);  // modifiers: CaI_15, total_receptor_levels__r_15
    k_ip315 = 0.8;
  r123: -> g_15; cytosol15*function_4_r123(CaI_15, E, g_15);  // modifiers: CaI_15
  r124: g_15 -> ; cytosol15*Constant_flux__reversible(F);  // modifiers: CaI_15
  r125: total_receptor_levels__r_15 -> ; cytosol15*function_4_r125(H, k_HR, k_d, k_r15, total_receptor_levels__r_15);
    k_r15 = 1.28571;
  r126: -> total_receptor_levels__r_15; cytosol15*Constant_flux__reversible(v);
    v = 1.28571;
  r127: IP3_15 -> ; cytosol15*function_4_r127(D, IP3_15);
  r128: CaT_11 -> CaI_11; function_4_r128(A, CaI_11, CaT_11, IP3_11, L, g_11, k1, store11);  // modifiers: g_11, IP3_11
  r129: CaI_11 -> CaT_11; function_4_r129(B, CaI_11, cytosol11, k2);
  r130: CaT_12 -> CaI_12; function_4_r130(A, CaI_12, CaT_12, IP3_12, L, g_12, k1, store12);  // modifiers: g_12, IP3_12
  r131: CaI_12 -> CaT_12; function_4_r131(B, CaI_12, cytosol12, k2);
  r132: CaT_13 -> CaI_13; function_4_r132(A, CaI_13, CaT_13, IP3_13, L, g_13, k1, store13);  // modifiers: g_13, IP3_13
  r133: CaI_13 -> CaT_13; function_4_r133(B, CaI_13, cytosol13, k2);
  r134: CaT_14 -> CaI_14; function_4_r134(A, CaI_14, CaT_14, IP3_14, L, g_14, k1, store14);  // modifiers: g_14, IP3_14
  r135: CaI_14 -> CaT_14; function_4_r135(B, CaI_14, cytosol14, k2);
  r136: CaT_15 -> CaI_15; function_4_r136(A, CaI_15, CaT_15, IP3_15, L, g_15, k1, store15);  // modifiers: g_15, IP3_15
  r137: CaI_15 -> CaT_15; function_4_r137(B, CaI_15, cytosol15, k2);
  r139: IP3_11 -> IP3_10; function_4_r139(G, IP3_10, IP3_11, cytosol11);
  r141: IP3_13 -> IP3_12; function_4_r141(G, IP3_12, IP3_13, cytosol13);
  r143: IP3_12 -> IP3_11; function_4_r143(G, IP3_11, IP3_12, cytosol12);
  r145: IP3_14 -> IP3_13; function_4_r145(G, IP3_13, IP3_14, cytosol14);
  r147: IP3_15 -> IP3_14; function_4_r147(G, IP3_14, IP3_15, cytosol15);

  // Events:
  event_1: at (time >= 200): H = 1.8;

  // Unit definitions:
  unit length = 1e-6 metre;
  unit area = (1e-6 metre)^2;
  unit volume = 1e-15 litre;
  unit substance = item;
end
