// SBML level 2 version 4
// dcterms:bibliographicCitation: A model reduction method for biochemical reaction networks. urn:miriam:pubmed:24885656

function MTP(sf, V, Kms1, Kms2, Kms3, Kms4, Kms5, Kms7, Kms8, Kmp1, Kmp2, Kmp3, Kmp4, Kmp5, Kmp6, Kmp7, Kmp8, Ki1, Keq, S1, S2, S3, S4, S5, S7, S8, P1, P2, P3, P4, P5, P6, P7, P8, I1)
  sf*V*(S1*(S7 - P7)*S8/(Kms1*Kms7*Kms8) - P1*P7*P8/(Kms1*Kms7*Kms8*Keq))/((1 + S1/Kms1 + P1/Kmp1 + S2/Kms2 + P2/Kmp2 + S3/Kms3 + P3/Kmp3 + S4/Kms4 + P4/Kmp4 + S5/Kms5 + P5/Kmp5 + P6/Kmp6 + I1/Ki1)*(1 + (S7 - P7)/Kms7 + P7/Kmp7)*(1 + S8/Kms8 + P8/Kmp8));
end
MTP is "MTP_2";

function MCKATB(sf, V, Kms1, Kms2, Kms3, Kms4, Kms5, Kms6, Kms7, Kms8, Kmp1, Kmp2, Kmp3, Kmp4, Kmp5, Kmp6, Kmp7, Kmp8, Keq, S1, S2, S3, S4, S5, S6, S7, S8, P1, P2, P3, P4, P5, P6, P7, P8)
  sf*V*(S1*S8/(Kms1*Kms8) - P8*P8/(Kms1*Kms8*Keq))/((1 + S1/Kms1 + P1/Kmp1 + S2/Kms2 + P2/Kmp2 + S3/Kms3 + P3/Kmp3 + S4/Kms4 + P4/Kmp4 + S5/Kms5 + P5/Kmp5 + S6/Kms6 + P6/Kmp6 + S7/Kms7 + P7/Kmp7 + P8/Kmp8)*(1 + S8/Kms8 + P8/Kmp8));
end
MCKATB is "MCKATB_2";

function RES(Ks, S, K1)
  Ks*(S - K1);
end
RES is "RES_2";

function MCKATA(sf, V, Kms1, Kms2, Kms3, Kms4, Kms5, Kms6, Kms7, Kms8, Kmp1, Kmp2, Kmp3, Kmp4, Kmp5, Kmp6, Kmp7, Kmp8, Keq, S1, S2, S3, S4, S5, S6, S7, S8, P1, P2, P3, P4, P5, P6, P7, P8)
  sf*V*(S1*S8/(Kms1*Kms8) - P1*P8/(Kms1*Kms8*Keq))/((1 + S1/Kms1 + P1/Kmp1 + S2/Kms2 + P2/Kmp2 + S3/Kms3 + P3/Kmp3 + S4/Kms4 + P4/Kmp4 + S5/Kms5 + P5/Kmp5 + S6/Kms6 + P6/Kmp6 + S7/Kms7 + P7/Kmp7 + P8/Kmp8)*(1 + S8/Kms8 + P8/Kmp8));
end
MCKATA is "MCKATA_2";

function SCAD(sf, V, Kms1, Kms2, Kms3, Kmp1, Kmp2, Kmp3, Keq, S1, S2, S3, P1, P2, P3)
  sf*V*(S1*(S3 - P3)/(Kms1*Kms3) - P1*P3/(Kms1*Kms3*Keq))/((1 + S1/Kms1 + P1/Kmp1 + S2/Kms2 + P2/Kmp2)*(1 + (S3 - P3)/Kms3 + P3/Kmp3));
end
SCAD is "SCAD_2";

function LCAD(sf, V, Kms1, Kms2, Kms3, Kms4, Kms5, Kms6, Kmp1, Kmp2, Kmp3, Kmp4, Kmp5, Kmp6, Keq, S1, S2, S3, S4, S5, S6, P1, P2, P3, P4, P5, P6)
  sf*V*(S1*(S6 - P6)/(Kms1*Kms6) - P1*P6/(Kms1*Kms6*Keq))/((1 + S1/Kms1 + P1/Kmp1 + S2/Kms2 + P2/Kmp2 + S3/Kms3 + P3/Kmp3 + S4/Kms4 + P4/Kmp4 + S5/Kms5 + P5/Kmp5)*(1 + (S6 - P6)/Kms6 + P6/Kmp6));
end
LCAD is "LCAD_2";

function VLCAD(sf, V, Kms1, Kms2, Kms3, Kms4, Kmp1, Kmp2, Kmp3, Kmp4, Keq, S1, S2, S3, S4, P1, P2, P3, P4)
  sf*V*(S1*(S4 - P4)/(Kms1*Kms4) - P1*P4/(Kms1*Kms4*Keq))/((1 + S1/Kms1 + P1/Kmp1 + S2/Kms2 + P2/Kmp2 + S3/Kms3 + P3/Kmp3)*(1 + (S4 - P4)/Kms4 + P4/Kmp4));
end
VLCAD is "VLCAD_2";

function CPT1(sf, V, Kms1, Kms2, Kmp1, Kmp2, Ki1, Keq, S1, S2, P1, P2, I1, n)
  sf*V*(S1*S2/(Kms1*Kms2) - P1*P2/(Kms1*Kms2*Keq))/((1 + S1/Kms1 + P1/Kmp1 + (I1/Ki1)^n)*(1 + S2/Kms2 + P2/Kmp2));
end
CPT1 is "CPT1_2";

function CPT2(sf, V, Kms1, Kms2, Kms3, Kms4, Kms5, Kms6, Kms7, Kms8, Kmp1, Kmp2, Kmp3, Kmp4, Kmp5, Kmp6, Kmp7, Kmp8, Keq, S1, S2, S3, S4, S5, S6, S7, S8, P1, P2, P3, P4, P5, P6, P7, P8)
  sf*V*(S1*S8/(Kms1*Kms8) - P1*P8/(Kms1*Kms8*Keq))/((1 + S1/Kms1 + P1/Kmp1 + S2/Kms2 + P2/Kmp2 + S3/Kms3 + P3/Kmp3 + S4/Kms4 + P4/Kmp4 + S5/Kms5 + P5/Kmp5 + S6/Kms6 + P6/Kmp6 + S7/Kms7 + P7/Kmp7)*(1 + S8/Kms8 + P8/Kmp8));
end
CPT2 is "CPT2_2";

function function_4_vcpt1C16_1(C16AcylCarCYT, C16AcylCoACYT, CarCYT, CoACYT, Keqcpt1, Kicpt1MalCoACYT, Kmcpt1C16AcylCarCYT, Kmcpt1C16AcylCoACYT, Kmcpt1CarCYT, Kmcpt1CoACYT, MalCoACYT, VCYT, Vcpt1, ncpt1, sfcpt1C16)
  CPT1(sfcpt1C16, Vcpt1, Kmcpt1C16AcylCoACYT, Kmcpt1CarCYT, Kmcpt1C16AcylCarCYT, Kmcpt1CoACYT, Kicpt1MalCoACYT, Keqcpt1, C16AcylCoACYT, CarCYT, C16AcylCarCYT, CoACYT, MalCoACYT, ncpt1)/VCYT;
end

function MCAD(sf, V, Kms1, Kms2, Kms3, Kms4, Kms5, Kms6, Kmp1, Kmp2, Kmp3, Kmp4, Kmp5, Kmp6, Keq, S1, S2, S3, S4, S5, S6, P1, P2, P3, P4, P5, P6)
  sf*V*(S1*(S6 - P6)/(Kms1*Kms6) - P1*P6/(Kms1*Kms6*Keq))/((1 + S1/Kms1 + P1/Kmp1 + S2/Kms2 + P2/Kmp2 + S3/Kms3 + P3/Kmp3 + S4/Kms4 + P4/Kmp4 + S5/Kms5 + P5/Kmp5)*(1 + (S6 - P6)/Kms6 + P6/Kmp6));
end
MCAD is "MCAD_2";

function function_4_vcactC14_1(C14AcylCarCYT, C14AcylCarMAT, CarCYT, CarMAT, Keqcact, KicactC14AcylCarCYT, KicactCarCYT, KmcactC14AcylCarCYT, KmcactC14AcylCarMAT, KmcactCarCYT, KmcactCarMAT, Vfcact, Vrcact)
  Vfcact*(C14AcylCarCYT*CarMAT - C14AcylCarMAT*CarCYT/Keqcact)/(C14AcylCarCYT*CarMAT + KmcactCarMAT*C14AcylCarCYT + KmcactC14AcylCarCYT*CarMAT*(1 + CarCYT/KicactCarCYT) + Vfcact/(Vrcact*Keqcact)*(KmcactCarCYT*C14AcylCarMAT*(1 + C14AcylCarCYT/KicactC14AcylCarCYT) + CarCYT*(KmcactC14AcylCarMAT + C14AcylCarMAT)));
end

function function_4_vcactC16_1(C16AcylCarCYT, C16AcylCarMAT, CarCYT, CarMAT, Keqcact, KicactC16AcylCarCYT, KicactCarCYT, KmcactC16AcylCarCYT, KmcactC16AcylCarMAT, KmcactCarCYT, KmcactCarMAT, Vfcact, Vrcact)
  Vfcact*(C16AcylCarCYT*CarMAT - C16AcylCarMAT*CarCYT/Keqcact)/(C16AcylCarCYT*CarMAT + KmcactCarMAT*C16AcylCarCYT + KmcactC16AcylCarCYT*CarMAT*(1 + CarCYT/KicactCarCYT) + Vfcact/(Vrcact*Keqcact)*(KmcactCarCYT*C16AcylCarMAT*(1 + C16AcylCarCYT/KicactC16AcylCarCYT) + CarCYT*(KmcactC16AcylCarMAT + C16AcylCarMAT)));
end

function function_4_vcactC10_1(C10AcylCarCYT, C10AcylCarMAT, CarCYT, CarMAT, Keqcact, KicactC10AcylCarCYT, KicactCarCYT, KmcactC10AcylCarCYT, KmcactC10AcylCarMAT, KmcactCarCYT, KmcactCarMAT, Vfcact, Vrcact)
  Vfcact*(C10AcylCarCYT*CarMAT - C10AcylCarMAT*CarCYT/Keqcact)/(C10AcylCarCYT*CarMAT + KmcactCarMAT*C10AcylCarCYT + KmcactC10AcylCarCYT*CarMAT*(1 + CarCYT/KicactCarCYT) + Vfcact/(Vrcact*Keqcact)*(KmcactCarCYT*C10AcylCarMAT*(1 + C10AcylCarCYT/KicactC10AcylCarCYT) + CarCYT*(KmcactC10AcylCarMAT + C10AcylCarMAT)));
end

function function_4_vcactC12_1(C12AcylCarCYT, C12AcylCarMAT, CarCYT, CarMAT, Keqcact, KicactC12AcylCarCYT, KicactCarCYT, KmcactC12AcylCarCYT, KmcactC12AcylCarMAT, KmcactCarCYT, KmcactCarMAT, Vfcact, Vrcact)
  Vfcact*(C12AcylCarCYT*CarMAT - C12AcylCarMAT*CarCYT/Keqcact)/(C12AcylCarCYT*CarMAT + KmcactCarMAT*C12AcylCarCYT + KmcactC12AcylCarCYT*CarMAT*(1 + CarCYT/KicactCarCYT) + Vfcact/(Vrcact*Keqcact)*(KmcactCarCYT*C12AcylCarMAT*(1 + C12AcylCarCYT/KicactC12AcylCarCYT) + CarCYT*(KmcactC12AcylCarMAT + C12AcylCarMAT)));
end

function function_4_vcactC6_1(C6AcylCarCYT, C6AcylCarMAT, CarCYT, CarMAT, Keqcact, KicactC6AcylCarCYT, KicactCarCYT, KmcactC6AcylCarCYT, KmcactC6AcylCarMAT, KmcactCarCYT, KmcactCarMAT, Vfcact, Vrcact)
  Vfcact*(C6AcylCarCYT*CarMAT - C6AcylCarMAT*CarCYT/Keqcact)/(C6AcylCarCYT*CarMAT + KmcactCarMAT*C6AcylCarCYT + KmcactC6AcylCarCYT*CarMAT*(1 + CarCYT/KicactCarCYT) + Vfcact/(Vrcact*Keqcact)*(KmcactCarCYT*C6AcylCarMAT*(1 + C6AcylCarCYT/KicactC6AcylCarCYT) + CarCYT*(KmcactC6AcylCarMAT + C6AcylCarMAT)));
end

function function_4_vcactC8_1(C8AcylCarCYT, C8AcylCarMAT, CarCYT, CarMAT, Keqcact, KicactC8AcylCarCYT, KicactCarCYT, KmcactC8AcylCarCYT, KmcactC8AcylCarMAT, KmcactCarCYT, KmcactCarMAT, Vfcact, Vrcact)
  Vfcact*(C8AcylCarCYT*CarMAT - C8AcylCarMAT*CarCYT/Keqcact)/(C8AcylCarCYT*CarMAT + KmcactCarMAT*C8AcylCarCYT + KmcactC8AcylCarCYT*CarMAT*(1 + CarCYT/KicactCarCYT) + Vfcact/(Vrcact*Keqcact)*(KmcactCarCYT*C8AcylCarMAT*(1 + C8AcylCarCYT/KicactC8AcylCarCYT) + CarCYT*(KmcactC8AcylCarMAT + C8AcylCarMAT)));
end

function function_4_vcpt2C16_1(C10AcylCarMAT, C10AcylCoAMAT, C12AcylCarMAT, C12AcylCoAMAT, C14AcylCarMAT, C14AcylCoAMAT, C16AcylCarMAT, C16AcylCoAMAT, C4AcylCarMAT, C4AcylCoAMAT, C6AcylCarMAT, C6AcylCoAMAT, C8AcylCarMAT, C8AcylCoAMAT, CarMAT, CoAMAT, Keqcpt2, Kmcpt2C10AcylCarMAT, Kmcpt2C10AcylCoAMAT, Kmcpt2C12AcylCarMAT, Kmcpt2C12AcylCoAMAT, Kmcpt2C14AcylCarMAT, Kmcpt2C14AcylCoAMAT, Kmcpt2C16AcylCarMAT, Kmcpt2C16AcylCoAMAT, Kmcpt2C4AcylCarMAT, Kmcpt2C4AcylCoAMAT, Kmcpt2C6AcylCarMAT, Kmcpt2C6AcylCoAMAT, Kmcpt2C8AcylCarMAT, Kmcpt2C8AcylCoAMAT, Kmcpt2CarMAT, Kmcpt2CoAMAT, VMAT, Vcpt2, sfcpt2C16)
  CPT2(sfcpt2C16, Vcpt2, Kmcpt2C16AcylCarMAT, Kmcpt2C14AcylCarMAT, Kmcpt2C12AcylCarMAT, Kmcpt2C10AcylCarMAT, Kmcpt2C8AcylCarMAT, Kmcpt2C6AcylCarMAT, Kmcpt2C4AcylCarMAT, Kmcpt2CoAMAT, Kmcpt2C16AcylCoAMAT, Kmcpt2C14AcylCoAMAT, Kmcpt2C12AcylCoAMAT, Kmcpt2C10AcylCoAMAT, Kmcpt2C8AcylCoAMAT, Kmcpt2C6AcylCoAMAT, Kmcpt2C4AcylCoAMAT, Kmcpt2CarMAT, Keqcpt2, C16AcylCarMAT, C14AcylCarMAT, C12AcylCarMAT, C10AcylCarMAT, C8AcylCarMAT, C6AcylCarMAT, C4AcylCarMAT, CoAMAT, C16AcylCoAMAT, C14AcylCoAMAT, C12AcylCoAMAT, C10AcylCoAMAT, C8AcylCoAMAT, C6AcylCoAMAT, C4AcylCoAMAT, CarMAT)/VMAT;
end

function function_4_vcactC4_1(C4AcylCarCYT, C4AcylCarMAT, CarCYT, CarMAT, Keqcact, KicactC4AcylCarCYT, KicactCarCYT, KmcactC4AcylCarCYT, KmcactC4AcylCarMAT, KmcactCarCYT, KmcactCarMAT, Vfcact, Vrcact)
  Vfcact*(C4AcylCarCYT*CarMAT - C4AcylCarMAT*CarCYT/Keqcact)/(C4AcylCarCYT*CarMAT + KmcactCarMAT*C4AcylCarCYT + KmcactC4AcylCarCYT*CarMAT*(1 + CarCYT/KicactCarCYT) + Vfcact/(Vrcact*Keqcact)*(KmcactCarCYT*C4AcylCarMAT*(1 + C4AcylCarCYT/KicactC4AcylCarCYT) + CarCYT*(KmcactC4AcylCarMAT + C4AcylCarMAT)));
end

function function_4_vcpt2C14_1(C10AcylCarMAT, C10AcylCoAMAT, C12AcylCarMAT, C12AcylCoAMAT, C14AcylCarMAT, C14AcylCoAMAT, C16AcylCarMAT, C16AcylCoAMAT, C4AcylCarMAT, C4AcylCoAMAT, C6AcylCarMAT, C6AcylCoAMAT, C8AcylCarMAT, C8AcylCoAMAT, CarMAT, CoAMAT, Keqcpt2, Kmcpt2C10AcylCarMAT, Kmcpt2C10AcylCoAMAT, Kmcpt2C12AcylCarMAT, Kmcpt2C12AcylCoAMAT, Kmcpt2C14AcylCarMAT, Kmcpt2C14AcylCoAMAT, Kmcpt2C16AcylCarMAT, Kmcpt2C16AcylCoAMAT, Kmcpt2C4AcylCoAMAT, Kmcpt2C6AcylCarMAT, Kmcpt2C6AcylCoAMAT, Kmcpt2C8AcylCarMAT, Kmcpt2C8AcylCoAMAT, Kmcpt2CarMAT, Kmcpt2CoAMAT, VMAT, Vcpt2, sfcpt2C14)
  CPT2(sfcpt2C14, Vcpt2, Kmcpt2C14AcylCarMAT, Kmcpt2C16AcylCarMAT, Kmcpt2C12AcylCarMAT, Kmcpt2C10AcylCarMAT, Kmcpt2C8AcylCarMAT, Kmcpt2C6AcylCarMAT, Kmcpt2C4AcylCoAMAT, Kmcpt2CoAMAT, Kmcpt2C14AcylCoAMAT, Kmcpt2C16AcylCoAMAT, Kmcpt2C12AcylCoAMAT, Kmcpt2C10AcylCoAMAT, Kmcpt2C8AcylCoAMAT, Kmcpt2C6AcylCoAMAT, Kmcpt2C4AcylCoAMAT, Kmcpt2CarMAT, Keqcpt2, C14AcylCarMAT, C16AcylCarMAT, C12AcylCarMAT, C10AcylCarMAT, C8AcylCarMAT, C6AcylCarMAT, C4AcylCarMAT, CoAMAT, C14AcylCoAMAT, C16AcylCoAMAT, C12AcylCoAMAT, C10AcylCoAMAT, C8AcylCoAMAT, C6AcylCoAMAT, C4AcylCoAMAT, CarMAT)/VMAT;
end

function function_4_vcpt2C10_1(C10AcylCarMAT, C10AcylCoAMAT, C12AcylCarMAT, C12AcylCoAMAT, C14AcylCarMAT, C14AcylCoAMAT, C16AcylCarMAT, C16AcylCoAMAT, C4AcylCarMAT, C4AcylCoAMAT, C6AcylCarMAT, C6AcylCoAMAT, C8AcylCarMAT, C8AcylCoAMAT, CarMAT, CoAMAT, Keqcpt2, Kmcpt2C10AcylCarMAT, Kmcpt2C10AcylCoAMAT, Kmcpt2C12AcylCarMAT, Kmcpt2C12AcylCoAMAT, Kmcpt2C14AcylCarMAT, Kmcpt2C14AcylCoAMAT, Kmcpt2C16AcylCarMAT, Kmcpt2C16AcylCoAMAT, Kmcpt2C4AcylCarMAT, Kmcpt2C4AcylCoAMAT, Kmcpt2C6AcylCarMAT, Kmcpt2C6AcylCoAMAT, Kmcpt2C8AcylCarMAT, Kmcpt2C8AcylCoAMAT, Kmcpt2CarMAT, Kmcpt2CoAMAT, VMAT, Vcpt2, sfcpt2C10)
  CPT2(sfcpt2C10, Vcpt2, Kmcpt2C10AcylCarMAT, Kmcpt2C16AcylCarMAT, Kmcpt2C14AcylCarMAT, Kmcpt2C12AcylCarMAT, Kmcpt2C8AcylCarMAT, Kmcpt2C6AcylCarMAT, Kmcpt2C4AcylCarMAT, Kmcpt2CoAMAT, Kmcpt2C10AcylCoAMAT, Kmcpt2C16AcylCoAMAT, Kmcpt2C14AcylCoAMAT, Kmcpt2C12AcylCoAMAT, Kmcpt2C8AcylCoAMAT, Kmcpt2C6AcylCoAMAT, Kmcpt2C4AcylCoAMAT, Kmcpt2CarMAT, Keqcpt2, C10AcylCarMAT, C16AcylCarMAT, C14AcylCarMAT, C12AcylCarMAT, C8AcylCarMAT, C6AcylCarMAT, C4AcylCarMAT, CoAMAT, C10AcylCoAMAT, C16AcylCoAMAT, C14AcylCoAMAT, C12AcylCoAMAT, C8AcylCoAMAT, C6AcylCoAMAT, C4AcylCoAMAT, CarMAT)/VMAT;
end

function function_4_vcpt2C8_1(C10AcylCarMAT, C10AcylCoAMAT, C12AcylCarMAT, C12AcylCoAMAT, C14AcylCarMAT, C14AcylCoAMAT, C16AcylCarMAT, C16AcylCoAMAT, C4AcylCarMAT, C4AcylCoAMAT, C6AcylCarMAT, C6AcylCoAMAT, C8AcylCarMAT, C8AcylCoAMAT, CarMAT, CoAMAT, Keqcpt2, Kmcpt2C10AcylCarMAT, Kmcpt2C10AcylCoAMAT, Kmcpt2C12AcylCarMAT, Kmcpt2C12AcylCoAMAT, Kmcpt2C14AcylCarMAT, Kmcpt2C14AcylCoAMAT, Kmcpt2C16AcylCarMAT, Kmcpt2C16AcylCoAMAT, Kmcpt2C4AcylCarMAT, Kmcpt2C4AcylCoAMAT, Kmcpt2C6AcylCarMAT, Kmcpt2C6AcylCoAMAT, Kmcpt2C8AcylCarMAT, Kmcpt2C8AcylCoAMAT, Kmcpt2CarMAT, Kmcpt2CoAMAT, VMAT, Vcpt2, sfcpt2C8)
  CPT2(sfcpt2C8, Vcpt2, Kmcpt2C8AcylCarMAT, Kmcpt2C16AcylCarMAT, Kmcpt2C14AcylCarMAT, Kmcpt2C12AcylCarMAT, Kmcpt2C10AcylCarMAT, Kmcpt2C6AcylCarMAT, Kmcpt2C4AcylCarMAT, Kmcpt2CoAMAT, Kmcpt2C8AcylCoAMAT, Kmcpt2C16AcylCoAMAT, Kmcpt2C14AcylCoAMAT, Kmcpt2C12AcylCoAMAT, Kmcpt2C10AcylCoAMAT, Kmcpt2C6AcylCoAMAT, Kmcpt2C4AcylCoAMAT, Kmcpt2CarMAT, Keqcpt2, C8AcylCarMAT, C16AcylCarMAT, C14AcylCarMAT, C12AcylCarMAT, C10AcylCarMAT, C6AcylCarMAT, C4AcylCarMAT, CoAMAT, C8AcylCoAMAT, C16AcylCoAMAT, C14AcylCoAMAT, C12AcylCoAMAT, C10AcylCoAMAT, C6AcylCoAMAT, C4AcylCoAMAT, CarMAT)/VMAT;
end

function function_4_vcpt2C4_1(C10AcylCarMAT, C10AcylCoAMAT, C12AcylCarMAT, C12AcylCoAMAT, C14AcylCarMAT, C14AcylCoAMAT, C16AcylCarMAT, C16AcylCoAMAT, C4AcylCarMAT, C4AcylCoAMAT, C6AcylCarMAT, C6AcylCoAMAT, C8AcylCarMAT, C8AcylCoAMAT, CarMAT, CoAMAT, Keqcpt2, Kmcpt2C10AcylCarMAT, Kmcpt2C10AcylCoAMAT, Kmcpt2C12AcylCarMAT, Kmcpt2C12AcylCoAMAT, Kmcpt2C14AcylCarMAT, Kmcpt2C14AcylCoAMAT, Kmcpt2C16AcylCarMAT, Kmcpt2C16AcylCoAMAT, Kmcpt2C4AcylCarMAT, Kmcpt2C4AcylCoAMAT, Kmcpt2C6AcylCarMAT, Kmcpt2C6AcylCoAMAT, Kmcpt2C8AcylCarMAT, Kmcpt2C8AcylCoAMAT, Kmcpt2CarMAT, Kmcpt2CoAMAT, VMAT, Vcpt2, sfcpt2C4)
  CPT2(sfcpt2C4, Vcpt2, Kmcpt2C4AcylCarMAT, Kmcpt2C16AcylCarMAT, Kmcpt2C14AcylCarMAT, Kmcpt2C12AcylCarMAT, Kmcpt2C10AcylCarMAT, Kmcpt2C8AcylCarMAT, Kmcpt2C6AcylCarMAT, Kmcpt2CoAMAT, Kmcpt2C4AcylCoAMAT, Kmcpt2C16AcylCoAMAT, Kmcpt2C14AcylCoAMAT, Kmcpt2C12AcylCoAMAT, Kmcpt2C10AcylCoAMAT, Kmcpt2C8AcylCoAMAT, Kmcpt2C6AcylCoAMAT, Kmcpt2CarMAT, Keqcpt2, C4AcylCarMAT, C16AcylCarMAT, C14AcylCarMAT, C12AcylCarMAT, C10AcylCarMAT, C8AcylCarMAT, C6AcylCarMAT, CoAMAT, C4AcylCoAMAT, C16AcylCoAMAT, C14AcylCoAMAT, C12AcylCoAMAT, C10AcylCoAMAT, C8AcylCoAMAT, C6AcylCoAMAT, CarMAT)/VMAT;
end

function function_4_vcpt2C6_1(C10AcylCarMAT, C10AcylCoAMAT, C12AcylCarMAT, C12AcylCoAMAT, C14AcylCarMAT, C14AcylCoAMAT, C16AcylCarMAT, C16AcylCoAMAT, C4AcylCarMAT, C4AcylCoAMAT, C6AcylCarMAT, C6AcylCoAMAT, C8AcylCarMAT, C8AcylCoAMAT, CarMAT, CoAMAT, Keqcpt2, Kmcpt2C10AcylCarMAT, Kmcpt2C10AcylCoAMAT, Kmcpt2C12AcylCarMAT, Kmcpt2C12AcylCoAMAT, Kmcpt2C14AcylCarMAT, Kmcpt2C14AcylCoAMAT, Kmcpt2C16AcylCarMAT, Kmcpt2C16AcylCoAMAT, Kmcpt2C4AcylCarMAT, Kmcpt2C4AcylCoAMAT, Kmcpt2C6AcylCarMAT, Kmcpt2C6AcylCoAMAT, Kmcpt2C8AcylCarMAT, Kmcpt2C8AcylCoAMAT, Kmcpt2CarMAT, Kmcpt2CoAMAT, VMAT, Vcpt2, sfcpt2C6)
  CPT2(sfcpt2C6, Vcpt2, Kmcpt2C6AcylCarMAT, Kmcpt2C16AcylCarMAT, Kmcpt2C14AcylCarMAT, Kmcpt2C12AcylCarMAT, Kmcpt2C10AcylCarMAT, Kmcpt2C8AcylCarMAT, Kmcpt2C4AcylCarMAT, Kmcpt2CoAMAT, Kmcpt2C6AcylCoAMAT, Kmcpt2C16AcylCoAMAT, Kmcpt2C14AcylCoAMAT, Kmcpt2C12AcylCoAMAT, Kmcpt2C10AcylCoAMAT, Kmcpt2C8AcylCoAMAT, Kmcpt2C4AcylCoAMAT, Kmcpt2CarMAT, Keqcpt2, C6AcylCarMAT, C16AcylCarMAT, C14AcylCarMAT, C12AcylCarMAT, C10AcylCarMAT, C8AcylCarMAT, C4AcylCarMAT, CoAMAT, C6AcylCoAMAT, C16AcylCoAMAT, C14AcylCoAMAT, C12AcylCoAMAT, C10AcylCoAMAT, C8AcylCoAMAT, C4AcylCoAMAT, CarMAT)/VMAT;
end

function function_4_vvlcadC14_1(C12AcylCoAMAT, C12EnoylCoAMAT, C14AcylCoAMAT, C14EnoylCoAMAT, C16AcylCoAMAT, C16EnoylCoAMAT, FADHMAT, FADtMAT, Keqvlcad, KmvlcadC12AcylCoAMAT, KmvlcadC12EnoylCoAMAT, KmvlcadC14AcylCoAMAT, KmvlcadC14EnoylCoAMAT, KmvlcadC16AcylCoAMAT, KmvlcadC16EnoylCoAMAT, KmvlcadFAD, KmvlcadFADH, VMAT, Vvlcad, sfvlcadC14)
  VLCAD(sfvlcadC14, Vvlcad, KmvlcadC14AcylCoAMAT, KmvlcadC16AcylCoAMAT, KmvlcadC12AcylCoAMAT, KmvlcadFAD, KmvlcadC14EnoylCoAMAT, KmvlcadC16EnoylCoAMAT, KmvlcadC12EnoylCoAMAT, KmvlcadFADH, Keqvlcad, C14AcylCoAMAT, C16AcylCoAMAT, C12AcylCoAMAT, FADtMAT, C14EnoylCoAMAT, C16EnoylCoAMAT, C12EnoylCoAMAT, FADHMAT)/VMAT;
end

function function_4_vlcadC16_1(C10AcylCoAMAT, C10EnoylCoAMAT, C12AcylCoAMAT, C12EnoylCoAMAT, C14AcylCoAMAT, C14EnoylCoAMAT, C16AcylCoAMAT, C16EnoylCoAMAT, C8AcylCoAMAT, C8EnoylCoAMAT, FADHMAT, FADtMAT, Keqlcad, KmlcadC10AcylCoAMAT, KmlcadC10EnoylCoAMAT, KmlcadC12AcylCoAMAT, KmlcadC12EnoylCoAMAT, KmlcadC14AcylCoAMAT, KmlcadC14EnoylCoAMAT, KmlcadC16AcylCoAMAT, KmlcadC16EnoylCoAMAT, KmlcadC8AcylCoAMAT, KmlcadC8EnoylCoAMAT, KmlcadFAD, KmlcadFADH, VMAT, Vlcad, sflcadC16)
  LCAD(sflcadC16, Vlcad, KmlcadC16AcylCoAMAT, KmlcadC14AcylCoAMAT, KmlcadC12AcylCoAMAT, KmlcadC10AcylCoAMAT, KmlcadC8AcylCoAMAT, KmlcadFAD, KmlcadC16EnoylCoAMAT, KmlcadC14EnoylCoAMAT, KmlcadC12EnoylCoAMAT, KmlcadC10EnoylCoAMAT, KmlcadC8EnoylCoAMAT, KmlcadFADH, Keqlcad, C16AcylCoAMAT, C14AcylCoAMAT, C12AcylCoAMAT, C10AcylCoAMAT, C8AcylCoAMAT, FADtMAT, C16EnoylCoAMAT, C14EnoylCoAMAT, C12EnoylCoAMAT, C10EnoylCoAMAT, C8EnoylCoAMAT, FADHMAT)/VMAT;
end

function function_4_vlcadC14_1(C10AcylCoAMAT, C10EnoylCoAMAT, C12AcylCoAMAT, C12EnoylCoAMAT, C14AcylCoAMAT, C14EnoylCoAMAT, C16AcylCoAMAT, C16EnoylCoAMAT, C8AcylCoAMAT, C8EnoylCoAMAT, FADHMAT, FADtMAT, Keqlcad, KmlcadC10AcylCoAMAT, KmlcadC10EnoylCoAMAT, KmlcadC12AcylCoAMAT, KmlcadC12EnoylCoAMAT, KmlcadC14AcylCoAMAT, KmlcadC14EnoylCoAMAT, KmlcadC16AcylCoAMAT, KmlcadC16EnoylCoAMAT, KmlcadC8AcylCoAMAT, KmlcadC8EnoylCoAMAT, KmlcadFAD, KmlcadFADH, VMAT, Vlcad, sflcadC14)
  LCAD(sflcadC14, Vlcad, KmlcadC14AcylCoAMAT, KmlcadC16AcylCoAMAT, KmlcadC12AcylCoAMAT, KmlcadC10AcylCoAMAT, KmlcadC8AcylCoAMAT, KmlcadFAD, KmlcadC14EnoylCoAMAT, KmlcadC16EnoylCoAMAT, KmlcadC12EnoylCoAMAT, KmlcadC10EnoylCoAMAT, KmlcadC8EnoylCoAMAT, KmlcadFADH, Keqlcad, C14AcylCoAMAT, C16AcylCoAMAT, C12AcylCoAMAT, C10AcylCoAMAT, C8AcylCoAMAT, FADtMAT, C14EnoylCoAMAT, C16EnoylCoAMAT, C12EnoylCoAMAT, C10EnoylCoAMAT, C8EnoylCoAMAT, FADHMAT)/VMAT;
end

function function_4_vvlcadC16_1(C12AcylCoAMAT, C12EnoylCoAMAT, C14AcylCoAMAT, C14EnoylCoAMAT, C16AcylCoAMAT, C16EnoylCoAMAT, FADHMAT, FADtMAT, Keqvlcad, KmvlcadC12AcylCoAMAT, KmvlcadC12EnoylCoAMAT, KmvlcadC14AcylCoAMAT, KmvlcadC14EnoylCoAMAT, KmvlcadC16AcylCoAMAT, KmvlcadC16EnoylCoAMAT, KmvlcadFAD, KmvlcadFADH, VMAT, Vvlcad, sfvlcadC16)
  VLCAD(sfvlcadC16, Vvlcad, KmvlcadC16AcylCoAMAT, KmvlcadC14AcylCoAMAT, KmvlcadC12AcylCoAMAT, KmvlcadFAD, KmvlcadC16EnoylCoAMAT, KmvlcadC14EnoylCoAMAT, KmvlcadC12EnoylCoAMAT, KmvlcadFADH, Keqvlcad, C16AcylCoAMAT, C14AcylCoAMAT, C12AcylCoAMAT, FADtMAT, C16EnoylCoAMAT, C14EnoylCoAMAT, C12EnoylCoAMAT, FADHMAT)/VMAT;
end

function function_4_vvlcadC12_1(C12AcylCoAMAT, C12EnoylCoAMAT, C14AcylCoAMAT, C14EnoylCoAMAT, C16AcylCoAMAT, C16EnoylCoAMAT, FADHMAT, FADtMAT, Keqvlcad, KmvlcadC12AcylCoAMAT, KmvlcadC12EnoylCoAMAT, KmvlcadC14AcylCoAMAT, KmvlcadC14EnoylCoAMAT, KmvlcadC16AcylCoAMAT, KmvlcadC16EnoylCoAMAT, KmvlcadFAD, KmvlcadFADH, VMAT, Vvlcad, sfvlcadC12)
  VLCAD(sfvlcadC12, Vvlcad, KmvlcadC12AcylCoAMAT, KmvlcadC16AcylCoAMAT, KmvlcadC14AcylCoAMAT, KmvlcadFAD, KmvlcadC12EnoylCoAMAT, KmvlcadC16EnoylCoAMAT, KmvlcadC14EnoylCoAMAT, KmvlcadFADH, Keqvlcad, C12AcylCoAMAT, C16AcylCoAMAT, C14AcylCoAMAT, FADtMAT, C12EnoylCoAMAT, C16EnoylCoAMAT, C14EnoylCoAMAT, FADHMAT)/VMAT;
end

function function_4_vlcadC10_1(C10AcylCoAMAT, C10EnoylCoAMAT, C12AcylCoAMAT, C12EnoylCoAMAT, C14AcylCoAMAT, C14EnoylCoAMAT, C16AcylCoAMAT, C16EnoylCoAMAT, C8AcylCoAMAT, C8EnoylCoAMAT, FADHMAT, FADtMAT, Keqlcad, KmlcadC10AcylCoAMAT, KmlcadC10EnoylCoAMAT, KmlcadC12AcylCoAMAT, KmlcadC12EnoylCoAMAT, KmlcadC14AcylCoAMAT, KmlcadC14EnoylCoAMAT, KmlcadC16AcylCoAMAT, KmlcadC16EnoylCoAMAT, KmlcadC8AcylCoAMAT, KmlcadC8EnoylCoAMAT, KmlcadFAD, KmlcadFADH, VMAT, Vlcad, sflcadC10)
  LCAD(sflcadC10, Vlcad, KmlcadC10AcylCoAMAT, KmlcadC16AcylCoAMAT, KmlcadC14AcylCoAMAT, KmlcadC12AcylCoAMAT, KmlcadC8AcylCoAMAT, KmlcadFAD, KmlcadC10EnoylCoAMAT, KmlcadC16EnoylCoAMAT, KmlcadC14EnoylCoAMAT, KmlcadC12EnoylCoAMAT, KmlcadC8EnoylCoAMAT, KmlcadFADH, Keqlcad, C10AcylCoAMAT, C16AcylCoAMAT, C14AcylCoAMAT, C12AcylCoAMAT, C8AcylCoAMAT, FADtMAT, C10EnoylCoAMAT, C16EnoylCoAMAT, C14EnoylCoAMAT, C12EnoylCoAMAT, C8EnoylCoAMAT, FADHMAT)/VMAT;
end

function function_4_vlcadC12_1(C10AcylCoAMAT, C10EnoylCoAMAT, C12AcylCoAMAT, C14AcylCoAMAT, C14EnoylCoAMAT, C16AcylCoAMAT, C16EnoylCoAMAT, C8AcylCoAMAT, C8EnoylCoAMAT, FADHMAT, FADtMAT, Keqlcad, KmlcadC10AcylCoAMAT, KmlcadC10EnoylCoAMAT, KmlcadC12AcylCoAMAT, KmlcadC12EnoylCoAMAT, KmlcadC14AcylCoAMAT, KmlcadC14EnoylCoAMAT, KmlcadC16AcylCoAMAT, KmlcadC16EnoylCoAMAT, KmlcadC8AcylCoAMAT, KmlcadC8EnoylCoAMAT, KmlcadFAD, KmlcadFADH, VMAT, Vlcad, sflcadC12)
  LCAD(sflcadC12, Vlcad, KmlcadC12AcylCoAMAT, KmlcadC16AcylCoAMAT, KmlcadC14AcylCoAMAT, KmlcadC10AcylCoAMAT, KmlcadC8AcylCoAMAT, KmlcadFAD, KmlcadC12EnoylCoAMAT, KmlcadC16EnoylCoAMAT, KmlcadC14EnoylCoAMAT, KmlcadC10EnoylCoAMAT, KmlcadC8EnoylCoAMAT, KmlcadFADH, Keqlcad, C12AcylCoAMAT, C16AcylCoAMAT, C14AcylCoAMAT, C10AcylCoAMAT, C8AcylCoAMAT, FADtMAT, C14EnoylCoAMAT, C16EnoylCoAMAT, C14EnoylCoAMAT, C10EnoylCoAMAT, C8EnoylCoAMAT, FADHMAT)/VMAT;
end

function function_4_vmcadC10_1(C10AcylCoAMAT, C10EnoylCoAMAT, C12AcylCoAMAT, C12EnoylCoAMAT, C4AcylCoAMAT, C4EnoylCoAMAT, C6AcylCoAMAT, C6EnoylCoAMAT, C8AcylCoAMAT, C8EnoylCoAMAT, FADHMAT, FADtMAT, Keqmcad, KmmcadC10AcylCoAMAT, KmmcadC10EnoylCoAMAT, KmmcadC12AcylCoAMAT, KmmcadC12EnoylCoAMAT, KmmcadC4AcylCoAMAT, KmmcadC4EnoylCoAMAT, KmmcadC6AcylCoAMAT, KmmcadC6EnoylCoAMAT, KmmcadC8AcylCoAMAT, KmmcadC8EnoylCoAMAT, KmmcadFAD, KmmcadFADH, VMAT, Vmcad, sfmcadC10)
  MCAD(sfmcadC10, Vmcad, KmmcadC10AcylCoAMAT, KmmcadC12AcylCoAMAT, KmmcadC8AcylCoAMAT, KmmcadC6AcylCoAMAT, KmmcadC4AcylCoAMAT, KmmcadFAD, KmmcadC10EnoylCoAMAT, KmmcadC12EnoylCoAMAT, KmmcadC8EnoylCoAMAT, KmmcadC6EnoylCoAMAT, KmmcadC4EnoylCoAMAT, KmmcadFADH, Keqmcad, C10AcylCoAMAT, C12AcylCoAMAT, C8AcylCoAMAT, C6AcylCoAMAT, C4AcylCoAMAT, FADtMAT, C10EnoylCoAMAT, C12EnoylCoAMAT, C8EnoylCoAMAT, C6EnoylCoAMAT, C4EnoylCoAMAT, FADHMAT)/VMAT;
end

function function_4_vmcadC12_1(C10AcylCoAMAT, C10EnoylCoAMAT, C12AcylCoAMAT, C12EnoylCoAMAT, C4AcylCoAMAT, C4EnoylCoAMAT, C6AcylCoAMAT, C6EnoylCoAMAT, C8AcylCoAMAT, C8EnoylCoAMAT, FADHMAT, FADtMAT, Keqmcad, KmmcadC10AcylCoAMAT, KmmcadC10EnoylCoAMAT, KmmcadC12AcylCoAMAT, KmmcadC12EnoylCoAMAT, KmmcadC4AcylCoAMAT, KmmcadC4EnoylCoAMAT, KmmcadC6AcylCoAMAT, KmmcadC6EnoylCoAMAT, KmmcadC8AcylCoAMAT, KmmcadC8EnoylCoAMAT, KmmcadFAD, KmmcadFADH, VMAT, Vmcad, sfmcadC12)
  MCAD(sfmcadC12, Vmcad, KmmcadC12AcylCoAMAT, KmmcadC10AcylCoAMAT, KmmcadC8AcylCoAMAT, KmmcadC6AcylCoAMAT, KmmcadC4AcylCoAMAT, KmmcadFAD, KmmcadC12EnoylCoAMAT, KmmcadC10EnoylCoAMAT, KmmcadC8EnoylCoAMAT, KmmcadC6EnoylCoAMAT, KmmcadC4EnoylCoAMAT, KmmcadFADH, Keqmcad, C12AcylCoAMAT, C10AcylCoAMAT, C8AcylCoAMAT, C6AcylCoAMAT, C4AcylCoAMAT, FADtMAT, C12EnoylCoAMAT, C10EnoylCoAMAT, C8EnoylCoAMAT, C6EnoylCoAMAT, C4EnoylCoAMAT, FADHMAT)/VMAT;
end

function function_4_vmcadC6_1(C10AcylCoAMAT, C10EnoylCoAMAT, C12AcylCoAMAT, C12EnoylCoAMAT, C4AcylCoAMAT, C4EnoylCoAMAT, C6AcylCoAMAT, C6EnoylCoAMAT, C8AcylCoAMAT, C8EnoylCoAMAT, FADHMAT, FADtMAT, Keqmcad, KmmcadC10AcylCoAMAT, KmmcadC10EnoylCoAMAT, KmmcadC12AcylCoAMAT, KmmcadC12EnoylCoAMAT, KmmcadC4AcylCoAMAT, KmmcadC4EnoylCoAMAT, KmmcadC6AcylCoAMAT, KmmcadC6EnoylCoAMAT, KmmcadC8AcylCoAMAT, KmmcadC8EnoylCoAMAT, KmmcadFAD, KmmcadFADH, VMAT, Vmcad, sfmcadC6)
  MCAD(sfmcadC6, Vmcad, KmmcadC6AcylCoAMAT, KmmcadC12AcylCoAMAT, KmmcadC10AcylCoAMAT, KmmcadC8AcylCoAMAT, KmmcadC4AcylCoAMAT, KmmcadFAD, KmmcadC6EnoylCoAMAT, KmmcadC12EnoylCoAMAT, KmmcadC10EnoylCoAMAT, KmmcadC8EnoylCoAMAT, KmmcadC4EnoylCoAMAT, KmmcadFADH, Keqmcad, C6AcylCoAMAT, C12AcylCoAMAT, C10AcylCoAMAT, C8AcylCoAMAT, C4AcylCoAMAT, FADtMAT, C6EnoylCoAMAT, C12EnoylCoAMAT, C10EnoylCoAMAT, C8EnoylCoAMAT, C4EnoylCoAMAT, FADHMAT)/VMAT;
end

function function_4_vmcadC8_1(C10AcylCoAMAT, C10EnoylCoAMAT, C12AcylCoAMAT, C12EnoylCoAMAT, C4AcylCoAMAT, C4EnoylCoAMAT, C6AcylCoAMAT, C6EnoylCoAMAT, C8AcylCoAMAT, C8EnoylCoAMAT, FADHMAT, FADtMAT, Keqmcad, KmmcadC10AcylCoAMAT, KmmcadC10EnoylCoAMAT, KmmcadC12AcylCoAMAT, KmmcadC12EnoylCoAMAT, KmmcadC4AcylCoAMAT, KmmcadC4EnoylCoAMAT, KmmcadC6AcylCoAMAT, KmmcadC6EnoylCoAMAT, KmmcadC8AcylCoAMAT, KmmcadC8EnoylCoAMAT, KmmcadFAD, KmmcadFADH, VMAT, Vmcad, sfmcadC8)
  MCAD(sfmcadC8, Vmcad, KmmcadC8AcylCoAMAT, KmmcadC12AcylCoAMAT, KmmcadC10AcylCoAMAT, KmmcadC6AcylCoAMAT, KmmcadC4AcylCoAMAT, KmmcadFAD, KmmcadC8EnoylCoAMAT, KmmcadC12EnoylCoAMAT, KmmcadC10EnoylCoAMAT, KmmcadC6EnoylCoAMAT, KmmcadC4EnoylCoAMAT, KmmcadFADH, Keqmcad, C8AcylCoAMAT, C12AcylCoAMAT, C10AcylCoAMAT, C6AcylCoAMAT, C4AcylCoAMAT, FADtMAT, C8EnoylCoAMAT, C12EnoylCoAMAT, C10EnoylCoAMAT, C6EnoylCoAMAT, C4EnoylCoAMAT, FADHMAT)/VMAT;
end

function function_4_vmtpC16_1(AcetylCoAMAT, C10AcylCoAMAT, C10EnoylCoAMAT, C12AcylCoAMAT, C12EnoylCoAMAT, C14AcylCoAMAT, C14EnoylCoAMAT, C16AcylCoAMAT, C16EnoylCoAMAT, C4AcetoacylCoAMAT, C6AcylCoAMAT, C8AcylCoAMAT, C8EnoylCoAMAT, CoAMAT, Keqmtp, KicrotC4AcetoacylCoA, KmmtpAcetylCoAMAT, KmmtpC10AcylCoAMAT, KmmtpC10EnoylCoAMAT, KmmtpC12AcylCoAMAT, KmmtpC12EnoylCoAMAT, KmmtpC14AcylCoAMAT, KmmtpC14EnoylCoAMAT, KmmtpC16AcylCoAMAT, KmmtpC16EnoylCoAMAT, KmmtpC6AcylCoAMAT, KmmtpC8AcylCoAMAT, KmmtpC8EnoylCoAMAT, KmmtpCoAMAT, KmmtpNADHMAT, KmmtpNADMAT, NADHMAT, NADtMAT, VMAT, Vmtp, sfmtpC16)
  MTP(sfmtpC16, Vmtp, KmmtpC16EnoylCoAMAT, KmmtpC14EnoylCoAMAT, KmmtpC12EnoylCoAMAT, KmmtpC10EnoylCoAMAT, KmmtpC8EnoylCoAMAT, KmmtpNADMAT, KmmtpCoAMAT, KmmtpC14AcylCoAMAT, KmmtpC16AcylCoAMAT, KmmtpC12AcylCoAMAT, KmmtpC10AcylCoAMAT, KmmtpC8AcylCoAMAT, KmmtpC6AcylCoAMAT, KmmtpNADHMAT, KmmtpAcetylCoAMAT, KicrotC4AcetoacylCoA, Keqmtp, C16EnoylCoAMAT, C14EnoylCoAMAT, C12EnoylCoAMAT, C10EnoylCoAMAT, C8EnoylCoAMAT, NADtMAT, CoAMAT, C14AcylCoAMAT, C16AcylCoAMAT, C12AcylCoAMAT, C10AcylCoAMAT, C8AcylCoAMAT, C6AcylCoAMAT, NADHMAT, AcetylCoAMAT, C4AcetoacylCoAMAT)/VMAT;
end

function function_4_vscadC4_1(C4AcylCoAMAT, C4EnoylCoAMAT, C6AcylCoAMAT, C6EnoylCoAMAT, FADHMAT, FADtMAT, Keqscad, KmscadC4AcylCoAMAT, KmscadC4EnoylCoAMAT, KmscadC6AcylCoAMAT, KmscadC6EnoylCoAMAT, KmscadFAD, KmscadFADH, VMAT, Vscad, sfscadC4)
  SCAD(sfscadC4, Vscad, KmscadC4AcylCoAMAT, KmscadC6AcylCoAMAT, KmscadFAD, KmscadC4EnoylCoAMAT, KmscadC6EnoylCoAMAT, KmscadFADH, Keqscad, C4AcylCoAMAT, C6AcylCoAMAT, FADtMAT, C4EnoylCoAMAT, C6EnoylCoAMAT, FADHMAT)/VMAT;
end

function function_4_vmckatC6_1(AcetylCoAMAT, C10AcylCoAMAT, C10KetoacylCoAMAT, C12AcylCoAMAT, C12KetoacylCoAMAT, C14AcylCoAMAT, C14KetoacylCoAMAT, C16AcylCoAMAT, C16KetoacylCoAMAT, C4AcetoacylCoAMAT, C4AcylCoAMAT, C6AcylCoAMAT, C6KetoacylCoAMAT, C8AcylCoAMAT, C8KetoacylCoAMAT, CoAMAT, Keqmckat, KmmckatAcetylCoAMAT, KmmckatC10AcylCoAMAT, KmmckatC10KetoacylCoAMAT, KmmckatC12AcylCoAMAT, KmmckatC12KetoacylCoAMAT, KmmckatC14AcylCoAMAT, KmmckatC14KetoacylCoAMAT, KmmckatC16AcylCoAMAT, KmmckatC16KetoacylCoAMAT, KmmckatC4AcetoacylCoAMAT, KmmckatC4AcylCoAMAT, KmmckatC6AcylCoAMAT, KmmckatC6KetoacylCoAMAT, KmmckatC8AcylCoAMAT, KmmckatC8KetoacylCoAMAT, KmmckatCoAMAT, VMAT, Vmckat, sfmckatC6)
  MCKATA(sfmckatC6, Vmckat, KmmckatC6KetoacylCoAMAT, KmmckatC16KetoacylCoAMAT, KmmckatC14KetoacylCoAMAT, KmmckatC12KetoacylCoAMAT, KmmckatC10KetoacylCoAMAT, KmmckatC8KetoacylCoAMAT, KmmckatC4AcetoacylCoAMAT, KmmckatCoAMAT, KmmckatC4AcylCoAMAT, KmmckatC16AcylCoAMAT, KmmckatC14AcylCoAMAT, KmmckatC12AcylCoAMAT, KmmckatC10AcylCoAMAT, KmmckatC8AcylCoAMAT, KmmckatC6AcylCoAMAT, KmmckatAcetylCoAMAT, Keqmckat, C6KetoacylCoAMAT, C16KetoacylCoAMAT, C14KetoacylCoAMAT, C12KetoacylCoAMAT, C10KetoacylCoAMAT, C8KetoacylCoAMAT, C4AcetoacylCoAMAT, CoAMAT, C4AcylCoAMAT, C16AcylCoAMAT, C14AcylCoAMAT, C12AcylCoAMAT, C10AcylCoAMAT, C8AcylCoAMAT, C6AcylCoAMAT, AcetylCoAMAT)/VMAT;
end

function function_4_vmckatC4_1(AcetylCoAMAT, C10AcylCoAMAT, C10KetoacylCoAMAT, C12AcylCoAMAT, C12KetoacylCoAMAT, C14AcylCoAMAT, C14KetoacylCoAMAT, C16AcylCoAMAT, C16KetoacylCoAMAT, C4AcetoacylCoAMAT, C4AcylCoAMAT, C6AcylCoAMAT, C6KetoacylCoAMAT, C8AcylCoAMAT, C8KetoacylCoAMAT, CoAMAT, Keqmckat, KmmckatAcetylCoAMAT, KmmckatC10AcylCoAMAT, KmmckatC10KetoacylCoAMAT, KmmckatC12AcylCoAMAT, KmmckatC12KetoacylCoAMAT, KmmckatC14AcylCoAMAT, KmmckatC14KetoacylCoAMAT, KmmckatC16AcylCoAMAT, KmmckatC16KetoacylCoAMAT, KmmckatC4AcetoacylCoAMAT, KmmckatC4AcylCoAMAT, KmmckatC6AcylCoAMAT, KmmckatC6KetoacylCoAMAT, KmmckatC8AcylCoAMAT, KmmckatC8KetoacylCoAMAT, KmmckatCoAMAT, VMAT, Vmckat, sfmckatC4)
  MCKATB(sfmckatC4, Vmckat, KmmckatC4AcetoacylCoAMAT, KmmckatC16KetoacylCoAMAT, KmmckatC14KetoacylCoAMAT, KmmckatC12KetoacylCoAMAT, KmmckatC10KetoacylCoAMAT, KmmckatC8KetoacylCoAMAT, KmmckatC6KetoacylCoAMAT, KmmckatCoAMAT, KmmckatC4AcylCoAMAT, KmmckatC16AcylCoAMAT, KmmckatC14AcylCoAMAT, KmmckatC12AcylCoAMAT, KmmckatC10AcylCoAMAT, KmmckatC8AcylCoAMAT, KmmckatC6AcylCoAMAT, KmmckatAcetylCoAMAT, Keqmckat, C4AcetoacylCoAMAT, C16KetoacylCoAMAT, C14KetoacylCoAMAT, C12KetoacylCoAMAT, C10KetoacylCoAMAT, C8KetoacylCoAMAT, C6KetoacylCoAMAT, CoAMAT, C4AcylCoAMAT, C16AcylCoAMAT, C14AcylCoAMAT, C12AcylCoAMAT, C10AcylCoAMAT, C8AcylCoAMAT, C6AcylCoAMAT, AcetylCoAMAT)/VMAT;
end

function function_4_vmtpC12_1(AcetylCoAMAT, C10AcylCoAMAT, C10EnoylCoAMAT, C12AcylCoAMAT, C12EnoylCoAMAT, C14AcylCoAMAT, C14EnoylCoAMAT, C16AcylCoAMAT, C16EnoylCoAMAT, C4AcetoacylCoAMAT, C6AcylCoAMAT, C8AcylCoAMAT, C8EnoylCoAMAT, CoAMAT, Keqmtp, KicrotC4AcetoacylCoA, KmmtpAcetylCoAMAT, KmmtpC10AcylCoAMAT, KmmtpC10EnoylCoAMAT, KmmtpC12AcylCoAMAT, KmmtpC12EnoylCoAMAT, KmmtpC14AcylCoAMAT, KmmtpC14EnoylCoAMAT, KmmtpC16AcylCoAMAT, KmmtpC16EnoylCoAMAT, KmmtpC6AcylCoAMAT, KmmtpC8AcylCoAMAT, KmmtpC8EnoylCoAMAT, KmmtpCoAMAT, KmmtpNADHMAT, KmmtpNADMAT, NADHMAT, NADtMAT, VMAT, Vmtp, sfmtpC12)
  MTP(sfmtpC12, Vmtp, KmmtpC12EnoylCoAMAT, KmmtpC16EnoylCoAMAT, KmmtpC14EnoylCoAMAT, KmmtpC10EnoylCoAMAT, KmmtpC8EnoylCoAMAT, KmmtpNADMAT, KmmtpCoAMAT, KmmtpC10AcylCoAMAT, KmmtpC16AcylCoAMAT, KmmtpC14AcylCoAMAT, KmmtpC12AcylCoAMAT, KmmtpC8AcylCoAMAT, KmmtpC6AcylCoAMAT, KmmtpNADHMAT, KmmtpAcetylCoAMAT, KicrotC4AcetoacylCoA, Keqmtp, C12EnoylCoAMAT, C16EnoylCoAMAT, C14EnoylCoAMAT, C10EnoylCoAMAT, C8EnoylCoAMAT, NADtMAT, CoAMAT, C10AcylCoAMAT, C16AcylCoAMAT, C14AcylCoAMAT, C12AcylCoAMAT, C8AcylCoAMAT, C6AcylCoAMAT, NADHMAT, AcetylCoAMAT, C4AcetoacylCoAMAT)/VMAT;
end

function function_4_vmtpC14_1(AcetylCoAMAT, C10AcylCoAMAT, C10EnoylCoAMAT, C12AcylCoAMAT, C12EnoylCoAMAT, C14AcylCoAMAT, C14EnoylCoAMAT, C16AcylCoAMAT, C16EnoylCoAMAT, C4AcetoacylCoAMAT, C6AcylCoAMAT, C8AcylCoAMAT, C8EnoylCoAMAT, CoAMAT, Keqmtp, KicrotC4AcetoacylCoA, KmmtpAcetylCoAMAT, KmmtpC10AcylCoAMAT, KmmtpC10EnoylCoAMAT, KmmtpC12AcylCoAMAT, KmmtpC12EnoylCoAMAT, KmmtpC14AcylCoAMAT, KmmtpC14EnoylCoAMAT, KmmtpC16AcylCoAMAT, KmmtpC16EnoylCoAMAT, KmmtpC6AcylCoAMAT, KmmtpC8AcylCoAMAT, KmmtpC8EnoylCoAMAT, KmmtpCoAMAT, KmmtpNADHMAT, KmmtpNADMAT, NADHMAT, NADtMAT, VMAT, Vmtp, sfmtpC14)
  MTP(sfmtpC14, Vmtp, KmmtpC14EnoylCoAMAT, KmmtpC16EnoylCoAMAT, KmmtpC12EnoylCoAMAT, KmmtpC10EnoylCoAMAT, KmmtpC8EnoylCoAMAT, KmmtpNADMAT, KmmtpCoAMAT, KmmtpC12AcylCoAMAT, KmmtpC16AcylCoAMAT, KmmtpC14AcylCoAMAT, KmmtpC10AcylCoAMAT, KmmtpC8AcylCoAMAT, KmmtpC6AcylCoAMAT, KmmtpNADHMAT, KmmtpAcetylCoAMAT, KicrotC4AcetoacylCoA, Keqmtp, C14EnoylCoAMAT, C16EnoylCoAMAT, C12EnoylCoAMAT, C10EnoylCoAMAT, C8EnoylCoAMAT, NADtMAT, CoAMAT, C12AcylCoAMAT, C16AcylCoAMAT, C14AcylCoAMAT, C10AcylCoAMAT, C8AcylCoAMAT, C6AcylCoAMAT, NADHMAT, AcetylCoAMAT, C4AcetoacylCoAMAT)/VMAT;
end

function function_4_vmtpC10_1(AcetylCoAMAT, C10AcylCoAMAT, C10EnoylCoAMAT, C12AcylCoAMAT, C12EnoylCoAMAT, C14AcylCoAMAT, C14EnoylCoAMAT, C16AcylCoAMAT, C16EnoylCoAMAT, C4AcetoacylCoAMAT, C6AcylCoAMAT, C8AcylCoAMAT, C8EnoylCoAMAT, CoAMAT, Keqmtp, KicrotC4AcetoacylCoA, KmmtpAcetylCoAMAT, KmmtpC10AcylCoAMAT, KmmtpC10EnoylCoAMAT, KmmtpC12AcylCoAMAT, KmmtpC12EnoylCoAMAT, KmmtpC14AcylCoAMAT, KmmtpC14EnoylCoAMAT, KmmtpC16AcylCoAMAT, KmmtpC16EnoylCoAMAT, KmmtpC6AcylCoAMAT, KmmtpC8AcylCoAMAT, KmmtpC8EnoylCoAMAT, KmmtpCoAMAT, KmmtpNADHMAT, KmmtpNADMAT, NADHMAT, NADtMAT, VMAT, Vmtp, sfmtpC10)
  MTP(sfmtpC10, Vmtp, KmmtpC10EnoylCoAMAT, KmmtpC16EnoylCoAMAT, KmmtpC14EnoylCoAMAT, KmmtpC12EnoylCoAMAT, KmmtpC8EnoylCoAMAT, KmmtpNADMAT, KmmtpCoAMAT, KmmtpC8AcylCoAMAT, KmmtpC16AcylCoAMAT, KmmtpC14AcylCoAMAT, KmmtpC12AcylCoAMAT, KmmtpC10AcylCoAMAT, KmmtpC6AcylCoAMAT, KmmtpNADHMAT, KmmtpAcetylCoAMAT, KicrotC4AcetoacylCoA, Keqmtp, C10EnoylCoAMAT, C16EnoylCoAMAT, C14EnoylCoAMAT, C12EnoylCoAMAT, C8EnoylCoAMAT, NADtMAT, CoAMAT, C8AcylCoAMAT, C16AcylCoAMAT, C14AcylCoAMAT, C12AcylCoAMAT, C10AcylCoAMAT, C6AcylCoAMAT, NADHMAT, AcetylCoAMAT, C4AcetoacylCoAMAT)/VMAT;
end

function CRMS(sfc, Vc, sfm, Vm, S1, P0, Kms1, Kmms1, Kmp0, P1, P3, Keqc, Keqm, Kmp1, P2, Kmp2, Kmp3, S2, Kms2, I1, Ki)
  sfc*Vc*sfm*Vm*(S1*P0/(Kms1*Kmms1*Kmp0) - P1*P3/(Kms1*Kmms1*Kmp0*Keqc*Keqm))/(sfc*Vc*(1 + P1/Kmp1 + P2/Kmp2)*(1 + P0/Kmp0 + P3/Kmp3)/(Kms1*Keqc) + sfm*Vm*P0*(1 + S1/Kms1 + S2/Kms2 + I1/Ki)/(Kmms1*Kmp0));
end

function function_4_vmtpC8_1(AcetylCoAMAT, C10AcylCoAMAT, C10EnoylCoAMAT, C12AcylCoAMAT, C12EnoylCoAMAT, C14AcylCoAMAT, C14EnoylCoAMAT, C16AcylCoAMAT, C16EnoylCoAMAT, C4AcetoacylCoAMAT, C6AcylCoAMAT, C8AcylCoAMAT, C8EnoylCoAMAT, CoAMAT, Keqmtp, KicrotC4AcetoacylCoA, KmmtpAcetylCoAMAT, KmmtpC10AcylCoAMAT, KmmtpC10EnoylCoAMAT, KmmtpC12AcylCoAMAT, KmmtpC12EnoylCoAMAT, KmmtpC14AcylCoAMAT, KmmtpC14EnoylCoAMAT, KmmtpC16AcylCoAMAT, KmmtpC16EnoylCoAMAT, KmmtpC6AcylCoAMAT, KmmtpC8AcylCoAMAT, KmmtpC8EnoylCoAMAT, KmmtpCoAMAT, KmmtpNADHMAT, KmmtpNADMAT, NADHMAT, NADtMAT, VMAT, Vmtp, sfmtpC8)
  MTP(sfmtpC8, Vmtp, KmmtpC8EnoylCoAMAT, KmmtpC16EnoylCoAMAT, KmmtpC14EnoylCoAMAT, KmmtpC12EnoylCoAMAT, KmmtpC10EnoylCoAMAT, KmmtpNADMAT, KmmtpCoAMAT, KmmtpC6AcylCoAMAT, KmmtpC16AcylCoAMAT, KmmtpC14AcylCoAMAT, KmmtpC12AcylCoAMAT, KmmtpC10AcylCoAMAT, KmmtpC8AcylCoAMAT, KmmtpNADHMAT, KmmtpAcetylCoAMAT, KicrotC4AcetoacylCoA, Keqmtp, C8EnoylCoAMAT, C16EnoylCoAMAT, C14EnoylCoAMAT, C12EnoylCoAMAT, C10EnoylCoAMAT, NADtMAT, CoAMAT, C6AcylCoAMAT, C16AcylCoAMAT, C14AcylCoAMAT, C12AcylCoAMAT, C10AcylCoAMAT, C8AcylCoAMAT, NADHMAT, AcetylCoAMAT, C4AcetoacylCoAMAT)/VMAT;
end

function function_4_vacesink_1(AcetylCoAMAT, K1acesink, Ksacesink, VMAT)
  RES(Ksacesink, AcetylCoAMAT, K1acesink)/VMAT;
end

function CRMS_C6_1(C4AcetoacylCoAMAT, C4EnoylCoAMAT, C6EnoylCoAMAT, C6KetoacylCoAMAT, Keqcrot, Keqmschad, KicrotC4AcetoacylCoA, KmcrotC4EnoylCoAMAT, KmcrotC6EnoylCoAMAT, KmmschadC4AcetoacylCoAMAT, KmmschadC6HydroxyacylCoAMAT, KmmschadC6KetoacylCoAMAT, KmmschadNADHMAT, KmmschadNADMAT, NADHMAT, VMAT, Vcrot, Vmschad, sfcrotC6, sfmschadC6, NAD)
  CRMS(sfcrotC6, Vcrot, sfmschadC6, Vmschad, C6EnoylCoAMAT, NAD, KmcrotC6EnoylCoAMAT, KmmschadC6HydroxyacylCoAMAT, KmmschadNADMAT, C6KetoacylCoAMAT, NADHMAT, Keqcrot, Keqmschad, KmmschadC6KetoacylCoAMAT, C4AcetoacylCoAMAT, KmmschadC4AcetoacylCoAMAT, KmmschadNADHMAT, C4EnoylCoAMAT, KmcrotC4EnoylCoAMAT, C4AcetoacylCoAMAT, KicrotC4AcetoacylCoA)/VMAT;
end

function CRMS_C4_1(C4AcetoacylCoAMAT, C4EnoylCoAMAT, C6EnoylCoAMAT, C6KetoacylCoAMAT, Keqcrot, Keqmschad, KicrotC4AcetoacylCoA, KmcrotC4EnoylCoAMAT, KmcrotC6EnoylCoAMAT, KmmschadC4AcetoacylCoAMAT, KmmschadC4HydroxyacylCoAMAT, KmmschadC6KetoacylCoAMAT, KmmschadNADHMAT, KmmschadNADMAT, NADHMAT, VMAT, Vcrot, Vmschad, sfcrotC4, sfmschadC4, NAD)
  CRMS(sfcrotC4, Vcrot, sfmschadC4, Vmschad, C4EnoylCoAMAT, NAD, KmcrotC4EnoylCoAMAT, KmmschadC4HydroxyacylCoAMAT, KmmschadNADMAT, C4AcetoacylCoAMAT, NADHMAT, Keqcrot, Keqmschad, KmmschadC4AcetoacylCoAMAT, C6KetoacylCoAMAT, KmmschadC6KetoacylCoAMAT, KmmschadNADHMAT, C6EnoylCoAMAT, KmcrotC6EnoylCoAMAT, C4AcetoacylCoAMAT, KicrotC4AcetoacylCoA)/VMAT;
end

function function_4_vcpt2C12_1(C10AcylCarMAT, C10AcylCoAMAT, C12AcylCarMAT, C12AcylCoAMAT, C14AcylCarMAT, C14AcylCoAMAT, C16AcylCarMAT, C16AcylCoAMAT, C4AcylCarMAT, C4AcylCoAMAT, C6AcylCarMAT, C6AcylCoAMAT, C8AcylCarMAT, C8AcylCoAMAT, CarMAT, CoAMAT, Keqcpt2, Kmcpt2C10AcylCarMAT, Kmcpt2C10AcylCoAMAT, Kmcpt2C12AcylCarMAT, Kmcpt2C12AcylCoAMAT, Kmcpt2C14AcylCarMAT, Kmcpt2C14AcylCoAMAT, Kmcpt2C16AcylCarMAT, Kmcpt2C16AcylCoAMAT, Kmcpt2C4AcylCarMAT, Kmcpt2C4AcylCoAMAT, Kmcpt2C6AcylCarMAT, Kmcpt2C6AcylCoAMAT, Kmcpt2C8AcylCarMAT, Kmcpt2C8AcylCoAMAT, Kmcpt2CarMAT, Kmcpt2CoAMAT, VMAT, Vcpt2, sfcpt2C12)
  CPT2(sfcpt2C12, Vcpt2, Kmcpt2C12AcylCarMAT, Kmcpt2C16AcylCarMAT, Kmcpt2C14AcylCarMAT, Kmcpt2C10AcylCarMAT, Kmcpt2C8AcylCarMAT, Kmcpt2C6AcylCarMAT, Kmcpt2C4AcylCarMAT, Kmcpt2CoAMAT, Kmcpt2C12AcylCoAMAT, Kmcpt2C16AcylCoAMAT, Kmcpt2C14AcylCoAMAT, Kmcpt2C10AcylCoAMAT, Kmcpt2C8AcylCoAMAT, Kmcpt2C6AcylCoAMAT, Kmcpt2C4AcylCoAMAT, Kmcpt2CarMAT, Keqcpt2, C12AcylCarMAT, C16AcylCarMAT, C14AcylCarMAT, C10AcylCarMAT, C8AcylCarMAT, C6AcylCarMAT, C4AcylCarMAT, CoAMAT, C12AcylCoAMAT, C16AcylCoAMAT, C14AcylCoAMAT, C10AcylCoAMAT, C8AcylCoAMAT, C6AcylCoAMAT, C4AcylCoAMAT, CarMAT)/VMAT;
end

model Rao2014___Fatty_acid_beta_oxidation__reduced_model()
  // Rao2014 - Fatty acid beta-oxidation (reduced model)
  // This represents the reduced version of the "time course model" of Van Eunen et al (2013): Biochemical competition makes fatty-acid beta-oxidation vulnerable to substrate overload. The SBML was created from that of the original model and produces identical results when a time-course of 25 mins is run in COPASI
  // hasTaxon taxonomy:10116
  // isDescribedBy pubmed:24885656
  // biomodels.db:MODEL1403250000
  // isVersionOf GO:0006635
  // occursIn BTO:0000759
  // hasTaxon taxonomy:10116

  // Compartments:
  compartment VCYT = 0.01;
  compartment VMAT = 1.8e-6;

  // Species:
  species C16AcylCarCYT in VCYT = 0.171;
  species C14AcylCarCYT in VCYT = 0.023;
  species C12AcylCarCYT in VCYT = 0.11;
  species C10AcylCarCYT in VCYT = 0.019;
  species C8AcylCarCYT in VCYT = 0.052;
  species C6AcylCarCYT in VCYT = 0.017;
  species C4AcylCarCYT in VCYT = 0.008;
  species $C16AcylCoACYT in VCYT;
  species $CarCYT in VCYT = 400;
  species $CoACYT in VCYT = 140;
  species $MalCoACYT in VCYT = 0;
  species C16AcylCarMAT in VMAT = 0;
  species C16AcylCoAMAT in VMAT = 0;
  species C16EnoylCoAMAT in VMAT = 0;
  species $C16HydroxyacylCoAMAT in VMAT = 0;
  species $C16KetoacylCoAMAT in VMAT = 0;
  species C14AcylCarMAT in VMAT = 0;
  species C14AcylCoAMAT in VMAT = 0;
  species C14EnoylCoAMAT in VMAT = 0;
  species $C14HydroxyacylCoAMAT in VMAT = 0;
  species $C14KetoacylCoAMAT in VMAT = 0;
  species C12AcylCarMAT in VMAT = 0;
  species C12AcylCoAMAT in VMAT = 0;
  species C12EnoylCoAMAT in VMAT = 0;
  species $C12HydroxyacylCoAMAT in VMAT = 0;
  species $C12KetoacylCoAMAT in VMAT = 0;
  species C10AcylCarMAT in VMAT = 0;
  species C10AcylCoAMAT in VMAT = 0;
  species C10EnoylCoAMAT in VMAT = 0;
  species $C10HydroxyacylCoAMAT in VMAT = 0;
  species $C10KetoacylCoAMAT in VMAT = 0;
  species C8AcylCarMAT in VMAT = 0;
  species C8AcylCoAMAT in VMAT = 0;
  species C8EnoylCoAMAT in VMAT = 0;
  species $C8HydroxyacylCoAMAT in VMAT = 0;
  species $C8KetoacylCoAMAT in VMAT = 0;
  species C6AcylCarMAT in VMAT = 0;
  species C6AcylCoAMAT in VMAT = 0;
  species C6EnoylCoAMAT in VMAT = 0;
  species $C6HydroxyacylCoAMAT in VMAT = 0;
  species C6KetoacylCoAMAT in VMAT = 0;
  species C4AcylCarMAT in VMAT = 0;
  species C4AcylCoAMAT in VMAT = 0;
  species C4EnoylCoAMAT in VMAT = 0;
  species $C4HydroxyacylCoAMAT in VMAT = 0;
  species C4AcetoacylCoAMAT in VMAT = 0;
  species AcetylCoAMAT in VMAT = 30;
  species $FADHMAT in VMAT = 0.46;
  species $NADHMAT in VMAT = 16;
  species $CoAMAT in VMAT;
  species $CarMAT in VMAT = 950;
  species $FADtMAT in VMAT = 0.77;
  species $NADtMAT in VMAT = 250;
  species $CoAMATt in VMAT = 5000;
  species $NAD in VMAT = 234;

  // Parameters:
  Vfcact = 0.42;
  Vrcact = 0.42;
  KmcactCarMAT = 130;
  KmcactCarCYT = 130;
  KicactCarCYT = 200;
  Keqcact = 1;
  Vcpt2 = 0.391;
  Kmcpt2C16AcylCarMAT = 51;
  Kmcpt2C14AcylCarMAT = 51;
  Kmcpt2C12AcylCarMAT = 51;
  Kmcpt2C10AcylCarMAT = 51;
  Kmcpt2C8AcylCarMAT = 51;
  Kmcpt2C6AcylCarMAT = 51;
  Kmcpt2C4AcylCarMAT = 51;
  Kmcpt2CoAMAT = 30;
  Kmcpt2C16AcylCoAMAT = 38;
  Kmcpt2C14AcylCoAMAT = 38;
  Kmcpt2C12AcylCoAMAT = 38;
  Kmcpt2C10AcylCoAMAT = 38;
  Kmcpt2C8AcylCoAMAT = 38;
  Kmcpt2C6AcylCoAMAT = 1000;
  Kmcpt2C4AcylCoAMAT = 1000000;
  Kmcpt2CarMAT = 350;
  Keqcpt2 = 2.22;
  Vvlcad = 0.008;
  KmvlcadC16AcylCoAMAT = 6.5;
  KmvlcadC14AcylCoAMAT = 4;
  KmvlcadC12AcylCoAMAT = 2.7;
  KmvlcadFAD = 0.12;
  KmvlcadC16EnoylCoAMAT = 1.08;
  KmvlcadC14EnoylCoAMAT = 1.08;
  KmvlcadC12EnoylCoAMAT = 1.08;
  KmvlcadFADH = 24.2;
  Keqvlcad = 6;
  Vlcad = 0.01;
  KmlcadC16AcylCoAMAT = 2.5;
  KmlcadC14AcylCoAMAT = 7.4;
  KmlcadC12AcylCoAMAT = 9;
  KmlcadC10AcylCoAMAT = 24.3;
  KmlcadC8AcylCoAMAT = 123;
  KmlcadFAD = 0.12;
  KmlcadC16EnoylCoAMAT = 1.08;
  KmlcadC14EnoylCoAMAT = 1.08;
  KmlcadC12EnoylCoAMAT = 1.08;
  KmlcadC10EnoylCoAMAT = 1.08;
  KmlcadC8EnoylCoAMAT = 1.08;
  KmlcadFADH = 24.2;
  Keqlcad = 6;
  Vmcad = 0.081;
  KmmcadC12AcylCoAMAT = 5.7;
  KmmcadC10AcylCoAMAT = 5.4;
  KmmcadC8AcylCoAMAT = 4;
  KmmcadC6AcylCoAMAT = 9.4;
  KmmcadC4AcylCoAMAT = 135;
  KmmcadFAD = 0.12;
  KmmcadC12EnoylCoAMAT = 1.08;
  KmmcadC10EnoylCoAMAT = 1.08;
  KmmcadC8EnoylCoAMAT = 1.08;
  KmmcadC6EnoylCoAMAT = 1.08;
  KmmcadC4EnoylCoAMAT = 1.08;
  KmmcadFADH = 24.2;
  Keqmcad = 6;
  Vscad = 0.081;
  KmscadC6AcylCoAMAT = 285;
  KmscadC4AcylCoAMAT = 10.7;
  KmscadFAD = 0.12;
  KmscadC6EnoylCoAMAT = 1.08;
  KmscadC4EnoylCoAMAT = 1.08;
  KmscadFADH = 24.2;
  Keqscad = 6;
  Vcrot = 3.6;
  KmcrotC16EnoylCoAMAT = 150;
  KmcrotC14EnoylCoAMAT = 100;
  KmcrotC12EnoylCoAMAT = 25;
  KmcrotC10EnoylCoAMAT = 25;
  KmcrotC8EnoylCoAMAT = 25;
  KmcrotC6EnoylCoAMAT = 25;
  KmcrotC4EnoylCoAMAT = 40;
  KmcrotC16HydroxyacylCoAMAT = 45;
  KmcrotC14HydroxyacylCoAMAT = 45;
  KmcrotC12HydroxyacylCoAMAT = 45;
  KmcrotC10HydroxyacylCoAMAT = 45;
  KmcrotC8HydroxyacylCoAMAT = 45;
  KmcrotC6HydroxyacylCoAMAT = 45;
  KmcrotC4HydroxyacylCoAMAT = 45;
  KicrotC4AcetoacylCoA = 1.6;
  Keqcrot = 3.13;
  Vmschad = 1;
  KmmschadC16HydroxyacylCoAMAT = 1.5;
  KmmschadC14HydroxyacylCoAMAT = 1.8;
  KmmschadC12HydroxyacylCoAMAT = 3.7;
  KmmschadC10HydroxyacylCoAMAT = 8.8;
  KmmschadC8HydroxyacylCoAMAT = 16.3;
  KmmschadC6HydroxyacylCoAMAT = 28.6;
  KmmschadC4HydroxyacylCoAMAT = 69.9;
  KmmschadNADMAT = 58.5;
  KmmschadC16KetoacylCoAMAT = 1.4;
  KmmschadC14KetoacylCoAMAT = 1.4;
  KmmschadC12KetoacylCoAMAT = 1.6;
  KmmschadC10KetoacylCoAMAT = 2.3;
  KmmschadC8KetoacylCoAMAT = 4.1;
  KmmschadC6KetoacylCoAMAT = 5.8;
  KmmschadC4AcetoacylCoAMAT = 16.9;
  KmmschadNADHMAT = 5.4;
  Keqmschad = 0.000217;
  Vmckat = 0.377;
  KmmckatC16KetoacylCoAMAT = 1.1;
  KmmckatC14KetoacylCoAMAT = 1.2;
  KmmckatC12KetoacylCoAMAT = 1.3;
  KmmckatC10KetoacylCoAMAT = 2.1;
  KmmckatC8KetoacylCoAMAT = 3.2;
  KmmckatC6KetoacylCoAMAT = 6.7;
  KmmckatC4AcetoacylCoAMAT = 12.4;
  KmmckatCoAMAT = 26.6;
  KmmckatC14AcylCoAMAT = 13.83;
  KmmckatC16AcylCoAMAT = 13.83;
  KmmckatC12AcylCoAMAT = 13.83;
  KmmckatC10AcylCoAMAT = 13.83;
  KmmckatC8AcylCoAMAT = 13.83;
  KmmckatC6AcylCoAMAT = 13.83;
  KmmckatC4AcylCoAMAT = 13.83;
  KmmckatAcetylCoAMAT = 30;
  Keqmckat = 1051;
  Vmtp = 2.84;
  KmmtpC16EnoylCoAMAT = 25;
  KmmtpC14EnoylCoAMAT = 25;
  KmmtpC12EnoylCoAMAT = 25;
  KmmtpC10EnoylCoAMAT = 25;
  KmmtpC8EnoylCoAMAT = 25;
  KmmtpNADMAT = 60;
  KmmtpCoAMAT = 30;
  KmmtpC14AcylCoAMAT = 13.83;
  KmmtpC16AcylCoAMAT = 13.83;
  KmmtpC12AcylCoAMAT = 13.83;
  KmmtpC10AcylCoAMAT = 13.83;
  KmmtpC8AcylCoAMAT = 13.83;
  KmmtpC6AcylCoAMAT = 13.83;
  KmmtpNADHMAT = 50;
  KmmtpAcetylCoAMAT = 30;
  Keqmtp = 0.71;

  // Assignment rules:
  C16AcylCoACYT := 26.8*2.71828^(-0.18*time);
  CoAMAT := CoAMATt - (C16AcylCoAMAT + C16EnoylCoAMAT + C16HydroxyacylCoAMAT + C16KetoacylCoAMAT + C14AcylCoAMAT + C14EnoylCoAMAT + C14HydroxyacylCoAMAT + C14KetoacylCoAMAT + C12AcylCoAMAT + C12EnoylCoAMAT + C12HydroxyacylCoAMAT + C12KetoacylCoAMAT + C10AcylCoAMAT + C10EnoylCoAMAT + C10HydroxyacylCoAMAT + C10KetoacylCoAMAT + C8AcylCoAMAT + C8EnoylCoAMAT + C8HydroxyacylCoAMAT + C8KetoacylCoAMAT + C6AcylCoAMAT + C6EnoylCoAMAT + C6HydroxyacylCoAMAT + C6KetoacylCoAMAT + C4AcylCoAMAT + C4EnoylCoAMAT + C4HydroxyacylCoAMAT + C4AcetoacylCoAMAT + AcetylCoAMAT);

  // Reactions:
  vcpt1C16: -> C16AcylCarCYT; VCYT*function_4_vcpt1C16_1(C16AcylCarCYT, C16AcylCoACYT, CarCYT, CoACYT, Keqcpt1, Kicpt1MalCoACYT, Kmcpt1C16AcylCarCYT, Kmcpt1C16AcylCoACYT, Kmcpt1CarCYT, Kmcpt1CoACYT, MalCoACYT, VCYT, Vcpt1, ncpt1, sfcpt1C16);  // modifiers: C16AcylCoACYT, CarCYT, CoACYT, MalCoACYT
    Keqcpt1 = 0.45; Kicpt1MalCoACYT = 9.1; Kmcpt1C16AcylCarCYT = 136; Kmcpt1C16AcylCoACYT = 13.8; Kmcpt1CarCYT = 125; Kmcpt1CoACYT = 40.7; Vcpt1 = 0.012; ncpt1 = 2.4799; sfcpt1C16 = 1;
  vcactC16: C16AcylCarCYT -> C16AcylCarMAT; function_4_vcactC16_1(C16AcylCarCYT, C16AcylCarMAT, CarCYT, CarMAT, Keqcact, KicactC16AcylCarCYT, KicactCarCYT, KmcactC16AcylCarCYT, KmcactC16AcylCarMAT, KmcactCarCYT, KmcactCarMAT, Vfcact, Vrcact);  // modifiers: CarMAT, CarCYT
    KicactC16AcylCarCYT = 56; KmcactC16AcylCarCYT = 15; KmcactC16AcylCarMAT = 15;
  vcactC14: C14AcylCarCYT -> C14AcylCarMAT; function_4_vcactC14_1(C14AcylCarCYT, C14AcylCarMAT, CarCYT, CarMAT, Keqcact, KicactC14AcylCarCYT, KicactCarCYT, KmcactC14AcylCarCYT, KmcactC14AcylCarMAT, KmcactCarCYT, KmcactCarMAT, Vfcact, Vrcact);  // modifiers: CarMAT, CarCYT
    KicactC14AcylCarCYT = 56; KmcactC14AcylCarCYT = 15; KmcactC14AcylCarMAT = 15;
  vcactC12: C12AcylCarCYT -> C12AcylCarMAT; function_4_vcactC12_1(C12AcylCarCYT, C12AcylCarMAT, CarCYT, CarMAT, Keqcact, KicactC12AcylCarCYT, KicactCarCYT, KmcactC12AcylCarCYT, KmcactC12AcylCarMAT, KmcactCarCYT, KmcactCarMAT, Vfcact, Vrcact);  // modifiers: CarMAT, CarCYT
    KicactC12AcylCarCYT = 56; KmcactC12AcylCarCYT = 15; KmcactC12AcylCarMAT = 15;
  vcactC10: C10AcylCarCYT -> C10AcylCarMAT; function_4_vcactC10_1(C10AcylCarCYT, C10AcylCarMAT, CarCYT, CarMAT, Keqcact, KicactC10AcylCarCYT, KicactCarCYT, KmcactC10AcylCarCYT, KmcactC10AcylCarMAT, KmcactCarCYT, KmcactCarMAT, Vfcact, Vrcact);  // modifiers: CarMAT, CarCYT
    KicactC10AcylCarCYT = 56; KmcactC10AcylCarCYT = 15; KmcactC10AcylCarMAT = 15;
  vcactC8: C8AcylCarCYT -> C8AcylCarMAT; function_4_vcactC8_1(C8AcylCarCYT, C8AcylCarMAT, CarCYT, CarMAT, Keqcact, KicactC8AcylCarCYT, KicactCarCYT, KmcactC8AcylCarCYT, KmcactC8AcylCarMAT, KmcactCarCYT, KmcactCarMAT, Vfcact, Vrcact);  // modifiers: CarMAT, CarCYT
    KicactC8AcylCarCYT = 56; KmcactC8AcylCarCYT = 15; KmcactC8AcylCarMAT = 15;
  vcactC6: C6AcylCarCYT -> C6AcylCarMAT; function_4_vcactC6_1(C6AcylCarCYT, C6AcylCarMAT, CarCYT, CarMAT, Keqcact, KicactC6AcylCarCYT, KicactCarCYT, KmcactC6AcylCarCYT, KmcactC6AcylCarMAT, KmcactCarCYT, KmcactCarMAT, Vfcact, Vrcact);  // modifiers: CarMAT, CarCYT
    KicactC6AcylCarCYT = 56; KmcactC6AcylCarCYT = 15; KmcactC6AcylCarMAT = 15;
  vcactC4: C4AcylCarCYT -> C4AcylCarMAT; function_4_vcactC4_1(C4AcylCarCYT, C4AcylCarMAT, CarCYT, CarMAT, Keqcact, KicactC4AcylCarCYT, KicactCarCYT, KmcactC4AcylCarCYT, KmcactC4AcylCarMAT, KmcactCarCYT, KmcactCarMAT, Vfcact, Vrcact);  // modifiers: CarMAT, CarCYT
    KicactC4AcylCarCYT = 56; KmcactC4AcylCarCYT = 15; KmcactC4AcylCarMAT = 15;
  vcpt2C16: C16AcylCarMAT -> C16AcylCoAMAT; VMAT*function_4_vcpt2C16_1(C10AcylCarMAT, C10AcylCoAMAT, C12AcylCarMAT, C12AcylCoAMAT, C14AcylCarMAT, C14AcylCoAMAT, C16AcylCarMAT, C16AcylCoAMAT, C4AcylCarMAT, C4AcylCoAMAT, C6AcylCarMAT, C6AcylCoAMAT, C8AcylCarMAT, C8AcylCoAMAT, CarMAT, CoAMAT, Keqcpt2, Kmcpt2C10AcylCarMAT, Kmcpt2C10AcylCoAMAT, Kmcpt2C12AcylCarMAT, Kmcpt2C12AcylCoAMAT, Kmcpt2C14AcylCarMAT, Kmcpt2C14AcylCoAMAT, Kmcpt2C16AcylCarMAT, Kmcpt2C16AcylCoAMAT, Kmcpt2C4AcylCarMAT, Kmcpt2C4AcylCoAMAT, Kmcpt2C6AcylCarMAT, Kmcpt2C6AcylCoAMAT, Kmcpt2C8AcylCarMAT, Kmcpt2C8AcylCoAMAT, Kmcpt2CarMAT, Kmcpt2CoAMAT, VMAT, Vcpt2, sfcpt2C16);  // modifiers: C14AcylCarMAT, C12AcylCarMAT, C10AcylCarMAT, C8AcylCarMAT, C6AcylCarMAT, C4AcylCarMAT, CoAMAT, C14AcylCoAMAT, C12AcylCoAMAT, C10AcylCoAMAT, C8AcylCoAMAT, C6AcylCoAMAT, C4AcylCoAMAT, CarMAT
    sfcpt2C16 = 0.85;
  vcpt2C14: C14AcylCarMAT -> C14AcylCoAMAT; VMAT*function_4_vcpt2C14_1(C10AcylCarMAT, C10AcylCoAMAT, C12AcylCarMAT, C12AcylCoAMAT, C14AcylCarMAT, C14AcylCoAMAT, C16AcylCarMAT, C16AcylCoAMAT, C4AcylCarMAT, C4AcylCoAMAT, C6AcylCarMAT, C6AcylCoAMAT, C8AcylCarMAT, C8AcylCoAMAT, CarMAT, CoAMAT, Keqcpt2, Kmcpt2C10AcylCarMAT, Kmcpt2C10AcylCoAMAT, Kmcpt2C12AcylCarMAT, Kmcpt2C12AcylCoAMAT, Kmcpt2C14AcylCarMAT, Kmcpt2C14AcylCoAMAT, Kmcpt2C16AcylCarMAT, Kmcpt2C16AcylCoAMAT, Kmcpt2C4AcylCoAMAT, Kmcpt2C6AcylCarMAT, Kmcpt2C6AcylCoAMAT, Kmcpt2C8AcylCarMAT, Kmcpt2C8AcylCoAMAT, Kmcpt2CarMAT, Kmcpt2CoAMAT, VMAT, Vcpt2, sfcpt2C14);  // modifiers: C16AcylCarMAT, C12AcylCarMAT, C10AcylCarMAT, C8AcylCarMAT, C6AcylCarMAT, C4AcylCarMAT, CoAMAT, C16AcylCoAMAT, C12AcylCoAMAT, C10AcylCoAMAT, C8AcylCoAMAT, C6AcylCoAMAT, C4AcylCoAMAT, CarMAT
    sfcpt2C14 = 1;
  vcpt2C12: C12AcylCarMAT -> C12AcylCoAMAT; VMAT*function_4_vcpt2C12_1(C10AcylCarMAT, C10AcylCoAMAT, C12AcylCarMAT, C12AcylCoAMAT, C14AcylCarMAT, C14AcylCoAMAT, C16AcylCarMAT, C16AcylCoAMAT, C4AcylCarMAT, C4AcylCoAMAT, C6AcylCarMAT, C6AcylCoAMAT, C8AcylCarMAT, C8AcylCoAMAT, CarMAT, CoAMAT, Keqcpt2, Kmcpt2C10AcylCarMAT, Kmcpt2C10AcylCoAMAT, Kmcpt2C12AcylCarMAT, Kmcpt2C12AcylCoAMAT, Kmcpt2C14AcylCarMAT, Kmcpt2C14AcylCoAMAT, Kmcpt2C16AcylCarMAT, Kmcpt2C16AcylCoAMAT, Kmcpt2C4AcylCarMAT, Kmcpt2C4AcylCoAMAT, Kmcpt2C6AcylCarMAT, Kmcpt2C6AcylCoAMAT, Kmcpt2C8AcylCarMAT, Kmcpt2C8AcylCoAMAT, Kmcpt2CarMAT, Kmcpt2CoAMAT, VMAT, Vcpt2, sfcpt2C12);  // modifiers: C16AcylCarMAT, C14AcylCarMAT, C10AcylCarMAT, C8AcylCarMAT, C6AcylCarMAT, C4AcylCarMAT, CoAMAT, C16AcylCoAMAT, C14AcylCoAMAT, C10AcylCoAMAT, C8AcylCoAMAT, C6AcylCoAMAT, C4AcylCoAMAT, CarMAT
    sfcpt2C12 = 0.95;
  vcpt2C10: C10AcylCarMAT -> C10AcylCoAMAT; VMAT*function_4_vcpt2C10_1(C10AcylCarMAT, C10AcylCoAMAT, C12AcylCarMAT, C12AcylCoAMAT, C14AcylCarMAT, C14AcylCoAMAT, C16AcylCarMAT, C16AcylCoAMAT, C4AcylCarMAT, C4AcylCoAMAT, C6AcylCarMAT, C6AcylCoAMAT, C8AcylCarMAT, C8AcylCoAMAT, CarMAT, CoAMAT, Keqcpt2, Kmcpt2C10AcylCarMAT, Kmcpt2C10AcylCoAMAT, Kmcpt2C12AcylCarMAT, Kmcpt2C12AcylCoAMAT, Kmcpt2C14AcylCarMAT, Kmcpt2C14AcylCoAMAT, Kmcpt2C16AcylCarMAT, Kmcpt2C16AcylCoAMAT, Kmcpt2C4AcylCarMAT, Kmcpt2C4AcylCoAMAT, Kmcpt2C6AcylCarMAT, Kmcpt2C6AcylCoAMAT, Kmcpt2C8AcylCarMAT, Kmcpt2C8AcylCoAMAT, Kmcpt2CarMAT, Kmcpt2CoAMAT, VMAT, Vcpt2, sfcpt2C10);  // modifiers: C16AcylCarMAT, C14AcylCarMAT, C12AcylCarMAT, C8AcylCarMAT, C6AcylCarMAT, C4AcylCarMAT, CoAMAT, C16AcylCoAMAT, C14AcylCoAMAT, C12AcylCoAMAT, C8AcylCoAMAT, C6AcylCoAMAT, C4AcylCoAMAT, CarMAT
    sfcpt2C10 = 0.95;
  vcpt2C8: C8AcylCarMAT -> C8AcylCoAMAT; VMAT*function_4_vcpt2C8_1(C10AcylCarMAT, C10AcylCoAMAT, C12AcylCarMAT, C12AcylCoAMAT, C14AcylCarMAT, C14AcylCoAMAT, C16AcylCarMAT, C16AcylCoAMAT, C4AcylCarMAT, C4AcylCoAMAT, C6AcylCarMAT, C6AcylCoAMAT, C8AcylCarMAT, C8AcylCoAMAT, CarMAT, CoAMAT, Keqcpt2, Kmcpt2C10AcylCarMAT, Kmcpt2C10AcylCoAMAT, Kmcpt2C12AcylCarMAT, Kmcpt2C12AcylCoAMAT, Kmcpt2C14AcylCarMAT, Kmcpt2C14AcylCoAMAT, Kmcpt2C16AcylCarMAT, Kmcpt2C16AcylCoAMAT, Kmcpt2C4AcylCarMAT, Kmcpt2C4AcylCoAMAT, Kmcpt2C6AcylCarMAT, Kmcpt2C6AcylCoAMAT, Kmcpt2C8AcylCarMAT, Kmcpt2C8AcylCoAMAT, Kmcpt2CarMAT, Kmcpt2CoAMAT, VMAT, Vcpt2, sfcpt2C8);  // modifiers: C16AcylCarMAT, C14AcylCarMAT, C12AcylCarMAT, C10AcylCarMAT, C6AcylCarMAT, C4AcylCarMAT, CoAMAT, C16AcylCoAMAT, C14AcylCoAMAT, C12AcylCoAMAT, C10AcylCoAMAT, C6AcylCoAMAT, C4AcylCoAMAT, CarMAT
    sfcpt2C8 = 0.35;
  vcpt2C6: C6AcylCarMAT -> C6AcylCoAMAT; VMAT*function_4_vcpt2C6_1(C10AcylCarMAT, C10AcylCoAMAT, C12AcylCarMAT, C12AcylCoAMAT, C14AcylCarMAT, C14AcylCoAMAT, C16AcylCarMAT, C16AcylCoAMAT, C4AcylCarMAT, C4AcylCoAMAT, C6AcylCarMAT, C6AcylCoAMAT, C8AcylCarMAT, C8AcylCoAMAT, CarMAT, CoAMAT, Keqcpt2, Kmcpt2C10AcylCarMAT, Kmcpt2C10AcylCoAMAT, Kmcpt2C12AcylCarMAT, Kmcpt2C12AcylCoAMAT, Kmcpt2C14AcylCarMAT, Kmcpt2C14AcylCoAMAT, Kmcpt2C16AcylCarMAT, Kmcpt2C16AcylCoAMAT, Kmcpt2C4AcylCarMAT, Kmcpt2C4AcylCoAMAT, Kmcpt2C6AcylCarMAT, Kmcpt2C6AcylCoAMAT, Kmcpt2C8AcylCarMAT, Kmcpt2C8AcylCoAMAT, Kmcpt2CarMAT, Kmcpt2CoAMAT, VMAT, Vcpt2, sfcpt2C6);  // modifiers: C16AcylCarMAT, C14AcylCarMAT, C12AcylCarMAT, C10AcylCarMAT, C8AcylCarMAT, C4AcylCarMAT, CoAMAT, C16AcylCoAMAT, C14AcylCoAMAT, C12AcylCoAMAT, C10AcylCoAMAT, C8AcylCoAMAT, C4AcylCoAMAT, CarMAT
    sfcpt2C6 = 0.15;
  vcpt2C4: C4AcylCarMAT -> C4AcylCoAMAT; VMAT*function_4_vcpt2C4_1(C10AcylCarMAT, C10AcylCoAMAT, C12AcylCarMAT, C12AcylCoAMAT, C14AcylCarMAT, C14AcylCoAMAT, C16AcylCarMAT, C16AcylCoAMAT, C4AcylCarMAT, C4AcylCoAMAT, C6AcylCarMAT, C6AcylCoAMAT, C8AcylCarMAT, C8AcylCoAMAT, CarMAT, CoAMAT, Keqcpt2, Kmcpt2C10AcylCarMAT, Kmcpt2C10AcylCoAMAT, Kmcpt2C12AcylCarMAT, Kmcpt2C12AcylCoAMAT, Kmcpt2C14AcylCarMAT, Kmcpt2C14AcylCoAMAT, Kmcpt2C16AcylCarMAT, Kmcpt2C16AcylCoAMAT, Kmcpt2C4AcylCarMAT, Kmcpt2C4AcylCoAMAT, Kmcpt2C6AcylCarMAT, Kmcpt2C6AcylCoAMAT, Kmcpt2C8AcylCarMAT, Kmcpt2C8AcylCoAMAT, Kmcpt2CarMAT, Kmcpt2CoAMAT, VMAT, Vcpt2, sfcpt2C4);  // modifiers: C16AcylCarMAT, C14AcylCarMAT, C12AcylCarMAT, C10AcylCarMAT, C8AcylCarMAT, C6AcylCarMAT, CoAMAT, C16AcylCoAMAT, C14AcylCoAMAT, C12AcylCoAMAT, C10AcylCoAMAT, C8AcylCoAMAT, C6AcylCoAMAT, CarMAT
    sfcpt2C4 = 0.01;
  vvlcadC16: C16AcylCoAMAT -> C16EnoylCoAMAT + $FADHMAT; VMAT*function_4_vvlcadC16_1(C12AcylCoAMAT, C12EnoylCoAMAT, C14AcylCoAMAT, C14EnoylCoAMAT, C16AcylCoAMAT, C16EnoylCoAMAT, FADHMAT, FADtMAT, Keqvlcad, KmvlcadC12AcylCoAMAT, KmvlcadC12EnoylCoAMAT, KmvlcadC14AcylCoAMAT, KmvlcadC14EnoylCoAMAT, KmvlcadC16AcylCoAMAT, KmvlcadC16EnoylCoAMAT, KmvlcadFAD, KmvlcadFADH, VMAT, Vvlcad, sfvlcadC16);  // modifiers: C14AcylCoAMAT, C12AcylCoAMAT, FADtMAT, C14EnoylCoAMAT, C12EnoylCoAMAT
    sfvlcadC16 = 1;
  vvlcadC14: C14AcylCoAMAT -> C14EnoylCoAMAT + $FADHMAT; VMAT*function_4_vvlcadC14_1(C12AcylCoAMAT, C12EnoylCoAMAT, C14AcylCoAMAT, C14EnoylCoAMAT, C16AcylCoAMAT, C16EnoylCoAMAT, FADHMAT, FADtMAT, Keqvlcad, KmvlcadC12AcylCoAMAT, KmvlcadC12EnoylCoAMAT, KmvlcadC14AcylCoAMAT, KmvlcadC14EnoylCoAMAT, KmvlcadC16AcylCoAMAT, KmvlcadC16EnoylCoAMAT, KmvlcadFAD, KmvlcadFADH, VMAT, Vvlcad, sfvlcadC14);  // modifiers: C16AcylCoAMAT, C12AcylCoAMAT, FADtMAT, C16EnoylCoAMAT, C12EnoylCoAMAT
    sfvlcadC14 = 0.42;
  vvlcadC12: C12AcylCoAMAT -> C12EnoylCoAMAT + $FADHMAT; VMAT*function_4_vvlcadC12_1(C12AcylCoAMAT, C12EnoylCoAMAT, C14AcylCoAMAT, C14EnoylCoAMAT, C16AcylCoAMAT, C16EnoylCoAMAT, FADHMAT, FADtMAT, Keqvlcad, KmvlcadC12AcylCoAMAT, KmvlcadC12EnoylCoAMAT, KmvlcadC14AcylCoAMAT, KmvlcadC14EnoylCoAMAT, KmvlcadC16AcylCoAMAT, KmvlcadC16EnoylCoAMAT, KmvlcadFAD, KmvlcadFADH, VMAT, Vvlcad, sfvlcadC12);  // modifiers: C16AcylCoAMAT, C14AcylCoAMAT, FADtMAT, C16EnoylCoAMAT, C14EnoylCoAMAT
    sfvlcadC12 = 0.11;
  vlcadC16: C16AcylCoAMAT -> C16EnoylCoAMAT + $FADHMAT; VMAT*function_4_vlcadC16_1(C10AcylCoAMAT, C10EnoylCoAMAT, C12AcylCoAMAT, C12EnoylCoAMAT, C14AcylCoAMAT, C14EnoylCoAMAT, C16AcylCoAMAT, C16EnoylCoAMAT, C8AcylCoAMAT, C8EnoylCoAMAT, FADHMAT, FADtMAT, Keqlcad, KmlcadC10AcylCoAMAT, KmlcadC10EnoylCoAMAT, KmlcadC12AcylCoAMAT, KmlcadC12EnoylCoAMAT, KmlcadC14AcylCoAMAT, KmlcadC14EnoylCoAMAT, KmlcadC16AcylCoAMAT, KmlcadC16EnoylCoAMAT, KmlcadC8AcylCoAMAT, KmlcadC8EnoylCoAMAT, KmlcadFAD, KmlcadFADH, VMAT, Vlcad, sflcadC16);  // modifiers: C14AcylCoAMAT, C12AcylCoAMAT, C10AcylCoAMAT, C8AcylCoAMAT, FADtMAT, C14EnoylCoAMAT, C12EnoylCoAMAT, C10EnoylCoAMAT, C8EnoylCoAMAT
    sflcadC16 = 0.9;
  vlcadC14: C14AcylCoAMAT -> C14EnoylCoAMAT + $FADHMAT; VMAT*function_4_vlcadC14_1(C10AcylCoAMAT, C10EnoylCoAMAT, C12AcylCoAMAT, C12EnoylCoAMAT, C14AcylCoAMAT, C14EnoylCoAMAT, C16AcylCoAMAT, C16EnoylCoAMAT, C8AcylCoAMAT, C8EnoylCoAMAT, FADHMAT, FADtMAT, Keqlcad, KmlcadC10AcylCoAMAT, KmlcadC10EnoylCoAMAT, KmlcadC12AcylCoAMAT, KmlcadC12EnoylCoAMAT, KmlcadC14AcylCoAMAT, KmlcadC14EnoylCoAMAT, KmlcadC16AcylCoAMAT, KmlcadC16EnoylCoAMAT, KmlcadC8AcylCoAMAT, KmlcadC8EnoylCoAMAT, KmlcadFAD, KmlcadFADH, VMAT, Vlcad, sflcadC14);  // modifiers: C16AcylCoAMAT, C12AcylCoAMAT, C10AcylCoAMAT, C8AcylCoAMAT, FADtMAT, C16EnoylCoAMAT, C12EnoylCoAMAT, C10EnoylCoAMAT, C8EnoylCoAMAT
    sflcadC14 = 1;
  vlcadC12: C12AcylCoAMAT -> C12EnoylCoAMAT + $FADHMAT; VMAT*function_4_vlcadC12_1(C10AcylCoAMAT, C10EnoylCoAMAT, C12AcylCoAMAT, C14AcylCoAMAT, C14EnoylCoAMAT, C16AcylCoAMAT, C16EnoylCoAMAT, C8AcylCoAMAT, C8EnoylCoAMAT, FADHMAT, FADtMAT, Keqlcad, KmlcadC10AcylCoAMAT, KmlcadC10EnoylCoAMAT, KmlcadC12AcylCoAMAT, KmlcadC12EnoylCoAMAT, KmlcadC14AcylCoAMAT, KmlcadC14EnoylCoAMAT, KmlcadC16AcylCoAMAT, KmlcadC16EnoylCoAMAT, KmlcadC8AcylCoAMAT, KmlcadC8EnoylCoAMAT, KmlcadFAD, KmlcadFADH, VMAT, Vlcad, sflcadC12);  // modifiers: C16AcylCoAMAT, C14AcylCoAMAT, C10AcylCoAMAT, C8AcylCoAMAT, FADtMAT, C14EnoylCoAMAT, C16EnoylCoAMAT, C10EnoylCoAMAT, C8EnoylCoAMAT
    sflcadC12 = 0.9;
  vlcadC10: C10AcylCoAMAT -> C10EnoylCoAMAT + $FADHMAT; VMAT*function_4_vlcadC10_1(C10AcylCoAMAT, C10EnoylCoAMAT, C12AcylCoAMAT, C12EnoylCoAMAT, C14AcylCoAMAT, C14EnoylCoAMAT, C16AcylCoAMAT, C16EnoylCoAMAT, C8AcylCoAMAT, C8EnoylCoAMAT, FADHMAT, FADtMAT, Keqlcad, KmlcadC10AcylCoAMAT, KmlcadC10EnoylCoAMAT, KmlcadC12AcylCoAMAT, KmlcadC12EnoylCoAMAT, KmlcadC14AcylCoAMAT, KmlcadC14EnoylCoAMAT, KmlcadC16AcylCoAMAT, KmlcadC16EnoylCoAMAT, KmlcadC8AcylCoAMAT, KmlcadC8EnoylCoAMAT, KmlcadFAD, KmlcadFADH, VMAT, Vlcad, sflcadC10);  // modifiers: C16AcylCoAMAT, C14AcylCoAMAT, C12AcylCoAMAT, C8AcylCoAMAT, FADtMAT, C16EnoylCoAMAT, C14EnoylCoAMAT, C12EnoylCoAMAT, C8EnoylCoAMAT
    sflcadC10 = 0.75;
  vmcadC12: C12AcylCoAMAT -> C12EnoylCoAMAT + $FADHMAT; VMAT*function_4_vmcadC12_1(C10AcylCoAMAT, C10EnoylCoAMAT, C12AcylCoAMAT, C12EnoylCoAMAT, C4AcylCoAMAT, C4EnoylCoAMAT, C6AcylCoAMAT, C6EnoylCoAMAT, C8AcylCoAMAT, C8EnoylCoAMAT, FADHMAT, FADtMAT, Keqmcad, KmmcadC10AcylCoAMAT, KmmcadC10EnoylCoAMAT, KmmcadC12AcylCoAMAT, KmmcadC12EnoylCoAMAT, KmmcadC4AcylCoAMAT, KmmcadC4EnoylCoAMAT, KmmcadC6AcylCoAMAT, KmmcadC6EnoylCoAMAT, KmmcadC8AcylCoAMAT, KmmcadC8EnoylCoAMAT, KmmcadFAD, KmmcadFADH, VMAT, Vmcad, sfmcadC12);  // modifiers: C10AcylCoAMAT, C8AcylCoAMAT, C6AcylCoAMAT, C4AcylCoAMAT, FADtMAT, C10EnoylCoAMAT, C8EnoylCoAMAT, C6EnoylCoAMAT, C4EnoylCoAMAT
    sfmcadC12 = 0.38;
  vmcadC10: C10AcylCoAMAT -> C10EnoylCoAMAT + $FADHMAT; VMAT*function_4_vmcadC10_1(C10AcylCoAMAT, C10EnoylCoAMAT, C12AcylCoAMAT, C12EnoylCoAMAT, C4AcylCoAMAT, C4EnoylCoAMAT, C6AcylCoAMAT, C6EnoylCoAMAT, C8AcylCoAMAT, C8EnoylCoAMAT, FADHMAT, FADtMAT, Keqmcad, KmmcadC10AcylCoAMAT, KmmcadC10EnoylCoAMAT, KmmcadC12AcylCoAMAT, KmmcadC12EnoylCoAMAT, KmmcadC4AcylCoAMAT, KmmcadC4EnoylCoAMAT, KmmcadC6AcylCoAMAT, KmmcadC6EnoylCoAMAT, KmmcadC8AcylCoAMAT, KmmcadC8EnoylCoAMAT, KmmcadFAD, KmmcadFADH, VMAT, Vmcad, sfmcadC10);  // modifiers: C12AcylCoAMAT, C8AcylCoAMAT, C6AcylCoAMAT, C4AcylCoAMAT, FADtMAT, C12EnoylCoAMAT, C8EnoylCoAMAT, C6EnoylCoAMAT, C4EnoylCoAMAT
    sfmcadC10 = 0.8;
  vmcadC8: C8AcylCoAMAT -> C8EnoylCoAMAT + $FADHMAT; VMAT*function_4_vmcadC8_1(C10AcylCoAMAT, C10EnoylCoAMAT, C12AcylCoAMAT, C12EnoylCoAMAT, C4AcylCoAMAT, C4EnoylCoAMAT, C6AcylCoAMAT, C6EnoylCoAMAT, C8AcylCoAMAT, C8EnoylCoAMAT, FADHMAT, FADtMAT, Keqmcad, KmmcadC10AcylCoAMAT, KmmcadC10EnoylCoAMAT, KmmcadC12AcylCoAMAT, KmmcadC12EnoylCoAMAT, KmmcadC4AcylCoAMAT, KmmcadC4EnoylCoAMAT, KmmcadC6AcylCoAMAT, KmmcadC6EnoylCoAMAT, KmmcadC8AcylCoAMAT, KmmcadC8EnoylCoAMAT, KmmcadFAD, KmmcadFADH, VMAT, Vmcad, sfmcadC8);  // modifiers: C12AcylCoAMAT, C10AcylCoAMAT, C6AcylCoAMAT, C4AcylCoAMAT, FADtMAT, C12EnoylCoAMAT, C10EnoylCoAMAT, C6EnoylCoAMAT, C4EnoylCoAMAT
    sfmcadC8 = 0.87;
  vmcadC6: C6AcylCoAMAT -> C6EnoylCoAMAT + $FADHMAT; VMAT*function_4_vmcadC6_1(C10AcylCoAMAT, C10EnoylCoAMAT, C12AcylCoAMAT, C12EnoylCoAMAT, C4AcylCoAMAT, C4EnoylCoAMAT, C6AcylCoAMAT, C6EnoylCoAMAT, C8AcylCoAMAT, C8EnoylCoAMAT, FADHMAT, FADtMAT, Keqmcad, KmmcadC10AcylCoAMAT, KmmcadC10EnoylCoAMAT, KmmcadC12AcylCoAMAT, KmmcadC12EnoylCoAMAT, KmmcadC4AcylCoAMAT, KmmcadC4EnoylCoAMAT, KmmcadC6AcylCoAMAT, KmmcadC6EnoylCoAMAT, KmmcadC8AcylCoAMAT, KmmcadC8EnoylCoAMAT, KmmcadFAD, KmmcadFADH, VMAT, Vmcad, sfmcadC6);  // modifiers: C12AcylCoAMAT, C10AcylCoAMAT, C8AcylCoAMAT, C4AcylCoAMAT, FADtMAT, C12EnoylCoAMAT, C10EnoylCoAMAT, C8EnoylCoAMAT, C4EnoylCoAMAT
    sfmcadC6 = 1;
  vscadC4: C4AcylCoAMAT -> C4EnoylCoAMAT + $FADHMAT; VMAT*function_4_vscadC4_1(C4AcylCoAMAT, C4EnoylCoAMAT, C6AcylCoAMAT, C6EnoylCoAMAT, FADHMAT, FADtMAT, Keqscad, KmscadC4AcylCoAMAT, KmscadC4EnoylCoAMAT, KmscadC6AcylCoAMAT, KmscadC6EnoylCoAMAT, KmscadFAD, KmscadFADH, VMAT, Vscad, sfscadC4);  // modifiers: C6AcylCoAMAT, FADtMAT, C6EnoylCoAMAT
    sfscadC4 = 1;
  vmckatC6: C6KetoacylCoAMAT -> C4AcylCoAMAT + AcetylCoAMAT; VMAT*function_4_vmckatC6_1(AcetylCoAMAT, C10AcylCoAMAT, C10KetoacylCoAMAT, C12AcylCoAMAT, C12KetoacylCoAMAT, C14AcylCoAMAT, C14KetoacylCoAMAT, C16AcylCoAMAT, C16KetoacylCoAMAT, C4AcetoacylCoAMAT, C4AcylCoAMAT, C6AcylCoAMAT, C6KetoacylCoAMAT, C8AcylCoAMAT, C8KetoacylCoAMAT, CoAMAT, Keqmckat, KmmckatAcetylCoAMAT, KmmckatC10AcylCoAMAT, KmmckatC10KetoacylCoAMAT, KmmckatC12AcylCoAMAT, KmmckatC12KetoacylCoAMAT, KmmckatC14AcylCoAMAT, KmmckatC14KetoacylCoAMAT, KmmckatC16AcylCoAMAT, KmmckatC16KetoacylCoAMAT, KmmckatC4AcetoacylCoAMAT, KmmckatC4AcylCoAMAT, KmmckatC6AcylCoAMAT, KmmckatC6KetoacylCoAMAT, KmmckatC8AcylCoAMAT, KmmckatC8KetoacylCoAMAT, KmmckatCoAMAT, VMAT, Vmckat, sfmckatC6);  // modifiers: C16KetoacylCoAMAT, C14KetoacylCoAMAT, C12KetoacylCoAMAT, C10KetoacylCoAMAT, C8KetoacylCoAMAT, C4AcetoacylCoAMAT, CoAMAT, C16AcylCoAMAT, C14AcylCoAMAT, C12AcylCoAMAT, C10AcylCoAMAT, C8AcylCoAMAT, C6AcylCoAMAT
    sfmckatC6 = 1;
  vmckatC4: C4AcetoacylCoAMAT -> 2 AcetylCoAMAT; VMAT*function_4_vmckatC4_1(AcetylCoAMAT, C10AcylCoAMAT, C10KetoacylCoAMAT, C12AcylCoAMAT, C12KetoacylCoAMAT, C14AcylCoAMAT, C14KetoacylCoAMAT, C16AcylCoAMAT, C16KetoacylCoAMAT, C4AcetoacylCoAMAT, C4AcylCoAMAT, C6AcylCoAMAT, C6KetoacylCoAMAT, C8AcylCoAMAT, C8KetoacylCoAMAT, CoAMAT, Keqmckat, KmmckatAcetylCoAMAT, KmmckatC10AcylCoAMAT, KmmckatC10KetoacylCoAMAT, KmmckatC12AcylCoAMAT, KmmckatC12KetoacylCoAMAT, KmmckatC14AcylCoAMAT, KmmckatC14KetoacylCoAMAT, KmmckatC16AcylCoAMAT, KmmckatC16KetoacylCoAMAT, KmmckatC4AcetoacylCoAMAT, KmmckatC4AcylCoAMAT, KmmckatC6AcylCoAMAT, KmmckatC6KetoacylCoAMAT, KmmckatC8AcylCoAMAT, KmmckatC8KetoacylCoAMAT, KmmckatCoAMAT, VMAT, Vmckat, sfmckatC4);  // modifiers: C16KetoacylCoAMAT, C14KetoacylCoAMAT, C12KetoacylCoAMAT, C10KetoacylCoAMAT, C8KetoacylCoAMAT, C6KetoacylCoAMAT, CoAMAT, C4AcylCoAMAT, C16AcylCoAMAT, C14AcylCoAMAT, C12AcylCoAMAT, C10AcylCoAMAT, C8AcylCoAMAT, C6AcylCoAMAT
    sfmckatC4 = 0.49;
  vmtpC16: C16EnoylCoAMAT -> C14AcylCoAMAT + AcetylCoAMAT + $NADHMAT; VMAT*function_4_vmtpC16_1(AcetylCoAMAT, C10AcylCoAMAT, C10EnoylCoAMAT, C12AcylCoAMAT, C12EnoylCoAMAT, C14AcylCoAMAT, C14EnoylCoAMAT, C16AcylCoAMAT, C16EnoylCoAMAT, C4AcetoacylCoAMAT, C6AcylCoAMAT, C8AcylCoAMAT, C8EnoylCoAMAT, CoAMAT, Keqmtp, KicrotC4AcetoacylCoA, KmmtpAcetylCoAMAT, KmmtpC10AcylCoAMAT, KmmtpC10EnoylCoAMAT, KmmtpC12AcylCoAMAT, KmmtpC12EnoylCoAMAT, KmmtpC14AcylCoAMAT, KmmtpC14EnoylCoAMAT, KmmtpC16AcylCoAMAT, KmmtpC16EnoylCoAMAT, KmmtpC6AcylCoAMAT, KmmtpC8AcylCoAMAT, KmmtpC8EnoylCoAMAT, KmmtpCoAMAT, KmmtpNADHMAT, KmmtpNADMAT, NADHMAT, NADtMAT, VMAT, Vmtp, sfmtpC16);  // modifiers: C14EnoylCoAMAT, C12EnoylCoAMAT, C10EnoylCoAMAT, C8EnoylCoAMAT, NADtMAT, CoAMAT, C16AcylCoAMAT, C12AcylCoAMAT, C10AcylCoAMAT, C8AcylCoAMAT, C6AcylCoAMAT, C4AcetoacylCoAMAT
    sfmtpC16 = 1;
  vmtpC14: C14EnoylCoAMAT -> C12AcylCoAMAT + AcetylCoAMAT + $NADHMAT; VMAT*function_4_vmtpC14_1(AcetylCoAMAT, C10AcylCoAMAT, C10EnoylCoAMAT, C12AcylCoAMAT, C12EnoylCoAMAT, C14AcylCoAMAT, C14EnoylCoAMAT, C16AcylCoAMAT, C16EnoylCoAMAT, C4AcetoacylCoAMAT, C6AcylCoAMAT, C8AcylCoAMAT, C8EnoylCoAMAT, CoAMAT, Keqmtp, KicrotC4AcetoacylCoA, KmmtpAcetylCoAMAT, KmmtpC10AcylCoAMAT, KmmtpC10EnoylCoAMAT, KmmtpC12AcylCoAMAT, KmmtpC12EnoylCoAMAT, KmmtpC14AcylCoAMAT, KmmtpC14EnoylCoAMAT, KmmtpC16AcylCoAMAT, KmmtpC16EnoylCoAMAT, KmmtpC6AcylCoAMAT, KmmtpC8AcylCoAMAT, KmmtpC8EnoylCoAMAT, KmmtpCoAMAT, KmmtpNADHMAT, KmmtpNADMAT, NADHMAT, NADtMAT, VMAT, Vmtp, sfmtpC14);  // modifiers: C16EnoylCoAMAT, C12EnoylCoAMAT, C10EnoylCoAMAT, C8EnoylCoAMAT, NADtMAT, CoAMAT, C16AcylCoAMAT, C14AcylCoAMAT, C10AcylCoAMAT, C8AcylCoAMAT, C6AcylCoAMAT, C4AcetoacylCoAMAT
    sfmtpC14 = 0.9;
  vmtpC12: C12EnoylCoAMAT -> C10AcylCoAMAT + AcetylCoAMAT + $NADHMAT; VMAT*function_4_vmtpC12_1(AcetylCoAMAT, C10AcylCoAMAT, C10EnoylCoAMAT, C12AcylCoAMAT, C12EnoylCoAMAT, C14AcylCoAMAT, C14EnoylCoAMAT, C16AcylCoAMAT, C16EnoylCoAMAT, C4AcetoacylCoAMAT, C6AcylCoAMAT, C8AcylCoAMAT, C8EnoylCoAMAT, CoAMAT, Keqmtp, KicrotC4AcetoacylCoA, KmmtpAcetylCoAMAT, KmmtpC10AcylCoAMAT, KmmtpC10EnoylCoAMAT, KmmtpC12AcylCoAMAT, KmmtpC12EnoylCoAMAT, KmmtpC14AcylCoAMAT, KmmtpC14EnoylCoAMAT, KmmtpC16AcylCoAMAT, KmmtpC16EnoylCoAMAT, KmmtpC6AcylCoAMAT, KmmtpC8AcylCoAMAT, KmmtpC8EnoylCoAMAT, KmmtpCoAMAT, KmmtpNADHMAT, KmmtpNADMAT, NADHMAT, NADtMAT, VMAT, Vmtp, sfmtpC12);  // modifiers: C16EnoylCoAMAT, C14EnoylCoAMAT, C10EnoylCoAMAT, C8EnoylCoAMAT, NADtMAT, CoAMAT, C16AcylCoAMAT, C14AcylCoAMAT, C12AcylCoAMAT, C8AcylCoAMAT, C6AcylCoAMAT, C4AcetoacylCoAMAT
    sfmtpC12 = 0.81;
  vmtpC10: C10EnoylCoAMAT -> C8AcylCoAMAT + AcetylCoAMAT + $NADHMAT; VMAT*function_4_vmtpC10_1(AcetylCoAMAT, C10AcylCoAMAT, C10EnoylCoAMAT, C12AcylCoAMAT, C12EnoylCoAMAT, C14AcylCoAMAT, C14EnoylCoAMAT, C16AcylCoAMAT, C16EnoylCoAMAT, C4AcetoacylCoAMAT, C6AcylCoAMAT, C8AcylCoAMAT, C8EnoylCoAMAT, CoAMAT, Keqmtp, KicrotC4AcetoacylCoA, KmmtpAcetylCoAMAT, KmmtpC10AcylCoAMAT, KmmtpC10EnoylCoAMAT, KmmtpC12AcylCoAMAT, KmmtpC12EnoylCoAMAT, KmmtpC14AcylCoAMAT, KmmtpC14EnoylCoAMAT, KmmtpC16AcylCoAMAT, KmmtpC16EnoylCoAMAT, KmmtpC6AcylCoAMAT, KmmtpC8AcylCoAMAT, KmmtpC8EnoylCoAMAT, KmmtpCoAMAT, KmmtpNADHMAT, KmmtpNADMAT, NADHMAT, NADtMAT, VMAT, Vmtp, sfmtpC10);  // modifiers: C16EnoylCoAMAT, C14EnoylCoAMAT, C12EnoylCoAMAT, C8EnoylCoAMAT, NADtMAT, CoAMAT, C16AcylCoAMAT, C14AcylCoAMAT, C12AcylCoAMAT, C10AcylCoAMAT, C6AcylCoAMAT, C4AcetoacylCoAMAT
    sfmtpC10 = 0.73;
  vmtpC8: C8EnoylCoAMAT -> C6AcylCoAMAT + AcetylCoAMAT + $NADHMAT; VMAT*function_4_vmtpC8_1(AcetylCoAMAT, C10AcylCoAMAT, C10EnoylCoAMAT, C12AcylCoAMAT, C12EnoylCoAMAT, C14AcylCoAMAT, C14EnoylCoAMAT, C16AcylCoAMAT, C16EnoylCoAMAT, C4AcetoacylCoAMAT, C6AcylCoAMAT, C8AcylCoAMAT, C8EnoylCoAMAT, CoAMAT, Keqmtp, KicrotC4AcetoacylCoA, KmmtpAcetylCoAMAT, KmmtpC10AcylCoAMAT, KmmtpC10EnoylCoAMAT, KmmtpC12AcylCoAMAT, KmmtpC12EnoylCoAMAT, KmmtpC14AcylCoAMAT, KmmtpC14EnoylCoAMAT, KmmtpC16AcylCoAMAT, KmmtpC16EnoylCoAMAT, KmmtpC6AcylCoAMAT, KmmtpC8AcylCoAMAT, KmmtpC8EnoylCoAMAT, KmmtpCoAMAT, KmmtpNADHMAT, KmmtpNADMAT, NADHMAT, NADtMAT, VMAT, Vmtp, sfmtpC8);  // modifiers: C16EnoylCoAMAT, C14EnoylCoAMAT, C12EnoylCoAMAT, C10EnoylCoAMAT, NADtMAT, CoAMAT, C16AcylCoAMAT, C14AcylCoAMAT, C12AcylCoAMAT, C10AcylCoAMAT, C8AcylCoAMAT, C4AcetoacylCoAMAT
    sfmtpC8 = 0.34;
  vacesink: AcetylCoAMAT -> ; VMAT*function_4_vacesink_1(AcetylCoAMAT, K1acesink, Ksacesink, VMAT);
    K1acesink = 30; Ksacesink = 6000000;
  vcrmsC6: C6EnoylCoAMAT + $NAD -> C6KetoacylCoAMAT + $NADHMAT; VMAT*CRMS_C6_1(C4AcetoacylCoAMAT, C4EnoylCoAMAT, C6EnoylCoAMAT, C6KetoacylCoAMAT, Keqcrot, Keqmschad, KicrotC4AcetoacylCoA, KmcrotC4EnoylCoAMAT, KmcrotC6EnoylCoAMAT, KmmschadC4AcetoacylCoAMAT, KmmschadC6HydroxyacylCoAMAT, KmmschadC6KetoacylCoAMAT, KmmschadNADHMAT, KmmschadNADMAT, NADHMAT, VMAT, Vcrot, Vmschad, sfcrotC6, sfmschadC6, NAD);  // modifiers: C4AcetoacylCoAMAT, C4EnoylCoAMAT
    sfcrotC6 = 0.83; sfmschadC6 = 1;
  vcrmsC4: C4EnoylCoAMAT + $NAD -> C4AcetoacylCoAMAT + $NADHMAT; VMAT*CRMS_C4_1(C4AcetoacylCoAMAT, C4EnoylCoAMAT, C6EnoylCoAMAT, C6KetoacylCoAMAT, Keqcrot, Keqmschad, KicrotC4AcetoacylCoA, KmcrotC4EnoylCoAMAT, KmcrotC6EnoylCoAMAT, KmmschadC4AcetoacylCoAMAT, KmmschadC4HydroxyacylCoAMAT, KmmschadC6KetoacylCoAMAT, KmmschadNADHMAT, KmmschadNADMAT, NADHMAT, VMAT, Vcrot, Vmschad, sfcrotC4, sfmschadC4, NAD);  // modifiers: C6KetoacylCoAMAT, C6EnoylCoAMAT
    sfcrotC4 = 1; sfmschadC4 = 0.67;

  // Unit definitions:
  unit time = 60 second;
  unit substance = 1e-6 mole;
end
