// SBML level 2 version 4
// dcterms:bibliographicCitation: urn:miriam:pubmed:31539528

function Constant_flux__irreversible(v)
  v;
end
Constant_flux__irreversible is "Constant flux (irreversible)";

function Function_for_v11_3(gamma_bp, BMAL1, PERCRY)
  gamma_bp*BMAL1*PERCRY;
end
Function_for_v11_3 is "Function_for_v11.3";

function Function_for_v4_2(gamma_b_p, BMAL1, PERCRY)
  gamma_b_p*BMAL1*PERCRY;
end
Function_for_v4_2 is "Function_for_v4.2";

function Function_for_v8_1(R_box)
  2*R_box;
end
Function_for_v8_1 is "Function_for_v8.1";

model Almeida2019___Transcription_based_circadian_mechanism_controls_the_duration_of_molecular_clock_states_in_response_to_signaling_inputs()
  // Almeida2019 - Transcription-based circadian mechanism controls the duration of molecular clock states in response to signaling inputs
  // This is a transcriptional-based mathematical model centered on linear combinations of the clock controlled elements (CCEs): E-box, R-box and D-box, used to identify the essential interactions needed to generate phase opposition between the activating CLOCK:BMAL1 and the repressing PER:CRY complexes.
  // isDescribedBy pubmed:31539528
  // hasProperty mamo:MAMO_0000046
  // hasProperty GO:0007623
  // biomodels.db:MODEL1910290001 biomodels.db:BIOMD0000000839

  // Compartments:
  compartment compartment = 1;  // CL:0000000

  // Species:
  species BMAL1 in compartment = 1;  // uniprot:O00327
  species ROR in compartment = 1;  // hasVersion ncit:C29881
  species REV in compartment = 110;  // uniprot:P20393
  species DBP in compartment = 1;  // uniprot:Q10586
  species E4BP4 in compartment = 80;  // PR:000011176
  species CRY in compartment = 1;  // PR:000050151
  species PER in compartment = 25;  // hasVersion PR:000012548
  species PERCRY in compartment = 0;  // hasPart PR:000012548; hasPart PR:000050151

  // Parameters:
  V_R = 44.4;
  k_R = 3.54;
  k_R_r = 80.1;
  V_E = 30.3;
  k_E = 214;
  k_E_r = 1.24;
  V_D = 202;
  k_D = 5.32;
  k_D_r = 94.7;
  gamma_ror = 2.55;
  gamma_rev = 0.241;
  gamma_p = 0.844;
  gamma_c = 2.34;
  gamma_db = 0.156;
  gamma_E4 = 0.295;
  gamma_pc = 0.191;
  gamma_cp = 0.141;
  gamma_bp = 2.58;
  Initial_for_V_D = V_D;
  Initial_for_V_E = V_E;
  Initial_for_V_R = V_R;
  Initial_for_k_D_r = k_D_r;
  Initial_for_k_E = k_E;
  Initial_for_k_E_r = k_E_r;
  Initial_for_k_R = k_R;
  Initial_for_k_R_r = k_R_r;

  // Assignment rules:
  D_box := Initial_for_V_D*(DBP/(DBP + k_D))*(Initial_for_k_D_r/(Initial_for_k_D_r + E4BP4));
  E_box := Initial_for_V_E*BMAL1/(BMAL1 + Initial_for_k_E + Initial_for_k_E_r*BMAL1*CRY);
  R_box := Initial_for_V_R*(ROR/(ROR + Initial_for_k_R))*(Initial_for_k_R_r^2/(Initial_for_k_R_r^2 + REV^2));

  // Reactions:
  v4_1: => BMAL1; compartment*Constant_flux__irreversible(R_box); v4_1 is "v4.1";  // GO:0006412
  v4_2: BMAL1 => ; compartment*Function_for_v4_2(gamma_bp, BMAL1, PERCRY); v4_2 is "v4.2";  // modifiers: PERCRY; GO:0051168
  v5_1: => ROR; compartment*Constant_flux__irreversible(E_box); v5_1 is "v5.1";  // GO:0006412
  v5_2: => ROR; compartment*Constant_flux__irreversible(R_box); v5_2 is "v5.2";  // GO:0006412
  v5_3: ROR => ; compartment*gamma_ror*ROR; v5_3 is "v5.3";
  v8_1: => E4BP4 + CRY; compartment*Function_for_v8_1(R_box); v8_1 is "v8.1";
  v6_1: => REV; compartment*Function_for_v8_1(E_box); v6_1 is "v6.1";
  v6_2: => REV; compartment*Constant_flux__irreversible(D_box); v6_2 is "v6.2";
  v6_3: REV => ; compartment*gamma_rev*REV; v6_3 is "v6.3";
  v7_1: => DBP; compartment*Constant_flux__irreversible(E_box); v7_1 is "v7.1";
  v7_2: DBP => ; compartment*gamma_db*DBP; v7_2 is "v7.2";
  v8_2: E4BP4 => ; compartment*gamma_E4*E4BP4; v8_2 is "v8.2";
  v9_1: => CRY; compartment*Constant_flux__irreversible(E_box); v9_1 is "v9.1";
  v9_3: PER + CRY => PERCRY; compartment*gamma_pc*PER*CRY; v9_3 is "v9.3";
  v9_4: PERCRY => PER + CRY; compartment*gamma_cp*PERCRY; v9_4 is "v9.4";
  v9_5: CRY => ; compartment*gamma_c*CRY; v9_5 is "v9.5";
  v10_1: => PER; compartment*Constant_flux__irreversible(E_box); v10_1 is "v10.1";
  v10_2: => PER; compartment*Constant_flux__irreversible(D_box); v10_2 is "v10.2";
  v10_5: PER => ; compartment*gamma_p*PER; v10_5 is "v10.5";
  v11_3: PERCRY => ; compartment*Function_for_v11_3(gamma_bp, BMAL1, PERCRY); v11_3 is "v11.3";  // modifiers: BMAL1; GO:0051168

  // Unit definitions:
  unit volume = 1e-3 litre;
  unit time = 3600 second;
  unit substance = item;
end
