// SBML level 2 version 4
// dcterms:bibliographicCitation: http://identifiers.org/pubmed/29095952

function Function_for_miR_synthesis(TF1, cell, ksynMiR)
  ksynMiR*TF1*cell/cell;
end

function Function_for_miR_degradation(cell, kdegMiR, miR)
  kdegMiR*miR*cell/cell;
end

function Function_for_TF1target_transcription(TF1, cell, ksynTF1targetmRNA)
  ksynTF1targetmRNA*TF1*cell/cell;
end

function Function_for_TF1target_mRNA_degradation(TF1target_mRNA, cell, kdegTF1targetmRNA)
  kdegTF1targetmRNA*TF1target_mRNA*cell/cell;
end

function Function_for_TF1target_mRNA_degradation_via_MiR(TF1target_mRNA, cell, kdegTF1targetmRNAbyMiR, miR)
  kdegTF1targetmRNAbyMiR*TF1target_mRNA*cell*miR*cell/cell;
end

model MODEL1610100004()
  // Proctor2017- Role of microRNAs in osteoarthritis (Positive Feedforward Incoherent By MicroRNA)_1
  // Proctor2017- Role of microRNAs in osteoarthritis (Positive Feedforward Incoherent By MicroRNA)
  // This model is described in the article:
  // Computer simulation models as a tool to investigate the role of microRNAs in osteoarthritis.
  // Proctor CJ, Smith GR.
  // PLoS ONE 2017; 12(11): e0187568
  // Abstract:
  // The aim of this study was to show how computational models can be used to increase our understanding of the role of microRNAs in osteoarthritis (OA) using miR-140 as an example. Bioinformatics analysis and experimental results from the literature were used to create and calibrate models of gene regulatory networks in OA involving miR-140 along with key regulators such as NF-?B, SMAD3, and RUNX2. The individual models were created with the modelling standard, Systems Biology Markup Language, and integrated to examine the overall effect of miR-140 on cartilage homeostasis. Down-regulation of miR-140 may have either detrimental or protective effects for cartilage, indicating that the role of miR-140 is complex. Studies of individual networks in isolation may therefore lead to different conclusions. This indicated the need to combine the five chosen individual networks involving miR-140 into an integrated model. This model suggests that the overall effect of miR-140 is to change the response to an IL-1 stimulus from a prolonged increase in matrix degrading enzymes to a pulse-like response so that cartilage degradation is temporary. Our current model can easily be modified and extended as more experimental data become available about the role of miR-140 in OA. In addition, networks of other microRNAs that are important in OA could be incorporated. A fully integrated model could not only aid our understanding of the mechanisms of microRNAs in ageing cartilage but could also provide a useful tool to investigate the effect of potential interventions to prevent cartilage loss.
  // This model is hosted on BioModels Database and identified by: MODEL1610100004.
  // To cite BioModels Database, please use: Chelliah V et al. BioModels: ten-year anniversary. Nucl. Acids Res. 2015, 43(Database issue):D542-8.
  // To the extent possible under law, all copyright and related or neighbouring rights to this encoded model have been dedicated to the public domain worldwide. Please refer to CC0 Public Domain Dedication for more information.
  // isInstanceOf taxonomy:9606 biomodels.db:MODEL1610100004 ncit:C25966 mamo:MAMO_0000046
  // isDescribedBy mamo:MAMO_0000046 pubmed:29095952
  // hasProperty taxonomy:9606
  // hasProperty biomodels.db:MODEL1610100004
  // hasProperty ncit:C25966
  // biomodels.db:MODEL1610100004 biomodels.db:BIOMD0000000860

  // Compartments:
  compartment cell = 1;

  // Species:
  species miR in cell = 0;  // hasInstance ncit:C25966
  species TF1 in cell = 0;  // hasInstance ncit:C17207
  species TF1target_mRNA in cell = 0;
  species $Sink in cell = 0;

  // Parameters:
  kdegMiR = 0.0004 unit_0;
  kdegTF1targetmRNA = 0.001 unit_0;
  kdegTF1targetmRNAbyMiR = 5e-5 unit_1;
  ksynTF1targetmRNA = 0.004 unit_0;
  ksynMiR = 0.0002 unit_0;

  // Reactions:
  miR_synthesis: TF1 => TF1 + miR; cell*Function_for_miR_synthesis(TF1, cell, ksynMiR);
  miR_degradation: miR => $Sink; cell*Function_for_miR_degradation(cell, kdegMiR, miR);
  TF1target_transcription: TF1 => TF1 + TF1target_mRNA; cell*Function_for_TF1target_transcription(TF1, cell, ksynTF1targetmRNA);
  TF1target_mRNA_degradation: TF1target_mRNA => $Sink; cell*Function_for_TF1target_mRNA_degradation(TF1target_mRNA, cell, kdegTF1targetmRNA);
  TF1target_mRNA_degradation_via_MiR: TF1target_mRNA + miR => $Sink + miR; cell*Function_for_TF1target_mRNA_degradation_via_MiR(TF1target_mRNA, cell, kdegTF1targetmRNAbyMiR, miR);

  // Events:
  ActivateSignal: at (time > 3600): TF1 = 500/cell;

  // Unit definitions:
  unit substance = item;
  unit unit_0 = 1 / second; unit_0 is "1/s";
  unit unit_1 = 1 / (mole * second); unit_1 is "1/ (mol *s)";
end
