// SBML level 2 version 4
// dcterms:bibliographicCitation: Modeling the Mechanisms by Which HIV-Associated Immunosuppression Influences HPV Persistence at the Oral Mucosa urn:miriam:pubmed:28060843

function Death_of_HPV_self_proliferating_cells_due_to_effector_cells(a, Y2, E)
  a*E*Y2;
end
Death_of_HPV_self_proliferating_cells_due_to_effector_cells is "Death of HPV self-proliferating cells due to effector cells";

function Logistic_term_for_Effector_cells_1(b, omega, Y2, E, T)
  omega*Y2*E*E/(b*T);
end

function Rate_Law_for_Production_of_HPV_due_to_HPVinfected_1(k1, mu, Y1)
  mu*k1*Y1;
end

function Rate_Law_for_production_of_HIV_infected_cells_1(beta, e_rt, V, T)
  (1 - e_rt)*beta*T*V;
end

function Production_of_HPV_due_to_HPV_self_proliferating_1(k2, mu, Y2)
  mu*k2*Y2;
end
Production_of_HPV_due_to_HPV_self_proliferating_1 is "Production of HPV due to HPV self-proliferating_1";

function Productionof_HPV_infected_cells(N2, p, phi, psi, Y1, W, V)
  psi*W*(((1 + p*V)*N2 - Y1)/(phi + (1 + p*V)*N2 - Y1));
end

function Death_of_HPV_self_proliferating_due_to_Effector_cells(a, Y1, E)
  a*Y1*E;
end
Death_of_HPV_self_proliferating_due_to_Effector_cells is "Death of HPV self-proliferating due to Effector cells";

function Rate_Law_for_Production_of_HIV_virion_1(N1, delta, e_pi, I)
  (1 - e_pi)*N1*delta*I;
end

function Rate_Law_for_Production_of_Effector_cell_1_1(omega, Y2, E)
  omega*Y2*E;
end

function Proliferation_of_HPV_self_proliferating(epi, r, Y2)
  r*epi*Y2;
end
Proliferation_of_HPV_self_proliferating is "Proliferation of HPV self-proliferating";

function Constant_flux__irreversible(v)
  v;
end
Constant_flux__irreversible is "Constant flux (irreversible)";

model Verma2016___HIV_and_HPV_co_infection__T_cell_response()
  // Verma2016 - HIV and HPV co-infection, T-cell response
  // This is a COPASI version of the HIV/HPV coinfection model submitted to PLoS One.
  // Title: Modeling the mechanisms by which HIV-associated immunosuppression influences HPV persistence at the oral mucosa
  // Authors: Meghna Verma*, Samantha Erwin*, Vida Abedi, Raque Hontecillas, Stefan Hoops, Andrew Leber, Josep Bassaganya-Riera, Stanca Ciupe
  // * Contributed equally to the work
  // Corresponding Authors: Josep Bassaganya-Riera and Stanca Ciupe
  // isInstanceOf biomodels.db:MODEL1605030001 ncit:C15261 ncit:C14219 taxonomy:9606
  // isDescribedBy taxonomy:9606 pubmed:28060843
  // biomodels.db:MODEL1605030001
  // hasProperty ncit:C15261
  // hasProperty ncit:C14219
  // biomodels.db:MODEL1605030001 biomodels.db:BIOMD0000000872

  // Compartments:
  compartment default = 1;

  // Species:
  // HIV
  species V in default = 48000;  // hasInstance ncit:C14219
  // HIV infected cells
  species I in default = beta*T*V;  // hasProperty ncit:C97350
  // CD4+ T cells
  species T in default = 250000;  // hasInstance ncit:C97350
  // HPV
  species W in default = 0;  // hasInstance efo:0004510
  // HPV specific CTL
  species E in default = 0.01;  // hasInstance ncit:C12543
  // HPV self-proliferating cells
  species Y2 in default = 0;  // hasInstance ncit:C12578
  // HPV infected cells
  species Y1 in default = 1;  // hasInstance ncit:C12578

  // Parameters:
  e_rt = 0;
  e_pi = 0;
  epi = 0.5;
  omega = 0.001;
  mu = 0.048;
  beta = c1/(N1*T);
  c1 = 23;
  N1 = 467;
  s = d*T + beta*T*V;
  d = 0.01;

  // Reactions:
  // N1 - Ciupe MS, Bivort BL, Bortz DM, Nelson PW. Estimating kinetic parameters from HIV primary infection data through the eyes of three different mathematical models. Math Biosci. 2006;200:1-27.
  // delta - Klatt NR, Shudo E, Ortiz AM, Engram JC, Paiardini M, Lawson B, et al. CD8+ lymphocytes control viral replication in SIVmac239-infected rhesus macaques without decreasing the lifespan of productively infected cells. PLoS Pathog. 2010; 6:1-11.
  Production_of_HIV_virion: => V; default*Rate_Law_for_Production_of_HIV_virion_1(N1, delta, e_pi, I);  // modifiers: I
    delta = 1;
  // Ramratnam B, Bonhoeffer S, Binley J, Hurley A, Zhang L, Mittler JE, et al. Rapid production and clearance of HIV-1 and hepatitis C virus assessed by large volume plasma apheresis. Lancet. 1999;354:1782-5.
  Death_of_HIV: V => ; default*c1*V;
  Production_of_HIV_infected_cells: T => I; default*Rate_Law_for_production_of_HIV_infected_cells_1(beta, e_rt, V, T);  // modifiers: V
  Production_of_T_cells: => T; default*Constant_flux__irreversible(s);
  // Mohri H, Perelson AS, Tung K, Ribeiro RM, Ramratnam B, Markowitz M, et al. Increased turnover of T lymphocytes in HIV-1 infection and its reduction by antiretroviral therapy. J Exp Med. 2001;194:1277-88.
  Decay_of_T_cells: T => ; default*d*T;
  // Klatt NR, Shudo E, Ortiz AM, Engram JC, Paiardini M, Lawson B, et al. CD8+ lymphocytes control viral replication in SIVmac239-infected rhesus macaques without decreasing the lifespan of productively infected cells. PLoS Pathog. 2010; 6:1-11.
  Decay_of_HIV_infected: I => ; default*Decay_of_HIV_infected_k1*I; Decay_of_HIV_infected is "Decay of HIV-infected";
    Decay_of_HIV_infected_k1 = 1;
  // Murall CL, Bauch CT, Day T. Could the human papillomavirus vaccines drive virulence evolution? Proc Biol Sci. 2015;282:20141069.
  re9: Y1 => Y2; default*epi*Y1; re9 is "Production of HPV-self-proliferating cells by HPV infected";
  // Murall CL, Bauch CT, Day T. Could the human papillomavirus vaccines drive virulence evolution? Proc Biol Sci. 2015;282:20141069.
  re11: => W; default*Rate_Law_for_Production_of_HPV_due_to_HPVinfected_1(re11_k1, mu, Y1); re11 is "Production of HPV due to HPVinfected";  // modifiers: Y1
    re11_k1 = 1000;
  // Murall CL, Bauch CT, Day T. Could the human papillomavirus vaccines drive virulence evolution? Proc Biol Sci. 2015;282:20141069.
  re12: Y1 => ; default*Death_of_HPV_self_proliferating_due_to_Effector_cells(re12_a, Y1, E); re12 is "Death of HPV infected due to Effector cells";  // modifiers: E
    re12_a = 0.01;
  // Murall CL, Bauch CT, Day T. Could the human papillomavirus vaccines drive virulence evolution? Proc Biol Sci. 2015;282:20141069.
  Decay_of_HPV_self_proliferating: Y2 => ; default*Decay_of_HPV_self_proliferating_k1*Y2; Decay_of_HPV_self_proliferating is "Decay of HPV self-proliferating";
    Decay_of_HPV_self_proliferating_k1 = 0.048;
  Logistic_term_for_Effector_cells: E => ; default*Logistic_term_for_Effector_cells_1(b, omega, Y2, E, T);  // modifiers: Y2, T
    b = 3.5e-5;
  // Murall CL, Bauch CT, Day T. Could the human papillomavirus vaccines drive virulence evolution? Proc Biol Sci. 2015;282:20141069.
  re17: Y2 => ; default*Death_of_HPV_self_proliferating_cells_due_to_effector_cells(re17_a, Y2, E); re17 is "Death of HPV self-proliferating cells due to effector cells";  // modifiers: E
    re17_a = 0.01;
  // Murall CL, Bauch CT, Day T. Could the human papillomavirus vaccines drive virulence evolution? Proc Biol Sci. 2015;282:20141069.
  Decay_of_HPV_infected_cells: Y1 => ; default*mu*Y1; Decay_of_HPV_infected_cells is "Decay of HPV-infected cells";
  // Murall CL, Bauch CT, Day T. Could the human papillomavirus vaccines drive virulence evolution? Proc Biol Sci. 2015;282:20141069.
  Decay_of_HPV: W => ; default*Decay_of_HPV_k1*W;
    Decay_of_HPV_k1 = 0.05;
  // Murall CL, Bauch CT, Day T. Could the human papillomavirus vaccines drive virulence evolution? Proc Biol Sci. 2015;282:20141069.
  re24: Y2 => 2 Y2; default*Proliferation_of_HPV_self_proliferating(epi, r, Y2); re24 is "Proliferation of HPV self-proliferating cells";
    r = 0.1;
  // Murall CL, Bauch CT, Day T. Could the human papillomavirus vaccines drive virulence evolution? Proc Biol Sci. 2015;282:20141069.
  re25: Y1 => 2 Y1; default*Productionof_HPV_infected_cells(N2, p, phi, psi, Y1, W, V); re25 is "Productionof HPV infected cells";  // modifiers: W, V
    N2 = 10000; p = 2.0833e-5; phi = 1000000; psi = 0.0067;
  // Murall CL, Bauch CT, Day T. Could the human papillomavirus vaccines drive virulence evolution? Proc Biol Sci. 2015;282:20141069.
  Production_of_Effector_cell: E => 2 E; default*Rate_Law_for_Production_of_Effector_cell_1_1(omega, Y2, E);  // modifiers: Y2
  // Murall CL, Bauch CT, Day T. Could the human papillomavirus vaccines drive virulence evolution? Proc Biol Sci. 2015;282:20141069.
  Production_of_HPV_due_to_HPV_self_proliferating: => W; default*Production_of_HPV_due_to_HPV_self_proliferating_1(k2, mu, Y2);  // modifiers: Y2
    k2 = 1000;

  // Unit definitions:
  unit volume = 1e-3 litre;
  unit time = 86400 second;
  unit substance = item;
end
