// SBML level 2 version 4
// dcterms:bibliographicCitation: An insight into tumor dormancy equilibrium via the analysis of its domain of attraction urn:miriam:doi:10.1016/j.bspc.2008.02.001

function Function_for_removal_of_tumor_cell(alpha, M, N)
  alpha*M*N;
end

function Function_for_formation_of_resting_predator_cell(s, Z, k2)
  s*Z*(1 - Z/k2);
end

function Function_for_removal_hunting_predator_cell(d1, N)
  d1*N;
end

function Function_for_removal_of_resting_predator_cells(beta, N, Z, d2)
  beta*N*Z + d2*Z;
end

function Function_for_increase_in_the_density_of_tumor_cell(q, r, M, k1)
  q + r*M*(1 - M/k1);
end

function Function_for_actiation_and_tranfer_of_hunting_predator_cells(beta, N, Z)
  beta*N*Z;
end

model Merola2008___An_insight_into_tumor_dormancy_equilibrium_via_the_analysis_of_its_domain_of_attraction()
  // Merola2008 - An insight into tumor dormancy equilibrium via the analysis of its domain of attraction
  // An insight into tumor dormancy equilibrium via the analysis of its domain of
  // attraction
  // A. Merola, C. Cosentino *, F. Amato
  // School of Computer and Biomedical Engineering, Universita` degli Studi Magna Græcia di Catanzaro, Campus ‘‘Salvatore Venuta’’, 88100 Catanzaro, Italy
  // A B S T R A C T
  // The trajectories of the dynamic system which regulates the competition between the populations of
  // malignant cells and immune cells may tend to an asymptotically stable equilibrium in which the sizes of
  // these populations do not vary, which is called tumor dormancy. Especially for lower steady-state sizes of
  // the population of malignant cells, this equilibrium represents a desirable clinical condition since the
  // tumor growth is blocked. In this context, it is of mandatory importance to analyze the robustness of this
  // clinical favorable state of health in the face of perturbations. To this end, the paper presents an
  // optimization technique to determine whether an assigned rectangular region, which surrounds an
  // asymptotically stable equilibrium point of a quadratic systems, is included into the domain of attraction
  // of the equilibrium itself. The biological relevance of the application of this technique to the analysis of
  // tumor growth dynamics is shown on the basis of a recent quadraticmodel of the tumor–immune system
  // competition dynamics. Indeed the application of the proposedmethodology allows to ensure that a given
  // safety region, determined on the basis of clinical considerations, belongs to the domain of attraction of
  // the tumor blocked equilibrium; therefore for the set of perturbed initial conditions which belong to such
  // region, the convergence to the healthy steady state is guaranteed. The proposed methodology can also
  // provide an optimal strategy for cancer treatment.
  // isDescribedBy doi:10.1016/j.bspc.2008.02.001
  // isDerivedFrom doi:10.1016/j.mbs.2005.04.001
  // isVersionOf ncit:C48686
  // hasTaxon taxonomy:9606
  // hasProperty mamo:MAMO_0000046
  // biomodels.db:MODEL2001150001 biomodels.db:BIOMD0000000911

  // Compartments:
  compartment compartment = 1;

  // Species:
  species M in compartment = 2.5;  // hasProperty ncit:C12922
  species N in compartment = 1.5;
  species Z in compartment = 0.5;

  // Parameters:
  q = 10;
  r = 0.9;
  alpha = 0.3;
  k1 = 0.8;
  beta = 0.1;
  d1 = 0.02;
  s = 0.8;
  k2 = 0.7;
  d2 = 0.03;

  // Reactions:
  Increase_in_the_density_of_tumor_cel: => M; compartment*Function_for_increase_in_the_density_of_tumor_cell(q, r, M, k1);  // isVersionOf GO:0002355
  Removal_of_tumor_cell_from_the_system: M => ; compartment*Function_for_removal_of_tumor_cell(alpha, M, N);  // modifiers: N
  Activation_and_transfer_of_predator_cells_like_CTL_NK_and_macrophage: => N; compartment*Function_for_actiation_and_tranfer_of_hunting_predator_cells(beta, N, Z);  // modifiers: Z; isVersionOf GO:0072676
  Removal_of_hunting_predator_cell: N => ; compartment*Function_for_removal_hunting_predator_cell(d1, N);  // isVersionOf GO:0072676
  Converstion_of_hunting_to_resting_predator_cell: => Z; compartment*Function_for_formation_of_resting_predator_cell(s, Z, k2);  // isVersionOf GO:0046013
  Removal_of_resting_predator_cells: Z => ; compartment*Function_for_removal_of_resting_predator_cells(beta, N, Z, d2);  // modifiers: N; isVersionOf GO:0072676

  // Unit definitions:
  unit volume = 1e-3 litre;
  unit substance = 1e-3 mole;
end
