// SBML level 2 version 4
// dcterms:bibliographicCitation: http://identifiers.org/doi/10.1093/imamat/hxw007

function Rate_Law_for_reaction_for_Generation_of_thrombin_1_1(Factor_V, Prothrombin__II, Xa_L, q4a)
  q4a*Xa_L*Prothrombin__II/(Factor_V + 1 + Prothrombin__II);
end

function Rate_Law_for_reaction_for_production_of_V_1(Factor_V, Factor_Xa, Fibrinogen, Prothrombinase__Va_Xa, Thrombin__IIa, k2a, k2am, k2b)
  k2a*Thrombin__IIa*Factor_V/(Factor_V + k2a*k2am*(1 + Fibrinogen)) + k2a*k2b*Factor_Xa*Factor_V/(Factor_V + 1 + Prothrombinase__Va_Xa);
end

function Rate_Law_for_reaction_for_inactive_Xa__Xi__1(Factor_Xa, Prothrombinase__Va_Xa, k1b, k2a, k3b, q3a)
  k1b*Factor_Xa + k2a*k3b/q3a*Prothrombinase__Va_Xa;
end
Rate_Law_for_reaction_for_inactive_Xa__Xi__1 is "Rate Law for reaction for inactive Xa (Xi)_1";

function Rate_Law_for_reaction_for_formaation_of_prothrombinase_1(APC, Factor_Va, Factor_Xa, Prothrombinase__Va_Xa, k3a, k3c)
  k3a*Factor_Xa*Factor_Va - k3c*k3a*APC*Prothrombinase__Va_Xa/(Prothrombinase__Va_Xa + 1);
end

function Rate_Law_for_reaction_for_Inactivation_of_prothrombinase_2_1(APC, Prothrombinase__Va_Xa, k3c, q3a)
  k3c*q3a*APC*Prothrombinase__Va_Xa/(Prothrombinase__Va_Xa + 1);
end

function Rate_Law_for_reaction_for_generation_of_Xa_1(_Dunster2016___Nondimensional_Coagulation_Model, gamma1a, k1a)
  k1a*gamma1a*exp(-gamma1a*_Dunster2016___Nondimensional_Coagulation_Model);
end

function Rate_law_reaction_for_generation_of_Va_1(Factor_V, Factor_Va, Factor_Xa, Fibrinogen, Prothrombin__II, Prothrombinase__Va_Xa, Thrombin__IIa, k2am, k2b, k3b, q3a)
  Thrombin__IIa*Factor_V/(Factor_V + k2am*(1 + Fibrinogen)) + k2b*Factor_Xa*Factor_V/(Factor_V + 1 + Prothrombin__II) + k3b/q3a*Prothrombinase__Va_Xa - Factor_Xa*Factor_Va;
end

function Rate_Law_for_reaction_for_Inactivation_of_prothrombinase_1_1(Factor_Va, Factor_Xa, Prothrombinase__Va_Xa, k3b, q3a)
  k3b*Prothrombinase__Va_Xa - q3a*Factor_Xa*Factor_Va;
end

function Rate_Law_for_reaction_for_thrombin_2_1(Thrombin__IIa)
  Thrombin__IIa;
end

function Rate_Law_for_reaction_for_Inactivation_of_Va(APC, Factor_Va)
  APC*Factor_Va/(Factor_Va + 1);
end

function Rate_Law_for_reaction_for_thrombin_1_1(Prothrombin__II, Va_Xa_L, k4b, k4bm, q4a)
  q4a*k4b*Va_Xa_L*Prothrombin__II/(q4a*(Prothrombin__II + k4bm));
end

function Rate_Law_for_reaction_for_prothrombin_1(Prothrombin__II, Va_Xa_L, k4b, k4bm)
  k4b*Va_Xa_L*Prothrombin__II/(Prothrombin__II + k4bm);
end

model Dunster2016___Nondimensional_Coagulation_Model()
  // Dunster2016 - Nondimensional Coagulation Model
  // We undertake a mathematical investigation of a model for the generation of thrombin, an enzyme central to haemostatic blood coagulation, as well as to thrombotic disorders, that is the end product of a complicated protein cascade with multiple feedbacks that ensures its production in the right place at the right time. In a laboratory setting, its central role is reflected in thrombin evolution over time being used as a measure of the ability of a patient's blood to clot. Here, we present a model for the generation of thrombin (based on earlier work) and analyse it using the method of matched asymptotic expansions to derive a sequence of simplified models that characterize the roles of distinct interactions over various timescales. In particular, we are able through the asymptotic analysis to provide simplified models that are an excellent substitute for the full model (capturing the explosive growth and decay of thrombin) and approximations for the key experimental measurements used to describe thrombin's characteristic evolution over time. The asymptotic results are validated against numerical simulations.
  // biomodels.db:MODEL1808140001
  // isVersionOf GO:0007596
  // occursIn BTO:0000089
  // hasTaxon taxonomy:9606
  // isDescribedBy doi:10.1093/imamat/hxw007
  // hasProperty mamo:MAMO_0000046

  // Compartments:
  compartment compartment = 1;

  // Species:
  species Factor_Xa in compartment = 0;
  species Thrombin__IIa in compartment = 0; Thrombin__IIa is "Thrombin (IIa)";
  species Factor_V in compartment = 3;
  species Factor_Va in compartment = 0;
  species APC in compartment = 0;
  species VInactive in compartment = 0;
  species Prothrombinase__Va_Xa in compartment = 0; Prothrombinase__Va_Xa is "Prothrombinase (Va:Xa)";
  species Prothrombin__II in compartment = 17; Prothrombin__II is "Prothrombin (II)";
  species $Xa_L in compartment; Xa_L is "Xa:L";
  species $Va_Xa_L in compartment; Va_Xa_L is "Va:Xa:L";
  species Protein_C in compartment = 92;
  species Inactive_protein_C in compartment = 0;
  species Fibrin in compartment = 0;
  species Fibrinogen in compartment = 5;
  species Inactive_Thrombin in compartment = 0;
  species Factor_Xi in compartment = 0;

  // Parameters:
  k1a = 150;
  gamma1a = 0.77;
  k1b = 0.19;
  k2a = 2;
  k2am = 7.2;
  k2b = 0.013;
  k3a = 150;
  q3a = 1;
  k3b = 0.038;
  k3c = 1;
  k4a = 0.12;
  q4a = 0.004;
  k4b = 530;
  k4bm = 3.6;
  k5a = 0.0011;
  k5b = 0.27;
  k6 = 1500;
  kx = 385;
  kb = 0.0005;
  Ix = 7.69;
  Ib = 0.05;

  // Assignment rules:
  Va_Xa_L := 0.5*(kb + Ib + Prothrombinase__Va_Xa - ((kb + Ib + Prothrombinase__Va_Xa)^2 - 4*Ib*Prothrombinase__Va_Xa)^(1/2));
  Xa_L := 0.5*(kx + Ix + Factor_Xa - ((kx + Ix + Factor_Xa)^2 - 4*Ix*Factor_Xa)^(1/2));
  log_time := log10(time)/log10(10)/(log10(10)/log10(10));

  // Reactions:
  Reaction_for_Generation_of_Xa: => Factor_Xa; compartment*Rate_Law_for_reaction_for_generation_of_Xa_1(time, gamma1a, k1a);
  Reaction_for_Generation_of_Va: => Factor_Va; compartment*Rate_law_reaction_for_generation_of_Va_1(Factor_V, Factor_Va, Factor_Xa, Fibrinogen, Prothrombin__II, Prothrombinase__Va_Xa, Thrombin__IIa, k2am, k2b, k3b, q3a);  // modifiers: Thrombin__IIa, Factor_V, Fibrinogen, Factor_Xa, Prothrombin__II, Prothrombinase__Va_Xa
  Reaction_for_Inactivation_of_Xa: Factor_Xa => ; compartment*k1b*Factor_Xa;
  Reaction_for_Inactivation_of_Va: Factor_Va => VInactive; compartment*Rate_Law_for_reaction_for_Inactivation_of_Va(APC, Factor_Va);  // modifiers: APC
  Reaction_for_Formation_of_Prothrombinase: Factor_Xa => ; compartment*Rate_Law_for_reaction_for_formaation_of_prothrombinase_1(APC, Factor_Va, Factor_Xa, Prothrombinase__Va_Xa, k3a, k3c);  // modifiers: Factor_Va, APC, Prothrombinase__Va_Xa
  Reaction_for_Inactivation_of_prothrombinase_1: Prothrombinase__Va_Xa => ; compartment*Rate_Law_for_reaction_for_Inactivation_of_prothrombinase_1_1(Factor_Va, Factor_Xa, Prothrombinase__Va_Xa, k3b, q3a);  // modifiers: Factor_Xa, Factor_Va
  reaction_for_Inactivation_of_prothrombinase_2: Prothrombinase__Va_Xa => VInactive; compartment*Rate_Law_for_reaction_for_Inactivation_of_prothrombinase_2_1(APC, Prothrombinase__Va_Xa, k3c, q3a);  // modifiers: APC
  reaction_for_Generation_of_thrombin: Prothrombin__II => Thrombin__IIa; compartment*Rate_Law_for_reaction_for_Generation_of_thrombin_1_1(Factor_V, Prothrombin__II, Xa_L, q4a);  // modifiers: Xa_L, Factor_V, Va_Xa_L
  reaction_for_Generation_of_protein_C: Protein_C => APC; compartment*k5a*Protein_C;
  Reaction_for_Inactivation_of_protein_C: APC => Inactive_protein_C; compartment*k5b*APC;
  reaction_for_Generation_of__Fibrin: Fibrinogen => Fibrin; compartment*k6*Fibrinogen; reaction_for_Generation_of__Fibrin is "reaction for Generation of Fibrin";
  Reaction_of_V_Inactivation: Factor_V => ; compartment*Rate_Law_for_reaction_for_production_of_V_1(Factor_V, Factor_Xa, Fibrinogen, Prothrombinase__Va_Xa, Thrombin__IIa, k2a, k2am, k2b);  // modifiers: Thrombin__IIa, Fibrinogen, Factor_Xa, Prothrombinase__Va_Xa
  Reaction_for_Thrombin_Generation: Thrombin__IIa => Inactive_Thrombin; compartment*Rate_Law_for_reaction_for_thrombin_2_1(Thrombin__IIa);
  Reaction_for_Thrombin_Inactivation: => Thrombin__IIa; compartment*Rate_Law_for_reaction_for_thrombin_1_1(Prothrombin__II, Va_Xa_L, k4b, k4bm, q4a);  // modifiers: Va_Xa_L, Prothrombin__II
  Reaction_for_Prothrombin_inactivation: Prothrombin__II => ; compartment*Rate_Law_for_reaction_for_prothrombin_1(Prothrombin__II, Va_Xa_L, k4b, k4bm);  // modifiers: Va_Xa_L
  Reaction_for_Inactive_Xa: => Factor_Xi; compartment*Rate_Law_for_reaction_for_inactive_Xa__Xi__1(Factor_Xa, Prothrombinase__Va_Xa, k1b, k2a, k3b, q3a); Reaction_for_Inactive_Xa is "Reaction for Inactive Xa production";  // modifiers: Factor_Xa, Prothrombinase__Va_Xa

  // Unit definitions:
  unit volume = 1e-3 litre;
  unit substance = 1e-3 mole;
end
