// SBML level 2 version 4
// dcterms:bibliographicCitation: urn:miriam:doi:10.1101/565531

function Function_for_CT_immune_Cell_x2__natural_influx(alpha_2)
  alpha_2;
end
Function_for_CT_immune_Cell_x2__natural_influx is "Function for CT immune Cell(x2) natural influx";

function Function_for_CT_immune_Cell_x1__death(omega_1, x_1)
  omega_1*x_1;
end
Function_for_CT_immune_Cell_x1__death is "Function for CT immune Cell(x1) death";

function Function_for_Necrotic_cell_v1__lysis(myu_1, v_1)
  myu_1*v_1;
end
Function_for_Necrotic_cell_v1__lysis is "Function for Necrotic cell(v1) lysis";

function Function_for_CT_immune_Cell_x2__response(lambda_2, x_2)
  lambda_2*x_2;
end
Function_for_CT_immune_Cell_x2__response is "Function for CT immune Cell(x2) response";

function Function_for_Tumor_Cell_u1__death(sigma_1, u_1)
  sigma_1*u_1;
end
Function_for_Tumor_Cell_u1__death is "Function for Tumor Cell(u1) death";

function Function_for_Tumor_Cell_u2__death(sigma_2, u_2)
  sigma_2*u_2;
end
Function_for_Tumor_Cell_u2__death is "Function for Tumor Cell(u2) death";

function Function_for_Tumor_Cell_u2__Metastatic(s_1, u_1, est)
  s_1*u_1*est;
end
Function_for_Tumor_Cell_u2__Metastatic is "Function for Tumor Cell(u2) Metastatic";

function Function_for_Tumor_Cell_u1__growth(gamma_1, g_1, u_1)
  gamma_1*g_1*u_1;
end
Function_for_Tumor_Cell_u1__growth is "Function for Tumor Cell(u1) growth";

function Function_for_Tumor_Cell_u2__growth(gamma_2, g_2, u_2)
  gamma_2*g_2*u_2;
end
Function_for_Tumor_Cell_u2__growth is "Function for Tumor Cell(u2) growth";

function Function_for_Necrotic_cell_v1__rise(theta_1, sigma_1, u_1)
  theta_1*sigma_1*u_1;
end
Function_for_Necrotic_cell_v1__rise is "Function for Necrotic cell(v1) rise";

function Function_for_Tumor_Cell_u1__Shedding(s_1, u_1)
  s_1*u_1;
end
Function_for_Tumor_Cell_u1__Shedding is "Function for Tumor Cell(u1) Shedding";

function Function_for_Necrotic_cell_v2__rise(theta_2, sigma_2, u_2)
  theta_2*sigma_2*u_2;
end
Function_for_Necrotic_cell_v2__rise is "Function for Necrotic cell(v2) rise";

function Function_for_Necrotic_cell_v2__lysis(myu_2, v_2)
  myu_2*v_2;
end
Function_for_Necrotic_cell_v2__lysis is "Function for Necrotic cell(v2) lysis";

function Function_for_CT_immune_Cell_x1__natural_influx(alpha_1)
  alpha_1;
end
Function_for_CT_immune_Cell_x1__natural_influx is "Function for CT immune Cell(x1) natural influx";

function Function_for_CT_immune_Cell_x1__response(lambda_1, x_1)
  lambda_1*x_1;
end
Function_for_CT_immune_Cell_x1__response is "Function for CT immune Cell(x1) response";

function Function_for_CT_immune_Cell_x2__death(omega_2, x_2)
  omega_2*x_2;
end
Function_for_CT_immune_Cell_x2__death is "Function for CT immune Cell(x2) death";

function Function_for_CT_immune_Cell_x1__transition(ed_1, x_1)
  ed_1*x_1;
end
Function_for_CT_immune_Cell_x1__transition is "Function for CT immune Cell(x1) transition";

function Function_for_TE_immune_Cell_y2__natural_death(tau_2, y_2)
  tau_2*y_2;
end
Function_for_TE_immune_Cell_y2__natural_death is "Function for TE immune Cell(y2) natural death";

function Function_for_CT_immune_Cell_x2__killed(rho_2, u_2, x_2)
  rho_2*u_2*x_2;
end
Function_for_CT_immune_Cell_x2__killed is "Function for CT immune Cell(x2) killed";

function Function_for_CT_immune_Cell_x2__transition(ed_2, x_2)
  ed_2*x_2;
end
Function_for_CT_immune_Cell_x2__transition is "Function for CT immune Cell(x2) transition";

function Function_for_TE_immune_Cell_y1__loss_in_circulatory(tilde_s_1, y_1)
  tilde_s_1*y_1;
end
Function_for_TE_immune_Cell_y1__loss_in_circulatory is "Function for TE immune Cell(y1) loss in circulatory";

function Function_for_TE_immune_Cell_y2__Supplement(p, tilde_s_1, y_1)
  p*tilde_s_1*y_1;
end
Function_for_TE_immune_Cell_y2__Supplement is "Function for TE immune Cell(y2) Supplement";

function Function_for_TE_immune_Cell_y1__recruitment(f_1, y_1)
  f_1*y_1;
end
Function_for_TE_immune_Cell_y1__recruitment is "Function for TE immune Cell(y1) recruitment";

function Function_for_TE_immune_Cell_y2__recruitment(f_2, y_2)
  f_2*y_2;
end
Function_for_TE_immune_Cell_y2__recruitment is "Function for TE immune Cell(y2) recruitment";

function Function_for_TE_immune_Cell_y1__natural_death(tau_1, y_1)
  tau_1*y_1;
end
Function_for_TE_immune_Cell_y1__natural_death is "Function for TE immune Cell(y1) natural death";

function Function_for_CT_immune_Cell_x1__killed(rho_1, u_1, x_1)
  rho_1*u_1*x_1;
end
Function_for_CT_immune_Cell_x1__killed is "Function for CT immune Cell(x1) killed";

model New_Model()
  // Rhodes2019 - Immune-Mediated theory of Metastasis
  // Abstract: Accumulating experimental and clinical evidence suggest that the immune response to cancer is not exclusively anti-tumor. Indeed, the pro-tumor roles of the immune system - as suppliers of growth and pro-angiogenic factors or defenses against cytotoxic immune attacks, for example - have been long appreciated, but relatively few theoretical works have considered their effects. Inspired by the recently proposed "immune-mediated" theory of metastasis, we develop a mathematical model for tumor-immune interactions at two anatomically distant sites, which includes both anti- and pro-tumor immune effects, and the experimentally observed tumor-induced phenotypic plasticity of immune cells (tumor "education" of the immune cells). Upon confrontation of our model to experimental data, we use it to evaluate the implications of the immune-mediated theory of metastasis. We find that tumor education of immune cells may explain the relatively poor performance of immunotherapies, and that many metastatic phenomena, including metastatic blow-up, dormancy, and metastasis to sites of injury, can be explained by the immune-mediated theory of metastasis. Our results suggest that further work is warranted to fully elucidate the pro-tumor effects of the immune system in metastatic cancer.
  // isDescribedBy doi:10.1101/565531
  // biomodels.db:MODEL1910020003
  // hasTaxon taxonomy:9606
  // hasProperty GO:0006955 ncit:C17997 efo:0000311 ncit:C19151 mamo:MAMO_0000046
  // biomodels.db:MODEL1910020003 biomodels.db:BIOMD0000000926

  // Compartments:
  compartment compartment = 1;

  // Species:
  species Tumor_Cell_u_1 in compartment = 1; Tumor_Cell_u_1 is "Tumor Cell(u_1)";  // hasProperty efo:0000311; hasProperty BTO:0006256
  species TE_immune_Cell_y_1 in compartment = 0.001; TE_immune_Cell_y_1 is "TE immune Cell(y_1)";  // hasProperty efo:0000311
  species CT_immune_Cell_x_1 in compartment = alpha_1/omega_1; CT_immune_Cell_x_1 is "CT immune Cell(x_1)";  // hasProperty ncit:C12543; hasProperty efo:0000311
  species Tumor_Cell_u_2 in compartment = 1e-12; Tumor_Cell_u_2 is "Tumor Cell(u_2)";  // hasProperty BTO:0006256; hasProperty ncit:C4968
  species CT_immune_Cell_x_2 in compartment = alpha_2/omega_2; CT_immune_Cell_x_2 is "CT immune Cell(x_2)";  // hasProperty ncit:C4968; hasProperty ncit:C12543
  species TE_immune_Cell_y_2 in compartment = 1e-10; TE_immune_Cell_y_2 is "TE immune Cell(y_2)";  // hasProperty ncit:C4968
  species Necrotic_Cell_v_1 in compartment = 1; Necrotic_Cell_v_1 is "Necrotic Cell(v_1)";  // hasProperty efo:0000311; hasProperty ncit:C36123
  species Necrotic_Cell_v_2 in compartment = 1e-16; Necrotic_Cell_v_2 is "Necrotic Cell(v_2)";  // hasProperty ncit:C36123; hasProperty ncit:C4968

  // Parameters:
  r_1 = 0.38;
  K_1 = 531960000 unit_0;
  r_2 = 0.38;
  K_2 = 531960000 unit_0;
  minC_1 = 0.2;
  maxC_1 = 0.1;
  upC_1 = 1101695;
  lowC_1 = 254237 unit_0;
  minC_2 = 0.2;
  maxC_2 = 0.1;
  upC_2 = 1101695;
  lowC_2 = 254237 unit_0;
  max_1 = 0.5;
  max_2 = 0.5;
  low_1 = 25424 unit_0;
  low_2 = 25424 unit_0;
  up_1 = 110169;
  up_2 = 110169;
  upD_1 = 110169;
  upD_2 = 110169;
  lowD_1 = 25424 unit_0;
  lowD_2 = 25424 unit_0;
  theta_1 = 65.67;
  theta_2 = 65.67;
  s_1 = 0.01;
  var v_v2_minv_maxv_lowv_upv; v_v2_minv_maxv_lowv_upv is "v(v2;minv,maxv,lowv,upv)";
  var e_x2_0_maxct_lowesstct_upestct; e_x2_0_maxct_lowesstct_upestct is "e(x2,0,maxct,lowesstct,upestct)";
  var v_y2_minestte_maxestte_lowestte_upestte; v_y2_minestte_maxestte_lowestte_upestte is "v(y2,minestte,maxestte,lowestte,upestte)";
  min_v = 0.001;
  max_v = 0.999;
  low_v = 26600000 unit_0;
  up_v = 293000000;
  max_CT = 100;
  lowEst_CT = 254237 unit_0;
  upEst_CT = 1101695;
  minEst_TE = 0.001;
  maxEst_TE = 0.002;
  lowEst_TE = 25424 unit_0;
  upEst_TE = 110169;
  myu_1 = 0.01;
  myu_2 = 0.05;
  alpha_1 = 1000000 unit_1;
  alpha_2 = 1000000 unit_1;
  a_11 = 0.524 unit_1;
  a_12 = 0.524 unit_1;
  a_21 = 0.786 unit_1;
  a_22 = 0.786 unit_1;
  b_11 = 161000 unit_0;
  b_12 = 161000 unit_0;
  b_21 = 161000 unit_0;
  b_22 = 161000 unit_0;
  a_31 = 0.04 unit_1;
  a_32 = 0.04 unit_1;
  b_31 = 160000 unit_0;
  b_32 = 160000 unit_0;
  omega_1 = 0.59;
  omega_2 = 0.59;
  rho_1 = 0.001;
  rho_2 = 0.01;
  chi_1 = 5e-5 unit_1;
  chi_2 = 5e-5 unit_1;
  tau_1 = 0.05 unit_1;
  tau_2 = 0.05 unit_1;
  tilde_s_1 = 0.05 unit_1;
  p = 0.0001;

  // Assignment rules:
  gamma_1 := (tanh((TE_immune_Cell_y_1 - (low_1 + up_1)/2)*6/(up_1 - low_1)) - tanh((low_1 + up_1)*(-3)/(up_1 - low_1)))*max_1/2 + 1;
  g_1 := r_1*(1 - Tumor_Cell_u_1/K_1);
  g_2 := r_2*(1 - Tumor_Cell_u_2/K_2);
  sigma_1 := ((tanh(6*(CT_immune_Cell_x_1 - (upC_1 + lowC_1)/2)/(upC_1 - lowC_1)) - tanh(-3*(upC_1 + lowC_1)/(upC_1 - lowC_1)))*maxC_1/2 + minC_1)*(1 - tanh(6*(TE_immune_Cell_y_1 - (upD_1 + lowD_1)/2)/(upD_1 - lowD_1)))/(1 - tanh(-3*(upD_1 + lowD_1)/(upD_1 - lowD_1)));
  e_x2_0_maxct_lowesstct_upestct := max_CT*(1 - tanh(6*(CT_immune_Cell_x_2 - (upEst_CT + lowEst_CT)/2)/(upEst_CT - lowEst_CT)))/(1 - tanh(-3*(upEst_CT + lowEst_CT)/(upEst_CT - lowEst_CT)));
  v_y2_minestte_maxestte_lowestte_upestte := (tanh(6*(TE_immune_Cell_y_2 - (upEst_TE + lowEst_TE)/2)/(upEst_TE - lowEst_TE)) - tanh(-3*(upEst_TE + lowEst_TE)/(upEst_TE - lowEst_TE)))*maxEst_TE/2 + minEst_TE;
  v_v2_minv_maxv_lowv_upv := (tanh(6*(Necrotic_Cell_v_2 - (up_v + low_v)/2)/(up_v - low_v)) - tanh(-3*(up_v + low_v)/(up_v - low_v)))*max_v/2 + min_v;
  sigma_2 := ((tanh(6*(CT_immune_Cell_x_2 - (upC_2 + lowC_2)/2)/(upC_2 - lowC_2)) - tanh(-3*(upC_2 + lowC_2)/(upC_2 - lowC_2)))*maxC_2/2 + minC_2)*(1 - tanh(6*(TE_immune_Cell_y_2 - (upD_2 + lowD_2)/2)/(upD_2 - lowD_2)))/(1 - tanh(-3*(upD_2 + lowD_2)/(upD_2 - lowD_2)));
  gamma_2 := (tanh((TE_immune_Cell_y_2 - (low_2 + up_2)/2)*6/(up_2 - low_2)) - tanh(-3*(up_2 + low_2)/(up_2 - low_2)))*max_2/2 + 1;
  ed_1 := chi_1*Tumor_Cell_u_1;
  est := e_x2_0_maxct_lowesstct_upestct*v_v2_minv_maxv_lowv_upv*v_y2_minestte_maxestte_lowestte_upestte;
  lambda_1 := a_11*Tumor_Cell_u_1/(b_11 + Tumor_Cell_u_1) + a_21*Necrotic_Cell_v_1/(b_21 + Necrotic_Cell_v_1);
  lambda_2 := a_12*Tumor_Cell_u_2/(b_12 + Tumor_Cell_u_2) + a_22*Necrotic_Cell_v_2/(b_22 + Necrotic_Cell_v_2);
  ed_2 := chi_2*Tumor_Cell_u_2;
  f_1 := a_31*Tumor_Cell_u_1/(b_31 + Tumor_Cell_u_1);
  f_2 := a_32*Tumor_Cell_u_2/(b_32 + Tumor_Cell_u_2);

  // Reactions:
  Tumor_Cell_u1__growth: => Tumor_Cell_u_1; compartment*Function_for_Tumor_Cell_u1__growth(gamma_1, g_1, Tumor_Cell_u_1); Tumor_Cell_u1__growth is "Tumor Cell(u1) growth";  // hasProperty ncit:C12543
  Tumor_Cell_u2__growth: => Tumor_Cell_u_2; compartment*Function_for_Tumor_Cell_u2__growth(gamma_2, g_2, Tumor_Cell_u_2); Tumor_Cell_u2__growth is "Tumor Cell(u2) growth";  // hasProperty ncit:C12543
  Tumor_Cell_u1__death: Tumor_Cell_u_1 => ; compartment*Function_for_Tumor_Cell_u1__death(sigma_1, Tumor_Cell_u_1); Tumor_Cell_u1__death is "Tumor Cell(u1) death";  // hasProperty ncit:C12543
  Tumor_Cell_u2__death: Tumor_Cell_u_2 => ; compartment*Function_for_Tumor_Cell_u2__death(sigma_2, Tumor_Cell_u_2); Tumor_Cell_u2__death is "Tumor Cell(u2) death";  // hasProperty ncit:C12543
  Necrotic_Cell_v1__rise: => Necrotic_Cell_v_1; compartment*Function_for_Necrotic_cell_v1__rise(theta_1, sigma_1, Tumor_Cell_u_1); Necrotic_Cell_v1__rise is "Necrotic Cell(v1) rise";  // modifiers: Tumor_Cell_u_1; hasProperty ncit:C12543
  Necrotic_Cell_v2__rise: => Necrotic_Cell_v_2; compartment*Function_for_Necrotic_cell_v2__rise(theta_2, sigma_2, Tumor_Cell_u_2); Necrotic_Cell_v2__rise is "Necrotic Cell(v2) rise";  // modifiers: Tumor_Cell_u_2; hasProperty ncit:C12543
  Tumor_Cell_u1__Shedding: Tumor_Cell_u_1 => ; compartment*Function_for_Tumor_Cell_u1__Shedding(s_1, Tumor_Cell_u_1); Tumor_Cell_u1__Shedding is "Tumor Cell(u1) Shedding";  // hasProperty ncit:C12543
  Tumor_Cell_u2__Metastatic: => Tumor_Cell_u_2; compartment*Function_for_Tumor_Cell_u2__Metastatic(s_1, Tumor_Cell_u_1, est); Tumor_Cell_u2__Metastatic is "Tumor Cell(u2) Metastatic";  // modifiers: Tumor_Cell_u_1; hasProperty ncit:C19151; hasProperty ncit:C12543
  Necrotic_Cell_v1__lysis: Necrotic_Cell_v_1 => ; compartment*Function_for_Necrotic_cell_v1__lysis(myu_1, Necrotic_Cell_v_1); Necrotic_Cell_v1__lysis is "Necrotic Cell(v1) lysis";  // hasProperty obi:OBI_0302894; hasProperty ncit:C12543
  Necrotic_Cell_v2__lysis: Necrotic_Cell_v_2 => ; compartment*Function_for_Necrotic_cell_v2__lysis(myu_2, Necrotic_Cell_v_2); Necrotic_Cell_v2__lysis is "Necrotic Cell(v2) lysis";  // hasProperty obi:OBI_0302894; hasProperty ncit:C12543
  CT_immune_Cell_x1__natural_influx: => CT_immune_Cell_x_1; compartment*Function_for_CT_immune_Cell_x1__natural_influx(alpha_1); CT_immune_Cell_x1__natural_influx is "CT immune Cell(x1) natural influx";  // hasProperty ncit:C12543
  CT_immune_Cell_x2__natural_influx: => CT_immune_Cell_x_2; compartment*Function_for_CT_immune_Cell_x2__natural_influx(alpha_2); CT_immune_Cell_x2__natural_influx is "CT immune Cell(x2) natural influx";  // hasProperty ncit:C12543
  CT_immune_Cell_x1__response: => CT_immune_Cell_x_1; compartment*Function_for_CT_immune_Cell_x1__response(lambda_1, CT_immune_Cell_x_1); CT_immune_Cell_x1__response is "CT immune Cell(x1) response";  // hasProperty ncit:C12543
  CT_immune_Cell_x2__response: => CT_immune_Cell_x_2; compartment*Function_for_CT_immune_Cell_x2__response(lambda_2, CT_immune_Cell_x_2); CT_immune_Cell_x2__response is "CT immune Cell(x2) response";  // hasProperty ncit:C12543
  CT_immune_Cell_x1__death: CT_immune_Cell_x_1 => ; compartment*Function_for_CT_immune_Cell_x1__death(omega_1, CT_immune_Cell_x_1); CT_immune_Cell_x1__death is "CT immune Cell(x1) death";  // hasProperty ncit:C12543; hasProperty GO:0008219
  CT_immune_Cell_x2__death: CT_immune_Cell_x_2 => ; compartment*Function_for_CT_immune_Cell_x2__death(omega_2, CT_immune_Cell_x_2); CT_immune_Cell_x2__death is "CT immune Cell(x2) death";  // hasProperty GO:0008219; hasProperty ncit:C12543
  CT_immune_Cell_x1__killed: CT_immune_Cell_x_1 => ; compartment*Function_for_CT_immune_Cell_x1__killed(rho_1, Tumor_Cell_u_1, CT_immune_Cell_x_1); CT_immune_Cell_x1__killed is "CT immune Cell(x1) killed";  // modifiers: Tumor_Cell_u_1; hasProperty GO:0001906; hasProperty ncit:C12543
  CT_immune_Cell_x2__killed: CT_immune_Cell_x_2 => ; compartment*Function_for_CT_immune_Cell_x2__killed(rho_2, Tumor_Cell_u_2, CT_immune_Cell_x_2); CT_immune_Cell_x2__killed is "CT immune Cell(x2) killed";  // modifiers: Tumor_Cell_u_2; hasProperty GO:0001906; hasProperty ncit:C12543
  CT_immune_Cell_x1__transition: CT_immune_Cell_x_1 => TE_immune_Cell_y_1; compartment*Function_for_CT_immune_Cell_x1__transition(ed_1, CT_immune_Cell_x_1); CT_immune_Cell_x1__transition is "CT immune Cell(x1) transition";  // hasProperty ncit:C12543
  CT_immune_Cell_x2__transition: CT_immune_Cell_x_2 => TE_immune_Cell_y_2; compartment*Function_for_CT_immune_Cell_x2__transition(ed_2, CT_immune_Cell_x_2); CT_immune_Cell_x2__transition is "CT immune Cell(x2) transition";  // hasProperty ncit:C12543
  TE_immune_Cell_y1__natural_death: TE_immune_Cell_y_1 => ; compartment*Function_for_TE_immune_Cell_y1__natural_death(tau_1, TE_immune_Cell_y_1); TE_immune_Cell_y1__natural_death is "TE immune Cell(y1) natural death";  // hasProperty ncit:C12543
  TE_immune_Cell_y2__natural_death: TE_immune_Cell_y_2 => ; compartment*Function_for_TE_immune_Cell_y2__natural_death(tau_2, TE_immune_Cell_y_2); TE_immune_Cell_y2__natural_death is "TE immune Cell(y2) natural death";  // modifiers: TE_immune_Cell_y_1; hasProperty ncit:C12543
  TE_immune_Cell_y1__loss_in_circulatory: TE_immune_Cell_y_1 => ; compartment*Function_for_TE_immune_Cell_y1__loss_in_circulatory(tilde_s_1, TE_immune_Cell_y_1); TE_immune_Cell_y1__loss_in_circulatory is "TE immune Cell(y1) loss in circulatory";  // hasProperty ncit:C12543
  TE_immune_Cell_y2__supplement: => TE_immune_Cell_y_2; compartment*Function_for_TE_immune_Cell_y2__Supplement(p, tilde_s_1, TE_immune_Cell_y_1); TE_immune_Cell_y2__supplement is "TE immune Cell(y2) supplement";  // modifiers: TE_immune_Cell_y_1; hasProperty ncit:C12543
  TE_immune_Cell_y1__recruitment: => TE_immune_Cell_y_1; compartment*Function_for_TE_immune_Cell_y1__recruitment(f_1, TE_immune_Cell_y_1); TE_immune_Cell_y1__recruitment is "TE immune Cell(y1) recruitment";  // hasProperty ncit:C12543
  TE_immune_Cell_y2__recruitment: => TE_immune_Cell_y_2; compartment*Function_for_TE_immune_Cell_y2__recruitment(f_2, TE_immune_Cell_y_2); TE_immune_Cell_y2__recruitment is "TE immune Cell(y2) recruitment";  // hasProperty ncit:C12543

  // Unit definitions:
  unit volume = 1e-3 litre;
  unit time = 86400 second;
  unit substance = 1e-3 mole;
  unit unit_0 = dimensionless^0; unit_0 is "1";
  unit unit_1 = 1 / (8640 second); unit_1 is "1/d";
end
