// SBML level 2 version 4
// dcterms:bibliographicCitation: urn:miriam:doi:10.1016/j.biosystems.2010.11.011
// dcterms:bibliographicCitation: urn:miriam:pubmed:21095219

function Constant_flux__irreversible(v)
  v;
end
Constant_flux__irreversible is "Constant flux (irreversible)";

function Function_for_synthesis_by_modifier(k, modifier)
  k*modifier;
end

function Function_for_R17(k17, y8)
  k17*y8*y8;
end

function Function_for_degradation_mass_action_modifier(k, substrate, modifier)
  k*substrate*modifier;
end

function Function_for_synthesis_with_modifier(k22, modifier, substrate)
  k22*modifier*substrate;
end

function Function_for_R41(k41, k42, Y_24)
  k41/(1 + k42*Y_24);
end

function Function_for_R65(k66, Im, k65)
  k66*Im^50/(k65^50 + Im^50);
end

function Function_for_R14(k14, y10, y49, y51)
  k14*y10*(y49 + y51);
end

function Function_for_R51(k51, product)
  k51*product;
end

function Function_for_R15(k15, y9, y49, y51)
  k15*y9*(y49 + y51);
end

function Function_for_R70(k70, y25, sig, k71, y26)
  k70*y25*sig/(1 + k71*y25*y26);
end

function Function_for_Rdeg(deg, modifier, substrate)
  deg*modifier*substrate;
end

model Iwamoto2010___Cell_cycle_reponse_to_DNA_damage()
  // Iwamoto2010 - Cell cycle reponse to DNA damage
  // After DNA damage, cells activate p53, a tumor suppressor gene, and select a cell fate (e.g., DNA repair, cell cycle arrest, or apoptosis). Recently, a p53 oscillatory behavior was observed following DNA damage. However, the relationship between this p53 oscillation and cell-fate selection is unclear. Here, we present a novel model of the DNA damage signaling pathway that includes p53 and whole cell cycle regulation and explore the relationship between p53 oscillation and cell fate selection. The simulation run without DNA damage qualitatively realized experimentally observed data from several cell cycle regulators, indicating that our model was biologically appropriate. Moreover, the comprehensive sensitivity analysis for the proposed model was implemented by changing the values of all kinetic parameters, which revealed that the cell cycle regulation system based on the proposed model has robustness on a fluctuation of reaction rate in each process. Simulations run with four different intensities of DNA damage, i.e. Low-damage, Medium-damage, High-damage, and Excess-damage, realized cell cycle arrest in all cases. Low-damage, Medium-damage, High-damage, and Excess-damage corresponded to the DNA damage caused by 100, 200, 400, and 800 J/m(2) doses of UV-irradiation, respectively, based on expression of p21, which plays a crucial role in cell cycle arrest. In simulations run with High-damage and Excess-damage, the length of the cell cycle arrest was shortened despite the severe DNA damage, and p53 began to oscillate. Cells initiated apoptosis and were killed at 400 and 800 J/m(2) doses of UV-irradiation, corresponding to High-damage and Excess-damage, respectively. Therefore, our model indicated that the oscillatory mode of p53 profoundly affects cell fate selection.
  // hasPart GO:0042769
  // hasTaxon taxonomy:9606
  // isDescribedBy pubmed:21095219
  // isDescribedBy doi:10.1016/j.biosystems.2010.11.011
  // hasProperty mamo:MAMO_0000046
  // biomodels.db:MODEL1809060003 biomodels.db:BIOMD0000000939

  // Compartments:
  compartment nuclear = 1;  // isVersionOf ncit:C13361
  compartment cytoplasm = 1;  // isVersionOf GO:0005737

  // Species:
  species Cyclin_D in nuclear = 0.03;  // isVersionOf uniprot:P30279
  species Cdk4 in nuclear = 5;  // isVersionOf uniprot:P11802
  species Cyclin_D_Cdk4 in nuclear = 7.5; Cyclin_D_Cdk4 is "Cyclin_D/Cdk4";  // hasPart uniprot:P30279; hasPart uniprot:P11802; hasProperty GO:0032991
  species Cyclin_E in nuclear = 0.001;  // isVersionOf uniprot:P24864
  species E2F in nuclear = 0;  // isVersionOf uniprot:Q01094
  species Cdk2 in nuclear = 15;  // isVersionOf uniprot:P24941
  species Cyclin_E_Cdk2_inactive_phosphorylated in nuclear = 0.001; Cyclin_E_Cdk2_inactive_phosphorylated is "Cyclin_E/Cdk2_inactive_phosphorylated";  // hasPart uniprot:P24864; hasPart uniprot:P24941; hasProperty GO:0032991; hasProperty PATO:0002355
  species Cyclin_A in nuclear = 4e-5;  // isVersionOf uniprot:P20248
  species B_Myb_active in nuclear = 0; B_Myb_active is "B-Myb_active";  // isVersionOf uniprot:P10244; hasProperty PATO:0002354
  species Cyclin_A_Cdk2_inactive in nuclear = 0.0004; Cyclin_A_Cdk2_inactive is "Cyclin_A/Cdk2_inactive";  // hasPart uniprot:P24941; hasPart uniprot:P20248; hasProperty PATO:0002355; hasProperty GO:0032991
  species Cyclin_A_Cdk2_active in nuclear = 0.0001; Cyclin_A_Cdk2_active is "Cyclin_A/Cdk2_active";  // hasPart uniprot:P24941; hasPart uniprot:P20248; hasProperty GO:0032991; hasProperty PATO:0002354
  species APC_Ccdc20_active in nuclear = 0.1; APC_Ccdc20_active is "APC/Ccdc20_active";  // hasPart GO:0005680; hasPart uniprot:Q12834; hasProperty GO:0032991; hasProperty PATO:0002354
  species APC_Ccdh1_active in nuclear = 0.9; APC_Ccdh1_active is "APC/Ccdh1_active";  // hasPart GO:0005680; hasPart uniprot:P12830; hasProperty GO:0032991; hasProperty PATO:0002354
  species Cyclin_E_Cdk2_active_unphosphorylated in nuclear = 0.001; Cyclin_E_Cdk2_active_unphosphorylated is "Cyclin_E/Cdk2_active_unphosphorylated";  // hasPart uniprot:P24864; hasPart uniprot:P24941; hasProperty GO:0032991; hasProperty PATO:0002354
  species p21 in nuclear = 0;  // isVersionOf uniprot:P38936
  species p21_CyclinD_Cdk4 in nuclear = 0; p21_CyclinD_Cdk4 is "p21/CyclinD/Cdk4";  // hasPart uniprot:P11802; hasPart uniprot:P30279; hasPart uniprot:P38936; hasProperty GO:0032991
  species p27 in nuclear = 14;  // isVersionOf uniprot:P46527
  species p27_CyclinD_Cdk4 in nuclear = 0.001; p27_CyclinD_Cdk4 is "p27/CyclinD/Cdk4";  // hasPart uniprot:P30279; hasPart uniprot:P11802; hasPart uniprot:P46527; hasProperty GO:0032991
  species Cdc25A_active in nuclear = 0.0001;  // isVersionOf uniprot:P30304; hasProperty PATO:0002354
  species p27_CyclinE_Cdk2 in nuclear = 1; p27_CyclinE_Cdk2 is "p27/CyclinE/Cdk2";  // hasPart uniprot:P24864; hasPart uniprot:P46527; hasPart uniprot:P24941; hasProperty GO:0032991
  species p21_CyclinE_Cdk2 in nuclear = 0; p21_CyclinE_Cdk2 is "p21/CyclinE/Cdk2";  // hasPart uniprot:P24864; hasPart uniprot:P38936; hasPart uniprot:P24941; hasProperty GO:0032991
  species p27_CyclinA_Cdk2 in nuclear = 0.0001; p27_CyclinA_Cdk2 is "p27/CyclinA/Cdk2";  // hasPart uniprot:P24941; hasPart uniprot:P20248; hasPart uniprot:P46527; hasProperty GO:0032991
  species p21_CyclinA_Cdk2 in nuclear = 0; p21_CyclinA_Cdk2 is "p21/CyclinA/Cdk2";  // hasPart uniprot:P20248; hasPart uniprot:P38936; hasPart uniprot:P24941; hasProperty GO:0032991
  species p53 in nuclear = 0.0265;  // isVersionOf uniprot:P04637
  species p16 in nuclear = 0.001;  // isVersionOf uniprot:P42771
  species Rb in nuclear = 0.05;  // isVersionOf uniprot:Q08999
  species Rb_E2F in nuclear = 1.95; Rb_E2F is "Rb/E2F";  // hasPart uniprot:Q01094; hasPart uniprot:Q08999; hasProperty GO:0032991
  species Rb_PP_E2F in nuclear = 0.001; Rb_PP_E2F is "Rb-PP/E2F";  // hasPart uniprot:Q08999; hasPart uniprot:Q01094; hasProperty PATO:0002220; hasProperty GO:0032991
  species Rb_PPP in nuclear = 0.01; Rb_PPP is "Rb-PPP";  // isVersionOf uniprot:Q08999; hasProperty PATO:0002220
  species ATM_ATR in nuclear = 0; ATM_ATR is "ATM/ATR";  // hasPart uniprot:Q13315; hasPart uniprot:Q13535
  species Mdm2 in nuclear = 0.000235;  // isVersionOf uniprot:Q00987
  species Intermediate in nuclear = 0;
  species $sig in nuclear;
  species $deg in nuclear;
  species NF_Y in nuclear = 0; NF_Y is "NF-Y";  // hasPart uniprot:P25208
  species Cdc25A_inactive in nuclear = 0.001;  // isVersionOf uniprot:P30304; hasProperty PATO:0002355
  species Chk1_active in nuclear = 0.01;  // isVersionOf uniprot:O14757; hasProperty PATO:0002354
  species Chk1_inactive in nuclear = 0.99;  // isVersionOf uniprot:O14757; hasProperty PATO:0002355
  species Cyclin_B in nuclear = 0;  // isVersionOf uniprot:P14635
  species Cdk1 in nuclear = 10;  // isVersionOf uniprot:P06493
  species Cyclin_B_Cdk1_inactive_unphosphorylated_cytoplasm in cytoplasm = 0.0001; Cyclin_B_Cdk1_inactive_unphosphorylated_cytoplasm is "Cyclin_B/Cdk1_inactive_unphosphorylated_cytoplasm";  // hasPart uniprot:P06493; hasPart uniprot:P14635; hasProperty GO:0032991; hasProperty PATO:0002355
  species Cyclin_B_Cdk1_active_phosphorylated_cytoplasm in cytoplasm = 0.0001;  // hasPart uniprot:P14635; hasPart uniprot:P06493; hasProperty GO:0032991; hasProperty PATO:0002354
  species Cdc25C_active in nuclear = 1e-6;  // isVersionOf uniprot:P30307; hasProperty PATO:0002354
  species _14_3_3_sigma in nuclear = 2;  // isVersionOf uniprot:P31947
  species Cdc25C_Ps216_phosphorylated_active in nuclear = 0;  // isVersionOf uniprot:P30307; hasProperty PATO:0002354; hasProperty PATO:0002220
  species Wee1 in nuclear = 0.001;  // isVersionOf uniprot:P30291
  species Wee1_phosphorylated in nuclear = 0;  // isVersionOf uniprot:P30291; hasProperty PATO:0002220
  species Cyclin_B_Cdk1_nuclear in nuclear = 0; Cyclin_B_Cdk1_nuclear is "Cyclin_B/Cdk1_nuclear";  // hasPart uniprot:P06493; hasPart uniprot:P14635; hasProperty GO:0032991
  species p21_CyclinB_Cdk1 in nuclear = 0; p21_CyclinB_Cdk1 is "p21/CyclinB/Cdk1";  // hasPart uniprot:P06493; hasPart uniprot:P38936; hasPart uniprot:P14635; hasProperty GO:0032991
  species B_Myb_inactive in nuclear = 0; B_Myb_inactive is "B-Myb_inactive";  // isVersionOf uniprot:P10244; hasProperty PATO:0002355
  species Cdc25C_inactive in nuclear = 1e-6;  // isVersionOf uniprot:P30307; hasProperty PATO:0002355
  species Cdc25C_Ps216_phosphorylated_inactive in nuclear = 0.03;  // isVersionOf uniprot:P30307; hasProperty PATO:0002220; hasProperty PATO:0002355
  species _14_3_3_sigma_iCdc25C_PS216_phosphorylated in nuclear = 0.03;  // hasPart uniprot:P31947; hasPart uniprot:P30307; hasProperty GO:0032991; hasProperty PATO:0002220
  species APC_Ccdc20_inactive in nuclear = 0.9; APC_Ccdc20_inactive is "APC/Ccdc20_inactive";  // hasPart GO:0005680; hasPart uniprot:Q12834; hasProperty PATO:0002355; hasProperty GO:0032991
  species APC_Ccdh1_inactive in nuclear = 0.1; APC_Ccdh1_inactive is "APC/Ccdh1_inactive";  // hasPart GO:0005680; hasPart uniprot:P12830; hasProperty GO:0032991; hasProperty PATO:0002355
  species Cyclin_B_Cdk1_nuclear_inactive in nuclear = 0; Cyclin_B_Cdk1_nuclear_inactive is "Cyclin_B/Cdk1_nuclear_inactive";  // hasPart uniprot:P06493; hasPart uniprot:P14635; hasProperty GO:0032991; hasProperty PATO:0002355
  species $Cyclin_E_total in nuclear;  // isVersionOf uniprot:P24864
  species $Cyclin_A_total in nuclear;  // isVersionOf uniprot:P20248
  species $Cyclin_B_total in nuclear;  // isVersionOf uniprot:P14635
  species $APC_C_Cdc20_active_x20 in nuclear; APC_C_Cdc20_active_x20 is "APC/C_Cdc20_active_x20";  // hasPart uniprot:Q12834; hasPart GO:0005680; hasProperty PATO:0002354; hasProperty GO:0032991

  // Parameters:
  k1 = 0.0005;
  k2 = 0.0005;
  k3 = 0.005;
  k4 = 0.0025;
  k5 = 0.1;
  k6 = 0.0025;
  k7 = 0.0025;
  k8 = 2.5e-5;
  k9 = 0.0003;
  k10 = 0.0005;
  k11 = 0.0005;
  k12 = 0.0002;
  k13 = 0.0005;
  k14 = 0.0075;
  k15 = 0.005;
  k16 = 0.005;
  k17 = 0.05;
  k18 = 0.0005;
  k19 = 0.005;
  k20 = 0.0005;
  k21 = 5e-5;
  k22 = 0.006;
  k23 = 0.00175;
  k24 = 0.0225;
  k25 = 0.000175;
  k26 = 0.0225;
  k27 = 0.000175;
  k28 = 0.0009;
  k29 = 5e-5;
  k30 = 0.0025;
  k31 = 0.000175;
  k32 = 0.0025;
  k33 = 0.000175;
  k34 = 5e-8;
  k35 = 0.05;
  k36 = 0.0015;
  k37 = 5e-5;
  k38 = 0.001;
  k39 = 0.005;
  k40 = 0.002;
  k41 = 5e-5;
  k42 = 0.0001;
  k43 = 0.0005;
  k44 = 0.0005;
  k45 = 5e-5;
  k46 = 0.0025;
  k47 = 0.0025;
  k48 = 0.0025;
  k49 = 0.04;
  k50 = 0.0025;
  k51 = 5e-8;
  k52 = 5e-7;
  k53 = 5e-5;
  k54 = 0.01;
  k55 = 5e-8;
  k56 = 5e-5;
  k57 = 0.005;
  k58 = 5e-5;
  k59 = 0.0005;
  k60 = 0.0001;
  k61 = 0.07;
  k62 = 0.001;
  k63 = 0.00094;
  k64 = 0.02;
  k65 = 9.5;
  k66 = 10;
  k67 = 0.005;
  k68 = 0.05;
  k69 = 0.0008;
  k70 = 6;
  k71 = 0.004;
  k72 = 1e-8;
  k73 = 3;
  k74 = 0.772;
  k75 = 1e-5;
  k76 = 0.0556;
  k77 = 0.02;
  k78 = 0.2;
  k79 = 0.01;
  k80 = 0.04;
  k81 = 0.001;
  k82 = 0.05;
  k83 = 0.005;
  k84 = 0.001;
  k85 = 0.005;
  k86 = 0.0005;
  k87 = 1;
  k88 = 1;
  k89 = 0.001;
  k90 = 0.0005;
  k91 = 0.02;
  k92 = 0.005;
  k93 = 0.00125;
  k94 = 0.00025;
  k95 = 0.05;
  k96 = 0.0001;
  k97 = 0.005;
  k98 = 0.005;
  k99 = 0.0002;
  k100 = 0.1;
  k101 = 1;
  k102 = 1;
  k103 = 0.0225;
  k104 = 0.000175;
  k105 = 0.05;
  k106 = 0.05;
  k107 = 0.002;
  k108 = 1e-5;
  k109 = 0.01;
  k110 = 1;
  k111 = 0.001;
  k112 = 0.01;
  k113 = 0.001;
  k114 = 0.0001;
  k115 = 0.01;
  k116 = 1;
  k117 = 1;
  k118 = 0.01;
  k119 = 1;
  k120 = 100;
  k121 = 1;
  k122 = 0.005;
  k123 = 0.01;
  k124 = 0.01;
  k125 = 0.005;
  k126 = 0.005;
  k127 = 0.005;
  k128 = 0.001;
  k129 = 0.3;
  k130 = 3e-6;
  k131 = 0.01;
  k132 = 5e-5;
  k133 = 0.0005;
  k134 = 0.01;
  k135 = 0.005;
  k136 = 0.005;
  k137 = 0.03;
  DNA_damage_signal = 0;

  // Assignment rules:
  sig := DNA_damage_signal*exp(-k72*time);
  deg := k76 - k74*(sig - DNA_damage_signal*exp(-k77*DNA_damage_signal*time));
  Cyclin_E_total := Cyclin_E + Cyclin_E_Cdk2_inactive_phosphorylated + Cyclin_E_Cdk2_active_unphosphorylated + p27_CyclinE_Cdk2 + p21_CyclinE_Cdk2;
  Cyclin_A_total := Cyclin_A + Cyclin_A_Cdk2_inactive + Cyclin_A_Cdk2_active + p27_CyclinA_Cdk2 + p21_CyclinA_Cdk2*0 + Cdc25A_inactive*0 + Cdc25A_active*0;
  APC_C_Cdc20_active_x20 := 20*APC_Ccdc20_active;
  Cyclin_B_total := Cyclin_B + Cyclin_B_Cdk1_inactive_unphosphorylated_cytoplasm + Cyclin_B_Cdk1_active_phosphorylated_cytoplasm;

  // Reactions:
  R1_Cyclin_D_synthesis: => Cyclin_D; nuclear*Constant_flux__irreversible(k1);  // isVersionOf GO:0006412
  R2_Cyclin_degradation: Cyclin_D => ; nuclear*k2*Cyclin_D;
  R3_4_Cyclin_D_Cdk4_complex_formation: Cyclin_D + Cdk4 -> Cyclin_D_Cdk4; nuclear*(k3*Cyclin_D*Cdk4 - k4*Cyclin_D_Cdk4);  // isVersionOf GO:0005488
  R5_Cyclin_E_synthesis_mediated_by_E2F: => Cyclin_E; nuclear*Function_for_synthesis_by_modifier(k5, E2F);  // modifiers: E2F; isVersionOf GO:0006412
  R6_Cyclin_E_degradation: Cyclin_E => ; nuclear*k6*Cyclin_E;
  R7_Cyclin_E_Cdk2_complex_formation: Cyclin_E + Cdk2 => Cyclin_E_Cdk2_inactive_phosphorylated; nuclear*k7*Cyclin_E*Cdk2;  // isVersionOf GO:0005488
  R8_Cyclin_E_Cdk2_complex_dissociation: Cyclin_E_Cdk2_inactive_phosphorylated => Cyclin_E + Cdk2; nuclear*k8*Cyclin_E_Cdk2_inactive_phosphorylated;
  R9_Cyclin_A_synthesis: => Cyclin_A; nuclear*Function_for_synthesis_by_modifier(k9, B_Myb_active);  // modifiers: B_Myb_active; isVersionOf GO:0006412
  R10_Cyclin_A_degradation: Cyclin_A => ; nuclear*k10*Cyclin_A;
  R11_Cyclin_A_Cdk2_complex_formation: Cyclin_A + Cdk2 => Cyclin_A_Cdk2_inactive; nuclear*k11*Cyclin_A*Cdk2;  // isVersionOf GO:0005488
  R12_Cyclin_A_Cdk2_complex_dissociation: Cyclin_A_Cdk2_inactive => Cyclin_A + Cdk2; nuclear*k12*Cyclin_A_Cdk2_inactive;
  R13_Cyclin_D_degradation: Cyclin_D_Cdk4 => Cdk4; nuclear*k13*Cyclin_D_Cdk4;
  R14_Cyclin_A_degradation: Cyclin_A_Cdk2_active => Cdk2; nuclear*Function_for_R14(k14, Cyclin_A_Cdk2_active, APC_Ccdc20_active, APC_Ccdh1_active);  // modifiers: APC_Ccdc20_active, APC_Ccdh1_active
  R15_Cyclin_A_degradation: Cyclin_A_Cdk2_inactive => Cdk2; nuclear*Function_for_R15(k15, Cyclin_A_Cdk2_inactive, APC_Ccdc20_active, APC_Ccdh1_active);  // modifiers: APC_Ccdc20_active, APC_Ccdh1_active
  R16_Cyclin_E_degradation: Cyclin_E_Cdk2_inactive_phosphorylated => Cdk2; nuclear*k16*Cyclin_E_Cdk2_inactive_phosphorylated;
  R17_Cyclin_E_degradation: Cyclin_E_Cdk2_active_unphosphorylated => Cdk2; nuclear*Function_for_R17(k17, Cyclin_E_Cdk2_active_unphosphorylated);
  R18_binding_of_p21_to_Cyclin_D_Cdk4_complex: p21 + Cyclin_D_Cdk4 => p21_CyclinD_Cdk4; nuclear*k18*p21*Cyclin_D_Cdk4; R18_binding_of_p21_to_Cyclin_D_Cdk4_complex is "R18 binding of p21 to Cyclin D/Cdk4 complex";  // isVersionOf GO:0005488
  R19_unbinding_of_p21_to_Cyclin_D_Cdk4_complex: p21_CyclinD_Cdk4 => p21 + Cyclin_D_Cdk4; nuclear*k19*p21_CyclinD_Cdk4; R19_unbinding_of_p21_to_Cyclin_D_Cdk4_complex is "R19 unbinding of p21 to Cyclin D/Cdk4 complex";
  R20_binding_of_p27_to_Cyclin_D_Cdk4_complex: Cyclin_D_Cdk4 + p27 => p27_CyclinD_Cdk4; nuclear*k20*Cyclin_D_Cdk4*p27; R20_binding_of_p27_to_Cyclin_D_Cdk4_complex is "R20 binding of p27 to Cyclin D/Cdk4 complex";  // isVersionOf GO:0005488
  R21_unbinding_of_p27_to_Cyclin_D_Cdk4_complex: p27_CyclinD_Cdk4 => p27 + Cyclin_D_Cdk4; nuclear*k21*p27_CyclinD_Cdk4; R21_unbinding_of_p27_to_Cyclin_D_Cdk4_complex is "R21 unbinding of p27 to Cyclin D/Cdk4 complex";
  R22_Dephosphorylation_of_CycE_Cdk2_complex_by_Cdc25: Cyclin_E_Cdk2_inactive_phosphorylated => Cyclin_E_Cdk2_active_unphosphorylated; nuclear*Function_for_synthesis_with_modifier(k22, Cdc25A_active, Cyclin_E_Cdk2_inactive_phosphorylated);  // modifiers: Cdc25A_active; isVersionOf GO:0016311
  R23_Phosphorylation_of_Cyclin_E_Cdk2_complex: Cyclin_E_Cdk2_active_unphosphorylated => Cyclin_E_Cdk2_inactive_phosphorylated; nuclear*k23*Cyclin_E_Cdk2_active_unphosphorylated;  // isVersionOf GO:0016310
  R24_binding_of_p27_to_Cyclin_E_Cdk2_complex: Cyclin_E_Cdk2_active_unphosphorylated + p27 => p27_CyclinE_Cdk2; nuclear*k24*Cyclin_E_Cdk2_active_unphosphorylated*p27; R24_binding_of_p27_to_Cyclin_E_Cdk2_complex is "R24 binding of p27 to Cyclin E/Cdk2 complex";  // isVersionOf GO:0005488
  R25_unbinding_of_p27_to_Cyclin_E_Cdk2_complex: p27_CyclinE_Cdk2 => Cyclin_E_Cdk2_active_unphosphorylated + p27; nuclear*k25*p27_CyclinE_Cdk2; R25_unbinding_of_p27_to_Cyclin_E_Cdk2_complex is "R25 unbinding of p27 to Cyclin E/Cdk2 complex";
  R26_binding_of_p21_to_Cyclin_E_Cdk2_complex: Cyclin_E_Cdk2_active_unphosphorylated + p21 => p21_CyclinE_Cdk2; nuclear*k26*Cyclin_E_Cdk2_active_unphosphorylated*p21; R26_binding_of_p21_to_Cyclin_E_Cdk2_complex is "R26 binding of p21 to Cyclin E/Cdk2 complex";  // isVersionOf GO:0005488
  R27_unbinding_of_p21_to_Cyclin_E_Cdk2_complex: p21_CyclinE_Cdk2 => Cyclin_E_Cdk2_active_unphosphorylated + p21; nuclear*k27*p21_CyclinE_Cdk2; R27_unbinding_of_p21_to_Cyclin_E_Cdk2_complex is "R27 unbinding of p21 to Cyclin E/Cdk2 complex";
  R28_Dephosphorylation_of_Cyclin_A_Cdk2_complex: Cyclin_A_Cdk2_inactive => Cyclin_A_Cdk2_active; nuclear*Function_for_synthesis_with_modifier(k28, Cdc25A_active, Cyclin_A_Cdk2_inactive);  // modifiers: Cdc25A_active; isVersionOf GO:0016311
  R29_Phosphorylation_of_Cyclin_A_Cdk2_complex: Cyclin_A_Cdk2_active => Cyclin_A_Cdk2_inactive; nuclear*k29*Cyclin_A_Cdk2_active;  // isVersionOf GO:0016310
  R30_binding_of_p27_to_Cyclin_A_Cdk2_complex: Cyclin_A_Cdk2_active + p27 => p27_CyclinA_Cdk2; nuclear*k30*Cyclin_A_Cdk2_active*p27; R30_binding_of_p27_to_Cyclin_A_Cdk2_complex is "R30 binding of p27 to Cyclin A/Cdk2 complex";  // isVersionOf GO:0005488
  R31_unbinding_of_p27_to_Cyclin_A_Cdk2_complex: p27_CyclinA_Cdk2 => Cyclin_A_Cdk2_active + p27; nuclear*k31*p27_CyclinA_Cdk2; R31_unbinding_of_p27_to_Cyclin_A_Cdk2_complex is "R31 unbinding of p27 to Cyclin A/Cdk2 complex";
  R32_binding_of_p21_to_Cyclin_A_Cdk2_complex: Cyclin_A_Cdk2_active + p21 => p21_CyclinA_Cdk2; nuclear*k32*Cyclin_A_Cdk2_active*p21; R32_binding_of_p21_to_Cyclin_A_Cdk2_complex is "R32 binding of p21 to Cyclin A/Cdk2 complex";  // isVersionOf GO:0005488
  R33_unbinding_of_p21_to_Cyclin_A_Cdk2_complex: p21_CyclinA_Cdk2 => Cyclin_A_Cdk2_active + p21; nuclear*k33*p21_CyclinA_Cdk2; R33_unbinding_of_p21_to_Cyclin_A_Cdk2_complex is "R33 unbinding of p21 to Cyclin A/Cdk2 complex";
  R34_synthesis_of_p27: => p27; nuclear*Constant_flux__irreversible(k34);  // isVersionOf GO:0006412
  R35_p27_degradation_mediated_by_Cyclin_E_Cdk2_complex: p27 => ; nuclear*Function_for_degradation_mass_action_modifier(k35, p27, Cyclin_E_Cdk2_active_unphosphorylated);  // modifiers: Cyclin_E_Cdk2_active_unphosphorylated
  R36_p27_degradation_mediated_by_Cyclin_A_Cdk2_complex: p27 => ; nuclear*Function_for_degradation_mass_action_modifier(k36, p27, Cyclin_A_Cdk2_active);  // modifiers: Cyclin_A_Cdk2_active
  R37_p21_synthesis: => p21; nuclear*Constant_flux__irreversible(k37);  // isVersionOf GO:0006412
  R38_p21_synthesis_mediated_by_p53: => p21; nuclear*Function_for_synthesis_by_modifier(k38, p53);  // modifiers: p53; isVersionOf GO:0006412
  R39_p21_degradation: p21 => ; nuclear*k39*p21;
  R40_p16_synthesis: => p16; nuclear*Constant_flux__irreversible(k40);  // isVersionOf GO:0006412
  R41_p16_synthesis_mediated_by_Rb: => p16; nuclear*Function_for_R41(k41, k42, Rb);  // modifiers: Rb; isVersionOf GO:0006412
  R43_p16_degradation: p16 => ; nuclear*k43*p16;
  R44_Inhibition_by_p16_of_Cyclin_D_Cdk4_complex: Cyclin_D_Cdk4 + p16 => ; nuclear*k44*Cyclin_D_Cdk4*p16;
  R45_E2F_Rb_binding: E2F + Rb => Rb_E2F; nuclear*k45*E2F*Rb;  // isVersionOf GO:0005488
  R46_Phosphorylation_of_Rb_E2F_by_Cyclin_D_Cdk4_complex: Rb_E2F => Rb_PP_E2F; nuclear*Function_for_synthesis_with_modifier(k46, Cyclin_D_Cdk4, Rb_E2F);  // modifiers: Cyclin_D_Cdk4; isVersionOf GO:0016310
  R47_Phosphorylation_of_Rb_E2F_by_Cyclin_D_Cdk4_complex: Rb_E2F => Rb_PP_E2F; nuclear*Function_for_synthesis_with_modifier(k47, p27_CyclinD_Cdk4, Rb_E2F);  // modifiers: p27_CyclinD_Cdk4; isVersionOf GO:0016310
  R48_Phosphorylation_of_Rb_E2F_by_Cyclin_D_Cdk4_complex: Rb_E2F => Rb_PP_E2F; nuclear*Function_for_synthesis_with_modifier(k48, p21_CyclinD_Cdk4, Rb_E2F);  // modifiers: p21_CyclinD_Cdk4; isVersionOf GO:0016310
  R49_Dissociation_of_Rb_and_E2F: Rb_PP_E2F => E2F + Rb_PPP; nuclear*Function_for_synthesis_with_modifier(k49, Cyclin_E_Cdk2_active_unphosphorylated, Rb_PP_E2F);  // modifiers: Cyclin_E_Cdk2_active_unphosphorylated
  R50_Dissociation_of_Rb_and_E2F: Rb_PP_E2F => E2F + Rb_PPP; nuclear*Function_for_degradation_mass_action_modifier(k50, Rb_PP_E2F, Cyclin_A_Cdk2_active);  // modifiers: Cyclin_A_Cdk2_active
  R51_E2F_synthesis: => E2F; nuclear*Function_for_R51(k51, E2F);  // isVersionOf GO:0006412
  R52_E2F_synthesis: => E2F; nuclear*Constant_flux__irreversible(k52);  // isVersionOf GO:0006412
  R53_E2F_degradation: E2F => ; nuclear*k53*E2F;
  R54_E2F_degradation_mediated_by_Cyclin_A_Cdk2: E2F => ; nuclear*Function_for_degradation_mass_action_modifier(k54, E2F, Cyclin_A_Cdk2_active);  // modifiers: Cyclin_A_Cdk2_active
  R55_Dephosphorylation_of_Rb: Rb_PPP => Rb; nuclear*k55*Rb_PPP;  // isVersionOf GO:0016311
  R56_Rb_synthesis: => Rb; nuclear*Constant_flux__irreversible(k56);  // isVersionOf GO:0006412
  R57_Rb_degradation: Rb => ; nuclear*k57*Rb;
  R58_Rb_synthesis_mediated_by_p16: => Rb; nuclear*Function_for_R41(k58, k59, p16);  // modifiers: p16; isVersionOf GO:0006412
  R60_synthesis_of_p53: => p53; nuclear*Constant_flux__irreversible(k60);  // isVersionOf GO:0006412
  R61_synthesis_of_p53_mediated_by_ATM_ATR: => p53; nuclear*Function_for_synthesis_by_modifier(k61, ATM_ATR);  // modifiers: ATM_ATR; isVersionOf GO:0006412
  R62_degradation_of_p53_mediated_by_mdm2: p53 => ; nuclear*k62*p53;  // modifiers: deg, Mdm2
  R63_mdm2_synthesis: => Mdm2; nuclear*Constant_flux__irreversible(k63);  // isVersionOf GO:0006412
  R64_mdm2_degradation: Mdm2 => ; nuclear*k64*Mdm2;
  R65_mdm2_synthesis: => Mdm2; nuclear*Function_for_R65(k66, Intermediate, k65);  // modifiers: Intermediate; isVersionOf GO:0006412
  R67_Intermediate_Degradation: Intermediate => ; nuclear*k67*Intermediate;
  R70_Synthesis_mediated_by_p53_mdm2: => Intermediate; nuclear*Function_for_R70(k70, p53, sig, k71, Mdm2);  // modifiers: p53, sig, Mdm2; isVersionOf GO:0006412
  R75_Cyclin_A_synthesis_mediated_by_NF_Y: => Cyclin_A; nuclear*Function_for_synthesis_by_modifier(k75, NF_Y); R75_Cyclin_A_synthesis_mediated_by_NF_Y is "R75 Cyclin A synthesis mediated by NF-Y";  // modifiers: NF_Y; isVersionOf GO:0006412
  R78_synthesis_of_ATM_ATR: => ATM_ATR; nuclear*Function_for_synthesis_by_modifier(k78, sig); R78_synthesis_of_ATM_ATR is "R78 synthesis of ATM/ATR";  // modifiers: sig; isVersionOf GO:0006412
  R79_ATM_ATR_degradation: ATM_ATR => ; nuclear*k79*ATM_ATR; R79_ATM_ATR_degradation is "R79 ATM/ATR degradation";
  R80_synthesis_of_Cdc25_mediated_by_E2F: => Cdc25A_inactive; nuclear*Function_for_synthesis_by_modifier(k80, E2F);  // modifiers: E2F; isVersionOf GO:0006412
  R81_Cdc25_degradation_mediated_by_Chk1: Cdc25A_inactive => ; nuclear*Function_for_degradation_mass_action_modifier(k81, Cdc25A_inactive, Chk1_active);  // modifiers: Chk1_active
  R82_Cdc25_activation_mediated_by_Cyclin_E_A_Cdk2_complexes: Cdc25A_inactive => Cdc25A_active; nuclear*Function_for_R14(k82, Cdc25A_inactive, Cyclin_E_Cdk2_active_unphosphorylated, Cyclin_A_Cdk2_active); R82_Cdc25_activation_mediated_by_Cyclin_E_A_Cdk2_complexes is "R82 Cdc25 activation mediated by Cyclin E/A Cdk2 complexes";  // modifiers: Cyclin_E_Cdk2_active_unphosphorylated, Cyclin_A_Cdk2_active
  R83_Cdc25_degradation: Cdc25A_inactive => ; nuclear*k83*Cdc25A_inactive;
  R84_Cdc25_degradation: Cdc25A_active => ; nuclear*Function_for_degradation_mass_action_modifier(k84, Cdc25A_active, Chk1_active);  // modifiers: Chk1_active
  R85_Cdc25_inactivation: Cdc25A_active => Cdc25A_inactive; nuclear*k85*Cdc25A_active;
  R86_Cdc25_degradation: Cdc25A_active => ; nuclear*k86*Cdc25A_active;
  R87_inactivation_of_Chk1: Chk1_active => Chk1_inactive; nuclear*k87*Chk1_active;
  R88_activation_of_Chk1: Chk1_inactive => Chk1_active; nuclear*Function_for_synthesis_with_modifier(k88, ATM_ATR, Chk1_inactive);  // modifiers: ATM_ATR
  R89_synthesis_of_NF_Y_mediated_by_Cyclin_A_Cdk2_complex: => NF_Y; nuclear*Function_for_synthesis_by_modifier(k89, Cyclin_A_Cdk2_active); R89_synthesis_of_NF_Y_mediated_by_Cyclin_A_Cdk2_complex is "R89 synthesis of NF-Y mediated by Cyclin A Cdk2 complex";  // modifiers: Cyclin_A_Cdk2_active; isVersionOf GO:0006412
  R90_NF_Y_degradation: NF_Y => ; nuclear*k90*NF_Y; R90_NF_Y_degradation is "R90 NF-Y degradation";
  R91_Cyclin_B_synthesis_mediated_by_NF_Y: => Cyclin_B; nuclear*Function_for_synthesis_by_modifier(k91, NF_Y); R91_Cyclin_B_synthesis_mediated_by_NF_Y is "R91 Cyclin B synthesis mediated by NF-Y";  // modifiers: NF_Y; isVersionOf GO:0006412
  R92_Cyclin_B_degradation: Cyclin_B => ; nuclear*k92*Cyclin_B;
  R93_Cyclin_B_Cdk1_binding: Cyclin_B + Cdk1 => Cyclin_B_Cdk1_inactive_unphosphorylated_cytoplasm; k93*Cyclin_B*Cdk1;  // isVersionOf GO:0005488
  R94_Cyclin_B_Cdk1_dissociation: Cyclin_B_Cdk1_inactive_unphosphorylated_cytoplasm => Cyclin_B + Cdk1; k94*Cyclin_B_Cdk1_inactive_unphosphorylated_cytoplasm;
  R95_Cyclin_B_Cdk1_complex_activation_by_dephosphorylation: Cyclin_B_Cdk1_inactive_unphosphorylated_cytoplasm => Cyclin_B_Cdk1_active_phosphorylated_cytoplasm; Function_for_R14(k95, Cyclin_B_Cdk1_inactive_unphosphorylated_cytoplasm, Cdc25C_active, Cdc25C_Ps216_phosphorylated_active);  // modifiers: Cdc25C_active, Cdc25C_Ps216_phosphorylated_active; isVersionOf GO:0016311
  R96_Cyclin_B_Cdk1_complex_phosphorylation__inactivation: Cyclin_B_Cdk1_active_phosphorylated_cytoplasm => Cyclin_B_Cdk1_inactive_unphosphorylated_cytoplasm; cytoplasm*k96*Cyclin_B_Cdk1_active_phosphorylated_cytoplasm;  // isVersionOf GO:0016310
  R97_Cyclin_B_degradation_by_APC_Cdc20_Cdh1: Cyclin_B_Cdk1_inactive_unphosphorylated_cytoplasm => Cdk1; Function_for_R14(k97, Cyclin_B_Cdk1_inactive_unphosphorylated_cytoplasm, APC_Ccdc20_active, APC_Ccdh1_active); R97_Cyclin_B_degradation_by_APC_Cdc20_Cdh1 is "R97 Cyclin B degradation by APC Cdc20/Cdh1";  // modifiers: APC_Ccdc20_active, APC_Ccdh1_active
  R98_Cyclin_B_degradation: Cyclin_B_Cdk1_active_phosphorylated_cytoplasm => Cdk1; Function_for_R14(k98, Cyclin_B_Cdk1_active_phosphorylated_cytoplasm, APC_Ccdc20_active, APC_Ccdh1_active);  // modifiers: APC_Ccdc20_active, APC_Ccdh1_active
  R99_synthesis_of_Wee1: => Wee1; nuclear*Constant_flux__irreversible(k99);  // isVersionOf GO:0006412
  R100_phosphorylation_of_wee1: Wee1 => Wee1_phosphorylated; nuclear*Function_for_synthesis_with_modifier(k100, Cyclin_B_Cdk1_nuclear, Wee1);  // modifiers: Cyclin_B_Cdk1_nuclear; isVersionOf GO:0016310
  R101_dephosphorylation_of_wee1: Wee1_phosphorylated => Wee1; nuclear*k101*Wee1_phosphorylated;  // isVersionOf GO:0016311
  R102_degradation_of_wee1: Wee1_phosphorylated => ; nuclear*k102*Wee1_phosphorylated;
  R103_p21_binding_to_Cyclin_B_Cdk1_complex: Cyclin_B_Cdk1_nuclear + p21 => p21_CyclinB_Cdk1; nuclear*k103*Cyclin_B_Cdk1_nuclear*p21;  // isVersionOf GO:0005488
  R104_p21_dissociation_to_Cyclin_B_Cdk1_complex: p21_CyclinB_Cdk1 => p21 + Cyclin_B_Cdk1_nuclear; nuclear*k104*p21_CyclinB_Cdk1;
  R105_synthesis_of_iB_Myb_mediated_by_E2F: => B_Myb_inactive; nuclear*Function_for_synthesis_by_modifier(k105, E2F); R105_synthesis_of_iB_Myb_mediated_by_E2F is "R105 synthesis of iB-Myb mediated by E2F";  // modifiers: E2F; isVersionOf ncit:C61408
  R106_activation_of_B_Myb_by_Cyclin_A_Cdk2_complex: B_Myb_inactive => B_Myb_active; nuclear*Function_for_degradation_mass_action_modifier(k106, B_Myb_inactive, Cyclin_A_Cdk2_active); R106_activation_of_B_Myb_by_Cyclin_A_Cdk2_complex is "R106 activation of B-Myb by Cyclin A Cdk2 complex";  // modifiers: Cyclin_A_Cdk2_active
  R107_degradation_of_B_Myb: B_Myb_active => ; nuclear*k107*B_Myb_active; R107_degradation_of_B_Myb is "R107 degradation of B-Myb";
  R108_synthesis_of_Cdc25: => Cdc25C_inactive; nuclear*Constant_flux__irreversible(k108);  // isVersionOf GO:0006412
  R109_inactivation_of_Cdc25: Cdc25C_active => Cdc25C_inactive; nuclear*k109*Cdc25C_active;
  R110_activation_of_Cdc25_mediated_by_cyclin_B_Cdk1_complex: Cdc25C_inactive => Cdc25C_active; Function_for_R14(k110, Cdc25C_inactive, Cyclin_B_Cdk1_active_phosphorylated_cytoplasm, Cyclin_B_Cdk1_nuclear);  // modifiers: Cyclin_B_Cdk1_active_phosphorylated_cytoplasm, Cyclin_B_Cdk1_nuclear
  R111_phosphorylation_of_Cdc25_mediated_by_Chk1: Cdc25C_inactive => Cdc25C_Ps216_phosphorylated_inactive; nuclear*Function_for_synthesis_with_modifier(k111, Chk1_active, Cdc25C_inactive);  // modifiers: Chk1_active; isVersionOf GO:0016310
  R112_dephosphorylation_of_Cdc25: Cdc25C_Ps216_phosphorylated_active => Cdc25C_active; nuclear*k112*Cdc25C_Ps216_phosphorylated_active;  // isVersionOf GO:0016311
  R113_phosphorylation_of_Cdc25_mediated_by_Chk1: Cdc25C_active => Cdc25C_Ps216_phosphorylated_active; nuclear*Function_for_synthesis_with_modifier(k113, Chk1_active, Cdc25C_active);  // modifiers: Chk1_active; isVersionOf GO:0016310
  R114_degradation_of_Cdc25: Cdc25C_active => ; nuclear*k114*Cdc25C_active;
  R115_inactivation_of_Cdc25: Cdc25C_Ps216_phosphorylated_active => Cdc25C_Ps216_phosphorylated_inactive; nuclear*k115*Cdc25C_Ps216_phosphorylated_active;
  R116_activation_of_Cdc25_mediated_by_Cyclin_B_Cdk1: Cdc25C_Ps216_phosphorylated_inactive => Cdc25C_Ps216_phosphorylated_active; Function_for_R14(k116, Cdc25C_Ps216_phosphorylated_inactive, Cyclin_B_Cdk1_active_phosphorylated_cytoplasm, Cyclin_B_Cdk1_nuclear);  // modifiers: Cyclin_B_Cdk1_active_phosphorylated_cytoplasm, Cyclin_B_Cdk1_nuclear
  R117_synthesis_of_14_3_3_sigma: => _14_3_3_sigma; nuclear*Constant_flux__irreversible(k117);  // isVersionOf GO:0006412
  R118_synthesis_of_14_3_3_sigma_mediated_by_p53: => _14_3_3_sigma; nuclear*Function_for_synthesis_by_modifier(k118, p53);  // modifiers: p53; isVersionOf GO:0006412
  R119_degradation_of_14_3_3_sigma: _14_3_3_sigma => ; nuclear*k119*_14_3_3_sigma;
  R120_Binding_of_Cdc25_to_14_3_3: Cdc25C_Ps216_phosphorylated_inactive + _14_3_3_sigma => _14_3_3_sigma_iCdc25C_PS216_phosphorylated; nuclear*k120*Cdc25C_Ps216_phosphorylated_inactive*_14_3_3_sigma; R120_Binding_of_Cdc25_to_14_3_3 is "R120 Binding of Cdc25 to 14-3-3";  // isVersionOf GO:0005488
  R121_Degradation_of_Cdc25_14_3_3_sigma_complex: _14_3_3_sigma_iCdc25C_PS216_phosphorylated => ; nuclear*k121*_14_3_3_sigma_iCdc25C_PS216_phosphorylated;
  R122_Inactivation_of_APC_C_Cdc20: APC_Ccdc20_active => APC_Ccdc20_inactive; nuclear*Function_for_synthesis_with_modifier(k122, APC_Ccdh1_active, APC_Ccdc20_active); R122_Inactivation_of_APC_C_Cdc20 is "R122 Inactivation of APC/C_Cdc20";  // modifiers: APC_Ccdh1_active
  R123_Activation_of_APC_C_Cdc20: APC_Ccdc20_inactive => APC_Ccdc20_active; nuclear*Function_for_synthesis_with_modifier(k123, Cyclin_B_Cdk1_nuclear, APC_Ccdc20_inactive); R123_Activation_of_APC_C_Cdc20 is "R123 Activation of APC/C_Cdc20";  // modifiers: Cyclin_B_Cdk1_nuclear
  R124_Inactivation_of_APC_C_Cdh1: APC_Ccdh1_active => APC_Ccdh1_inactive; nuclear*Function_for_R14(k124, APC_Ccdh1_active, Cyclin_B_Cdk1_nuclear, Cyclin_A_Cdk2_active); R124_Inactivation_of_APC_C_Cdh1 is "R124 Inactivation of APC/C_Cdh1";  // modifiers: Cyclin_B_Cdk1_nuclear, Cyclin_A_Cdk2_active
  R125_Activation_of_APC_C_Cdh1: APC_Ccdh1_inactive => APC_Ccdh1_active; nuclear*k125*APC_Ccdh1_inactive; R125_Activation_of_APC_C_Cdh1 is "R125 Activation of APC/C_Cdh1";
  R126_Degradation_of_Cyclin_A_mediated_by_APC_C_Cdc20: Cyclin_A => ; nuclear*Function_for_degradation_mass_action_modifier(k126, Cyclin_A, APC_Ccdc20_active);  // modifiers: APC_Ccdc20_active
  R127_Degradation_of_Cyclin_A__mediated_by_APC_C_Cdh1: Cyclin_A => ; nuclear*Function_for_degradation_mass_action_modifier(k127, Cyclin_A, APC_Ccdh1_active); R127_Degradation_of_Cyclin_A__mediated_by_APC_C_Cdh1 is "R127 Degradation of Cyclin A mediated by APC_C_Cdh1";  // modifiers: APC_Ccdh1_active
  R128_Degradation_of_Cyclin_B_mediated_by_APC_C_Cdc20: Cyclin_B => ; nuclear*Function_for_degradation_mass_action_modifier(k128, Cyclin_B, APC_Ccdc20_active);  // modifiers: APC_Ccdc20_active
  R129_Degradation_of_Cyclin_B__mediated_by_APC_C_Cdh1: Cyclin_B => ; nuclear*Function_for_degradation_mass_action_modifier(k129, Cyclin_B, APC_Ccdh1_active); R129_Degradation_of_Cyclin_B__mediated_by_APC_C_Cdh1 is "R129 Degradation of Cyclin B mediated by APC_C_Cdh1";  // modifiers: APC_Ccdh1_active
  R130_Synthesis_of_Cyclin_A_mediated_by_E2F: => Cyclin_A; nuclear*Function_for_synthesis_by_modifier(k130, E2F);  // modifiers: E2F; isVersionOf GO:0006412
  R131_translocation_of_Cyclin_B_Cdk1_complex_for_cytoplasm_to_nuclear: Cyclin_B_Cdk1_active_phosphorylated_cytoplasm => Cyclin_B_Cdk1_nuclear; Function_for_R17(k131, Cyclin_B_Cdk1_active_phosphorylated_cytoplasm);  // isVersionOf ncit:C89777
  R132_translocation_of_Cyclin_B_Cdk1_complex_for_cytoplasm_to_nuclear: Cyclin_B_Cdk1_nuclear => Cyclin_B_Cdk1_active_phosphorylated_cytoplasm; k132*Cyclin_B_Cdk1_nuclear;  // isVersionOf ncit:C89777
  R133_inactivation_of_Cyclin_B_Cdk1: Cyclin_B_Cdk1_nuclear => Cyclin_B_Cdk1_nuclear_inactive; nuclear*Function_for_synthesis_with_modifier(k133, Wee1, Cyclin_B_Cdk1_nuclear);  // modifiers: Wee1
  R134_Activation_of_cyclin_B_Cdk1: Cyclin_B_Cdk1_nuclear_inactive => Cyclin_B_Cdk1_nuclear; nuclear*Function_for_R14(k134, Cyclin_B_Cdk1_nuclear_inactive, Cdc25C_active, Cdc25C_Ps216_phosphorylated_active);  // modifiers: Cdc25C_active, Cdc25C_Ps216_phosphorylated_active
  R135_degradation_of_cyclin_B_cdk1: Cyclin_B_Cdk1_nuclear => ; nuclear*Function_for_degradation_mass_action_modifier(k135, Cyclin_B_Cdk1_nuclear, APC_Ccdc20_active);  // modifiers: APC_Ccdc20_active
  R136_degradation_of_cyclin_B_cdk1: Cyclin_B_Cdk1_nuclear_inactive => ; nuclear*Function_for_R14(k136, Cyclin_B_Cdk1_nuclear_inactive, APC_Ccdc20_active, APC_Ccdh1_active);  // modifiers: APC_Ccdc20_active, APC_Ccdh1_active
  R137_degradation_of_cyclin_B_cdk1: Cyclin_B_Cdk1_nuclear => ; nuclear*Function_for_degradation_mass_action_modifier(k137, Cyclin_B_Cdk1_nuclear, APC_Ccdh1_active);  // modifiers: APC_Ccdh1_active
  Rdeg_p53_degradation: p53 => ; nuclear*Function_for_Rdeg(deg, Mdm2, p53);  // modifiers: deg, Mdm2

  // Unit definitions:
  unit volume = 1e-3 litre;
  unit substance = 1e-3 mole;
end
