// SBML level 2 version 4
// dcterms:bibliographicCitation: urn:miriam:pubmed:25839182

model Mitrophanov2015___Simulating_extended_Hockin_Blood_Coagulation_Model_under_varied_pH()
  // Mitrophanov2015 - Simulating extended Hockin Blood Coagulation Model under varied pH
  // Mathematical model of the blood coagulation cascade with new kinetic rates to simulate acidosis. Extended Hockin2002 model. Reused Mitrophanov2011 model with new parameters k: 5, 6, 7, 10, 15, 16, 17, 22, 26, 31, 32, 43 and 44.
  // isVersionOf biomodels.db:BIOMD0000000362
  // isVersionOf GO:0007596
  // occursIn BTO:0000131
  // hasProperty efo:1000014
  // hasTaxon taxonomy:9606
  // isDescribedBy pubmed:25839182

  // Compartments:
  compartment compartment_1 = 1;

  // Species:
  species TF in compartment_1 = 5e-12;  // uniprot:P13726
  species TF_VII in compartment_1 = 0;  // hasPart uniprot:P08709; hasPart uniprot:P13726
  species VII in compartment_1 = 1e-8;  // uniprot:P08709
  species TF_VIIa in compartment_1 = 0;  // hasPart uniprot:P13726; hasPart uniprot:P08709
  species VIIa in compartment_1 = 1e-10;  // isVersionOf uniprot:P08709
  species Xa in compartment_1 = 0;  // isVersionOf uniprot:P00742
  species IIa in compartment_1 = 0;  // isVersionOf uniprot:P00734
  species TF_VIIa_X in compartment_1 = 0;  // hasPart uniprot:P00742; hasPart uniprot:P08709; hasPart uniprot:P13726
  species X in compartment_1 = 1.6e-7;  // uniprot:P00742
  species TF_VIIa_Xa in compartment_1 = 0;  // hasPart uniprot:P00742; hasPart uniprot:P08709; hasPart uniprot:P13726
  species IX in compartment_1 = 9e-8;  // uniprot:P00740
  species TF_VIIa_IX in compartment_1 = 0;  // hasPart uniprot:P00740; hasPart uniprot:P13726; hasPart uniprot:P08709
  species IXa in compartment_1 = 0;  // isVersionOf uniprot:P00740
  species II in compartment_1 = 1.4e-6;  // uniprot:P00734
  species VIII in compartment_1 = 7e-10;  // uniprot:P00451
  species VIIIa in compartment_1 = 0;  // isVersionOf uniprot:P00451
  species IXa_VIIIa in compartment_1 = 0;  // hasPart uniprot:P00451; hasPart uniprot:P00740
  species IXa_VIIIa_X in compartment_1 = 0;  // hasPart uniprot:P00740; hasPart uniprot:P00742; hasPart uniprot:P00451
  species VIIIa1_L in compartment_1 = 0;  // isPartOf uniprot:P00451
  species VIIIa2 in compartment_1 = 0;  // isPartOf uniprot:P00451
  species V in compartment_1 = 2e-8;  // uniprot:P12259
  species Va in compartment_1 = 0;  // isVersionOf uniprot:P12259
  species Xa_Va in compartment_1 = 0;  // hasPart uniprot:P00742; hasPart uniprot:P12259
  species Xa_Va_II in compartment_1 = 0;  // hasPart uniprot:P12259; hasPart uniprot:P00742; hasPart uniprot:P00734
  species mIIa in compartment_1 = 0;  // isVersionOf uniprot:P00734
  species TFPI in compartment_1 = 2.5e-9;  // uniprot:P10646
  species Xa_TFPI in compartment_1 = 0;  // hasPart uniprot:P00742; hasPart uniprot:P10646
  species TF_VIIa_Xa_TFPI in compartment_1 = 0;  // hasPart uniprot:P13726; hasPart uniprot:P00742; hasPart uniprot:P08709; hasPart uniprot:P10646
  species ATIII in compartment_1 = 3.4e-6;  // uniprot:P01008
  species Xa_ATIII in compartment_1 = 0;  // hasPart uniprot:P01008; hasPart uniprot:P00742
  species mIIa_ATIII in compartment_1 = 0;  // hasPart uniprot:P00734; hasPart uniprot:P01008
  species IXa_ATIII in compartment_1 = 0;  // hasPart uniprot:P00740; hasPart uniprot:P01008
  species IIa_ATIII in compartment_1 = 0;  // hasPart uniprot:P00734; hasPart uniprot:P01008
  species TF_VIIa_ATIII in compartment_1 = 0;  // hasPart uniprot:P08709; hasPart uniprot:P01008; hasPart uniprot:P13726

  // Parameters:
  k1 = 0.0031; k1 is "k01";
  k2 = 3200000; k2 is "k02";
  k3 = 0.0031; k3 is "k03";
  k4 = 23000000; k4 is "k04";
  k5 = 440000; k5 is "k05";
  k6 = 13000000; k6 is "k06";
  k7 = 23000; k7 is "k07";
  k8 = 1.05; k8 is "k08";
  k9 = 25000000; k9 is "k09";
  k10 = 6;
  k11 = 19;
  k12 = 22000000;
  k13 = 2.4;
  k14 = 10000000;
  k15 = 1.8;
  k16 = 7500;
  k17 = 20000000;
  k18 = 0.005;
  k19 = 10000000;
  k20 = 0.001;
  k21 = 100000000;
  k22 = 8.2;
  k23 = 22000;
  k24 = 0.006;
  k25 = 0.001;
  k26 = 20000000;
  k27 = 0.2;
  k28 = 400000000;
  k29 = 103;
  k30 = 100000000;
  k31 = 63.5;
  k32 = 230000000;
  k33 = 0.00036;
  k34 = 900000;
  k35 = 0.00011;
  k36 = 320000000;
  k37 = 50000000;
  k38 = 4200;
  k39 = 7100;
  k40 = 490;
  k41 = 7100;
  k42 = 230;
  var IIa_plus_1_2mIIa; IIa_plus_1_2mIIa is "IIa+1.2mIIa";
  k43 = 5700;
  k44 = 3000000;
  var k05; k05 is "k05*";
  var k06; k06 is "k06*";
  var k07; k07 is "k07*";
  var k10_0; k10_0 is "k10*";
  var k15_0; k15_0 is "k15*";
  var k16_0; k16_0 is "k16*";
  var k17_0; k17_0 is "k17*";
  var k22_0; k22_0 is "k22*";
  var k26_0; k26_0 is "k26*";
  var k31_0; k31_0 is "k31*";
  var k32_0; k32_0 is "k32*";
  var k43_0; k43_0 is "k43*";
  var k44_0; k44_0 is "k44*";
  f_pH = 1; f_pH is "f(pH)";

  // Assignment rules:
  k07 := f_pH*k7;
  k10_0 := f_pH*k10;
  k05 := f_pH*k5;
  k31_0 := f_pH*k31;
  k15_0 := f_pH*k15;
  k22_0 := f_pH*k22;
  k16_0 := f_pH*k16;
  k17_0 := f_pH*k17;
  k06 := f_pH*k6;
  k44_0 := f_pH*k44;
  k43_0 := f_pH*k43;
  k32_0 := f_pH*k32;
  k26_0 := f_pH*k26;
  TAT := IIa_ATIII + 0*mIIa_ATIII;
  IIa_plus_1_2mIIa := IIa + 1.2*mIIa;
  minutes := time/60;

  // Reactions:
  R01: TF + VII -> TF_VII; compartment_1*(k2*TF*VII - k1*TF_VII);
  R02: TF + VIIa -> TF_VIIa; compartment_1*(k4*TF*VIIa - k3*TF_VIIa);
  R03: TF_VIIa + VII => TF_VIIa + VIIa; compartment_1*k05*TF_VIIa*VII;
  R04: Xa + VII => Xa + VIIa; compartment_1*k06*Xa*VII;
  R05: IIa + VII => IIa + VIIa; compartment_1*k07*IIa*VII;
  R06: TF_VIIa + X -> TF_VIIa_X; compartment_1*(k9*TF_VIIa*X - k8*TF_VIIa_X);
  R07: TF_VIIa + Xa -> TF_VIIa_Xa; compartment_1*(k12*TF_VIIa*Xa - k11*TF_VIIa_Xa);
  R08: TF_VIIa + IX -> TF_VIIa_IX; compartment_1*(k14*TF_VIIa*IX - k13*TF_VIIa_IX);
  R09: Xa + II => Xa + IIa; compartment_1*k16_0*Xa*II;
  R10: IIa + VIII => IIa + VIIIa; compartment_1*k17_0*IIa*VIII;
  R11: IXa + VIIIa -> IXa_VIIIa; compartment_1*(k19*IXa*VIIIa - k18*IXa_VIIIa);
  R12: IXa_VIIIa + X -> IXa_VIIIa_X; compartment_1*(k21*IXa_VIIIa*X - k20*IXa_VIIIa_X);
  R13: VIIIa -> VIIIa1_L + VIIIa2; compartment_1*(k24*VIIIa - k23*VIIIa1_L*VIIIa2);
  R14: IXa_VIIIa_X => VIIIa1_L + VIIIa2 + X + IXa; compartment_1*k25*IXa_VIIIa_X;
  R15: IXa_VIIIa => VIIIa1_L + VIIIa2 + IXa; compartment_1*k25*IXa_VIIIa;
  R16: IIa + V => IIa + Va; compartment_1*k26_0*IIa*V;
  R17: Xa + Va -> Xa_Va; compartment_1*(k28*Xa*Va - k27*Xa_Va);
  R18: Xa_Va + II -> Xa_Va_II; compartment_1*(k30*Xa_Va*II - k29*Xa_Va_II);
  R19: mIIa + Xa_Va => IIa + Xa_Va; compartment_1*k32_0*mIIa*Xa_Va;
  R20: Xa + TFPI -> Xa_TFPI; compartment_1*(k34*Xa*TFPI - k33*Xa_TFPI);
  R21: TF_VIIa_Xa + TFPI -> TF_VIIa_Xa_TFPI; compartment_1*(k36*TF_VIIa_Xa*TFPI - k35*TF_VIIa_Xa_TFPI);
  R22: TF_VIIa + Xa_TFPI => TF_VIIa_Xa_TFPI; compartment_1*k37*TF_VIIa*Xa_TFPI;
  R23: Xa + ATIII => Xa_ATIII; compartment_1*k38*Xa*ATIII;
  R24: mIIa + ATIII => mIIa_ATIII; compartment_1*k39*mIIa*ATIII;
  R25: IXa + ATIII => IXa_ATIII; compartment_1*k40*IXa*ATIII;
  R26: IIa + ATIII => IIa_ATIII; compartment_1*k41*IIa*ATIII;
  R27: TF_VIIa + ATIII => TF_VIIa_ATIII; compartment_1*k42*TF_VIIa*ATIII;
  R6b: TF_VIIa_X => TF_VIIa_Xa; compartment_1*k10_0*TF_VIIa_X; R6b is "R06b";
  R8b: TF_VIIa_IX => TF_VIIa + IXa; compartment_1*k15_0*TF_VIIa_IX; R8b is "R08b";
  R12b: IXa_VIIIa_X => IXa_VIIIa + Xa; compartment_1*k22_0*IXa_VIIIa_X;
  R18b: Xa_Va_II => Xa_Va + mIIa; compartment_1*k31_0*Xa_Va_II;
  R28: IXa + X => IXa + Xa; compartment_1*k43_0*IXa*X;
  R29: mIIa + V => mIIa + Va; compartment_1*k44_0*mIIa*V;
end
