// SBML level 2 version 4
// dcterms:bibliographicCitation: urn:miriam:doi:10.1016/j.cell.2006.03.038
// dcterms:bibliographicCitation: urn:miriam:pubmed:16713564

function Constant_flux__irreversible(v)
  v;
end
Constant_flux__irreversible is "Constant flux (irreversible)";

function Function_fro_Clb2_degradation(k, k_p, modifier, k_pp, modifier2, substrate)
  (k + k_p*modifier + k_pp*modifier2)*substrate;
end

function Function_for_Cdc20_degradation(k, k_p, modifier, substrate)
  (k + k_p*modifier)*substrate;
end

function Function_for_cdh1_d(k, k_p, Cdc14, J_cdh, Cdh1_total, Cdh1)
  (k + k_p*Cdc14)*(Cdh1_total - Cdh1)/(J_cdh + Cdh1_total - Cdh1);
end

function Function_for_Cdh1_p(k, modifier, substrate, J_cdh)
  k*modifier*substrate/(J_cdh + substrate);
end

function Function_for_securin_separase_de(ld, k_d, k_dp, k_dpp, modifier, substrate)
  (ld + k_d + k_dp + k_dpp*modifier)*substrate;
end

function function_for_Net1_dephosphorylation(kd_p, Cdc14, kd, PP2A, Net1P, J_net)
  (kd_p*Cdc14 + kd*PP2A)*Net1P/(J_net + Net1P);
end

function Function_for_Net1_d(J_net, k_p, Cdk, kp_p, MEN, Net1, Net1_Cdc14)
  (k_p*Cdk + kp_p*MEN)*Net1/(J_net + Net1 + Net1_Cdc14);
end

function Function_for_Net1_Cdc14_d(k_p, Cdk, kp_p, MEN, Net1, J_net, Net1_Cdc14)
  (k_p*Cdk + kp_p*MEN)*Net1_Cdc14/(J_net + Net1 + Net1_Cdc14);
end

function Function_for_Polo_total_degradation(k, k_p, Cdh1, Polo_total)
  (k + k_p*Cdh1)*Polo_total;
end

function function_for_Polo_inactivation(ki, Polo, J_polo)
  ki*Polo/(J_polo + Polo);
end

function function_for_Tem1_inactivation(k, k_p, PP2A, Tem1, J_tem1)
  (k + k_p*PP2A)*Tem1/(J_tem1 + Tem1);
end

function Function_for_MEN_a(Tem1, Ia, MEN, Cdc15)
  Ia*(Tem1 - MEN)*(Cdc15 - MEN);
end

function Function_for_MEN_d(MEN, ld)
  ld*MEN;
end

function Function_for_MEN_i(k_i, k_ip, PP2A, MEN, J_tem1, Tem1)
  (k_i + k_ip*PP2A)*MEN/(J_tem1 + Tem1);
end

function Function_for_R11(la_securin, securin, separase)
  la_securin*securin*separase;
end

model Queralt2006___Initiation_of_mitotic_exit_by_downregulation_of_PP2A_in_budding_yeast()
  // Queralt2006 - Initiation of mitotic exit by downregulation of PP2A in budding yeast
  // Mathematical model of mitotic exit in budding yeast.
  // hasProperty mamo:MAMO_0000046
  // isVersionOf GO:0045839
  // hasTaxon taxonomy:559292
  // isDescribedBy pubmed:16713564
  // isDescribedBy doi:10.1016/j.cell.2006.03.038
  // hasProperty mamo:MAMO_0000046

  // Compartments:
  compartment nucleus = 1;  // GO:0005634

  // Species:
  species clb2 in nucleus = 0.997;  // isVersionOf uniprot:P24869
  species cdc20 in nucleus = 0;  // isVersionOf uniprot:P26309
  species cdh1 in nucleus = 0;  // isVersionOf uniprot:P53197
  species securin_total in nucleus = 0.6;  // isVersionOf uniprot:P40316
  species separase_total in nucleus = 0.25;  // isVersionOf uniprot:Q03018
  species securin_separase in nucleus = 0.248;  // hasPart uniprot:P40316; hasPart uniprot:Q03018
  species net1 in nucleus = 0.098;  // isVersionOf uniprot:P47035
  species $net1p in nucleus;  // isVersionOf uniprot:P47035; hasProperty PATO:0002220
  species $cdc14 in nucleus;  // isVersionOf uniprot:Q00684
  species net1cdc14 in nucleus = 0.485;  // hasPart uniprot:Q00684; hasPart uniprot:P47035
  species polo_total in nucleus = 0.99;  // isHomologTo uniprot:P32562
  species $cdk in nucleus;  // isVersionOf uniprot:P00546
  species $pp2a in nucleus;  // hasPart uniprot:Q00362
  species men in nucleus = 8e-6;
  species polo in nucleus = 0.945;  // isHomologTo uniprot:P32562
  species tem1 in nucleus = 1;  // isVersionOf uniprot:P38987
  species cdc15 in nucleus = 0.0257;  // isVersionOf uniprot:P27636
  species $pp2a_total in nucleus = 1;  // hasPart uniprot:Q00362
  species $cdh1_total in nucleus = 1;  // isVersionOf uniprot:P53197
  species $net1_total in nucleus = 1;  // isVersionOf uniprot:P47035
  species $tem1_total in nucleus = 1;  // isVersionOf uniprot:P38987
  species $cdc15_total in nucleus = 1;  // isVersionOf uniprot:P27636
  species $securin in nucleus;  // isVersionOf uniprot:P40316
  species $separase in nucleus;  // isVersionOf uniprot:Q03018
  species $Inh in nucleus = 0;  // isVersionOf uniprot:P01097
  species $cdc14_total in nucleus = 0.5;  // isVersionOf uniprot:Q00684
  // Cdc14 concentration *2 : to reproduce exactly figure 7B top. see referenced publication
  species $Cdc14x2 in nucleus;  // isVersionOf uniprot:Q00684

  // Parameters:
  ks_clb2 = 0.03;
  kd_clb2 = 0.03;
  kd_clb2_p = 0.2;
  kd_clb2_pp = 2;
  ks_cdc20 = 0.015;
  kd_cdc20 = 0.05;
  kd_cdc20_p = 2;
  kd_cdh = 0.01;
  kd_cdh_p = 1;
  kp_cdh_p = 1;
  J_cdh = 0.0015;
  ks_securin = 0.03;
  kd_securin = 0.05;
  kd_securin_p = 2;
  ks_separase = 0.001;
  kd_separase = 0.004;
  la_securin = 500;
  ld_securin = 1;
  kd_p = 0.1;
  kd = 0.45;
  kp = 0.4;
  kp_p = 2;
  Jnet = 0.2;
  l_a_net = 500;
  l_d_net = 1;
  ks_polo = 0.01;
  kd_polo = 0.01;
  kd_polo_p = 0.25;
  ka_polo = 0;
  ka_polo_p = 0.5;
  ki_polo = 0.1;
  J_polo = 0.25;
  ka_tem = 0;
  ka_tem_p = 0.5;
  ki_tem = 0.1;
  kitem_p = 1;
  J_tem1 = 0.005;
  ka_cdc15 = 0.02;
  ka_cdc15_p = 0.5;
  ki_cdc15 = 0;
  ki_cdc15_p = 0.2;
  J_cdc15 = 0.2;
  la_men = 10;
  ld_men = 0.01;
  kpp = 0.1;
  ki = 20;

  // Assignment rules:
  net1p := net1_total - net1 - net1cdc14;
  cdc14 := cdc14_total - net1cdc14;
  cdk := clb2/(1 + Inh);
  securin := securin_total - securin_separase;
  separase := separase_total - securin_separase;
  pp2a := (1 + kpp*ki*separase)/(1 + ki*separase)*pp2a_total;
  Cdc14x2 := cdc14*2;

  // Reactions:
  R1_Clb2_synthesis: => clb2; nucleus*Constant_flux__irreversible(ks_clb2);  // isVersionOf ncit:C61408
  R2_Clb2_degradation: clb2 => ; nucleus*Function_fro_Clb2_degradation(kd_clb2, kd_clb2_p, cdc20, kd_clb2_pp, cdh1, clb2);  // modifiers: cdc20, cdh1
  R3_Cdc20_synthesis: => cdc20; nucleus*Constant_flux__irreversible(ks_cdc20);  // isVersionOf ncit:C61408
  R4_Cdc20_degradation: cdc20 => ; nucleus*Function_for_Cdc20_degradation(kd_cdc20, kd_cdc20_p, cdh1, cdc20);  // modifiers: cdh1
  R5_Cdh1_activation: => cdh1; nucleus*Function_for_cdh1_d(kd_cdh, kd_cdh_p, cdc14, J_cdh, cdh1_total, cdh1);  // modifiers: cdc14, cdh1_total
  R6_Cdh1_inactivation: cdh1 => ; nucleus*Function_for_Cdh1_p(kp_cdh_p, cdk, cdh1, J_cdh);  // modifiers: cdk
  R7_Securin_synthesis: => securin_total; nucleus*Constant_flux__irreversible(ks_securin);  // isVersionOf ncit:C61408
  R8_Securin_degradation: securin_total => ; nucleus*Function_for_Cdc20_degradation(kd_securin, kd_securin_p, cdc20, securin_total);  // modifiers: cdc20
  R9_Separase_synthesis: => separase_total; nucleus*Constant_flux__irreversible(ks_separase);  // isVersionOf ncit:C61408
  R10_Separase_degradation: separase_total => ; nucleus*kd_separase*separase_total;
  R11_Securin_separase_association: => securin_separase; nucleus*Function_for_R11(la_securin, securin, separase);  // modifiers: securin, separase
  R12_Securin_separase_dissociation: securin_separase => ; nucleus*Function_for_securin_separase_de(ld_securin, kd_separase, kd_securin, kd_securin_p, cdc20, securin_separase);  // modifiers: cdc20
  R13_Net1_dephosphorylation: => net1; nucleus*function_for_Net1_dephosphorylation(kd_p, cdc14, kd, pp2a, net1p, Jnet);  // modifiers: cdc14, pp2a, net1p; isVersionOf GO:0016311
  R14_Net1_phosphorylation: net1 => ; nucleus*Function_for_Net1_d(Jnet, kp, cdk, kp_p, men, net1, net1cdc14);  // modifiers: cdk, men, net1cdc14; isVersionOf PATO:0002262
  R15_Net1_Cdc14_association: net1 + $cdc14 -> net1cdc14; nucleus*(l_a_net*net1*cdc14 - l_d_net*net1cdc14);
  R16_Net1_Cdc14_dissociation: net1cdc14 => ; nucleus*Function_for_Net1_Cdc14_d(kp, cdk, kp_p, men, net1, Jnet, net1cdc14);  // modifiers: cdk, men, net1
  R17_Polo_synthesis: => polo_total; nucleus*Constant_flux__irreversible(ks_polo);  // isVersionOf ncit:C61408
  R18_Polo_degradation: polo_total => ; nucleus*Function_for_Polo_total_degradation(kd_polo, kd_polo_p, cdh1, polo_total);  // modifiers: cdh1
  R19_Polo_activation: => polo; nucleus*Function_for_cdh1_d(ka_polo, ka_polo_p, cdk, J_polo, polo_total, polo);  // modifiers: cdk, polo_total
  R20_Polo_inactivation: polo => ; nucleus*function_for_Polo_inactivation(ki_polo, polo, J_polo);
  R21_Polo_inactivation: polo => ; nucleus*Function_for_Cdc20_degradation(kd_polo, kd_polo_p, cdh1, polo);  // modifiers: cdh1
  R22_Tem1_activation: => tem1; nucleus*Function_for_cdh1_d(ka_tem, ka_tem_p, polo, J_tem1, tem1_total, tem1);  // modifiers: polo, tem1_total
  R23_Tem1_inactivation: tem1 => ; nucleus*function_for_Tem1_inactivation(ki_tem, kitem_p, pp2a, tem1, J_tem1);  // modifiers: pp2a
  R24_Cdc15_activation: => cdc15; nucleus*Function_for_cdh1_d(ka_cdc15, ka_cdc15_p, cdc14, J_cdc15, cdc15_total, cdc15);  // modifiers: cdc14, cdc15_total
  R25_Cdc15_inactivation: cdc15 => ; nucleus*function_for_Tem1_inactivation(ki_cdc15, ki_cdc15_p, cdk, cdc15, J_cdc15);  // modifiers: cdk
  R26_MEN_activation: => men; nucleus*Function_for_MEN_a(tem1, la_men, men, cdc15);  // modifiers: tem1, cdc15
  R27_MEN: men => ; nucleus*Function_for_MEN_d(men, ld_men);
  R28_MEN_inactivation: men => ; nucleus*Function_for_MEN_i(ki_tem, kitem_p, pp2a, men, J_tem1, tem1);  // modifiers: pp2a, tem1
  R29_MEN_inactivation: men => ; nucleus*Function_for_MEN_i(ki_cdc15, ki_cdc15_p, cdk, men, J_cdc15, cdc15);  // modifiers: cdk, cdc15

  // Unit definitions:
  unit volume = 1e-3 litre;
  unit time = 60 second;
  unit substance = 1e-3 mole;
end
