// SBML level 2 version 4
// dcterms:bibliographicCitation: urn:miriam:pubmed:32735581

function Rate_Law_for_Cumulative_cases(constant, E)
  constant*E;
end

function Rate_Law_for_Susceptible_to_Exposed(S, beta, I, l_a, A, l, H, N)
  S*beta*(I + l_a*A + l*H)/N;
end

model Paiva2020___SEIAHRD_model_of_transmission_dynamics_of_COVID_19()
  // Paiva2020 - SEIAHRD model of transmission dynamics of COVID-19
  // This paper proposes a dynamic model to describe and forecast the dynamics of the coronavirus disease COVID-19 transmission. The model is based on an approach previously used to describe the Middle East Respiratory Syndrome (MERS) epidemic. This methodology is used to describe the COVID-19 dynamics in six countries where the pandemic is widely spread, namely China, Italy, Spain, France, Germany, and the USA. For this purpose, data from the European Centre for Disease Prevention and Control (ECDC) are adopted. It is shown how the model can be used to forecast new infection cases and new deceased and how the uncertainties associated to this prediction can be quantified. This approach has the advantage of being relatively simple, grouping in few mathematical parameters the many conditions which affect the spreading of the disease. On the other hand, it requires previous data from the disease transmission in the country, being better suited for regions where the epidemic is not at a very early stage. With the estimated parameters at hand, one can use the model to predict the evolution of the disease, which in turn enables authorities to plan their actions. Moreover, one key advantage is the straightforward interpretation of these parameters and their influence over the evolution of the disease, which enables altering some of them, so that one can evaluate the effect of public policy, such as social distancing. The results presented for the selected countries confirm the accuracy to perform predictions.
  // isDescribedBy pubmed:32735581
  // isVersionOf DOID:0080600
  // isVersionOf ido:0000503
  // hasTaxon taxonomy:9606 taxonomy:2697049
  // hasProperty mamo:MAMO_0000028
  // biomodels.db:MODEL2008200001 biomodels.db:BIOMD0000000960

  // Compartments:
  compartment Country = 1;  // isVersionOf ncit:C16761; isVersionOf ncit:C16428; isVersionOf ncit:C16592; isVersionOf ncit:C16636

  // Species:
  species Susceptible in Country = 0.9*Total_pop;  // isVersionOf ncit:C171133; isVersionOf ido:0000514
  species Exposed in Country = 50*Infectious;  // isVersionOf ncit:C171133; isVersionOf ido:0000514; isVersionOf ido:0000597
  species Infectious in Country = Initial_infected_pop;  // isVersionOf ncit:C171133; isVersionOf ido:0000511
  species Asymptomatic in Country = 3*Infectious;  // isVersionOf ido:0000511; isVersionOf ido:0000569; isVersionOf ncit:C171133
  species Hospitalized in Country = 0;  // isVersionOf ido:0000511; isVersionOf ncit:C168447; isVersionOf ncit:C171133; isVersionOf ncit:C25179
  species Recovered in Country = 0;  // isVersionOf ido:0000621; isVersionOf ncit:C171133
  species Deceased in Country = 0;  // isVersionOf ncit:C28554; isVersionOf ncit:C171133
  species Cumulative_Cases in Country = 0;  // isVersionOf ncit:C171133; isVersionOf ido:0000480

  // Parameters:
  _1_Trigger_China = 1;
  _2_Trigger_Italy = 0;
  _3_Trigger_Spain = 0;
  _4_Trigger_France = 0;
  _5_Trigger_Germany = 0;
  _6_Trigger_USA = 0;
  var kappa_rho; kappa_rho is "kappa(rho)";
  var kappa_1_rho; kappa_1_rho is "kappa(1-rho)";
  var mu_delta_A; mu_delta_A is "mu(delta_A)";
  var mu_1_delta_A; mu_1_delta_A is "mu(1-delta_A)";
  beta_1_China = 0.334;
  beta_2_China = 0.14;
  l_1_China = 0.673;
  l_2_China = 0.135;
  l_a_1_China = 8;
  l_a_2_China = 8;
  kappa_China = 0.44;
  rho_China = 0.053;
  gamma_a_China = 0.503;
  gamma_i_China = 0.263;
  gamma_r_China = 0.141;
  mu_China = 1.64;
  delta_A_China = 0;
  delta_H_China = 0.008;
  delta_I_China = 0.003;
  Initial_infected_pop_China = 732;
  Time_threshold_China = 18;
  beta_1_Italy = 0.189;
  beta_2_Italy = 0.081;
  l_1_Italy = 8;
  l_2_Italy = 8;
  l_a_1_Italy = 0.649;
  l_a_2_Italy = 0.649;
  kappa_Italy = 0.284;
  rho_Italy = 0.27;
  gamma_a_Italy = 0.224;
  gamma_i_Italy = 0.04;
  mu_Italy = 0.146;
  delta_A_Italy = 0;
  delta_H_Italy = 0.023;
  delta_I_Italy = 0.023;
  Initial_infected_pop_Italy = 648;
  Time_threshold_Italy = 30;
  beta_1_Spain = 0.382;
  beta_2_Spain = 0.16;
  l_1_Spain = 7.69;
  l_2_Spain = 6.49;
  l_a_1_Spain = 3.9;
  l_a_2_Spain = 3.9;
  kappa_Spain = 0.362;
  rho_Spain = 0.102;
  gamma_a_Spain = 0.116;
  gamma_i_Spain = 0.063;
  gamma_r_Spain = 0.281;
  mu_Spain = 1.03;
  delta_A_Spain = 0;
  delta_H_Spain = 0.019;
  delta_I_Spain = 0.016;
  Initial_infected_pop_Spain = 500;
  Time_threshold_Spain = 23;
  beta_1_France = 0.298;
  beta_2_France = 0.129;
  l_1_France = 8;
  l_2_France = 8;
  l_a_1_France = 8;
  l_a_2_France = 8;
  kappa_France = 0.309;
  rho_France = 0.033;
  gamma_a_France = 0.3;
  gamma_i_France = 0.02;
  gamma_r_France = 0.131;
  mu_France = 1.53;
  delta_A_France = 0;
  delta_H_France = 0.029;
  delta_I_France = 0.018;
  Initial_infected_pop_France = 575;
  Time_threshold_France = 26;
  beta_1_Germany = 0.135;
  beta_2_Germany = 0.055;
  l_1_Germany = 4.8;
  l_2_Germany = 1.13;
  l_a_1_Germany = 4.9;
  l_a_2_Germany = 4.9;
  kappa_Germany = 0.578;
  rho_Germany = 0.021;
  gamma_a_Germany = 0.542;
  gamma_i_Germany = 0.05;
  gamma_r_Germany = 0.036;
  mu_Germany = 0.302;
  delta_A_Germany = 0;
  delta_H_Germany = 0.003;
  delta_I_Germany = 0.002;
  Initial_infected_pop_Germany = 735;
  Time_threshold_Germany = 24;
  beta_1_USA = 0.303;
  beta_2_USA = 0.13;
  l_1_USA = 0.851;
  l_2_USA = 0.851;
  l_a_1_USA = 4.09;
  l_a_2_USA = 0.82;
  kappa_USA = 1.33;
  rho_USA = 1.01;
  gamma_a_USA = 0.055;
  gamma_i_USA = 0.296;
  gamma_r_USA = 0.018;
  mu_USA = 0.828;
  delta_A_USA = 0;
  delta_H_USA = 0.00029;
  delta_I_USA = 0.023;
  Initial_infected_pop_USA = 576;
  Time_threshold_USA = 51;
  gamma_r_Italy = 0.24;
  Total_pop has unit_0;
  Total_pop_China = 11000000 unit_0;
  Total_pop_Italy = 60400000 unit_0;
  Total_pop_Spain = 46900000 unit_0;
  Total_pop_France = 67000000 unit_0;
  Total_pop_Germany = 83000000 unit_0;
  Total_pop_USA = 328200000 unit_0;
  Initial_for_1_Trigger_China = _1_Trigger_China;
  Initial_for_2_Trigger_Italy = _2_Trigger_Italy;
  Initial_for_3_Trigger_Spain = _3_Trigger_Spain;
  Initial_for_4_Trigger_France = _4_Trigger_France;
  Initial_for_5_Trigger_Germany = _5_Trigger_Germany;
  Initial_for_6_Trigger_USA = _6_Trigger_USA;
  ModelValue_42 = Initial_infected_pop_China; ModelValue_42 is "Initial for Initial_infected_pop_China";
  ModelValue_92 = Initial_infected_pop_France; ModelValue_92 is "Initial for Initial_infected_pop_France";
  ModelValue_109 = Initial_infected_pop_Germany; ModelValue_109 is "Initial for Initial_infected_pop_Germany";
  ModelValue_58 = Initial_infected_pop_Italy; ModelValue_58 is "Initial for Initial_infected_pop_Italy";
  ModelValue_75 = Initial_infected_pop_Spain; ModelValue_75 is "Initial for Initial_infected_pop_Spain";
  ModelValue_126 = Initial_infected_pop_USA; ModelValue_126 is "Initial for Initial_infected_pop_USA";
  Initial_for_Time_threshold = Time_threshold;
  Initial_for_Time_threshold_China = Time_threshold_China;
  ModelValue_93 = Time_threshold_France; ModelValue_93 is "Initial for Time_threshold_France";
  ModelValue_110 = Time_threshold_Germany; ModelValue_110 is "Initial for Time_threshold_Germany";
  Initial_for_Time_threshold_Italy = Time_threshold_Italy;
  Initial_for_Time_threshold_Spain = Time_threshold_Spain;
  Initial_for_Time_threshold_USA = Time_threshold_USA;
  Initial_for_Total_pop_China = Total_pop_China;
  Initial_for_Total_pop_France = Total_pop_France;
  Initial_for_Total_pop_Germany = Total_pop_Germany;
  Initial_for_Total_pop_Italy = Total_pop_Italy;
  Initial_for_Total_pop_Spain = Total_pop_Spain;
  Initial_for_Total_pop_USA = Total_pop_USA;
  Initial_for_delta_A = delta_A;
  Initial_for_delta_A_China = delta_A_China;
  Initial_for_delta_A_France = delta_A_France;
  Initial_for_delta_A_Germany = delta_A_Germany;
  Initial_for_delta_A_Italy = delta_A_Italy;
  Initial_for_delta_A_Spain = delta_A_Spain;
  Initial_for_delta_A_USA = delta_A_USA;
  Initial_for_delta_H_China = delta_H_China;
  Initial_for_delta_H_France = delta_H_France;
  Initial_for_delta_H_Germany = delta_H_Germany;
  Initial_for_delta_H_Italy = delta_H_Italy;
  Initial_for_delta_H_Spain = delta_H_Spain;
  Initial_for_delta_H_USA = delta_H_USA;
  Initial_for_delta_I_China = delta_I_China;
  Initial_for_delta_I_France = delta_I_France;
  Initial_for_delta_I_Germany = delta_I_Germany;
  Initial_for_delta_I_Italy = delta_I_Italy;
  Initial_for_delta_I_Spain = delta_I_Spain;
  Initial_for_delta_I_USA = delta_I_USA;
  Initial_for_gamma_a_China = gamma_a_China;
  Initial_for_gamma_a_France = gamma_a_France;
  Initial_for_gamma_a_Germany = gamma_a_Germany;
  Initial_for_gamma_a_Italy = gamma_a_Italy;
  Initial_for_gamma_a_Spain = gamma_a_Spain;
  Initial_for_gamma_a_USA = gamma_a_USA;
  Initial_for_gamma_i_China = gamma_i_China;
  Initial_for_gamma_i_France = gamma_i_France;
  Initial_for_gamma_i_Germany = gamma_i_Germany;
  Initial_for_gamma_i_Italy = gamma_i_Italy;
  Initial_for_gamma_i_Spain = gamma_i_Spain;
  Initial_for_gamma_i_USA = gamma_i_USA;
  Initial_for_gamma_r_China = gamma_r_China;
  Initial_for_gamma_r_France = gamma_r_France;
  Initial_for_gamma_r_Germany = gamma_r_Germany;
  Initial_for_gamma_r_Italy = gamma_r_Italy;
  Initial_for_gamma_r_Spain = gamma_r_Spain;
  Initial_for_gamma_r_USA = gamma_r_USA;
  Initial_for_kappa = kappa;
  Initial_for_kappa_China = kappa_China;
  Initial_for_kappa_France = kappa_France;
  Initial_for_kappa_Germany = kappa_Germany;
  Initial_for_kappa_Italy = kappa_Italy;
  Initial_for_kappa_Spain = kappa_Spain;
  Initial_for_kappa_USA = kappa_USA;
  Initial_for_l_a_1_Spain = l_a_1_Spain;
  Initial_for_mu = mu;
  Initial_for_mu_China = mu_China;
  Initial_for_mu_France = mu_France;
  Initial_for_mu_Germany = mu_Germany;
  Initial_for_mu_Italy = mu_Italy;
  Initial_for_mu_Spain = mu_Spain;
  Initial_for_mu_USA = mu_USA;
  Initial_for_rho = rho;
  Initial_for_rho_China = rho_China;
  Initial_for_rho_France = rho_France;
  Initial_for_rho_Germany = rho_Germany;
  Initial_for_rho_Italy = rho_Italy;
  Initial_for_rho_Spain = rho_Spain;
  Initial_for_rho_USA = rho_USA;

  // Assignment rules:
  kappa := Initial_for_1_Trigger_China*Initial_for_kappa_China + Initial_for_2_Trigger_Italy*Initial_for_kappa_Italy + Initial_for_3_Trigger_Spain*Initial_for_kappa_Spain + Initial_for_4_Trigger_France*Initial_for_kappa_France + Initial_for_5_Trigger_Germany*Initial_for_kappa_Germany + Initial_for_6_Trigger_USA*Initial_for_kappa_USA;
  rho := Initial_for_1_Trigger_China*Initial_for_rho_China + Initial_for_2_Trigger_Italy*Initial_for_rho_Italy + Initial_for_3_Trigger_Spain*Initial_for_rho_Spain + Initial_for_4_Trigger_France*Initial_for_rho_France + Initial_for_5_Trigger_Germany*Initial_for_rho_Germany + Initial_for_6_Trigger_USA*Initial_for_rho_USA;
  mu := Initial_for_1_Trigger_China*Initial_for_mu_China + Initial_for_2_Trigger_Italy*Initial_for_mu_Italy + Initial_for_3_Trigger_Spain*Initial_for_mu_Spain + Initial_for_4_Trigger_France*Initial_for_mu_France + Initial_for_5_Trigger_Germany*Initial_for_mu_Germany + Initial_for_6_Trigger_USA*Initial_for_mu_USA;
  gamma_a := Initial_for_1_Trigger_China*Initial_for_gamma_a_China + Initial_for_2_Trigger_Italy*Initial_for_gamma_a_Italy + Initial_for_3_Trigger_Spain*Initial_for_gamma_a_Spain + Initial_for_4_Trigger_France*Initial_for_gamma_a_France + Initial_for_5_Trigger_Germany*Initial_for_gamma_a_Germany + Initial_for_6_Trigger_USA*Initial_for_gamma_a_USA;
  gamma_i := Initial_for_1_Trigger_China*Initial_for_gamma_i_China + Initial_for_2_Trigger_Italy*Initial_for_gamma_i_Italy + Initial_for_3_Trigger_Spain*Initial_for_gamma_i_Spain + Initial_for_4_Trigger_France*Initial_for_gamma_i_France + Initial_for_5_Trigger_Germany*Initial_for_gamma_i_Germany + Initial_for_6_Trigger_USA*Initial_for_gamma_i_USA;
  l_1 := Initial_for_1_Trigger_China*l_1_China + Initial_for_2_Trigger_Italy*l_1_Italy + Initial_for_3_Trigger_Spain*l_1_Spain + Initial_for_4_Trigger_France*l_1_France + Initial_for_5_Trigger_Germany*l_1_Germany + Initial_for_6_Trigger_USA*l_1_USA;
  gamma_r := Initial_for_1_Trigger_China*Initial_for_gamma_r_China + Initial_for_2_Trigger_Italy*Initial_for_gamma_r_Italy + Initial_for_3_Trigger_Spain*Initial_for_gamma_r_Spain + Initial_for_4_Trigger_France*Initial_for_gamma_r_France + Initial_for_5_Trigger_Germany*Initial_for_gamma_r_Germany + Initial_for_6_Trigger_USA*Initial_for_gamma_r_USA;
  delta_H := Initial_for_1_Trigger_China*Initial_for_delta_H_China + Initial_for_2_Trigger_Italy*Initial_for_delta_H_Italy + Initial_for_3_Trigger_Spain*Initial_for_delta_H_Spain + Initial_for_4_Trigger_France*Initial_for_delta_H_France + Initial_for_5_Trigger_Germany*Initial_for_delta_H_Germany + Initial_for_6_Trigger_USA*Initial_for_delta_H_USA;
  Initial_infected_pop := Initial_for_1_Trigger_China*ModelValue_42 + Initial_for_2_Trigger_Italy*ModelValue_58 + Initial_for_3_Trigger_Spain*ModelValue_75 + Initial_for_4_Trigger_France*ModelValue_92 + Initial_for_5_Trigger_Germany*ModelValue_109 + Initial_for_6_Trigger_USA*ModelValue_126;
  delta_A := Initial_for_1_Trigger_China*Initial_for_delta_A_China + Initial_for_2_Trigger_Italy*Initial_for_delta_A_Italy + Initial_for_3_Trigger_Spain*Initial_for_delta_A_Spain + Initial_for_4_Trigger_France*Initial_for_delta_A_Spain + Initial_for_4_Trigger_France*Initial_for_delta_A_France + Initial_for_5_Trigger_Germany*Initial_for_delta_A_Germany + Initial_for_6_Trigger_USA*Initial_for_delta_A_USA;
  delta_I := Initial_for_1_Trigger_China*Initial_for_delta_I_China + Initial_for_2_Trigger_Italy*Initial_for_delta_I_Italy + Initial_for_3_Trigger_Spain*Initial_for_delta_I_Spain + Initial_for_4_Trigger_France*Initial_for_delta_I_France + Initial_for_5_Trigger_Germany*Initial_for_delta_I_Germany + Initial_for_6_Trigger_USA*Initial_for_delta_I_USA;
  l_a_1 := Initial_for_1_Trigger_China*l_a_1_China + Initial_for_2_Trigger_Italy*l_a_1_Italy + Initial_for_3_Trigger_Spain*Initial_for_l_a_1_Spain + Initial_for_4_Trigger_France*l_a_1_France + Initial_for_5_Trigger_Germany*l_a_1_Germany + Initial_for_6_Trigger_USA*l_a_1_USA;
  beta_1 := Initial_for_1_Trigger_China*beta_1_China + Initial_for_2_Trigger_Italy*beta_1_Italy + Initial_for_3_Trigger_Spain*beta_1_Spain + Initial_for_4_Trigger_France*beta_1_France + Initial_for_5_Trigger_Germany*beta_1_Germany + Initial_for_6_Trigger_USA*beta_1_USA;
  kappa_rho := Initial_for_kappa*Initial_for_rho;
  mu_delta_A := Initial_for_mu*Initial_for_delta_A;
  kappa_1_rho := Initial_for_kappa*(1 - Initial_for_rho);
  mu_1_delta_A := Initial_for_mu*(1 - Initial_for_delta_A);
  Time_threshold := Initial_for_1_Trigger_China*Initial_for_Time_threshold_China + Initial_for_2_Trigger_Italy*Initial_for_Time_threshold_Italy + Initial_for_3_Trigger_Spain*Initial_for_Time_threshold_Spain + Initial_for_4_Trigger_France*ModelValue_93 + Initial_for_5_Trigger_Germany*ModelValue_110 + Initial_for_6_Trigger_USA*Initial_for_Time_threshold_USA;
  Total_pop := Initial_for_1_Trigger_China*Initial_for_Total_pop_China + Initial_for_2_Trigger_Italy*Initial_for_Total_pop_Italy + Initial_for_3_Trigger_Spain*Initial_for_Total_pop_Spain + Initial_for_4_Trigger_France*Initial_for_Total_pop_France + Initial_for_5_Trigger_Germany*Initial_for_Total_pop_Germany + Initial_for_6_Trigger_USA*Initial_for_Total_pop_USA;

  // Reactions:
  Susceptible_to_Exposed: Susceptible => Exposed; Country*Rate_Law_for_Susceptible_to_Exposed(Susceptible, beta_1, Infectious, l_a_1, Asymptomatic, l_1, Hospitalized, Total_pop);  // modifiers: Infectious, Asymptomatic, Hospitalized; isVersionOf ido:0000514; isVersionOf ncit:C171133; isVersionOf ido:0000597
  Exposed_to_Infectious: Exposed => Infectious; Country*kappa_rho*Exposed;  // isVersionOf ncit:C171133; isVersionOf ncit:C168447; isVersionOf ncit:C128320
  Exposed_to_Asymptomatic: Exposed => Asymptomatic; Country*kappa_1_rho*Exposed;  // isVersionOf ido:0000511; isVersionOf ncit:C171133; isVersionOf ncit:C128320
  Infectious_to_Hospitalized: Infectious => Hospitalized; Country*gamma_a*Infectious;  // isVersionOf ncit:C171133; isVersionOf ido:0000511; isVersionOf ncit:C25179
  Infectious_to_Recovered: Infectious => Recovered; Country*gamma_i*Infectious;  // isVersionOf ncit:C171133; isVersionOf ncit:C25746
  Infectious_to_Deceased: Infectious => Deceased; Country*delta_I*Infectious;  // isVersionOf ncit:C171133; isVersionOf ncit:C28554; isVersionOf ido:0000511
  Asymptomatic_to_Recovered: Asymptomatic => Recovered; Country*mu_1_delta_A*Asymptomatic;  // isVersionOf ncit:C25746; isVersionOf ncit:C171133
  Asymptomatic_to_Deceased: Asymptomatic => Deceased; Country*mu_delta_A*Asymptomatic;  // isVersionOf ncit:C171133; isVersionOf ncit:C28554
  Hospitalized_to_Deceased: Hospitalized => Deceased; Country*delta_H*Hospitalized;  // isVersionOf ncit:C28554; isVersionOf ncit:C171133
  Hospitalized_to_Recovered: Hospitalized => Recovered; Country*gamma_r*Hospitalized;  // isVersionOf ncit:C25746; isVersionOf ncit:C171133
  Cumulative_cases: => Cumulative_Cases; Country*Rate_Law_for_Cumulative_cases(kappa_rho, Exposed);  // modifiers: Exposed; isVersionOf ido:0000480; isVersionOf ido:0000511; isVersionOf ncit:C171133

  // Events:
  event: at (time >= Initial_for_Time_threshold): beta_1_China = beta_2_China, beta_1_France = beta_2_France, beta_1_Germany = beta_2_Germany, beta_1_Italy = beta_2_Italy, beta_1_Spain = beta_2_Spain, beta_1_USA = beta_2_USA, l_1_China = l_2_China, l_1_France = l_2_France, l_1_Germany = l_2_Germany, l_1_Italy = l_2_Italy, l_1_Spain = l_2_Spain, l_1_USA = l_2_USA, l_a_1_China = l_a_2_China, l_a_1_France = l_a_2_France, l_a_1_Germany = l_a_2_Germany, l_a_1_Italy = l_a_2_Italy, l_a_1_Spain = l_a_2_Spain, l_a_1_USA = l_a_2_USA;

  // Unit definitions:
  unit length = metre;
  unit area = metre^2;
  unit volume = 1e-3 litre;
  unit time = 86400 second;
  unit substance = item;
  unit unit_0 = item; unit_0 is "#";
end
