// SBML level 3 version 1
// dcterms:bibliographicCitation: urn:miriam:pubmed:32703315

function Constant_flux__irreversible(v)
  v;
end
Constant_flux__irreversible is "Constant flux (irreversible)";

function Rate_Law_for_reaction_2(beta_1, S, P, alpha_1, beta_2, I_A, I_S, alpha_2)
  beta_1*S*P/(1 + alpha_1*P) + beta_2*S*(I_A + I_S)/(1 + alpha_2*(I_A + I_S));
end

function Rate_Law_for_reaction_7(mu, sigma, I_S)
  (mu + sigma)*I_S;
end

function Rate_Law_for_reaction_5(delta, omega, E)
  delta*omega*E;
end

function Rate_Law_for_reaction_12(eta_A, I_A, eta_S, I_S)
  eta_A*I_A + eta_S*I_S;
end

function Rate_Law_for_reaction_6(delta, omega, E)
  (1 - delta)*omega*E;
end

model Mwalili2020___SEIR_model_of_COVID_19_transmission_and_environmental_pathogen_prevalence()
  // Mwalili2020 - SEIR model of COVID-19 transmission and environmental pathogen prevalence
  // Objective: Coronavirus disease 2019 (COVID-19) is a pandemic respiratory illness spreading from person-to-person caused by a novel coronavirus and poses a serious public health risk. The goal of this study was to apply a modified susceptible-exposed-infectious-recovered (SEIR) compartmental mathematical model for prediction of COVID-19 epidemic dynamics incorporating pathogen in the environment and interventions. The next generation matrix approach was used to determine the basic reproduction number R0. The model equations are solved numerically using fourth and ffth order Runge–Kutta methods. Results: We found an R0 of 2.03, implying that the pandemic will persist in the human population in the absence of strong control measures. Results after simulating various scenarios indicate that disregarding social distancing and hygiene measures can have devastating effects on the human population. The model shows that quarantine of contacts and isolation of cases can help halt the spread on novel coronavirus.
  // isDescribedBy pubmed:32703315
  // isVersionOf ido:0000503
  // isVersionOf DOID:0080600
  // hasTaxon taxonomy:2697049 taxonomy:9606
  // hasProperty mamo:MAMO_0000028
  // biomodels.db:MODEL2009210004 biomodels.db:BIOMD0000000964
  // model units - substance: substance, time: time, volume: volume, area: area, length: length, extent: substance

  // Compartments:
  compartment Human = 1 volume;  // ncit:C14225; hasTaxon taxonomy:9606
  compartment Pathogen = 1 volume;  // ncit:C80324; hasTaxon taxonomy:2697049

  // Species:
  species Susceptible in Human = 93000;  // isVersionOf ncit:C171133; isVersionOf ido:0000514
  species Exposed in Human = 1000;  // isVersionOf ido:0000514; isVersionOf ncit:C171133; hasProperty ido:0000597
  species Infected_Symptomatic in Human = 50;  // isVersionOf ncit:C171133; isVersionOf ido:0000511; hasProperty ncit:C25269
  species Infected_Asymptomatic in Human = 50;  // isVersionOf ido:0000511; isVersionOf ncit:C171133; hasProperty ncit:C3833
  species Recovered in Human = 0;  // isVersionOf ncit:C171133; isVersionOf ido:0000621
  species Pathogen_0 in Pathogen = 500;  // ncit:C171133; isVersionOf ncit:C80324

  // Parameters:
  alpha_1 = 0.1 unit_0;
  alpha_2 = 0.1 unit_0;
  b = 0.00018 unit_1;
  mu = 4.563e-5 unit_2;
  mu_p = 0.1724 unit_2;
  beta_1 = 0.00414 unit_3;
  beta_2 = 0.0115 unit_3;
  delta = 0.7 unit_4;
  psi = 0.005 unit_2;
  omega = 0.09 unit_2;
  sigma = 0.0018 unit_2;
  gamma_S = 0.05 unit_2;
  gamma_A = 0.0714 unit_2;
  eta_S = 0.1 unit_2;
  eta_A = 0.05 unit_2;

  // Reactions:
  Birth_Rate: => Susceptible; Human*Constant_flux__irreversible(b);  // isVersionOf ncit:C53345
  Exposed_to_Susceptible: Exposed => Susceptible; Human*psi*Exposed;  // isVersionOf ido:0000597; isVersionOf ncit:C171133; hasProperty ncit:C50406
  Susceptible_to_Exposed: Susceptible => Exposed; Rate_Law_for_reaction_2(beta_1, Susceptible, Pathogen_0, alpha_1, beta_2, Infected_Asymptomatic, Infected_Symptomatic, alpha_2);  // modifiers: Pathogen_0, Infected_Asymptomatic, Infected_Symptomatic; ncit:0000597; isVersionOf ncit:C171133
  Death_rate_Susceptible: Susceptible => ; Human*mu*Susceptible;  // isVersionOf ncit:C53346
  Death_rate_Exposed: Exposed => ; Human*mu*Exposed;  // isVersionOf ncit:C53346
  Symptomatic_infection_from_Exposed: Exposed => Infected_Symptomatic; Human*Rate_Law_for_reaction_5(delta, omega, Exposed);  // ncit:C128320; isVersionOf ncit:C171133; hasProperty ncit:C168447
  Asymptomatic_infection_from_Exposed: Exposed => Infected_Asymptomatic; Human*Rate_Law_for_reaction_6(delta, omega, Exposed);  // ncit:C128320; isVersionOf ncit:C171133; hasProperty ncit:C168121
  Death_rate_Symptomatic_infected: Infected_Symptomatic => ; Human*Rate_Law_for_reaction_7(mu, sigma, Infected_Symptomatic);  // isVersionOf ncit:C53346
  Death_rate_Asymptomatic_infected: Infected_Asymptomatic => ; Human*Rate_Law_for_reaction_7(mu, sigma, Infected_Asymptomatic);  // isVersionOf ncit:C53346
  Recovery_from_Symptomatic_infection: Infected_Symptomatic => Recovered; Human*gamma_S*Infected_Symptomatic;  // ncit:C25746; isVersionOf ncit:C171133
  Recovery_from_Asymptomatic_infection: Infected_Asymptomatic => Recovered; Human*gamma_A*Infected_Asymptomatic;  // ncit:C25746; isVersionOf ncit:C171133
  Death_rate_Recovered: Recovered => ; Human*mu*Recovered;  // isVersionOf ncit:C53346
  Rate_of_pathogen_increase: => Pathogen_0; Rate_Law_for_reaction_12(eta_A, Infected_Asymptomatic, eta_S, Infected_Symptomatic);  // modifiers: Infected_Asymptomatic, Infected_Symptomatic; ncit:C80324; ncit:C64379; isVersionOf ncit:C171133
  Death_rate_of_Pathogen: Pathogen_0 => ; Pathogen*mu_p*Pathogen_0;  // isVersionOf ncit:C53346

  // Unit definitions:
  unit length = metre;
  unit area = metre^2;
  unit volume = 1e-3 litre;
  unit time = 86400 second;
  unit substance = item;
  unit unit_0 = 1 / item; unit_0 is "1/#";
  unit unit_1 = item / (86400 second); unit_1 is "#/d";
  unit unit_2 = 1 / (86400 second); unit_2 is "1/d";
  unit unit_3 = 1 / (86400 second * item); unit_3 is "1/(d*#)";
  unit unit_4 = dimensionless^0; unit_4 is "1";
end
