// SBML level 2 version 4
// dcterms:bibliographicCitation: http://identifiers.org/pubmed/10352035

function Function_for_Open_to_Inactivated1(O, compartment, k2)
  k2*O/compartment;
end

function Function_for_Inactivated1_to_Inactivated2(I1, compartment, k4)
  k4*I1/compartment;
end

function Function_for_Jrel(O, compartment, kflux)
  kflux*O^4/compartment;
end

function Function_for_Inactivated1_to_Shut(I1, compartment, k3)
  k3*I1/compartment;
end

function Function_for_Jpump(Kp, Vp, c, compartment)
  Vp*c^2/(Kp^2 + c^2)/compartment;
end

function Function_for_Jinflux(Jleak, compartment)
  Jleak/compartment;
end

function Function_for_Inactivated2_to_Shut(I2, compartment, k5)
  k5*I2/compartment;
end

function Function_for_Shut_to_Open(O, S, compartment, k1, kminus1, p)
  (k1*p*S - kminus1*O)/compartment;
end

model LeBeau1999___IP3_dependent_intracellular_calcium_oscillations_due_to_agonist_stimulation_from_Cholecytokinin()
  // LeBeau1999 - IP3-dependent intracellular calcium oscillations due to agonist stimulation from Cholecytokinin
  // The properties of inositol 1,4,5-trisphosphate (IP3)-dependent intracellular calcium oscillations in pancreatic acinar cells depend crucially on the agonist used to stimulate them. Acetylcholine or carbachol (CCh) cause high-frequency (10–12-s period) calcium oscillations that are superimposed on a raised baseline, while cholecystokinin (CCK) causes long-period (.100-s period) baseline spiking. We show that physiological concentrations of CCK induce rapid phosphorylation of the IP3 receptor, which is not true of physiological concentrations of CCh. Based on this and other experimental data, we construct a mathematical model of agonist-specific intracellular calcium oscillations in pancreatic acinar cells. Model simulations agree with previous experimental work on the rates of activation and inactivation of the IP3 receptor by calcium (DuFour, J.-F., I.M. Arias, and T.J. Turner. 1997. J. Biol. Chem. 272:2675–2681), and reproduce both short-period, raised baseline oscillations, and long-period baseline spiking. The steady state open probability curve of the model IP3 receptor is an increasing function of calcium concentration, as found for type-III IP3 receptors by Hagar et al. (Hagar, R.E., A.D. Burgstahler, M.H. Nathanson, and B.E. Ehrlich. 1998. Nature. 396:81–84). We use the model to predict the effect of the removal of external calcium, and this prediction is confirmed experimentally. We also predict that, for type-III IP3 receptors, the steady state open probability curve will shift to lower calcium concentrations as the background IP3 concentration increases. We conclude that the differences between CCh- and CCK-induced calcium oscillations in pancreatic acinar cells can be explained by two principal mechanisms: (a) CCK causes more phosphorylation of the IP3 receptor than does CCh, and the phosphorylated receptor cannot pass calcium current; and (b) the rate of calcium ATPase pumping and the rate of calcium influx from the outside the cell are greater in the presence of CCh than in the presence of CCK.
  // isDescribedBy pubmed:10352035
  // biomodels.db:MODEL9200487367
  // isVersionOf GO:0019722
  // occursIn BTO:0000028
  // hasTaxon taxonomy:9606
  // hasProperty mamo:MAMO_0000046

  // Compartments:
  compartment compartment = 1;  // CL:0002064

  // Species:
  // It is an active complex of IP3 receptor with an agonist that has activated it from an inactive state. (dephosphorylated form of I2)
  // It is a closed version of the complex.
  species $S in compartment;  // hasPart CHEBI:139109; hasPart ncit:C580; hasVersion PATO:0000608; ncit:C47881
  // It is an active complex of IP3 receptor with an agonist that has activated it from an inactive state.
  // It is an open version of the complex.
  species O in compartment = 0;  // hasPart ncit:C580; hasPart CHEBI:139109; hasVersion PATO:0000610; ncit:C47881
  // It is an inactive complex of IP3 receptor with an antogonist that has in/de-activated it.
  // It also has a phosphorylation site.
  species I1 in compartment = 0;  // hasInstance ncit:C580 CHEBI:131186 ncit:C47881 ncit:C16983; hasPart ncit:C580; hasPart CHEBI:131186; ncit:C47881
  // It is an inactive complex of IP3 receptor with an antogonist that has in/de-activated it.
  // It is phosphorylated form of complex A.
  species I2 in compartment = 1;  // hasPart CHEBI:131186; hasPart ncit:C580; ncit:C47881; hasProperty ncit:C20612
  // It corresponds to the Calcium concentration in the cell.
  species c in compartment = 0; c is "Ca2+";  // OBA:0000003; hasProperty GO:0070679

  // Parameters:
  // k1 is a function of [Ca2+]i.It corresponds to the Shut_to_Open reaction.
  k1 has unit_0;  // ncit:C94967
  // α1 is the maximum rate of the S to O transition.
  alpha1 = 40 unit_0;  // ncit:C47906; hasProperty ncit:C25564
  // β1 is the Ca2+ concentration at which the rate of the S to O transition is half its maximum rate
  beta1 = 0.8 unit_1;  // ncit:C47823
  // The rate constant k4 models the action of a kinase (possibly PKA) on the IP3R, and is assumed to be dependent on the type of agonist used to initiate Ca2+ oscillations.
  k4 has unit_2;  // ncit:C94967
  // α4 denotes the maximum rate of the reaction attained at high IP3 concentration.
  alpha4 = 0.06 unit_2;  // ncit:C47906; hasProperty ncit:C25564
  // p denotes the IP3 concentration at any instance.
  p has unit_3;  // ncit:C41185
  // β4 denotes the value of IP3 concentration (p) at which the rate is half maximal.
  beta4 = 0.01 unit_1;  // ncit:C47823
  // Denotes time
  T = 0 unit_4; T is "time";  // ncit:C25207
  // Denotes time constant for the decay of IP3 concentration.
  time_constant = 100 unit_4;
  // kflux is the maximum rate of Ca2+ release from the ER.
  kflux = 22 unit_0;  // ncit:C72076; hasProperty ncit:C25564
  // Vp represents the maximum rate of pumping.
  Vp = 0.2 unit_0;  // ncit:C47906; hasProperty ncit:C25564
  // It corresponds to rate constant of the Inactivated1_to_Shut reaction.
  k3 = 0.5 unit_2;  // ncit:C94967
  // It corresponds to rate constant of the Open_to_Inactivated1 reaction.
  k2 = 0.5 unit_2;  // ncit:C94967
  // It corresponds to rate constant of the Open_to_Shut reaction.
  k_1 = 0.88 unit_2; k_1 is "k-1";  // ncit:C94967
  // Jinflux is an adjustable parameter that represents a constant rate of Ca2+ influx into the cytosol
  Jinflux_0 = 0.025 unit_0;  // ncit:C47905
  // Kp is the [Ca2+]i for half-maximal pumping
  Kp = 0.54 unit_3;  // ncit:C47823
  // It corresponds to rate constant of the Inactivated2_to_Shut reaction.
  k5 = 0.02 unit_2;  // ncit:C94967

  // Assignment rules:
  S := 1 - (O + I1 + I2);
  k1 := alpha1*c^3/(beta1^3 + c^3);
  p := 0.6*(1 - exp(-T/time_constant));
  k4 := alpha4*p/(beta4 + p);

  // Rate rules:
  T' = 1;

  // Reactions:
  // Opening of complex (IP3+calcium). This conducts calcium currents and is responsible for calcium oscillations.
  Shut_to_Open: $S -> O; compartment*Function_for_Shut_to_Open(O, S, compartment, k1, k_1, p);  // hasPart PATO:0000608; hasPart PATO:0000610
  // Inactivation of the IP3-Calcium bound complex.
  Open_to_Inactivated1: O => I1; compartment*Function_for_Open_to_Inactivated1(O, compartment, k2);
  // Reaction where the receptor gets activated but is in shut state.
  Inactivated1_to_Shut: I1 => $S; compartment*Function_for_Inactivated1_to_Shut(I1, compartment, k3);  // BAO:0000087
  // Phosphoryltion reaction of I1 to I2 complex.
  Inactivated1_to_Inactivated2: I1 => I2; compartment*Function_for_Inactivated1_to_Inactivated2(I1, compartment, k4);  // MI:0217
  // Reaction where the receptor gets activated but is in shut state.
  Inactivated2_to_Shut: I2 => $S; compartment*Function_for_Inactivated2_to_Shut(I2, compartment, k5);  // MI:0203
  // Jrel represents the IP3-induced release of Ca2+ from the ER.
  Jrel: => c; compartment*Function_for_Jrel(O, compartment, kflux);  // modifiers: O; GO:0005220
  // Reaction corresponding to pumping calcium out of the system.
  Jpump: c => ; compartment*Function_for_Jpump(Kp, Vp, c, compartment);  // ncit:C47906
  // Reaction corresponding to the influx of calcium.
  Jinflux: => c; compartment*Function_for_Jinflux(Jinflux_0, compartment);  // ncit:C47905

  // Unit definitions:
  unit length = metre;
  unit area = metre^2;
  unit volume = litre;
  unit time = second;
  unit substance = mole;
  unit unit_0 = (1e-6 dimensionless)^0 * item * avogadro / (litre * second); unit_0 is "umol/(l*s)";
  unit unit_1 = (1e-6 dimensionless)^0 * item * avogadro; unit_1 is "umol";
  unit unit_2 = 1 / second; unit_2 is "1/s";
  unit unit_3 = (1e-6 dimensionless)^0 * item * avogadro / litre; unit_3 is "umol/l";
  unit unit_4 = second; unit_4 is "s";
end
