// SBML level 3 version 1
// dcterms:bibliographicCitation: urn:miriam:pubmed:1677807

function Rate_Law_for_R_Birth(T, k, V)
  T/(1 + k*V);
end

function Rate_Law_for_R_to_L(p, beta, R, V, z)
  p*(1 - z)*beta*R*V;
end

function Rate_Law_for_V_Creation(E, p)
  p*E;
end

function Rate_Law_for_R_to_E(p, beta, V, R, z)
  (1 - p)*(1 - z)*beta*V*R;
end

model McLean1991___Behaviour_of_HIV_in_the_presence_of_zidovudine()
  // McLean1991 - Behaviour of HIV in the presence of zidovudine
  // A new mechanism is proposed for the apparent breakthrough of HIV that occurs approximately 6 months after the commencement of therapy with zidovudine (AZT). Using a simple mathematical model of the interacting population dynamics of HIV and its major host cell in the circulation (the CD4+ lymphocyte), predicted patterns of HIV plasma viraemia in the weeks following treatment with zidovudine are generated. These are in close agreement with observed patterns despite the fact that the model contains no mechanisms for the development of drug-resistant strains of virus. It is suggested that the patterns of viral abundance observed during the first 6 months after treatment may be the result of non-linearities in the interactions between HIV and CD4+ cells, and that it is only after the first post-treatment burst of viral production that drug resistance plays an important role.
  // isDescribedBy pubmed:1677807
  // occursIn BTO:0002417
  // hasTaxon taxonomy:12721
  // hasTaxon taxonomy:9606
  // hasProperty ncit:C16118 ncit:C3108 mamo:MAMO_0000046
  // biomodels.db:MODEL1912050003 biomodels.db:BIOMD0000000967
  // model units - substance: substance, time: time, volume: volume, area: area, length: length, extent: substance

  // Compartments:
  compartment Blood = 1 volume;  // ncit:C12434

  // Species:
  species R in Blood = 100000000;  // CL:0000912
  species L in Blood = 1000000;  // CL:0000912
  species E in Blood = 0;  // CL:0000912
  species V in Blood = 7000000;  // taxonomy:12721

  // Parameters:
  u = 0.04;
  T = 200000000;
  delta = 16;
  pi = 300;
  p = 0.2 unit_0;  // ncit:C49159
  alpha = 0.288;
  k = 4.31e-6;  // ncit:C94967
  beta = 2.05e-9;  // ncit:C94967
  sigma = 3.75;
  z = 0.9;  // ncit:C88183

  // Reactions:
  R_Death: R => ; Blood*u*R;  // GO:0016265
  R_Birth: => R; Blood*Rate_Law_for_R_Birth(T, k, V);  // modifiers: V; isVersionOf GO:0042093
  R_to_L: R => L; Blood*Rate_Law_for_R_to_L(p, beta, R, V, z);  // modifiers: V; ncit:C3108
  R_to_E: R => E; Blood*Rate_Law_for_R_to_E(p, beta, V, R, z);  // modifiers: V; ncit:C3108
  L_Death: L => ; Blood*u*L;  // isVersionOf GO:0016265
  L_to_E: L => E; Blood*alpha*L;  // ncit:C160241
  E_Death: E => ; Blood*delta*E;  // isVersionOf GO:0016265
  V_Death: V => ; Blood*sigma*V;  // GO:0016265; hasProperty taxonomy:12721
  V_Creation: => V; Blood*Rate_Law_for_V_Creation(E, pi);  // modifiers: E; isVersionOf GO:0019076

  // Unit definitions:
  unit length = metre;
  unit area = metre^2;
  unit volume = 1e-3 litre;
  unit time = 86400 second;
  unit substance = item;
  unit unit_0 = dimensionless^0; unit_0 is "1";
end
