// SBML level 3 version 1
// dcterms:bibliographicCitation: urn:miriam:pubmed:32736312

function Rate_Law_for_reaction(epsilon, lambda_1, S1, I1, N1)
  epsilon*lambda_1*S1*(I1/N1);
end

function Rate_Law_for_reaction_8(S2, phi, I1, N1, epsilon, lambda_2, I2, N2)
  S2*(phi*(I1/N1) + epsilon*lambda_2*(I2/N2));
end

function Rate_Law_for_reaction_16(tau, I2, N2, epsilon, lambda_3, I3, N3, S3)
  S3*(tau*(I2/N2) + epsilon*lambda_3*(I3/N3));
end

function Rate_Law_for_reaction_24(S4, gamma, I2, N2, alpha, I3, N3, epsilon, lambda_4, I4, N4)
  S4*(gamma*(I2/N2) + alpha*(I3/N3) + epsilon*lambda_4*(I4/N4));
end

model Cuadros2020___SIHRD_spatiotemporal_model_of_COVID_19_transmission_in_Ohio()
  // Cuadros2020 - SIHRD spatiotemporal model of COVID-19 transmission in Ohio
  // The role of geospatial disparities in the dynamics of the COVID-19 pandemic is poorly understood. We developed a spatially-explicit mathematical model to simulate transmission dynamics of COVID-19 disease infection in relation with the uneven distribution of the healthcare capacity in Ohio, U.S. The results showed substantial spatial variation in the spread of the disease, with localized areas showing marked differences in disease attack rates. Higher COVID-19 attack rates experienced in some highly connected and urbanized areas (274 cases per 100,000 people) could substantially impact the critical health care response of these areas regardless of their potentially high healthcare capacity compared to more rural and less connected counterparts (85 cases per 100,000). Accounting for the spatially uneven disease diffusion linked to the geographical distribution of the critical care resources is essential in designing effective prevention and control programmes aimed at reducing the impact of COVID-19 pandemic.
  // isDescribedBy pubmed:32736312
  // isVersionOf DOID:0080600
  // hasTaxon taxonomy:2697049 taxonomy:9606
  // hasProperty mamo:MAMO_0000028
  // biomodels.db:MODEL2010270001 biomodels.db:BIOMD0000000969
  // model units - substance: substance, time: time, volume: volume, area: area, length: length, extent: substance

  // Compartments:
  compartment Counties_with_airports = 1 volume;  // isVersionOf ncit:C111076; isVersionOf ncit:C43482; hasProperty omit:0027506
  compartment Counties_neighbouring_counties_with_airports = 1 volume;  // isVersionOf ncit:C43482; isVersionOf ncit:C111076; hasProperty ncit:C25633
  compartment Counties_with_highways = 1 volume;  // isVersionOf ncit:C111076; isVersionOf ncit:C43482
  compartment Low_risk_counties = 1 volume;  // isVersionOf ncit:C111076; isVersionOf ncit:C43482

  // Species:
  species Susceptible_Counties_with_airports in Counties_with_airports = 4052876;  // ido:0000514; ncit:C171133
  species Infected_Counties_with_airports in Counties_with_airports = 30;  // ncit:C171133; ido:0000511
  species Hospitalised_Counties_with_airports in Counties_with_airports = 0;  // ncit:C25179; isVersionOf ido:0000511; isVersionOf ncit:C171133
  species ICU_Counties_with_airports in Counties_with_airports = 0;  // ncit:C25179; ncit:C53511; isVersionOf ncit:C171133; isVersionOf ido:0000511
  species Deceased_Counties_with_airports in Counties_with_airports = 0;  // ncit:C28554
  species Recovered_Counties_with_airports in Counties_with_airports = 0;  // ido:0000621; isVersionOf ncit:C171133
  species Discharged_Counties_with_airports in Counties_with_airports = 0;  // ncit:C154475
  species Susceptible_Counties_neighbouring_counties_with_airports in Counties_neighbouring_counties_with_airports = 4431673;  // ido:0000514; ncit:C171133
  species Infected_Counties_neighbouring_counties_with_airports in Counties_neighbouring_counties_with_airports = 26;  // ncit:C171133; ido:0000511
  species Hospitalised_Counties_neighbouring_counties_with_airports in Counties_neighbouring_counties_with_airports = 0;  // ncit:C25179; isVersionOf ncit:C171133; isVersionOf ido:0000511
  species ICU_Counties_neighbouring_counties_with_airports in Counties_neighbouring_counties_with_airports = 0;  // ncit:C53511; ncit:C25179; isVersionOf ido:0000511; isVersionOf ncit:C171133
  species Deceased_Counties_neighbouring_counties_with_airports in Counties_neighbouring_counties_with_airports = 0;  // ncit:C28554
  species Recovered_Counties_neighbouring_counties_with_airports in Counties_neighbouring_counties_with_airports = 0;  // ido:0000621; isVersionOf ncit:C171133
  species Discharged_Counties_neighbouring_counties_with_airports in Counties_neighbouring_counties_with_airports = 0;  // ncit:C154475
  species Susceptible_Counties_with_highways in Counties_with_highways = 1811059;  // ido:0000514; ncit:C171133
  species Infected_Counties_with_highways in Counties_with_highways = 10;  // ido:0000511; isVersionOf ncit:C171133
  species Hospitalised_Counties_with_highways in Counties_with_highways = 0;  // ncit:C25179; isVersionOf ido:0000511; isVersionOf ncit:C171133
  species ICU_Counties_with_highways in Counties_with_highways = 0;  // ncit:C25179; ncit:C53511; isVersionOf ncit:C171133; isVersionOf ido:0000511
  species Deceased_Counties_with_highways in Counties_with_highways = 0;  // ncit:C28554
  species Recovered_Counties_with_highways in Counties_with_highways = 0;  // ido:0000621; isVersionOf ncit:C171133
  species Discharged_Counties_with_highways in Counties_with_highways = 0;  // ncit:C154475
  species Susceptible_Low_risk_counties in Low_risk_counties = 1269942;  // ncit:C171133; ido:0000514
  species Infected_Low_risk_counties in Low_risk_counties = 6;  // ido:0000511; isVersionOf ncit:C171133
  species Hospitalised_Low_risk_counties in Low_risk_counties = 0;  // ncit:C25179; isVersionOf ncit:C171133; isVersionOf ido:0000511
  species ICU_Low_risk_counties in Low_risk_counties = 0;  // ncit:C25179; ncit:C53511; isVersionOf ido:0000511; isVersionOf ncit:C171133
  species Deceased_Low_risk_counties in Low_risk_counties = 0;  // ncit:C28554
  species Recovered_Low_risk_counties in Low_risk_counties = 0;  // ido:0000621; isVersionOf ncit:C171133
  species Discharged_Low_risk_counties in Low_risk_counties = 0;  // ncit:C154475

  // Parameters:
  lambda_Counties_with_airports = 0.41;
  lambda_Counties_neighbouring_counties_with_airports = 0.34;
  lambda_Counties_with_highways = 0.23;
  lambda_Low_risk_counties = 0.13;
  epsilon = 1;
  delta = 0.229885;
  eta_Counties_with_airports = 0.05;
  eta_Counties_neighbouring_counties_with_airports = 0.07;
  eta_Counties_with_highways = 0.07;
  eta_Low_risk_counties = 0.14;
  omega_Counties_with_airports = 0.04;
  omega_Counties_neighbouring_counties_with_airports = 0.06;
  omega_Counties_with_highways = 0.04;
  omega_Low_risk_counties = 0.07;
  xi = 0.06;
  sigma = 0.08;
  mu_Counties_with_airports = 0.22;
  mu_Counties_neighbouring_counties_with_airports = 0.17;
  mu_Counties_with_highways = 0.05;
  mu_Low_risk_counties = 0.25;
  psi = 0.01;
  phi = 0.04;
  tau = 0.08;
  gamma = 0.02;
  alpha = 0.03;
  Metabolite_11 = Deceased_Counties_neighbouring_counties_with_airports; Metabolite_11 is "Initial for Deceased_Counties_neighbouring_counties_with_airports";
  Metabolite_13 = Discharged_Counties_neighbouring_counties_with_airports; Metabolite_13 is "Initial for Discharged_Counties_neighbouring_counties_with_airports";
  Metabolite_9 = Hospitalised_Counties_neighbouring_counties_with_airports; Metabolite_9 is "Initial for Hospitalised_Counties_neighbouring_counties_with_airports";
  Metabolite_10 = ICU_Counties_neighbouring_counties_with_airports; Metabolite_10 is "Initial for ICU_Counties_neighbouring_counties_with_airports";
  Metabolite_8 = Infected_Counties_neighbouring_counties_with_airports; Metabolite_8 is "Initial for Infected_Counties_neighbouring_counties_with_airports";
  Metabolite_12 = Recovered_Counties_neighbouring_counties_with_airports; Metabolite_12 is "Initial for Recovered_Counties_neighbouring_counties_with_airports";
  Metabolite_7 = Susceptible_Counties_neighbouring_counties_with_airports; Metabolite_7 is "Initial for Susceptible_Counties_neighbouring_counties_with_airports";
  Metabolite_4 = Deceased_Counties_with_airports; Metabolite_4 is "Initial for Deceased_Counties_with_airports";
  Metabolite_6 = Discharged_Counties_with_airports; Metabolite_6 is "Initial for Discharged_Counties_with_airports";
  Metabolite_2 = Hospitalised_Counties_with_airports; Metabolite_2 is "Initial for Hospitalised_Counties_with_airports";
  Metabolite_3 = ICU_Counties_with_airports; Metabolite_3 is "Initial for ICU_Counties_with_airports";
  Metabolite_1 = Infected_Counties_with_airports; Metabolite_1 is "Initial for Infected_Counties_with_airports";
  Metabolite_5 = Recovered_Counties_with_airports; Metabolite_5 is "Initial for Recovered_Counties_with_airports";
  Metabolite_0 = Susceptible_Counties_with_airports; Metabolite_0 is "Initial for Susceptible_Counties_with_airports";
  Metabolite_18 = Deceased_Counties_with_highways; Metabolite_18 is "Initial for Deceased_Counties_with_highways";
  Metabolite_20 = Discharged_Counties_with_highways; Metabolite_20 is "Initial for Discharged_Counties_with_highways";
  Metabolite_16 = Hospitalised_Counties_with_highways; Metabolite_16 is "Initial for Hospitalised_Counties_with_highways";
  Metabolite_17 = ICU_Counties_with_highways; Metabolite_17 is "Initial for ICU_Counties_with_highways";
  Metabolite_15 = Infected_Counties_with_highways; Metabolite_15 is "Initial for Infected_Counties_with_highways";
  Metabolite_19 = Recovered_Counties_with_highways; Metabolite_19 is "Initial for Recovered_Counties_with_highways";
  Metabolite_14 = Susceptible_Counties_with_highways; Metabolite_14 is "Initial for Susceptible_Counties_with_highways";
  Metabolite_25 = Deceased_Low_risk_counties; Metabolite_25 is "Initial for Deceased_Low_risk_counties";
  Metabolite_27 = Discharged_Low_risk_counties; Metabolite_27 is "Initial for Discharged_Low_risk_counties";
  Metabolite_23 = Hospitalised_Low_risk_counties; Metabolite_23 is "Initial for Hospitalised_Low_risk_counties";
  Metabolite_24 = ICU_Low_risk_counties; Metabolite_24 is "Initial for ICU_Low_risk_counties";
  Metabolite_22 = Infected_Low_risk_counties; Metabolite_22 is "Initial for Infected_Low_risk_counties";
  Metabolite_26 = Recovered_Low_risk_counties; Metabolite_26 is "Initial for Recovered_Low_risk_counties";
  Metabolite_21 = Susceptible_Low_risk_counties; Metabolite_21 is "Initial for Susceptible_Low_risk_counties";

  // Assignment rules:
  Population_Counties_with_airports := Metabolite_3 + Metabolite_2 + Metabolite_1 + Metabolite_4 + Metabolite_5 + Metabolite_6 + Metabolite_0;
  Population_Counties_with_highways := Metabolite_17 + Metabolite_16 + Metabolite_15 + Metabolite_18 + Metabolite_19 + Metabolite_20 + Metabolite_14;
  Cumulative_cases_Counties_with_airports := Infected_Counties_with_airports + Recovered_Counties_with_airports + Discharged_Counties_with_airports + Deceased_Counties_with_airports;
  Population_Low_risk_counties := Metabolite_24 + Metabolite_23 + Metabolite_22 + Metabolite_25 + Metabolite_26 + Metabolite_27 + Metabolite_21;
  Population_Counties_neighbouring_counties_with_airports := Metabolite_10 + Metabolite_9 + Metabolite_8 + Metabolite_11 + Metabolite_12 + Metabolite_13 + Metabolite_7;
  Cumulative_cases_Low_risk_counties := Deceased_Low_risk_counties + Recovered_Low_risk_counties + Discharged_Low_risk_counties + Infected_Low_risk_counties;
  Cumulative_cases_Counties_neighbouring_counties_with_airports := Deceased_Counties_neighbouring_counties_with_airports + Recovered_Counties_neighbouring_counties_with_airports + Discharged_Counties_neighbouring_counties_with_airports + Infected_Counties_neighbouring_counties_with_airports;
  Total_hospitalisations := Deceased_Counties_with_airports + Discharged_Counties_neighbouring_counties_with_airports + Deceased_Counties_neighbouring_counties_with_airports + Deceased_Counties_with_highways + Deceased_Low_risk_counties + Discharged_Counties_with_airports + Discharged_Counties_with_highways + Discharged_Low_risk_counties;
  Cumulative_cases_Counties_with_highways := Deceased_Counties_with_highways + Recovered_Counties_with_highways + Discharged_Counties_with_highways + Infected_Counties_with_highways;
  Total_cumulative_cases := Cumulative_cases_Counties_with_airports + Cumulative_cases_Counties_neighbouring_counties_with_airports + Cumulative_cases_Counties_with_highways + Cumulative_cases_Low_risk_counties;
  Total_deaths := Deceased_Counties_with_airports + Deceased_Counties_neighbouring_counties_with_airports + Deceased_Counties_with_highways + Deceased_Low_risk_counties;

  // Reactions:
  Susceptible_to_Infected_Counties_with_airports: Susceptible_Counties_with_airports => Infected_Counties_with_airports; Counties_with_airports*Rate_Law_for_reaction(epsilon, lambda_Counties_with_airports, Susceptible_Counties_with_airports, Infected_Counties_with_airports, Population_Counties_with_airports);  // ncit:C128320; isVersionOf ncit:C171133
  Infected_to_Hospitalised_Counties_with_airports: Infected_Counties_with_airports => Hospitalised_Counties_with_airports; Counties_with_airports*eta_Counties_with_airports*Infected_Counties_with_airports;  // ncit:C25179; isVersionOf ido:0000511; isVersionOf ncit:C171133
  Infected_to_Deceased_Counties_with_airports: Infected_Counties_with_airports => Deceased_Counties_with_airports; Counties_with_airports*psi*Infected_Counties_with_airports;  // ncit:C28554
  Infected_to_Recovered_Counties_with_airports: Infected_Counties_with_airports => Recovered_Counties_with_airports; Counties_with_airports*delta*Infected_Counties_with_airports;  // ido:0000621; isVersionOf ncit:C71133
  Hospitalised_to_ICU_Counties_with_airports: Hospitalised_Counties_with_airports => ICU_Counties_with_airports; Counties_with_airports*omega_Counties_with_airports*Hospitalised_Counties_with_airports;  // ncit:C171454; isVersionOf ncit:C171133
  Hospitalised_to_Discharged_Counties_with_airports: Hospitalised_Counties_with_airports => Discharged_Counties_with_airports; Counties_with_airports*sigma*Hospitalised_Counties_with_airports;  // omit:0011345
  ICU_to_Hospitalised_Counties_with_airports: ICU_Counties_with_airports => Hospitalised_Counties_with_airports; Counties_with_airports*xi*ICU_Counties_with_airports;  // ncit:C94226; isVersionOf ido:0000511; isVersionOf ncit:C171133
  ICU_to_Deceased_Counties_with_airports: ICU_Counties_with_airports => Deceased_Counties_with_airports; Counties_with_airports*mu_Counties_with_airports*ICU_Counties_with_airports;  // ncit:C28554
  Susceptible_to_Infected_Counties_neighbouring_counties_with_airports: Susceptible_Counties_neighbouring_counties_with_airports => Infected_Counties_neighbouring_counties_with_airports; Rate_Law_for_reaction_8(Susceptible_Counties_neighbouring_counties_with_airports, phi, Infected_Counties_with_airports, Population_Counties_with_airports, epsilon, lambda_Counties_neighbouring_counties_with_airports, Infected_Counties_neighbouring_counties_with_airports, Population_Counties_neighbouring_counties_with_airports);  // modifiers: Infected_Counties_with_airports; ncit:C128320; isVersionOf ncit:C171133
  Infected_to_Hospitalised_Counties_neighbouring_counties_with_airports: Infected_Counties_neighbouring_counties_with_airports => Hospitalised_Counties_neighbouring_counties_with_airports; Counties_neighbouring_counties_with_airports*eta_Counties_neighbouring_counties_with_airports*Infected_Counties_neighbouring_counties_with_airports;  // ncit:C25179; isVersionOf ido:0000511; isVersionOf ncit:C171133
  Infected_to_Deceased_Counties_neighbouring_counties_with_airports: Infected_Counties_neighbouring_counties_with_airports => Deceased_Counties_neighbouring_counties_with_airports; Counties_neighbouring_counties_with_airports*psi*Infected_Counties_neighbouring_counties_with_airports;  // ncit:C28554
  Infected_to_Recovered_Counties_neighbouring_counties_with_airports: Infected_Counties_neighbouring_counties_with_airports => Recovered_Counties_neighbouring_counties_with_airports; Counties_neighbouring_counties_with_airports*delta*Infected_Counties_neighbouring_counties_with_airports;  // ido:0000621; isVersionOf ncit:C171133
  Hospitalised_to_ICU_Counties_neighbouring_counties_with_airports: Hospitalised_Counties_neighbouring_counties_with_airports => ICU_Counties_neighbouring_counties_with_airports; Counties_neighbouring_counties_with_airports*omega_Counties_neighbouring_counties_with_airports*Hospitalised_Counties_neighbouring_counties_with_airports;  // ncit:C171454; isVersionOf ncit:C171133
  Hospitalised_to_Discharged_Counties_neighbouring_counties_with_airports: Hospitalised_Counties_neighbouring_counties_with_airports => Discharged_Counties_neighbouring_counties_with_airports; Counties_neighbouring_counties_with_airports*sigma*Hospitalised_Counties_neighbouring_counties_with_airports;  // omit:0011345
  ICU_to_Hospitalised_Counties_neighbouring_counties_with_airports: ICU_Counties_neighbouring_counties_with_airports => Hospitalised_Counties_neighbouring_counties_with_airports; Counties_neighbouring_counties_with_airports*xi*ICU_Counties_neighbouring_counties_with_airports;  // ncit:C94226; isVersionOf ncit:C171133; isVersionOf ido:0000511
  ICU_to_Deceased_Counties_neighbouring_counties_with_airports: ICU_Counties_neighbouring_counties_with_airports => Deceased_Counties_neighbouring_counties_with_airports; Counties_neighbouring_counties_with_airports*mu_Counties_neighbouring_counties_with_airports*ICU_Counties_neighbouring_counties_with_airports;  // ncit:C28554
  Susceptible_to_Infected_Counties_with_highways: Susceptible_Counties_with_highways => Infected_Counties_with_highways; Rate_Law_for_reaction_16(tau, Infected_Counties_neighbouring_counties_with_airports, Population_Counties_neighbouring_counties_with_airports, epsilon, lambda_Counties_with_highways, Infected_Counties_with_highways, Population_Counties_with_highways, Susceptible_Counties_with_highways);  // modifiers: Infected_Counties_neighbouring_counties_with_airports; ncit:C128320; isVersionOf ncit:C171133
  Infected_to_Hospitalised_Counties_with_highways: Infected_Counties_with_highways => Hospitalised_Counties_with_highways; Counties_with_highways*eta_Counties_with_highways*Infected_Counties_with_highways;  // ncit:C25179; isVersionOf ncit:C171133; isVersionOf ido:0000511
  Infected_to_Deceased_Counties_with_highways: Infected_Counties_with_highways => Deceased_Counties_with_highways; Counties_with_highways*psi*Infected_Counties_with_highways;  // ncit:C28554
  Infected_to_Recovered_Counties_with_highways: Infected_Counties_with_highways => Recovered_Counties_with_highways; Counties_with_highways*delta*Infected_Counties_with_highways;  // ido:0000621; isVersionOf ncit:C171133
  Hospitalised_to_ICU_Counties_with_highways: Hospitalised_Counties_with_highways => ICU_Counties_with_highways; Counties_with_highways*omega_Counties_with_highways*Hospitalised_Counties_with_highways;  // ncit:C171454; isVersionOf ncit:C171133
  Hospitalised_to_Discharged_Counties_with_highways: Hospitalised_Counties_with_highways => Discharged_Counties_with_highways; Counties_with_highways*sigma*Hospitalised_Counties_with_highways;  // omit:0011345
  ICU_to_Hospitalised_Counties_with_highways: ICU_Counties_with_highways => Hospitalised_Counties_with_highways; Counties_with_highways*xi*ICU_Counties_with_highways;  // ncit:C94226; isVersionOf ido:0000511; isVersionOf ncit:C171133
  ICU_to_Deceased_Counties_with_highways: ICU_Counties_with_highways => Deceased_Counties_with_highways; Counties_with_highways*mu_Counties_with_highways*ICU_Counties_with_highways;  // ncit:C28554
  Susceptible_to_Infected_Low_risk_counties: Susceptible_Low_risk_counties => Infected_Low_risk_counties; Rate_Law_for_reaction_24(Susceptible_Low_risk_counties, gamma, Infected_Counties_neighbouring_counties_with_airports, Population_Counties_neighbouring_counties_with_airports, alpha, Infected_Counties_with_highways, Population_Counties_with_highways, epsilon, lambda_Low_risk_counties, Infected_Low_risk_counties, Population_Low_risk_counties);  // modifiers: Infected_Counties_neighbouring_counties_with_airports, Infected_Counties_with_highways; ncit:C128320; isVersionOf ncit:C171133
  Infected_to_Hospitalised_Low_risk_counties: Infected_Low_risk_counties => Hospitalised_Low_risk_counties; Low_risk_counties*eta_Low_risk_counties*Infected_Low_risk_counties;  // ncit:C25179; isVersionOf ido:0000511; isVersionOf ncit:C171133
  Infected_to_Deceased_Low_risk_counties: Infected_Low_risk_counties => Deceased_Low_risk_counties; Low_risk_counties*psi*Infected_Low_risk_counties;  // ncit:C28554
  Infected_to_Recovered_Low_risk_counties: Infected_Low_risk_counties => Recovered_Low_risk_counties; Low_risk_counties*delta*Infected_Low_risk_counties;  // ido:0000621; isVersionOf ncit:C171133
  Hospitalised_to_ICU_Low_risk_counties: Hospitalised_Low_risk_counties => ICU_Low_risk_counties; Low_risk_counties*omega_Low_risk_counties*Hospitalised_Low_risk_counties;  // ncit:C171454; isVersionOf ncit:C171133
  Hospitalised_to_Discharged_Low_risk_counties: Hospitalised_Low_risk_counties => Discharged_Low_risk_counties; Low_risk_counties*sigma*Hospitalised_Low_risk_counties;  // omit:0011345
  ICU_to_Hospitalised_Low_risk_counties: ICU_Low_risk_counties => Hospitalised_Low_risk_counties; Low_risk_counties*xi*ICU_Low_risk_counties;  // ncit:C94226; isVersionOf ncit:C171133; isVersionOf ido:0000511
  ICU_to_Deceased_Low_risk_counties: ICU_Low_risk_counties => Deceased_Low_risk_counties; Low_risk_counties*mu_Low_risk_counties*ICU_Low_risk_counties;  // ncit:C28554

  // Events:
  Lockdown: at (time > 22), persistent=false: epsilon = 0.75;

  // Unit definitions:
  unit length = metre;
  unit area = metre^2;
  unit volume = 1e-3 litre;
  unit time = 86400 second;
  unit substance = item;
end
