// SBML level 3 version 1
// dcterms:bibliographicCitation: urn:miriam:pubmed:33303925

function Rate_Law_for_reaction(z, beta_t, S, I, N)
  z*beta_t*S*I/N;
end

model Law2020___SIR_model_of_COVID_19_transmission_in_Malyasia_with_time_varying_parameters()
  // Law2020 - SIR model of COVID-19 transmission in Malyasia with time-varying parameters
  // The susceptible-infectious-removed (SIR) model offers the simplest framework to study transmission dynamics of COVID-19, however, it does not factor in its early depleting trend observed during a lockdown. We modified the SIR model to specifically simulate the early depleting transmission dynamics of COVID-19 to better predict its temporal trend in Malaysia. The classical SIR model was fitted to observed total (I total), active (I) and removed (R) cases of COVID-19 before lockdown to estimate the basic reproduction number. Next, the model was modified with a partial time-varying force of infection, given by a proportionally depleting transmission coefficient, [Formula: see text] and a fractional term, z. The modified SIR model was then fitted to observed data over 6 weeks during the lockdown. Model fitting and projection were validated using the mean absolute percent error (MAPE). The transmission dynamics of COVID-19 was interrupted immediately by the lockdown. The modified SIR model projected the depleting temporal trends with lowest MAPE for I total, followed by I, I daily and R. During lockdown, the dynamics of COVID-19 depleted at a rate of 4.7% each day with a decreased capacity of 40%. For 7-day and 14-day projections, the modified SIR model accurately predicted I total, I and R. The depleting transmission dynamics for COVID-19 during lockdown can be accurately captured by time-varying SIR model. Projection generated based on observed data is useful for future planning and control of COVID-19.
  // isDescribedBy pubmed:33303925
  // DOID:0080600
  // hasTaxon taxonomy:9606 taxonomy:2697049
  // hasProperty mamo:MAMO_0000028
  // biomodels.db:MODEL2012240001 biomodels.db:BIOMD0000000982
  // model units - substance: substance, time: time, volume: volume, area: area, length: length, extent: substance

  // Compartments:
  compartment Malayasia = 1 volume;  // ncit:C16814

  // Species:
  species Susceptible in Malayasia = 32680000;  // ido:0000514; ncit:C171133
  species Infected in Malayasia = 728;  // ido:0000511; ncit:C171133
  species Removed in Malayasia = 62;  // ido:0000621; ncit:C171133

  // Parameters:
  beta_0 = 0.4114;
  Trigger_Stage_1 = 0;
  Trigger_Stage_2 = 0;
  Trigger_Stage_3 = 1;

  // Assignment rules:
  delta := Trigger_Stage_1*0.025 + Trigger_Stage_2*0.042 + Trigger_Stage_3*0.05;
  p := Trigger_Stage_1*0.0784 + Trigger_Stage_2*0.045 + Trigger_Stage_3*0.0466;
  z := Trigger_Stage_1*0.4374 + Trigger_Stage_2*0.3914 + Trigger_Stage_3*0.4047;
  N := Infected + Removed + Susceptible;
  I_total := Infected + Removed;
  beta := beta_0*(1 - p)^time;

  // Reactions:
  Susceptible_to_Infected: Susceptible => Infected; Malayasia*Rate_Law_for_reaction(z, beta, Susceptible, Infected, N);  // ncit:C128320
  Infected_to_Removed: Infected => Removed; Malayasia*delta*Infected;  // ncit:C25746

  // Unit definitions:
  unit length = metre;
  unit area = metre^2;
  unit volume = 1e-3 litre;
  unit time = 86400 second;
  unit substance = item;
end
