// SBML level 3 version 1
// dcterms:bibliographicCitation: urn:miriam:pubmed:32958091

function Rate_Law_for_reaction(m_t, S_c)
  (1 - m_t)*S_c;
end

function Rate_Law_for_reaction_2(sigma, beta, n, I_r, I_u, S_u)
  (1 - sigma)*beta*(n*I_r + I_u)*S_u;
end

function Rate_Law_for_reaction_5(mu, f, E)
  mu*f*E;
end

function Rate_Law_for_reaction_6(mu, f, E)
  mu*(1 - f)*E;
end

function Rate_Law_for_reaction_4(theta, lambda, Q)
  theta*lambda*Q;
end

function Rate_Law_for_reaction_3(sigma, beta, n, I_r, I_q, S_u)
  sigma*beta*(n*I_r + I_q)*S_u;
end

function Rate_Law_for_Quarantined_to_Susceptible_unconfined(theta, lambda, Q)
  theta*(1 - lambda)*Q;
end

model Zongo2020___model_of_COVID_19_transmission_dynamics_under_containement_measures_in_France()
  // Zongo2020 - model of COVID-19 transmission dynamics under containment measures in France
  // The main objective of this paper is to address the following question: are the containment measures imposed by most of the world governments effective and sufficient to stop the epidemic of COVID-19 beyond the lock-down period? In this paper, we propose a mathematical model which allows us to investigate and analyse this problem. We show by means of the reproductive number, R0 that the containment measures appear to have slowed the growth of the outbreak. Nevertheless, these measures remain only effective as long as a very large fraction of population, p, greater than the critical value 1 − 1/R0 remains confined. Using French current data, we give some simulation experiments with five scenarios including: (i) the validation of model with p estimated to 93%, (ii) the study of the effectiveness of containment measures, (iii) the study of the effectiveness of the large-scale testing, (iv) the study of the social distancing and wearing masks measures and (v) the study taking into account the combination of the large-scale test of detection of infected individuals and the social distancing with linear progressive easing of restrictions. The latter scenario was shown to be effective at overcoming the outbreak if the transmission rate decreases to 75% and the number of tests of detection is multiplied by three. We also noticed that if the measures studied in our five scenarios are taken separately then the second wave might occur at least as far as the parameter values remain unchanged.
  // isDescribedBy pubmed:32958091
  // DOID:0080600
  // hasTaxon taxonomy:9606 taxonomy:2697049
  // hasProperty mamo:MAMO_0000028
  // biomodels.db:MODEL2101150002 biomodels.db:BIOMD0000000983
  // model units - substance: substance, time: time, volume: volume, area: area, length: length, extent: substance

  // Compartments:
  compartment _1 = 1 volume; _1 is "France";  // ncit:C16592

  // Species:
  species S_c in _1 = 0; S_c is "Susceptible_confined";  // ido:0000514; hasProperty ncit:C25549
  species S_u in _1 = 66990000; S_u is "Susceptible_unconfined";  // ido:0000514
  species E in _1 = 112; E is "Exposed";  // ido:0000514; ncit:C171133; hasProperty ido:0000597
  species I_r in _1 = 12; I_r is "Infected_reported";  // ncit:C171133; ido:0000511
  species I_u in _1 = 50; I_u is "Infected_unreported";  // ido:0000511; ncit:C171133; hasProperty ncit:C43234
  species R in _1 = 0; R is "Recovered";  // hasProperty ido:0000621
  species Q in _1 = 36; Q is "Quarantined";  // ido:0000514; hasProperty ncit:C71902

  // Parameters:
  p = 0.93;
  f = 0.2;
  n = 0.5;
  lambda = 0.3;
  q = 0.83;
  sigma = 0.2;
  beta = 2.115e-8;
  mu = 0.2;
  eta_r = 0.1;
  eta_u = 0.25;
  theta = 0.07142857;
  tau_1 = 21;
  tau_2 = 47;
  tau_3 = 76;
  tau_f = 189;
  m_t_phase_1 = 0; m_t_phase_1 is "trigger_phase_1";
  m_t_phase_2 = 0; m_t_phase_2 is "trigger_phase_2";
  m_t_phase_3 = 0; m_t_phase_3 is "trigger_phase_3";

  // Assignment rules:
  b := -p/(tau_f - tau_3);
  a := -ln(1 - p)/(tau_2 - tau_1);
  m_t := 0 + m_t_phase_1*(1 - exp(-a*(time - tau_1))) + m_t_phase_2*p + m_t_phase_3*(p + b*(time - tau_3));

  // Reactions:
  reaction: S_c => S_u; _1*Rate_Law_for_reaction(m_t, S_c); reaction is "Susceptible_confined_to_Susceptible_unconfined";  // ncit:C42882
  reaction_1: S_u => S_c; _1*m_t*S_u; reaction_1 is "Susceptible_unconfined_to_Susceptible_confined";  // ncit:C25549
  reaction_2: S_u => E; _1*Rate_Law_for_reaction_2(sigma, beta, n, I_r, I_u, S_u); reaction_2 is "Susceptible_unconfined_to_Exposed";  // modifiers: I_r, I_u; ido:0000597
  reaction_3: S_u => Q; _1*Rate_Law_for_reaction_3(sigma, beta, n, I_r, I_u, S_u); reaction_3 is "Susceptible_unconfined_to_Quarantined";  // modifiers: I_r, I_u; ncit:C71902
  Quarantined_to_Infected_reported: Q => I_r; _1*Rate_Law_for_reaction_4(theta, lambda, Q);  // ncit:C128320; ncit:C171133
  Exposed_to_Infected_reported: E => I_r; _1*Rate_Law_for_reaction_5(mu, f, E);  // ncit:C171133; ncit:C128320
  Exposed_to_Infected_unreported: E => I_u; _1*Rate_Law_for_reaction_6(mu, f, E);  // ncit:C128320; ncit:C171133
  Infected_reported_to_Recovered: I_r => R; _1*eta_r*I_r;  // ncit:C25746
  Infected_unreported_to_Recovered: I_u => R; _1*eta_u*I_u;  // ncit:C25746
  reaction_9: Q => S_u; _1*Rate_Law_for_Quarantined_to_Susceptible_unconfined(theta, lambda, Q); reaction_9 is "Quarantined_to_Susceptible_unconfined";  // ncit:C42882

  // Events:
  Phase_1: at (time > tau_1), persistent=false: m_t_phase_1 = 1;
  Phase_2: at (time > tau_2), persistent=false: m_t_phase_1 = 0, m_t_phase_2 = 1;
  Phase_3: at (time > tau_3), persistent=false: m_t_phase_2 = 0, m_t_phase_3 = 1;
  End_phase: at (time > tau_f), persistent=false: m_t_phase_3 = 0;

  // Unit definitions:
  unit length = metre;
  unit area = metre^2;
  unit volume = 1e-3 litre;
  unit time = 86400 second;
  unit substance = item;
end
