// SBML level 3 version 1

model dex_body()
  // model units - substance: mmole, time: min, volume: litre, area: m2, length: m, extent: mmole

  // Compartments:
  compartment Vre; Vre has litre; Vre is "rest of body";
  compartment Vgu; Vgu has litre; Vgu is "gut";
  compartment Vki; Vki has litre; Vki is "kidney";
  compartment Vli; Vli has litre; Vli is "liver";
  compartment Vlu; Vlu has litre; Vlu is "lung";
  compartment Vsp; Vsp has litre; Vsp is "spleen";
  compartment Vpa; Vpa has litre; Vpa is "pancreas";
  compartment Vve; Vve has litre; Vve is "venous blood";
  compartment Var; Var has litre; Var is "arterial blood";
  compartment Vurine = 1 litre;
  compartment Vfeces = 1 litre;
  compartment Vpo; Vpo has litre; Vpo is "portal plasma";
  compartment Vhv; Vhv has litre; Vhv is "hepatic venous plasma";
  compartment Vgu_tissue; Vgu_tissue has litre;
  compartment Vgu_plasma; Vgu_plasma has litre;
  compartment Vki_tissue; Vki_tissue has litre;
  compartment Vki_plasma; Vki_plasma has litre;
  compartment Vli_tissue; Vli_tissue has litre;
  compartment Vli_plasma; Vli_plasma has litre;
  compartment Vlu_tissue; Vlu_tissue has litre;
  compartment Vlu_plasma; Vlu_plasma has litre;
  compartment Vpa_tissue; Vpa_tissue has litre;
  compartment Vpa_plasma; Vpa_plasma has litre;
  compartment Vsp_tissue; Vsp_tissue has litre;
  compartment Vsp_plasma; Vsp_plasma has litre;
  compartment Vre_tissue; Vre_tissue has litre;
  compartment Vre_plasma; Vre_plasma has litre;

  // Species:
  species Cgu_plasma_dex in Vgu_plasma = 0; Cgu_plasma_dex is "dextormethorphan (gut)";
  species Cki_plasma_dex in Vki_plasma = 0; Cki_plasma_dex is "dextormethorphan (kidney)";
  species Cli_plasma_dex in Vli_plasma = 0; Cli_plasma_dex is "dextormethorphan (liver)";
  species Clu_plasma_dex in Vlu_plasma = 0; Clu_plasma_dex is "dextormethorphan (lung)";
  species Cpa_plasma_dex in Vpa_plasma = 0; Cpa_plasma_dex is "dextormethorphan (pancreas)";
  species Csp_plasma_dex in Vsp_plasma = 0; Csp_plasma_dex is "dextormethorphan (spleen)";
  species Cre_plasma_dex in Vre_plasma = 0; Cre_plasma_dex is "dextormethorphan (rest)";
  species Car_dex in Var = 0; Car_dex is "dextormethorphan (arterial blood)";
  species Cve_dex in Vve = 0; Cve_dex is "dextormethorphan (venous blood)";
  species Cpo_dex in Vpo = 0; Cpo_dex is "dextormethorphan (portal vein)";
  species Chv_dex in Vhv = 0; Chv_dex is "dextormethorphan (hepatic vein)";
  substanceOnly species Aurine_dex in Vurine = 0; Aurine_dex is "dextormethorphan (urine)";
  substanceOnly species Afeces_dex in Vfeces = 0; Afeces_dex is "dextormethorphan (feces)";
  species Cgu_plasma_dor in Vgu_plasma = 0; Cgu_plasma_dor is "dextorphan (gut)";
  species Cki_plasma_dor in Vki_plasma = 0; Cki_plasma_dor is "dextorphan (kidney)";
  species Cli_plasma_dor in Vli_plasma = 0; Cli_plasma_dor is "dextorphan (liver)";
  species Clu_plasma_dor in Vlu_plasma = 0; Clu_plasma_dor is "dextorphan (lung)";
  species Cpa_plasma_dor in Vpa_plasma = 0; Cpa_plasma_dor is "dextorphan (pancreas)";
  species Csp_plasma_dor in Vsp_plasma = 0; Csp_plasma_dor is "dextorphan (spleen)";
  species Cre_plasma_dor in Vre_plasma = 0; Cre_plasma_dor is "dextorphan (rest)";
  species Car_dor in Var = 0; Car_dor is "dextorphan (arterial blood)";
  species Cve_dor in Vve = 0; Cve_dor is "dextorphan (venous blood)";
  species Cpo_dor in Vpo = 0; Cpo_dor is "dextorphan (portal vein)";
  species Chv_dor in Vhv = 0; Chv_dor is "dextorphan (hepatic vein)";
  substanceOnly species Aurine_dor in Vurine = 0; Aurine_dor is "dextorphan (urine)";
  species Cgu_tissue_dex in Vgu = 0; Cgu_tissue_dex is "dextormethorphan (gut)";
  species $LI__qui_ext in Vli_plasma = 0; LI__qui_ext is "quinidine (extern)";
  species LI__dex in Vli_tissue = 0; LI__dex is "dextormethorphan (liver)";
  species LI__dor in Vli_tissue = 0; LI__dor is "dextrorphan (liver)";

  // Parameters:
  BW = 75 kg; BW is "body weight [kg]";
  HEIGHT = 170 cm; HEIGHT is "height [cm]";
  HR = 70 per_min; HR is "heart rate [1/min]";
  HRrest = 70 per_min; HRrest is "heart rate [1/min]";
  BSA has m2; BSA is "body surface area [m^2]";
  COBW = 1.548 ml_per_s_kg; COBW is "cardiac output per bodyweight [ml/s/kg]";
  CO has ml_per_s; CO is "cardiac output [ml/s]";
  QC has l_per_min; QC is "cardiac output [L/hr]";
  COHRI = 150 ml; COHRI is "increase of cardiac output per heartbeat [ml/min*min]";
  Fblood = 0.02 dimensionless; Fblood is "blood fraction of organ volume";
  HCT = 0.51 dimensionless; HCT is "hematocrit";
  FVgu = 0.0171 l_per_kg; FVgu is "gut fractional tissue volume";
  FVki = 0.0044 l_per_kg; FVki is "kidney fractional tissue volume";
  FVli = 0.021 l_per_kg; FVli is "liver fractional tissue volume";
  FVlu = 0.0076 l_per_kg; FVlu is "lung fractional tissue volume";
  FVsp = 0.0026 l_per_kg; FVsp is "spleen fractional tissue volume";
  FVpa = 0.01 l_per_kg; FVpa is "pancreas fractional tissue volume";
  FVre has l_per_kg; FVre is "rest of body fractional tissue volume";
  FVve = 0.0514 l_per_kg; FVve is "venous fractional tissue volume";
  FVar = 0.0257 l_per_kg; FVar is "arterial fractional tissue volume";
  FVpo = 0.001 l_per_kg; FVpo is "portal fractional tissue volume";
  FVhv = 0.001 l_per_kg; FVhv is "hepatic venous fractional tissue volume";
  FQgu = 0.146 dimensionless; FQgu is "gut fractional tissue blood flow";
  FQki = 0.19 dimensionless; FQki is "kidney fractional tissue blood flow";
  FQh = 0.215 dimensionless; FQh is "hepatic (venous side) fractional tissue blood flow";
  FQlu = 1 dimensionless; FQlu is "lung fractional tissue blood flow";
  FQsp = 0.017 dimensionless; FQsp is "spleen fractional tissue blood flow";
  FQpa = 0.017 dimensionless; FQpa is "pancreas fractional tissue blood flow";
  FQre has dimensionless; FQre is "rest of body fractional tissue blood flow";
  conversion_min_per_day = 1440 min_per_day; conversion_min_per_day is "Conversion factor min to hours";
  DEXCYP3A4LI_Vmax = 1e-5 mmole_per_min_l;
  DEXCYP3A4_Km_dex = 286 mM;
  Mr_dex = 271.404 g_per_mole; Mr_dex is "Molecular weight dex [g/mole]";
  fup_dex = 1 dimensionless; fup_dex is "fraction unbound in plasma dex";
  BP_dex = 1 dimensionless; BP_dex is "blood to plasma ratio dex";
  IVDOSE_dex = 0 mg; IVDOSE_dex is "IV bolus dose dex [mg]";
  ti_dex = 10 s; ti_dex is "injection time dex [s]";
  Ki_dex has per_min; Ki_dex is "Ki [1/min] injection dex";
  Ri_dex = 0 mg_per_min; Ri_dex is "Ri [mg/min] rate of infusion dex";
  cum_dose_dex = 0 mg; cum_dose_dex is "Cumulative dose due to infusion dex";
  PODOSE_dex = 0 mg; PODOSE_dex is "oral dose dex [mg]";
  GUTDOSE_dex = 0 mg; GUTDOSE_dex is "dose dissolved in gut dex [mg]";
  Ka_dis_dex = 0.1601263 per_hr; Ka_dis_dex is "Ka_dis [1/hr] dissolution dex";
  Ka_abs_dex = 46.98673 per_hr; Ka_abs_dex is "Ka_abs [1/hr] absorption dex";
  F_dex = 0.29 dimensionless; F_dex is "fraction absorbed dex";
  Mr_dor = 257.37066 g_per_mole; Mr_dor is "Molecular weight dor [g/mole]";
  fup_dor = 1 dimensionless; fup_dor is "fraction unbound in plasma dor";
  BP_dor = 1 dimensionless; BP_dor is "blood to plasma ratio dor";
  dex_dor_plasma has dimensionless; dex_dor_plasma is "Current plasma DEX/DOR ratio";
  dex_dor_urine has dimensionless; dex_dor_urine is "Cumulative urinary DEX/DOR ratio";
  Qgu has l_per_min; Qgu is "gut blood flow";
  Qki has l_per_min; Qki is "kidney blood flow";
  Qh has l_per_min; Qh is "hepatic (venous side) blood flow";
  Qha has l_per_min; Qha is "hepatic artery blood flow";
  Qlu has l_per_min; Qlu is "lung blood flow";
  Qsp has l_per_min; Qsp is "spleen blood flow";
  Qpa has l_per_min; Qpa is "pancreas blood flow";
  Qre has l_per_min; Qre is "rest of body blood flow";
  Qpo has l_per_min; Qpo is "portal blood flow";
  Agu_plasma_dex has mmole; Agu_plasma_dex is "dextormethorphan amount (gut) [mmole]";
  Cgu_free_dex has mM; Cgu_free_dex is "dextormethorphan free concentration (gut) [mmole/l]";
  Xgu_plasma_dex has mg; Xgu_plasma_dex is "dextormethorphan amount (gut) [mg]";
  Mgu_plasma_dex has mg_per_l; Mgu_plasma_dex is "dextormethorphan concentration (gut) [mg/l]";
  Aki_plasma_dex has mmole; Aki_plasma_dex is "dextormethorphan amount (kidney) [mmole]";
  Cki_free_dex has mM; Cki_free_dex is "dextormethorphan free concentration (kidney) [mmole/l]";
  Xki_plasma_dex has mg; Xki_plasma_dex is "dextormethorphan amount (kidney) [mg]";
  Mki_plasma_dex has mg_per_l; Mki_plasma_dex is "dextormethorphan concentration (kidney) [mg/l]";
  Ali_plasma_dex has mmole; Ali_plasma_dex is "dextormethorphan amount (liver) [mmole]";
  Cli_free_dex has mM; Cli_free_dex is "dextormethorphan free concentration (liver) [mmole/l]";
  Xli_plasma_dex has mg; Xli_plasma_dex is "dextormethorphan amount (liver) [mg]";
  Mli_plasma_dex has mg_per_l; Mli_plasma_dex is "dextormethorphan concentration (liver) [mg/l]";
  Alu_plasma_dex has mmole; Alu_plasma_dex is "dextormethorphan amount (lung) [mmole]";
  Clu_free_dex has mM; Clu_free_dex is "dextormethorphan free concentration (lung) [mmole/l]";
  Xlu_plasma_dex has mg; Xlu_plasma_dex is "dextormethorphan amount (lung) [mg]";
  Mlu_plasma_dex has mg_per_l; Mlu_plasma_dex is "dextormethorphan concentration (lung) [mg/l]";
  Apa_plasma_dex has mmole; Apa_plasma_dex is "dextormethorphan amount (pancreas) [mmole]";
  Cpa_free_dex has mM; Cpa_free_dex is "dextormethorphan free concentration (pancreas) [mmole/l]";
  Xpa_plasma_dex has mg; Xpa_plasma_dex is "dextormethorphan amount (pancreas) [mg]";
  Mpa_plasma_dex has mg_per_l; Mpa_plasma_dex is "dextormethorphan concentration (pancreas) [mg/l]";
  Asp_plasma_dex has mmole; Asp_plasma_dex is "dextormethorphan amount (spleen) [mmole]";
  Csp_free_dex has mM; Csp_free_dex is "dextormethorphan free concentration (spleen) [mmole/l]";
  Xsp_plasma_dex has mg; Xsp_plasma_dex is "dextormethorphan amount (spleen) [mg]";
  Msp_plasma_dex has mg_per_l; Msp_plasma_dex is "dextormethorphan concentration (spleen) [mg/l]";
  Are_plasma_dex has mmole; Are_plasma_dex is "dextormethorphan amount (rest) [mmole]";
  Cre_free_dex has mM; Cre_free_dex is "dextormethorphan free concentration (rest) [mmole/l]";
  Xre_plasma_dex has mg; Xre_plasma_dex is "dextormethorphan amount (rest) [mg]";
  Mre_plasma_dex has mg_per_l; Mre_plasma_dex is "dextormethorphan concentration (rest) [mg/l]";
  Aar_dex has mmole; Aar_dex is "dextormethorphan amount (arterial blood) [mmole]";
  Xar_dex has mg; Xar_dex is "dextormethorphan amount (arterial blood) [mg]";
  Mar_dex has mg_per_l; Mar_dex is "dextormethorphan concentration (arterial blood) [mg/l]";
  Ave_dex has mmole; Ave_dex is "dextormethorphan amount (venous blood) [mmole]";
  Xve_dex has mg; Xve_dex is "dextormethorphan amount (venous blood) [mg]";
  Mve_dex has mg_per_l; Mve_dex is "dextormethorphan concentration (venous blood) [mg/l]";
  Apo_dex has mmole; Apo_dex is "dextormethorphan amount (portal vein) [mmole]";
  Xpo_dex has mg; Xpo_dex is "dextormethorphan amount (portal vein) [mg]";
  Mpo_dex has mg_per_l; Mpo_dex is "dextormethorphan concentration (portal vein) [mg/l]";
  Ahv_dex has mmole; Ahv_dex is "dextormethorphan amount (hepatic vein) [mmole]";
  Xhv_dex has mg; Xhv_dex is "dextormethorphan amount (hepatic vein) [mg]";
  Mhv_dex has mg_per_l; Mhv_dex is "dextormethorphan concentration (hepatic vein) [mg/l]";
  Xurine_dex has mg; Xurine_dex is "dextormethorphan amount (urine) [mg]";
  Xfeces_dex has mg; Xfeces_dex is "dextormethorphan amount (feces)";
  Agu_plasma_dor has mmole; Agu_plasma_dor is "dextorphan amount (gut) [mmole]";
  Cgu_free_dor has mM; Cgu_free_dor is "dextorphan free concentration (gut) [mmole/l]";
  Xgu_plasma_dor has mg; Xgu_plasma_dor is "dextorphan amount (gut) [mg]";
  Mgu_plasma_dor has mg_per_l; Mgu_plasma_dor is "dextorphan concentration (gut) [mg/l]";
  Aki_plasma_dor has mmole; Aki_plasma_dor is "dextorphan amount (kidney) [mmole]";
  Cki_free_dor has mM; Cki_free_dor is "dextorphan free concentration (kidney) [mmole/l]";
  Xki_plasma_dor has mg; Xki_plasma_dor is "dextorphan amount (kidney) [mg]";
  Mki_plasma_dor has mg_per_l; Mki_plasma_dor is "dextorphan concentration (kidney) [mg/l]";
  Ali_plasma_dor has mmole; Ali_plasma_dor is "dextorphan amount (liver) [mmole]";
  Cli_free_dor has mM; Cli_free_dor is "dextorphan free concentration (liver) [mmole/l]";
  Xli_plasma_dor has mg; Xli_plasma_dor is "dextorphan amount (liver) [mg]";
  Mli_plasma_dor has mg_per_l; Mli_plasma_dor is "dextorphan concentration (liver) [mg/l]";
  Alu_plasma_dor has mmole; Alu_plasma_dor is "dextorphan amount (lung) [mmole]";
  Clu_free_dor has mM; Clu_free_dor is "dextorphan free concentration (lung) [mmole/l]";
  Xlu_plasma_dor has mg; Xlu_plasma_dor is "dextorphan amount (lung) [mg]";
  Mlu_plasma_dor has mg_per_l; Mlu_plasma_dor is "dextorphan concentration (lung) [mg/l]";
  Apa_plasma_dor has mmole; Apa_plasma_dor is "dextorphan amount (pancreas) [mmole]";
  Cpa_free_dor has mM; Cpa_free_dor is "dextorphan free concentration (pancreas) [mmole/l]";
  Xpa_plasma_dor has mg; Xpa_plasma_dor is "dextorphan amount (pancreas) [mg]";
  Mpa_plasma_dor has mg_per_l; Mpa_plasma_dor is "dextorphan concentration (pancreas) [mg/l]";
  Asp_plasma_dor has mmole; Asp_plasma_dor is "dextorphan amount (spleen) [mmole]";
  Csp_free_dor has mM; Csp_free_dor is "dextorphan free concentration (spleen) [mmole/l]";
  Xsp_plasma_dor has mg; Xsp_plasma_dor is "dextorphan amount (spleen) [mg]";
  Msp_plasma_dor has mg_per_l; Msp_plasma_dor is "dextorphan concentration (spleen) [mg/l]";
  Are_plasma_dor has mmole; Are_plasma_dor is "dextorphan amount (rest) [mmole]";
  Cre_free_dor has mM; Cre_free_dor is "dextorphan free concentration (rest) [mmole/l]";
  Xre_plasma_dor has mg; Xre_plasma_dor is "dextorphan amount (rest) [mg]";
  Mre_plasma_dor has mg_per_l; Mre_plasma_dor is "dextorphan concentration (rest) [mg/l]";
  Aar_dor has mmole; Aar_dor is "dextorphan amount (arterial blood) [mmole]";
  Xar_dor has mg; Xar_dor is "dextorphan amount (arterial blood) [mg]";
  Mar_dor has mg_per_l; Mar_dor is "dextorphan concentration (arterial blood) [mg/l]";
  Ave_dor has mmole; Ave_dor is "dextorphan amount (venous blood) [mmole]";
  Xve_dor has mg; Xve_dor is "dextorphan amount (venous blood) [mg]";
  Mve_dor has mg_per_l; Mve_dor is "dextorphan concentration (venous blood) [mg/l]";
  Apo_dor has mmole; Apo_dor is "dextorphan amount (portal vein) [mmole]";
  Xpo_dor has mg; Xpo_dor is "dextorphan amount (portal vein) [mg]";
  Mpo_dor has mg_per_l; Mpo_dor is "dextorphan concentration (portal vein) [mg/l]";
  Ahv_dor has mmole; Ahv_dor is "dextorphan amount (hepatic vein) [mmole]";
  Xhv_dor has mg; Xhv_dor is "dextorphan amount (hepatic vein) [mg]";
  Mhv_dor has mg_per_l; Mhv_dor is "dextorphan concentration (hepatic vein) [mg/l]";
  Xurine_dor has mg; Xurine_dor is "dextorphan amount (urine) [mg]";
  dissolution_dex has mmole_per_min; dissolution_dex is "dissolution dextormethorphan";
  KI__DEXEX_k = 0.01683035 per_min; KI__DEXEX_k is "dex urinary excretion (kidney)";
  KI__DOREX_k = 0.1369474 per_min; KI__DOREX_k is "dor urinary excretion (kidney)";
  LI__DEXCYP2D6_f = 0.0375 dimensionless;
  LI__DEXIM_f = 148.4299 dimensionless;
  LI__DOREX_f = 14.49475 dimensionless;
  LI__cyp2d6_definition_0 = 1 dimensionless; LI__cyp2d6_definition_0 is "activity of *1 allele";
  LI__cyp2d6_definition_1 = 0.25 dimensionless; LI__cyp2d6_definition_1 is "activity of *10 allele";
  LI__cyp2d6_definition_2 = 0 dimensionless; LI__cyp2d6_definition_2 is "activity of *100 allele";
  LI__cyp2d6_definition_3 = 0 dimensionless; LI__cyp2d6_definition_3 is "activity of *101 allele";
  LI__cyp2d6_definition_4 = 0.5 dimensionless; LI__cyp2d6_definition_4 is "activity of *10x2 allele";
  LI__cyp2d6_definition_5 = 0 dimensionless; LI__cyp2d6_definition_5 is "activity of *11 allele";
  LI__cyp2d6_definition_6 = 0 dimensionless; LI__cyp2d6_definition_6 is "activity of *114 allele";
  LI__cyp2d6_definition_7 = 0 dimensionless; LI__cyp2d6_definition_7 is "activity of *12 allele";
  LI__cyp2d6_definition_8 = 0 dimensionless; LI__cyp2d6_definition_8 is "activity of *120 allele";
  LI__cyp2d6_definition_9 = 0 dimensionless; LI__cyp2d6_definition_9 is "activity of *124 allele";
  LI__cyp2d6_definition_10 = 0 dimensionless; LI__cyp2d6_definition_10 is "activity of *129 allele";
  LI__cyp2d6_definition_11 = 0 dimensionless; LI__cyp2d6_definition_11 is "activity of *13 allele";
  LI__cyp2d6_definition_12 = 0.5 dimensionless; LI__cyp2d6_definition_12 is "activity of *14 allele";
  LI__cyp2d6_definition_13 = 0 dimensionless; LI__cyp2d6_definition_13 is "activity of *15 allele";
  LI__cyp2d6_definition_14 = 0.5 dimensionless; LI__cyp2d6_definition_14 is "activity of *17 allele";
  LI__cyp2d6_definition_15 = 1 dimensionless; LI__cyp2d6_definition_15 is "activity of *17x2 allele";
  LI__cyp2d6_definition_16 = 0 dimensionless; LI__cyp2d6_definition_16 is "activity of *18 allele";
  LI__cyp2d6_definition_17 = 0 dimensionless; LI__cyp2d6_definition_17 is "activity of *19 allele";
  LI__cyp2d6_definition_18 = 2 dimensionless; LI__cyp2d6_definition_18 is "activity of *1x2 allele";
  LI__cyp2d6_definition_19 = 3 dimensionless; LI__cyp2d6_definition_19 is "activity of *1x3 allele";
  LI__cyp2d6_definition_20 = 4 dimensionless; LI__cyp2d6_definition_20 is "activity of *1x4 allele";
  LI__cyp2d6_definition_21 = 5 dimensionless; LI__cyp2d6_definition_21 is "activity of *1x5 allele";
  LI__cyp2d6_definition_22 = 6 dimensionless; LI__cyp2d6_definition_22 is "activity of *1x6 allele";
  LI__cyp2d6_definition_23 = 1 dimensionless; LI__cyp2d6_definition_23 is "activity of *2 allele";
  LI__cyp2d6_definition_24 = 0 dimensionless; LI__cyp2d6_definition_24 is "activity of *20 allele";
  LI__cyp2d6_definition_25 = 0 dimensionless; LI__cyp2d6_definition_25 is "activity of *21 allele";
  LI__cyp2d6_definition_26 = 1 dimensionless; LI__cyp2d6_definition_26 is "activity of *27 allele";
  LI__cyp2d6_definition_27 = 0.5 dimensionless; LI__cyp2d6_definition_27 is "activity of *29 allele";
  LI__cyp2d6_definition_28 = 1 dimensionless; LI__cyp2d6_definition_28 is "activity of *29x2 allele";
  LI__cyp2d6_definition_29 = 2 dimensionless; LI__cyp2d6_definition_29 is "activity of *2x2 allele";
  LI__cyp2d6_definition_30 = 3 dimensionless; LI__cyp2d6_definition_30 is "activity of *2x3 allele";
  LI__cyp2d6_definition_31 = 4 dimensionless; LI__cyp2d6_definition_31 is "activity of *2x4 allele";
  LI__cyp2d6_definition_32 = 5 dimensionless; LI__cyp2d6_definition_32 is "activity of *2x5 allele";
  LI__cyp2d6_definition_33 = 6 dimensionless; LI__cyp2d6_definition_33 is "activity of *2x6 allele";
  LI__cyp2d6_definition_34 = 0 dimensionless; LI__cyp2d6_definition_34 is "activity of *3 allele";
  LI__cyp2d6_definition_35 = 0 dimensionless; LI__cyp2d6_definition_35 is "activity of *31 allele";
  LI__cyp2d6_definition_36 = 1 dimensionless; LI__cyp2d6_definition_36 is "activity of *33 allele";
  LI__cyp2d6_definition_37 = 1 dimensionless; LI__cyp2d6_definition_37 is "activity of *34 allele";
  LI__cyp2d6_definition_38 = 1 dimensionless; LI__cyp2d6_definition_38 is "activity of *35 allele";
  LI__cyp2d6_definition_39 = 2 dimensionless; LI__cyp2d6_definition_39 is "activity of *35x2 allele";
  LI__cyp2d6_definition_40 = 0 dimensionless; LI__cyp2d6_definition_40 is "activity of *36 allele";
  LI__cyp2d6_definition_41 = 0 dimensionless; LI__cyp2d6_definition_41 is "activity of *36x2 allele";
  LI__cyp2d6_definition_42 = 0 dimensionless; LI__cyp2d6_definition_42 is "activity of *38 allele";
  LI__cyp2d6_definition_43 = 1 dimensionless; LI__cyp2d6_definition_43 is "activity of *39 allele";
  LI__cyp2d6_definition_44 = 0 dimensionless; LI__cyp2d6_definition_44 is "activity of *3x2 allele";
  LI__cyp2d6_definition_45 = 0 dimensionless; LI__cyp2d6_definition_45 is "activity of *4 allele";
  LI__cyp2d6_definition_46 = 0 dimensionless; LI__cyp2d6_definition_46 is "activity of *40 allele";
  LI__cyp2d6_definition_47 = 0.5 dimensionless; LI__cyp2d6_definition_47 is "activity of *41 allele";
  LI__cyp2d6_definition_48 = 1 dimensionless; LI__cyp2d6_definition_48 is "activity of *41x2 allele";
  LI__cyp2d6_definition_49 = 1.5 dimensionless; LI__cyp2d6_definition_49 is "activity of *41x3 allele";
  LI__cyp2d6_definition_50 = 0 dimensionless; LI__cyp2d6_definition_50 is "activity of *42 allele";
  LI__cyp2d6_definition_51 = 0 dimensionless; LI__cyp2d6_definition_51 is "activity of *44 allele";
  LI__cyp2d6_definition_52 = 1 dimensionless; LI__cyp2d6_definition_52 is "activity of *45 allele";
  LI__cyp2d6_definition_53 = 2 dimensionless; LI__cyp2d6_definition_53 is "activity of *45x2 allele";
  LI__cyp2d6_definition_54 = 1 dimensionless; LI__cyp2d6_definition_54 is "activity of *46 allele";
  LI__cyp2d6_definition_55 = 0 dimensionless; LI__cyp2d6_definition_55 is "activity of *47 allele";
  LI__cyp2d6_definition_56 = 1 dimensionless; LI__cyp2d6_definition_56 is "activity of *48 allele";
  LI__cyp2d6_definition_57 = 0.5 dimensionless; LI__cyp2d6_definition_57 is "activity of *49 allele";
  LI__cyp2d6_definition_58 = 0 dimensionless; LI__cyp2d6_definition_58 is "activity of *4x2 allele";
  LI__cyp2d6_definition_59 = 0 dimensionless; LI__cyp2d6_definition_59 is "activity of *4x3 allele";
  LI__cyp2d6_definition_60 = 0 dimensionless; LI__cyp2d6_definition_60 is "activity of *4x4 allele";
  LI__cyp2d6_definition_61 = 0 dimensionless; LI__cyp2d6_definition_61 is "activity of *4x5 allele";
  LI__cyp2d6_definition_62 = 0 dimensionless; LI__cyp2d6_definition_62 is "activity of *5 allele";
  LI__cyp2d6_definition_63 = 0.5 dimensionless; LI__cyp2d6_definition_63 is "activity of *50 allele";
  LI__cyp2d6_definition_64 = 0 dimensionless; LI__cyp2d6_definition_64 is "activity of *51 allele";
  LI__cyp2d6_definition_65 = 1 dimensionless; LI__cyp2d6_definition_65 is "activity of *53 allele";
  LI__cyp2d6_definition_66 = 0.5 dimensionless; LI__cyp2d6_definition_66 is "activity of *54 allele";
  LI__cyp2d6_definition_67 = 0.5 dimensionless; LI__cyp2d6_definition_67 is "activity of *55 allele";
  LI__cyp2d6_definition_68 = 0 dimensionless; LI__cyp2d6_definition_68 is "activity of *56 allele";
  LI__cyp2d6_definition_69 = 0 dimensionless; LI__cyp2d6_definition_69 is "activity of *57 allele";
  LI__cyp2d6_definition_70 = 0.5 dimensionless; LI__cyp2d6_definition_70 is "activity of *59 allele";
  LI__cyp2d6_definition_71 = 0 dimensionless; LI__cyp2d6_definition_71 is "activity of *6 allele";
  LI__cyp2d6_definition_72 = 0 dimensionless; LI__cyp2d6_definition_72 is "activity of *60 allele";
  LI__cyp2d6_definition_73 = 0 dimensionless; LI__cyp2d6_definition_73 is "activity of *62 allele";
  LI__cyp2d6_definition_74 = 0 dimensionless; LI__cyp2d6_definition_74 is "activity of *68 allele";
  LI__cyp2d6_definition_75 = 0 dimensionless; LI__cyp2d6_definition_75 is "activity of *69 allele";
  LI__cyp2d6_definition_76 = 0 dimensionless; LI__cyp2d6_definition_76 is "activity of *6x2 allele";
  LI__cyp2d6_definition_77 = 0 dimensionless; LI__cyp2d6_definition_77 is "activity of *7 allele";
  LI__cyp2d6_definition_78 = 0 dimensionless; LI__cyp2d6_definition_78 is "activity of *8 allele";
  LI__cyp2d6_definition_79 = 0 dimensionless; LI__cyp2d6_definition_79 is "activity of *81 allele";
  LI__cyp2d6_definition_80 = 0.5 dimensionless; LI__cyp2d6_definition_80 is "activity of *9 allele";
  LI__cyp2d6_definition_81 = 0 dimensionless; LI__cyp2d6_definition_81 is "activity of *92 allele";
  LI__cyp2d6_definition_82 = 0 dimensionless; LI__cyp2d6_definition_82 is "activity of *96 allele";
  LI__cyp2d6_definition_83 = 0 dimensionless; LI__cyp2d6_definition_83 is "activity of *99 allele";
  LI__cyp2d6_definition_84 = 1 dimensionless; LI__cyp2d6_definition_84 is "activity of *9x2 allele";
  LI__cyp2d6_definition_custom = 1 dimensionless; LI__cyp2d6_definition_custom is "activity of custom allele";
  LI__cyp2d6_allele_1 = 0 dimensionless; LI__cyp2d6_allele_1 is "custom allele";
  LI__cyp2d6_allele_2 = 0 dimensionless; LI__cyp2d6_allele_2 is "custom allele";
  LI__cyp2d6_activity_1 has dimensionless; LI__cyp2d6_activity_1 is "Activity of allele 1";
  LI__cyp2d6_activity_2 has dimensionless; LI__cyp2d6_activity_2 is "Activity of allele 2";
  LI__DEXCYP3A4_Vmax has mmole_per_min_l;
  LI__DEXCYP2D6_Vmax has mmole_per_min_l;
  LI__DEXIM_Vmax has mmole_per_min_l;
  LI__DOREX_Vmax has mmole_per_min_l;
  LI__DEXCYP2D6_activity has dimensionless;
  LI__DEXIM_Km_dex = 0.1 mM;
  LI__DEXCYP2D6_phenotype = 1 dimensionless; LI__DEXCYP2D6_phenotype is "scaling factor for activity";
  LI__DEXCYP2D6_Km_dex = 0.00389 mM;
  LI__DEXCYP2D6_Ki_qui = 0.0001 mM;
  LI__DEXCYP3A4_switch = 1 dimensionless;
  LI__DEXCYP3A4_activity = 1 dimensionless;
  LI__DOREX_Km_dor = 0.1 mM;
  GU__DEXCYP3A4_f = 0.5929531 dimensionless;
  GU__DEXEXP_f = 391.163 dimensionless;
  GU__DEXCYP3A4_Vmax has mmole_per_min_l;
  GU__DEXEXP_Vmax has mmole_per_min_l;
  GU__DEXEXP_Km_dex = 0.1 mM;
  GU__DEXCYP3A4_switch = 1 dimensionless;
  GU__DEXCYP3A4_activity = 1 dimensionless;

  // Assignment rules:
  dex_dor_plasma := Cve_dex/Cve_dor;
  dex_dor_urine := Aurine_dex/Aurine_dor;
  FVre := 1 l_per_kg - (FVgu + FVki + FVli + FVlu + FVsp + FVpa + FVve + FVar);
  FQre := 1 - (FQki + FQh);
  BSA := 0.024265 m2*(BW/(1 kg))^0.5378*(HEIGHT/(1 cm))^0.3964;
  CO := BW*COBW + (HR - HRrest)*COHRI/(60 s_per_min);
  QC := CO/(1000 ml_per_l)*60 s_per_min;
  Vgu := BW*FVgu;
  Vki := BW*FVki;
  Vli := BW*FVli;
  Vlu := BW*FVlu;
  Vsp := BW*FVsp;
  Vpa := BW*FVpa;
  Vre := BW*FVre;
  Vve := BW*FVve - FVve/(FVar + FVve)*BW*Fblood*(1 l_per_kg - FVve - FVar);
  Var := BW*FVar - FVar/(FVar + FVve)*BW*Fblood*(1 l_per_kg - FVve - FVar);
  Vpo := (1 - HCT)*(BW*FVpo - FVpo/(FVar + FVve + FVpo + FVhv)*BW*Fblood*(1 l_per_kg - (FVar + FVve + FVpo + FVhv)));
  Vhv := (1 - HCT)*(BW*FVhv - FVhv/(FVar + FVve + FVpo + FVhv)*BW*Fblood*(1 l_per_kg - (FVar + FVve + FVpo + FVhv)));
  Qgu := QC*FQgu;
  Qki := QC*FQki;
  Qh := QC*FQh;
  Qha := Qh - Qgu - Qsp - Qpa;
  Qlu := QC*FQlu;
  Qsp := QC*FQsp;
  Qpa := QC*FQpa;
  Qre := QC*FQre;
  Qpo := Qsp + Qpa + Qgu;
  Vgu_tissue := Vgu*(1 - Fblood);
  Vgu_plasma := Vgu*Fblood*(1 - HCT);
  Vki_tissue := Vki*(1 - Fblood);
  Vki_plasma := Vki*Fblood*(1 - HCT);
  Vli_tissue := Vli*(1 - Fblood);
  Vli_plasma := Vli*Fblood*(1 - HCT);
  Vlu_tissue := Vlu*(1 - Fblood);
  Vlu_plasma := Vlu*Fblood*(1 - HCT);
  Vpa_tissue := Vpa*(1 - Fblood);
  Vpa_plasma := Vpa*Fblood*(1 - HCT);
  Vsp_tissue := Vsp*(1 - Fblood);
  Vsp_plasma := Vsp*Fblood*(1 - HCT);
  Vre_tissue := Vre*(1 - Fblood);
  Vre_plasma := Vre*Fblood*(1 - HCT);
  Ki_dex := 0.693/ti_dex*60 s_per_min;
  Agu_plasma_dex := Cgu_plasma_dex*Vgu_plasma;
  Cgu_free_dex := Cgu_plasma_dex*fup_dex;
  Xgu_plasma_dex := Agu_plasma_dex*Mr_dex;
  Mgu_plasma_dex := Agu_plasma_dex/Vgu_plasma*Mr_dex;
  Aki_plasma_dex := Cki_plasma_dex*Vki_plasma;
  Cki_free_dex := Cki_plasma_dex*fup_dex;
  Xki_plasma_dex := Aki_plasma_dex*Mr_dex;
  Mki_plasma_dex := Aki_plasma_dex/Vki_plasma*Mr_dex;
  Ali_plasma_dex := Cli_plasma_dex*Vli_plasma;
  Cli_free_dex := Cli_plasma_dex*fup_dex;
  Xli_plasma_dex := Ali_plasma_dex*Mr_dex;
  Mli_plasma_dex := Ali_plasma_dex/Vli_plasma*Mr_dex;
  Alu_plasma_dex := Clu_plasma_dex*Vlu_plasma;
  Clu_free_dex := Clu_plasma_dex*fup_dex;
  Xlu_plasma_dex := Alu_plasma_dex*Mr_dex;
  Mlu_plasma_dex := Alu_plasma_dex/Vlu_plasma*Mr_dex;
  Apa_plasma_dex := Cpa_plasma_dex*Vpa_plasma;
  Cpa_free_dex := Cpa_plasma_dex*fup_dex;
  Xpa_plasma_dex := Apa_plasma_dex*Mr_dex;
  Mpa_plasma_dex := Apa_plasma_dex/Vpa_plasma*Mr_dex;
  Asp_plasma_dex := Csp_plasma_dex*Vsp_plasma;
  Csp_free_dex := Csp_plasma_dex*fup_dex;
  Xsp_plasma_dex := Asp_plasma_dex*Mr_dex;
  Msp_plasma_dex := Asp_plasma_dex/Vsp_plasma*Mr_dex;
  Are_plasma_dex := Cre_plasma_dex*Vre_plasma;
  Cre_free_dex := Cre_plasma_dex*fup_dex;
  Xre_plasma_dex := Are_plasma_dex*Mr_dex;
  Mre_plasma_dex := Are_plasma_dex/Vre_plasma*Mr_dex;
  Aar_dex := Car_dex*Var;
  Xar_dex := Aar_dex*Mr_dex;
  Mar_dex := Aar_dex/Var*Mr_dex;
  Ave_dex := Cve_dex*Vve;
  Xve_dex := Ave_dex*Mr_dex;
  Mve_dex := Ave_dex/Vve*Mr_dex;
  Apo_dex := Cpo_dex*Vpo;
  Xpo_dex := Apo_dex*Mr_dex;
  Mpo_dex := Apo_dex/Vpo*Mr_dex;
  Ahv_dex := Chv_dex*Vhv;
  Xhv_dex := Ahv_dex*Mr_dex;
  Mhv_dex := Ahv_dex/Vhv*Mr_dex;
  Xurine_dex := Aurine_dex*Mr_dex;
  Xfeces_dex := Afeces_dex*Mr_dex;
  Agu_plasma_dor := Cgu_plasma_dor*Vgu_plasma;
  Cgu_free_dor := Cgu_plasma_dor*fup_dor;
  Xgu_plasma_dor := Agu_plasma_dor*Mr_dor;
  Mgu_plasma_dor := Agu_plasma_dor/Vgu_plasma*Mr_dor;
  Aki_plasma_dor := Cki_plasma_dor*Vki_plasma;
  Cki_free_dor := Cki_plasma_dor*fup_dor;
  Xki_plasma_dor := Aki_plasma_dor*Mr_dor;
  Mki_plasma_dor := Aki_plasma_dor/Vki_plasma*Mr_dor;
  Ali_plasma_dor := Cli_plasma_dor*Vli_plasma;
  Cli_free_dor := Cli_plasma_dor*fup_dor;
  Xli_plasma_dor := Ali_plasma_dor*Mr_dor;
  Mli_plasma_dor := Ali_plasma_dor/Vli_plasma*Mr_dor;
  Alu_plasma_dor := Clu_plasma_dor*Vlu_plasma;
  Clu_free_dor := Clu_plasma_dor*fup_dor;
  Xlu_plasma_dor := Alu_plasma_dor*Mr_dor;
  Mlu_plasma_dor := Alu_plasma_dor/Vlu_plasma*Mr_dor;
  Apa_plasma_dor := Cpa_plasma_dor*Vpa_plasma;
  Cpa_free_dor := Cpa_plasma_dor*fup_dor;
  Xpa_plasma_dor := Apa_plasma_dor*Mr_dor;
  Mpa_plasma_dor := Apa_plasma_dor/Vpa_plasma*Mr_dor;
  Asp_plasma_dor := Csp_plasma_dor*Vsp_plasma;
  Csp_free_dor := Csp_plasma_dor*fup_dor;
  Xsp_plasma_dor := Asp_plasma_dor*Mr_dor;
  Msp_plasma_dor := Asp_plasma_dor/Vsp_plasma*Mr_dor;
  Are_plasma_dor := Cre_plasma_dor*Vre_plasma;
  Cre_free_dor := Cre_plasma_dor*fup_dor;
  Xre_plasma_dor := Are_plasma_dor*Mr_dor;
  Mre_plasma_dor := Are_plasma_dor/Vre_plasma*Mr_dor;
  Aar_dor := Car_dor*Var;
  Xar_dor := Aar_dor*Mr_dor;
  Mar_dor := Aar_dor/Var*Mr_dor;
  Ave_dor := Cve_dor*Vve;
  Xve_dor := Ave_dor*Mr_dor;
  Mve_dor := Ave_dor/Vve*Mr_dor;
  Apo_dor := Cpo_dor*Vpo;
  Xpo_dor := Apo_dor*Mr_dor;
  Mpo_dor := Apo_dor/Vpo*Mr_dor;
  Ahv_dor := Chv_dor*Vhv;
  Xhv_dor := Ahv_dor*Mr_dor;
  Mhv_dor := Ahv_dor/Vhv*Mr_dor;
  Xurine_dor := Aurine_dor*Mr_dor;
  dissolution_dex := Ka_dis_dex/(60 min_per_hr)*PODOSE_dex/Mr_dex;
  LI__DEXCYP3A4_Vmax := DEXCYP3A4LI_Vmax;
  LI__DEXCYP2D6_Vmax := LI__DEXCYP3A4_Vmax*LI__DEXCYP2D6_f;
  LI__DEXIM_Vmax := LI__DEXCYP3A4_Vmax*LI__DEXIM_f;
  LI__DOREX_Vmax := LI__DEXCYP3A4_Vmax*LI__DOREX_f;
  LI__cyp2d6_activity_1 := piecewise(LI__cyp2d6_definition_custom, LI__cyp2d6_allele_1 == 0, LI__cyp2d6_definition_0, LI__cyp2d6_allele_1 == 0, LI__cyp2d6_definition_1, LI__cyp2d6_allele_1 == 1, LI__cyp2d6_definition_2, LI__cyp2d6_allele_1 == 2, LI__cyp2d6_definition_3, LI__cyp2d6_allele_1 == 3, LI__cyp2d6_definition_4, LI__cyp2d6_allele_1 == 4, LI__cyp2d6_definition_5, LI__cyp2d6_allele_1 == 5, LI__cyp2d6_definition_6, LI__cyp2d6_allele_1 == 6, LI__cyp2d6_definition_7, LI__cyp2d6_allele_1 == 7, LI__cyp2d6_definition_8, LI__cyp2d6_allele_1 == 8, LI__cyp2d6_definition_9, LI__cyp2d6_allele_1 == 9, LI__cyp2d6_definition_10, LI__cyp2d6_allele_1 == 10, LI__cyp2d6_definition_11, LI__cyp2d6_allele_1 == 11, LI__cyp2d6_definition_12, LI__cyp2d6_allele_1 == 12, LI__cyp2d6_definition_13, LI__cyp2d6_allele_1 == 13, LI__cyp2d6_definition_14, LI__cyp2d6_allele_1 == 14, LI__cyp2d6_definition_15, LI__cyp2d6_allele_1 == 15, LI__cyp2d6_definition_16, LI__cyp2d6_allele_1 == 16, LI__cyp2d6_definition_17, LI__cyp2d6_allele_1 == 17, LI__cyp2d6_definition_18, LI__cyp2d6_allele_1 == 18, LI__cyp2d6_definition_19, LI__cyp2d6_allele_1 == 19, LI__cyp2d6_definition_20, LI__cyp2d6_allele_1 == 20, LI__cyp2d6_definition_21, LI__cyp2d6_allele_1 == 21, LI__cyp2d6_definition_22, LI__cyp2d6_allele_1 == 22, LI__cyp2d6_definition_23, LI__cyp2d6_allele_1 == 23, LI__cyp2d6_definition_24, LI__cyp2d6_allele_1 == 24, LI__cyp2d6_definition_25, LI__cyp2d6_allele_1 == 25, LI__cyp2d6_definition_26, LI__cyp2d6_allele_1 == 26, LI__cyp2d6_definition_27, LI__cyp2d6_allele_1 == 27, LI__cyp2d6_definition_28, LI__cyp2d6_allele_1 == 28, LI__cyp2d6_definition_29, LI__cyp2d6_allele_1 == 29, LI__cyp2d6_definition_30, LI__cyp2d6_allele_1 == 30, LI__cyp2d6_definition_31, LI__cyp2d6_allele_1 == 31, LI__cyp2d6_definition_32, LI__cyp2d6_allele_1 == 32, LI__cyp2d6_definition_33, LI__cyp2d6_allele_1 == 33, LI__cyp2d6_definition_34, LI__cyp2d6_allele_1 == 34, LI__cyp2d6_definition_35, LI__cyp2d6_allele_1 == 35, LI__cyp2d6_definition_36, LI__cyp2d6_allele_1 == 36, LI__cyp2d6_definition_37, LI__cyp2d6_allele_1 == 37, LI__cyp2d6_definition_38, LI__cyp2d6_allele_1 == 38, LI__cyp2d6_definition_39, LI__cyp2d6_allele_1 == 39, LI__cyp2d6_definition_40, LI__cyp2d6_allele_1 == 40, LI__cyp2d6_definition_41, LI__cyp2d6_allele_1 == 41, LI__cyp2d6_definition_42, LI__cyp2d6_allele_1 == 42, LI__cyp2d6_definition_43, LI__cyp2d6_allele_1 == 43, LI__cyp2d6_definition_44, LI__cyp2d6_allele_1 == 44, LI__cyp2d6_definition_45, LI__cyp2d6_allele_1 == 45, LI__cyp2d6_definition_46, LI__cyp2d6_allele_1 == 46, LI__cyp2d6_definition_47, LI__cyp2d6_allele_1 == 47, LI__cyp2d6_definition_48, LI__cyp2d6_allele_1 == 48, LI__cyp2d6_definition_49, LI__cyp2d6_allele_1 == 49, LI__cyp2d6_definition_50, LI__cyp2d6_allele_1 == 50, LI__cyp2d6_definition_51, LI__cyp2d6_allele_1 == 51, LI__cyp2d6_definition_52, LI__cyp2d6_allele_1 == 52, LI__cyp2d6_definition_53, LI__cyp2d6_allele_1 == 53, LI__cyp2d6_definition_54, LI__cyp2d6_allele_1 == 54, LI__cyp2d6_definition_55, LI__cyp2d6_allele_1 == 55, LI__cyp2d6_definition_56, LI__cyp2d6_allele_1 == 56, LI__cyp2d6_definition_57, LI__cyp2d6_allele_1 == 57, LI__cyp2d6_definition_58, LI__cyp2d6_allele_1 == 58, LI__cyp2d6_definition_59, LI__cyp2d6_allele_1 == 59, LI__cyp2d6_definition_60, LI__cyp2d6_allele_1 == 60, LI__cyp2d6_definition_61, LI__cyp2d6_allele_1 == 61, LI__cyp2d6_definition_62, LI__cyp2d6_allele_1 == 62, LI__cyp2d6_definition_63, LI__cyp2d6_allele_1 == 63, LI__cyp2d6_definition_64, LI__cyp2d6_allele_1 == 64, LI__cyp2d6_definition_65, LI__cyp2d6_allele_1 == 65, LI__cyp2d6_definition_66, LI__cyp2d6_allele_1 == 66, LI__cyp2d6_definition_67, LI__cyp2d6_allele_1 == 67, LI__cyp2d6_definition_68, LI__cyp2d6_allele_1 == 68, LI__cyp2d6_definition_69, LI__cyp2d6_allele_1 == 69, LI__cyp2d6_definition_70, LI__cyp2d6_allele_1 == 70, LI__cyp2d6_definition_71, LI__cyp2d6_allele_1 == 71, LI__cyp2d6_definition_72, LI__cyp2d6_allele_1 == 72, LI__cyp2d6_definition_73, LI__cyp2d6_allele_1 == 73, LI__cyp2d6_definition_74, LI__cyp2d6_allele_1 == 74, LI__cyp2d6_definition_75, LI__cyp2d6_allele_1 == 75, LI__cyp2d6_definition_76, LI__cyp2d6_allele_1 == 76, LI__cyp2d6_definition_77, LI__cyp2d6_allele_1 == 77, LI__cyp2d6_definition_78, LI__cyp2d6_allele_1 == 78, LI__cyp2d6_definition_79, LI__cyp2d6_allele_1 == 79, LI__cyp2d6_definition_80, LI__cyp2d6_allele_1 == 80, LI__cyp2d6_definition_81, LI__cyp2d6_allele_1 == 81, LI__cyp2d6_definition_82, LI__cyp2d6_allele_1 == 82, LI__cyp2d6_definition_83, LI__cyp2d6_allele_1 == 83, LI__cyp2d6_definition_84, LI__cyp2d6_allele_1 == 84, LI__cyp2d6_definition_custom);
  LI__cyp2d6_activity_2 := piecewise(LI__cyp2d6_definition_custom, LI__cyp2d6_allele_2 == 0, LI__cyp2d6_definition_0, LI__cyp2d6_allele_2 == 0, LI__cyp2d6_definition_1, LI__cyp2d6_allele_2 == 1, LI__cyp2d6_definition_2, LI__cyp2d6_allele_2 == 2, LI__cyp2d6_definition_3, LI__cyp2d6_allele_2 == 3, LI__cyp2d6_definition_4, LI__cyp2d6_allele_2 == 4, LI__cyp2d6_definition_5, LI__cyp2d6_allele_2 == 5, LI__cyp2d6_definition_6, LI__cyp2d6_allele_2 == 6, LI__cyp2d6_definition_7, LI__cyp2d6_allele_2 == 7, LI__cyp2d6_definition_8, LI__cyp2d6_allele_2 == 8, LI__cyp2d6_definition_9, LI__cyp2d6_allele_2 == 9, LI__cyp2d6_definition_10, LI__cyp2d6_allele_2 == 10, LI__cyp2d6_definition_11, LI__cyp2d6_allele_2 == 11, LI__cyp2d6_definition_12, LI__cyp2d6_allele_2 == 12, LI__cyp2d6_definition_13, LI__cyp2d6_allele_2 == 13, LI__cyp2d6_definition_14, LI__cyp2d6_allele_2 == 14, LI__cyp2d6_definition_15, LI__cyp2d6_allele_2 == 15, LI__cyp2d6_definition_16, LI__cyp2d6_allele_2 == 16, LI__cyp2d6_definition_17, LI__cyp2d6_allele_2 == 17, LI__cyp2d6_definition_18, LI__cyp2d6_allele_2 == 18, LI__cyp2d6_definition_19, LI__cyp2d6_allele_2 == 19, LI__cyp2d6_definition_20, LI__cyp2d6_allele_2 == 20, LI__cyp2d6_definition_21, LI__cyp2d6_allele_2 == 21, LI__cyp2d6_definition_22, LI__cyp2d6_allele_2 == 22, LI__cyp2d6_definition_23, LI__cyp2d6_allele_2 == 23, LI__cyp2d6_definition_24, LI__cyp2d6_allele_2 == 24, LI__cyp2d6_definition_25, LI__cyp2d6_allele_2 == 25, LI__cyp2d6_definition_26, LI__cyp2d6_allele_2 == 26, LI__cyp2d6_definition_27, LI__cyp2d6_allele_2 == 27, LI__cyp2d6_definition_28, LI__cyp2d6_allele_2 == 28, LI__cyp2d6_definition_29, LI__cyp2d6_allele_2 == 29, LI__cyp2d6_definition_30, LI__cyp2d6_allele_2 == 30, LI__cyp2d6_definition_31, LI__cyp2d6_allele_2 == 31, LI__cyp2d6_definition_32, LI__cyp2d6_allele_2 == 32, LI__cyp2d6_definition_33, LI__cyp2d6_allele_2 == 33, LI__cyp2d6_definition_34, LI__cyp2d6_allele_2 == 34, LI__cyp2d6_definition_35, LI__cyp2d6_allele_2 == 35, LI__cyp2d6_definition_36, LI__cyp2d6_allele_2 == 36, LI__cyp2d6_definition_37, LI__cyp2d6_allele_2 == 37, LI__cyp2d6_definition_38, LI__cyp2d6_allele_2 == 38, LI__cyp2d6_definition_39, LI__cyp2d6_allele_2 == 39, LI__cyp2d6_definition_40, LI__cyp2d6_allele_2 == 40, LI__cyp2d6_definition_41, LI__cyp2d6_allele_2 == 41, LI__cyp2d6_definition_42, LI__cyp2d6_allele_2 == 42, LI__cyp2d6_definition_43, LI__cyp2d6_allele_2 == 43, LI__cyp2d6_definition_44, LI__cyp2d6_allele_2 == 44, LI__cyp2d6_definition_45, LI__cyp2d6_allele_2 == 45, LI__cyp2d6_definition_46, LI__cyp2d6_allele_2 == 46, LI__cyp2d6_definition_47, LI__cyp2d6_allele_2 == 47, LI__cyp2d6_definition_48, LI__cyp2d6_allele_2 == 48, LI__cyp2d6_definition_49, LI__cyp2d6_allele_2 == 49, LI__cyp2d6_definition_50, LI__cyp2d6_allele_2 == 50, LI__cyp2d6_definition_51, LI__cyp2d6_allele_2 == 51, LI__cyp2d6_definition_52, LI__cyp2d6_allele_2 == 52, LI__cyp2d6_definition_53, LI__cyp2d6_allele_2 == 53, LI__cyp2d6_definition_54, LI__cyp2d6_allele_2 == 54, LI__cyp2d6_definition_55, LI__cyp2d6_allele_2 == 55, LI__cyp2d6_definition_56, LI__cyp2d6_allele_2 == 56, LI__cyp2d6_definition_57, LI__cyp2d6_allele_2 == 57, LI__cyp2d6_definition_58, LI__cyp2d6_allele_2 == 58, LI__cyp2d6_definition_59, LI__cyp2d6_allele_2 == 59, LI__cyp2d6_definition_60, LI__cyp2d6_allele_2 == 60, LI__cyp2d6_definition_61, LI__cyp2d6_allele_2 == 61, LI__cyp2d6_definition_62, LI__cyp2d6_allele_2 == 62, LI__cyp2d6_definition_63, LI__cyp2d6_allele_2 == 63, LI__cyp2d6_definition_64, LI__cyp2d6_allele_2 == 64, LI__cyp2d6_definition_65, LI__cyp2d6_allele_2 == 65, LI__cyp2d6_definition_66, LI__cyp2d6_allele_2 == 66, LI__cyp2d6_definition_67, LI__cyp2d6_allele_2 == 67, LI__cyp2d6_definition_68, LI__cyp2d6_allele_2 == 68, LI__cyp2d6_definition_69, LI__cyp2d6_allele_2 == 69, LI__cyp2d6_definition_70, LI__cyp2d6_allele_2 == 70, LI__cyp2d6_definition_71, LI__cyp2d6_allele_2 == 71, LI__cyp2d6_definition_72, LI__cyp2d6_allele_2 == 72, LI__cyp2d6_definition_73, LI__cyp2d6_allele_2 == 73, LI__cyp2d6_definition_74, LI__cyp2d6_allele_2 == 74, LI__cyp2d6_definition_75, LI__cyp2d6_allele_2 == 75, LI__cyp2d6_definition_76, LI__cyp2d6_allele_2 == 76, LI__cyp2d6_definition_77, LI__cyp2d6_allele_2 == 77, LI__cyp2d6_definition_78, LI__cyp2d6_allele_2 == 78, LI__cyp2d6_definition_79, LI__cyp2d6_allele_2 == 79, LI__cyp2d6_definition_80, LI__cyp2d6_allele_2 == 80, LI__cyp2d6_definition_81, LI__cyp2d6_allele_2 == 81, LI__cyp2d6_definition_82, LI__cyp2d6_allele_2 == 82, LI__cyp2d6_definition_83, LI__cyp2d6_allele_2 == 83, LI__cyp2d6_definition_84, LI__cyp2d6_allele_2 == 84, LI__cyp2d6_definition_custom);
  LI__DEXCYP2D6_activity := 10^(LI__cyp2d6_activity_1 + LI__cyp2d6_activity_2);
  GU__DEXCYP3A4_Vmax := DEXCYP3A4LI_Vmax*GU__DEXCYP3A4_f;
  GU__DEXEXP_Vmax := GU__DEXCYP3A4_Vmax*GU__DEXEXP_f;

  // Rate rules:
  PODOSE_dex' = -dissolution_dex*Mr_dex;
  GUTDOSE_dex' = F_dex*dissolution_dex*Mr_dex - absorption_dex*Mr_dex;
  IVDOSE_dex' = -iv_dex*Mr_dex + Ri_dex;
  cum_dose_dex' = Ri_dex;

  // Reactions:
  iv_dex: => Cve_dex; Ki_dex*IVDOSE_dex/Mr_dex; iv_dex is "iv dextormethorphan";
  absorption_dex: => Cgu_tissue_dex; Ka_abs_dex/(60 min_per_hr)*GUTDOSE_dex/Mr_dex; absorption_dex is "absorption dextormethorphan";
  excretion_dex: => Afeces_dex; (1 - F_dex)*dissolution_dex; excretion_dex is "excretion dextormethorphan";
  Flow_ar_gu_dex: Car_dex => Cgu_plasma_dex; Qgu*Car_dex; Flow_ar_gu_dex is "inflow gut dextormethorphan";
  Flow_gu_po_dex: Cgu_plasma_dex => Cpo_dex; Qgu*Cgu_plasma_dex*BP_dex; Flow_gu_po_dex is "outflow gut dextormethorphan";
  Flow_ar_ki_dex: Car_dex => Cki_plasma_dex; Qki*Car_dex; Flow_ar_ki_dex is "inflow kidney dextormethorphan";
  Flow_ki_ve_dex: Cki_plasma_dex => Cve_dex; Qki*Cki_plasma_dex*BP_dex; Flow_ki_ve_dex is "outflow kidney dextormethorphan";
  Flow_ar_li_dex: Car_dex => Cli_plasma_dex; Qha*Car_dex; Flow_ar_li_dex is "inflow liver dextormethorphan";
  Flow_po_li_dex: Cpo_dex => Cli_plasma_dex; Qpo*Cpo_dex*BP_dex; Flow_po_li_dex is "outflow po dextormethorphan";
  Flow_li_hv_dex: Cli_plasma_dex => Chv_dex; Qh*Cli_plasma_dex*BP_dex; Flow_li_hv_dex is "outflow liver dextormethorphan";
  Flow_hv_ve_dex: Chv_dex => Cve_dex; Qh*Chv_dex*BP_dex; Flow_hv_ve_dex is "outflow hepatic vein dextormethorphan";
  Flow_ve_lu_dex: Cve_dex => Clu_plasma_dex; Qlu*Cve_dex; Flow_ve_lu_dex is "inflow lung dextormethorphan";
  Flow_lu_ar_dex: Clu_plasma_dex => Car_dex; Qlu*Clu_plasma_dex*BP_dex; Flow_lu_ar_dex is "outflow lung dextormethorphan";
  Flow_ar_pa_dex: Car_dex => Cpa_plasma_dex; Qpa*Car_dex; Flow_ar_pa_dex is "inflow pancreas dextormethorphan";
  Flow_pa_po_dex: Cpa_plasma_dex => Cpo_dex; Qpa*Cpa_plasma_dex*BP_dex; Flow_pa_po_dex is "outflow pancreas dextormethorphan";
  Flow_ar_sp_dex: Car_dex => Csp_plasma_dex; Qsp*Car_dex; Flow_ar_sp_dex is "inflow spleen dextormethorphan";
  Flow_sp_po_dex: Csp_plasma_dex => Cpo_dex; Qsp*Csp_plasma_dex*BP_dex; Flow_sp_po_dex is "outflow spleen dextormethorphan";
  Flow_ar_re_dex: Car_dex => Cre_plasma_dex; Qre*Car_dex; Flow_ar_re_dex is "inflow rest dextormethorphan";
  Flow_re_ve_dex: Cre_plasma_dex => Cve_dex; Qre*Cre_plasma_dex*BP_dex; Flow_re_ve_dex is "outflow rest dextormethorphan";
  Flow_ar_gu_dor: Car_dor => Cgu_plasma_dor; Qgu*Car_dor; Flow_ar_gu_dor is "inflow gut dextorphan";
  Flow_gu_po_dor: Cgu_plasma_dor => Cpo_dor; Qgu*Cgu_plasma_dor*BP_dor; Flow_gu_po_dor is "outflow gut dextorphan";
  Flow_ar_ki_dor: Car_dor => Cki_plasma_dor; Qki*Car_dor; Flow_ar_ki_dor is "inflow kidney dextorphan";
  Flow_ki_ve_dor: Cki_plasma_dor => Cve_dor; Qki*Cki_plasma_dor*BP_dor; Flow_ki_ve_dor is "outflow kidney dextorphan";
  Flow_ar_li_dor: Car_dor => Cli_plasma_dor; Qha*Car_dor; Flow_ar_li_dor is "inflow liver dextorphan";
  Flow_po_li_dor: Cpo_dor => Cli_plasma_dor; Qpo*Cpo_dor*BP_dor; Flow_po_li_dor is "outflow po dextorphan";
  Flow_li_hv_dor: Cli_plasma_dor => Chv_dor; Qh*Cli_plasma_dor*BP_dor; Flow_li_hv_dor is "outflow liver dextorphan";
  Flow_hv_ve_dor: Chv_dor => Cve_dor; Qh*Chv_dor*BP_dor; Flow_hv_ve_dor is "outflow hepatic vein dextorphan";
  Flow_ve_lu_dor: Cve_dor => Clu_plasma_dor; Qlu*Cve_dor; Flow_ve_lu_dor is "inflow lung dextorphan";
  Flow_lu_ar_dor: Clu_plasma_dor => Car_dor; Qlu*Clu_plasma_dor*BP_dor; Flow_lu_ar_dor is "outflow lung dextorphan";
  Flow_ar_pa_dor: Car_dor => Cpa_plasma_dor; Qpa*Car_dor; Flow_ar_pa_dor is "inflow pancreas dextorphan";
  Flow_pa_po_dor: Cpa_plasma_dor => Cpo_dor; Qpa*Cpa_plasma_dor*BP_dor; Flow_pa_po_dor is "outflow pancreas dextorphan";
  Flow_ar_sp_dor: Car_dor => Csp_plasma_dor; Qsp*Car_dor; Flow_ar_sp_dor is "inflow spleen dextorphan";
  Flow_sp_po_dor: Csp_plasma_dor => Cpo_dor; Qsp*Csp_plasma_dor*BP_dor; Flow_sp_po_dor is "outflow spleen dextorphan";
  Flow_ar_re_dor: Car_dor => Cre_plasma_dor; Qre*Car_dor; Flow_ar_re_dor is "inflow rest dextorphan";
  Flow_re_ve_dor: Cre_plasma_dor => Cve_dor; Qre*Cre_plasma_dor*BP_dor; Flow_re_ve_dor is "outflow rest dextorphan";
  KI__DEXEX: Cki_plasma_dex => Aurine_dex; KI__DEXEX_k*Vki_tissue*Cki_plasma_dex;
  KI__DOREX: Cki_plasma_dor => Aurine_dor; KI__DOREX_k*Vki_tissue*Cki_plasma_dor;
  LI__DEXIM: Cli_plasma_dex => LI__dex; LI__DEXIM_Vmax*Vli_tissue*Cli_plasma_dex/(LI__DEXIM_Km_dex + Cli_plasma_dex);
  LI__DEXCYP2D6: LI__dex => LI__dor; LI__DEXCYP2D6_Vmax*LI__DEXCYP2D6_phenotype*LI__DEXCYP2D6_activity/(1 + LI__qui_ext/LI__DEXCYP2D6_Ki_qui)*Vli_tissue*LI__dex/(LI__DEXCYP2D6_Km_dex + LI__dex);  // modifiers: LI__qui_ext
  LI__DEXCYP3A4: LI__dex => ; LI__DEXCYP3A4_Vmax*LI__DEXCYP3A4_switch*LI__DEXCYP3A4_activity*Vli_tissue*LI__dex/(DEXCYP3A4_Km_dex + LI__dex);
  LI__DOREX: LI__dor => Cli_plasma_dor; LI__DOREX_Vmax*Vli_tissue*LI__dor/(LI__DOREX_Km_dor + LI__dor);
  GU__DEXEXP: Cgu_tissue_dex => Cgu_plasma_dex; GU__DEXEXP_Vmax*Vgu_tissue*Cgu_tissue_dex/(GU__DEXEXP_Km_dex + Cgu_tissue_dex);
  GU__DEXCYP3A4: Cgu_tissue_dex => ; GU__DEXCYP3A4_Vmax*GU__DEXCYP3A4_switch*GU__DEXCYP3A4_activity*Vgu_tissue*Cgu_tissue_dex/(Cgu_tissue_dex + DEXCYP3A4_Km_dex);

  // Unit definitions:
  unit mmole = 1e-3 mole;
  unit min = 60 second;
  unit m = metre;
  unit m2 = metre^2;
  unit mM = 1e-3 mole / litre;
  unit mmole_per_min = 1e-3 mole / (60 second);
  unit mmole_per_min_l = 1e-3 mole / (60 second * litre);
  unit litre_per_min = litre / (60 second);
  unit per_min = 1 / (60 second);
  unit kg = kilogram;
  unit s = second;
  unit mg = 1e-3 gram;
  unit ml = 1e-3 litre;
  unit hr = 3600 second;
  unit per_hr = 1 / (3600 second);
  unit cm = 0.01 metre;
  unit mg_per_l = 1e-3 gram / litre;
  unit mg_per_g = 1e-3 gram / gram;
  unit mg_per_hr = 1e-3 gram / (3600 second);
  unit l_per_min = litre / (60 second);
  unit l_per_min_kg = litre / (60 second * kilogram);
  unit l_per_hr = litre / (3600 second);
  unit l_per_kg = litre / (1000 gram);
  unit l_per_ml = litre / (1e-3 litre);
  unit g_per_mole = gram / mole;
  unit m2_per_kg = metre^2 / (1000 gram);
  unit mg_per_min = 1e-3 gram / (60 second);
  unit mmole_per_hr = 1e-3 mole / (3600 second);
  unit mmole_per_l = 1e-3 mole / litre;
  unit mmole_per_min_kg = 1e-3 mole / (60 second * 1000 gram);
  unit mmole_per_hr_ml = 1e-3 mole / (3600 second * 1e-3 litre);
  unit ml_per_s = 1e-3 litre / second;
  unit ml_per_s_kg = 1e-3 litre / (second * 1000 gram);
  unit ml_per_l = 1e-3 litre / litre;
  unit mulitre_per_g = 1e-6 litre / gram;
  unit mul_per_min_mg = 1e-6 litre / (60 second * 1e-3 gram);
  unit min_per_hr = 60 second / (3600 second);
  unit s_per_min = second / (60 second);
  unit min_per_day = 60 second / (86400 second);
  unit mg_per_day = 1e-3 gram / (86400 second);
  unit per_min_kg = 1 / (60 second * 1000 gram);
  unit KI__mg = 1e-3 gram;
  unit KI__g_per_mole = gram / mole;
  unit LI__mg = 1e-3 gram;
  unit LI__g_per_mole = gram / mole;
  unit GU__kg = kilogram;
  unit GU__l_per_min = litre / (60 second);
  unit GU__l_per_min_kg = litre / (60 second * 1000 gram);
end
