// SBML level 3 version 1

model dex_intestine(DEXCYP3A4LI_Vmax, DEXCYP3A4_Km_dex, Vext, Vin, dex_ext, dex)
  // model units - substance: mmole, time: min, volume: litre, area: m2, length: m, extent: mmole

  // Compartments:
  compartment Vext = 1 litre; Vext is "extern (plasma)";
  compartment Vin = 1 litre; Vin is "intestine";

  // Species:
  species dex_ext in Vext = 0; dex_ext is "dextormethorphan (extern)";
  species dex in Vin = 0; dex is "dextormethorphan (intestine)";

  // Parameters:
  DEXCYP3A4LI_Vmax = 1 mmole_per_min_l;
  DEXCYP3A4_Km_dex = 286 mM;
  DEXCYP3A4_f = 0.5929531 dimensionless;
  DEXEXP_f = 391.163 dimensionless;
  DEXCYP3A4_Vmax has mmole_per_min_l;
  DEXEXP_Vmax has mmole_per_min_l;
  DEXEXP_Km_dex = 0.1 mM;
  DEXCYP3A4_switch = 1 dimensionless;
  DEXCYP3A4_activity = 1 dimensionless;

  // Assignment rules:
  DEXCYP3A4_Vmax := DEXCYP3A4LI_Vmax*DEXCYP3A4_f;
  DEXEXP_Vmax := DEXCYP3A4_Vmax*DEXEXP_f;

  // Reactions:
  DEXEXP: dex => dex_ext; DEXEXP_Vmax*Vin*dex/(DEXEXP_Km_dex + dex);
  DEXCYP3A4: dex => ; DEXCYP3A4_Vmax*DEXCYP3A4_switch*DEXCYP3A4_activity*Vin*dex/(dex + DEXCYP3A4_Km_dex);

  // Unit definitions:
  unit mmole = 1e-3 mole;
  unit min = 60 second;
  unit m = metre;
  unit m2 = metre^2;
  unit mM = 1e-3 mole / litre;
  unit mmole_per_min = 1e-3 mole / (60 second);
  unit mmole_per_min_l = 1e-3 mole / (60 second * litre);
  unit litre_per_min = litre / (60 second);
  unit per_min = 1 / (60 second);
  unit kg = kilogram;
  unit l_per_min = litre / (60 second);
  unit l_per_min_kg = litre / (60 second * 1000 gram);
end
