// SBML level 3 version 1
// Created with https://github.com/matthiaskoenig/sbmlutils.

model dex_kidney(Vext, Vki, Vurine, dex_ext, dor_ext, dex_urine, dor_urine)
  // Dextormethorphan (DEX) kidney model
  // DEX and DOR can be excreted in the urine via the kidneys. The renal filtration and excretion processes are not modeled in detail, but first order irreversible mass-action kinetics are used.
  // ",
  // Terms of use
  // The content of this model has been carefully created in a manual research effort. This file has been created by Matthias König using sbmlutils. For questions contact koenigmx@hu-berlin.de.
  // Copyright © 2021 Matthias König.
  // This work is licensed under a Creative Commons Attribution 4.0 International License.
  // Redistribution and use of any part of this model, with or without modification, are permitted provided that the following conditions are met:
  // Redistributions of this SBML file must retain the above copyright notice, this list of conditions and the following disclaimer.
  // Redistributions in a different form must reproduce the above copyright notice, this list of conditions and the following disclaimer in the documentation and/or other materials provided with the distribution.
  // This model is distributed in the hope that it will be useful, but WITHOUT ANY WARRANTY; without even the implied warranty of MERCHANTABILITY or FITNESS FOR A PARTICULAR PURPOSE.
  // model units - substance: mmole, time: min, volume: litre, area: m2, length: metre, extent: mmole

  // Compartments:
  compartment Vext = 4 litre; Vext is "plasma";  // SBO:0000290 ncit:C13356 BTO:0000131
  compartment Vki = 1.5 litre; Vki is "kidney";  // SBO:0000290 FMA:7203 BTO:0000671 ncit:C12415
  compartment Vurine = 1 litre;  // SBO:0000290 FMA:12274 ncit:C13283 BTO:0001419
  compartment Vmem = NaN; Vmem has m2; Vmem is "plasma membrane";  // 2-D; SBO:0000290 ncit:C13735 FMA:63841 GO:0005886

  // Species:
  species dex_ext in Vext = 0; dex_ext is "dextormethorphan (plasma)";  // SBO:0000247 CHEBI:4470 ncit:C62022 inchikey:MKXZASYAUGDDCJ-NJAFHUGGSA-N
  species dor_ext in Vext = 0; dor_ext is "dextrorphan (plasma)";  // SBO:0000247 CHEBI:29133 ncit:C171857 inchikey:JAQUASYNZVUNQP-PVAVHDDUSA-N
  substanceOnly species dex_urine in Vurine = 0; dex_urine is "dextormethorphan (urine)";  // SBO:0000247 CHEBI:4470 ncit:C62022 inchikey:MKXZASYAUGDDCJ-NJAFHUGGSA-N
  substanceOnly species dor_urine in Vurine = 0; dor_urine is "dextrorphan (urine)";  // SBO:0000247 CHEBI:29133 ncit:C171857 inchikey:JAQUASYNZVUNQP-PVAVHDDUSA-N

  // Parameters:
  DEXEX_k = 0.017 per_min; DEXEX_k is "DEX urinary excretion rate";  // SBO:0000009
  DOREX_k = 0.14 per_min; DOREX_k is "DOR urinary excretion rate";  // SBO:0000009

  // Reactions:
  DEXEX: dex_ext => dex_urine; DEXEX_k*Vki*dex_ext; DEXEX is "DEX urinary excretion";  // SBO:0000655
  DOREX: dor_ext => dor_urine; DOREX_k*Vki*dor_ext; DOREX is "DOR excretion";  // SBO:0000655

  // Unit definitions:
  unit g_per_mole = gram / mole; g_per_mole is "g/mole";
  unit litre_per_min = (0.02554365 metre)^3 / second; litre_per_min is "litre/min";
  unit m2 = metre^2; m2 is "meter^2";
  unit mM = mole / metre^3; mM is "mmole/liter";
  unit mg = 1e-3 gram;
  unit min = 60 second;
  unit mmole = 1e-3 mole;
  unit mmole_per_min = 1.666667e-5 mole / second; mmole_per_min is "mmole/min";
  unit mmole_per_min_l = 0.01666667 mole / (second * metre^3); mmole_per_min_l is "mmole/min/liter";
  unit per_min = 1 / (60 second); per_min is "1/min";
end
