// SBML level 3 version 1

model dex_liver(DEXCYP3A4LI_Vmax, DEXCYP3A4_Km_dex, Vext, Vli, dex_ext, dor_ext)
  // model units - substance: mmole, time: min, volume: litre, area: m2, length: m, extent: mmole

  // Compartments:
  compartment Vext = 4 litre; Vext is "blood";
  compartment Vli = 1.5 litre; Vli is "liver";

  // Species:
  species dex_ext in Vext = 0; dex_ext is "dextormethorphan (extern)";
  species dor_ext in Vext = 0; dor_ext is "dextrorphan (extern)";
  species $qui_ext in Vext = 0; qui_ext is "quinidine (extern)";
  species dex in Vli = 0; dex is "dextormethorphan (liver)";
  species dor in Vli = 0; dor is "dextrorphan (liver)";

  // Parameters:
  DEXCYP3A4LI_Vmax = 0.0008739321 mmole_per_min_l;
  DEXCYP3A4_Km_dex = 286 mM;
  DEXCYP2D6_f = 0.0375 dimensionless;
  DEXIM_f = 148.4299 dimensionless;
  DOREX_f = 14.49475 dimensionless;
  cyp2d6_definition_0 = 1 dimensionless; cyp2d6_definition_0 is "activity of *1 allele";
  cyp2d6_definition_1 = 0.25 dimensionless; cyp2d6_definition_1 is "activity of *10 allele";
  cyp2d6_definition_2 = 0 dimensionless; cyp2d6_definition_2 is "activity of *100 allele";
  cyp2d6_definition_3 = 0 dimensionless; cyp2d6_definition_3 is "activity of *101 allele";
  cyp2d6_definition_4 = 0.5 dimensionless; cyp2d6_definition_4 is "activity of *10x2 allele";
  cyp2d6_definition_5 = 0 dimensionless; cyp2d6_definition_5 is "activity of *11 allele";
  cyp2d6_definition_6 = 0 dimensionless; cyp2d6_definition_6 is "activity of *114 allele";
  cyp2d6_definition_7 = 0 dimensionless; cyp2d6_definition_7 is "activity of *12 allele";
  cyp2d6_definition_8 = 0 dimensionless; cyp2d6_definition_8 is "activity of *120 allele";
  cyp2d6_definition_9 = 0 dimensionless; cyp2d6_definition_9 is "activity of *124 allele";
  cyp2d6_definition_10 = 0 dimensionless; cyp2d6_definition_10 is "activity of *129 allele";
  cyp2d6_definition_11 = 0 dimensionless; cyp2d6_definition_11 is "activity of *13 allele";
  cyp2d6_definition_12 = 0.5 dimensionless; cyp2d6_definition_12 is "activity of *14 allele";
  cyp2d6_definition_13 = 0 dimensionless; cyp2d6_definition_13 is "activity of *15 allele";
  cyp2d6_definition_14 = 0.5 dimensionless; cyp2d6_definition_14 is "activity of *17 allele";
  cyp2d6_definition_15 = 1 dimensionless; cyp2d6_definition_15 is "activity of *17x2 allele";
  cyp2d6_definition_16 = 0 dimensionless; cyp2d6_definition_16 is "activity of *18 allele";
  cyp2d6_definition_17 = 0 dimensionless; cyp2d6_definition_17 is "activity of *19 allele";
  cyp2d6_definition_18 = 2 dimensionless; cyp2d6_definition_18 is "activity of *1x2 allele";
  cyp2d6_definition_19 = 3 dimensionless; cyp2d6_definition_19 is "activity of *1x3 allele";
  cyp2d6_definition_20 = 4 dimensionless; cyp2d6_definition_20 is "activity of *1x4 allele";
  cyp2d6_definition_21 = 5 dimensionless; cyp2d6_definition_21 is "activity of *1x5 allele";
  cyp2d6_definition_22 = 6 dimensionless; cyp2d6_definition_22 is "activity of *1x6 allele";
  cyp2d6_definition_23 = 1 dimensionless; cyp2d6_definition_23 is "activity of *2 allele";
  cyp2d6_definition_24 = 0 dimensionless; cyp2d6_definition_24 is "activity of *20 allele";
  cyp2d6_definition_25 = 0 dimensionless; cyp2d6_definition_25 is "activity of *21 allele";
  cyp2d6_definition_26 = 1 dimensionless; cyp2d6_definition_26 is "activity of *27 allele";
  cyp2d6_definition_27 = 0.5 dimensionless; cyp2d6_definition_27 is "activity of *29 allele";
  cyp2d6_definition_28 = 1 dimensionless; cyp2d6_definition_28 is "activity of *29x2 allele";
  cyp2d6_definition_29 = 2 dimensionless; cyp2d6_definition_29 is "activity of *2x2 allele";
  cyp2d6_definition_30 = 3 dimensionless; cyp2d6_definition_30 is "activity of *2x3 allele";
  cyp2d6_definition_31 = 4 dimensionless; cyp2d6_definition_31 is "activity of *2x4 allele";
  cyp2d6_definition_32 = 5 dimensionless; cyp2d6_definition_32 is "activity of *2x5 allele";
  cyp2d6_definition_33 = 6 dimensionless; cyp2d6_definition_33 is "activity of *2x6 allele";
  cyp2d6_definition_34 = 0 dimensionless; cyp2d6_definition_34 is "activity of *3 allele";
  cyp2d6_definition_35 = 0 dimensionless; cyp2d6_definition_35 is "activity of *31 allele";
  cyp2d6_definition_36 = 1 dimensionless; cyp2d6_definition_36 is "activity of *33 allele";
  cyp2d6_definition_37 = 1 dimensionless; cyp2d6_definition_37 is "activity of *34 allele";
  cyp2d6_definition_38 = 1 dimensionless; cyp2d6_definition_38 is "activity of *35 allele";
  cyp2d6_definition_39 = 2 dimensionless; cyp2d6_definition_39 is "activity of *35x2 allele";
  cyp2d6_definition_40 = 0 dimensionless; cyp2d6_definition_40 is "activity of *36 allele";
  cyp2d6_definition_41 = 0 dimensionless; cyp2d6_definition_41 is "activity of *36x2 allele";
  cyp2d6_definition_42 = 0 dimensionless; cyp2d6_definition_42 is "activity of *38 allele";
  cyp2d6_definition_43 = 1 dimensionless; cyp2d6_definition_43 is "activity of *39 allele";
  cyp2d6_definition_44 = 0 dimensionless; cyp2d6_definition_44 is "activity of *3x2 allele";
  cyp2d6_definition_45 = 0 dimensionless; cyp2d6_definition_45 is "activity of *4 allele";
  cyp2d6_definition_46 = 0 dimensionless; cyp2d6_definition_46 is "activity of *40 allele";
  cyp2d6_definition_47 = 0.5 dimensionless; cyp2d6_definition_47 is "activity of *41 allele";
  cyp2d6_definition_48 = 1 dimensionless; cyp2d6_definition_48 is "activity of *41x2 allele";
  cyp2d6_definition_49 = 1.5 dimensionless; cyp2d6_definition_49 is "activity of *41x3 allele";
  cyp2d6_definition_50 = 0 dimensionless; cyp2d6_definition_50 is "activity of *42 allele";
  cyp2d6_definition_51 = 0 dimensionless; cyp2d6_definition_51 is "activity of *44 allele";
  cyp2d6_definition_52 = 1 dimensionless; cyp2d6_definition_52 is "activity of *45 allele";
  cyp2d6_definition_53 = 2 dimensionless; cyp2d6_definition_53 is "activity of *45x2 allele";
  cyp2d6_definition_54 = 1 dimensionless; cyp2d6_definition_54 is "activity of *46 allele";
  cyp2d6_definition_55 = 0 dimensionless; cyp2d6_definition_55 is "activity of *47 allele";
  cyp2d6_definition_56 = 1 dimensionless; cyp2d6_definition_56 is "activity of *48 allele";
  cyp2d6_definition_57 = 0.5 dimensionless; cyp2d6_definition_57 is "activity of *49 allele";
  cyp2d6_definition_58 = 0 dimensionless; cyp2d6_definition_58 is "activity of *4x2 allele";
  cyp2d6_definition_59 = 0 dimensionless; cyp2d6_definition_59 is "activity of *4x3 allele";
  cyp2d6_definition_60 = 0 dimensionless; cyp2d6_definition_60 is "activity of *4x4 allele";
  cyp2d6_definition_61 = 0 dimensionless; cyp2d6_definition_61 is "activity of *4x5 allele";
  cyp2d6_definition_62 = 0 dimensionless; cyp2d6_definition_62 is "activity of *5 allele";
  cyp2d6_definition_63 = 0.5 dimensionless; cyp2d6_definition_63 is "activity of *50 allele";
  cyp2d6_definition_64 = 0 dimensionless; cyp2d6_definition_64 is "activity of *51 allele";
  cyp2d6_definition_65 = 1 dimensionless; cyp2d6_definition_65 is "activity of *53 allele";
  cyp2d6_definition_66 = 0.5 dimensionless; cyp2d6_definition_66 is "activity of *54 allele";
  cyp2d6_definition_67 = 0.5 dimensionless; cyp2d6_definition_67 is "activity of *55 allele";
  cyp2d6_definition_68 = 0 dimensionless; cyp2d6_definition_68 is "activity of *56 allele";
  cyp2d6_definition_69 = 0 dimensionless; cyp2d6_definition_69 is "activity of *57 allele";
  cyp2d6_definition_70 = 0.5 dimensionless; cyp2d6_definition_70 is "activity of *59 allele";
  cyp2d6_definition_71 = 0 dimensionless; cyp2d6_definition_71 is "activity of *6 allele";
  cyp2d6_definition_72 = 0 dimensionless; cyp2d6_definition_72 is "activity of *60 allele";
  cyp2d6_definition_73 = 0 dimensionless; cyp2d6_definition_73 is "activity of *62 allele";
  cyp2d6_definition_74 = 0 dimensionless; cyp2d6_definition_74 is "activity of *68 allele";
  cyp2d6_definition_75 = 0 dimensionless; cyp2d6_definition_75 is "activity of *69 allele";
  cyp2d6_definition_76 = 0 dimensionless; cyp2d6_definition_76 is "activity of *6x2 allele";
  cyp2d6_definition_77 = 0 dimensionless; cyp2d6_definition_77 is "activity of *7 allele";
  cyp2d6_definition_78 = 0 dimensionless; cyp2d6_definition_78 is "activity of *8 allele";
  cyp2d6_definition_79 = 0 dimensionless; cyp2d6_definition_79 is "activity of *81 allele";
  cyp2d6_definition_80 = 0.5 dimensionless; cyp2d6_definition_80 is "activity of *9 allele";
  cyp2d6_definition_81 = 0 dimensionless; cyp2d6_definition_81 is "activity of *92 allele";
  cyp2d6_definition_82 = 0 dimensionless; cyp2d6_definition_82 is "activity of *96 allele";
  cyp2d6_definition_83 = 0 dimensionless; cyp2d6_definition_83 is "activity of *99 allele";
  cyp2d6_definition_84 = 1 dimensionless; cyp2d6_definition_84 is "activity of *9x2 allele";
  cyp2d6_definition_custom = 1 dimensionless; cyp2d6_definition_custom is "activity of custom allele";
  cyp2d6_allele_1 = 0 dimensionless; cyp2d6_allele_1 is "custom allele";
  cyp2d6_allele_2 = 0 dimensionless; cyp2d6_allele_2 is "custom allele";
  cyp2d6_activity_1 has dimensionless; cyp2d6_activity_1 is "Activity of allele 1";
  cyp2d6_activity_2 has dimensionless; cyp2d6_activity_2 is "Activity of allele 2";
  DEXCYP3A4_Vmax has mmole_per_min_l;
  DEXCYP2D6_Vmax has mmole_per_min_l;
  DEXIM_Vmax has mmole_per_min_l;
  DOREX_Vmax has mmole_per_min_l;
  DEXCYP2D6_activity has dimensionless;
  DEXIM_Km_dex = 0.1 mM;
  DEXCYP2D6_phenotype = 1 dimensionless; DEXCYP2D6_phenotype is "scaling factor for activity";
  DEXCYP2D6_Km_dex = 0.00389 mM;
  DEXCYP2D6_Ki_qui = 0.0001 mM;
  DEXCYP3A4_switch = 1 dimensionless;
  DEXCYP3A4_activity = 1 dimensionless;
  DOREX_Km_dor = 0.1 mM;

  // Assignment rules:
  DEXCYP3A4_Vmax := DEXCYP3A4LI_Vmax;
  DEXCYP2D6_Vmax := DEXCYP3A4_Vmax*DEXCYP2D6_f;
  DEXIM_Vmax := DEXCYP3A4_Vmax*DEXIM_f;
  DOREX_Vmax := DEXCYP3A4_Vmax*DOREX_f;
  cyp2d6_activity_1 := piecewise(cyp2d6_definition_custom, cyp2d6_allele_1 == 0, cyp2d6_definition_0, cyp2d6_allele_1 == 0, cyp2d6_definition_1, cyp2d6_allele_1 == 1, cyp2d6_definition_2, cyp2d6_allele_1 == 2, cyp2d6_definition_3, cyp2d6_allele_1 == 3, cyp2d6_definition_4, cyp2d6_allele_1 == 4, cyp2d6_definition_5, cyp2d6_allele_1 == 5, cyp2d6_definition_6, cyp2d6_allele_1 == 6, cyp2d6_definition_7, cyp2d6_allele_1 == 7, cyp2d6_definition_8, cyp2d6_allele_1 == 8, cyp2d6_definition_9, cyp2d6_allele_1 == 9, cyp2d6_definition_10, cyp2d6_allele_1 == 10, cyp2d6_definition_11, cyp2d6_allele_1 == 11, cyp2d6_definition_12, cyp2d6_allele_1 == 12, cyp2d6_definition_13, cyp2d6_allele_1 == 13, cyp2d6_definition_14, cyp2d6_allele_1 == 14, cyp2d6_definition_15, cyp2d6_allele_1 == 15, cyp2d6_definition_16, cyp2d6_allele_1 == 16, cyp2d6_definition_17, cyp2d6_allele_1 == 17, cyp2d6_definition_18, cyp2d6_allele_1 == 18, cyp2d6_definition_19, cyp2d6_allele_1 == 19, cyp2d6_definition_20, cyp2d6_allele_1 == 20, cyp2d6_definition_21, cyp2d6_allele_1 == 21, cyp2d6_definition_22, cyp2d6_allele_1 == 22, cyp2d6_definition_23, cyp2d6_allele_1 == 23, cyp2d6_definition_24, cyp2d6_allele_1 == 24, cyp2d6_definition_25, cyp2d6_allele_1 == 25, cyp2d6_definition_26, cyp2d6_allele_1 == 26, cyp2d6_definition_27, cyp2d6_allele_1 == 27, cyp2d6_definition_28, cyp2d6_allele_1 == 28, cyp2d6_definition_29, cyp2d6_allele_1 == 29, cyp2d6_definition_30, cyp2d6_allele_1 == 30, cyp2d6_definition_31, cyp2d6_allele_1 == 31, cyp2d6_definition_32, cyp2d6_allele_1 == 32, cyp2d6_definition_33, cyp2d6_allele_1 == 33, cyp2d6_definition_34, cyp2d6_allele_1 == 34, cyp2d6_definition_35, cyp2d6_allele_1 == 35, cyp2d6_definition_36, cyp2d6_allele_1 == 36, cyp2d6_definition_37, cyp2d6_allele_1 == 37, cyp2d6_definition_38, cyp2d6_allele_1 == 38, cyp2d6_definition_39, cyp2d6_allele_1 == 39, cyp2d6_definition_40, cyp2d6_allele_1 == 40, cyp2d6_definition_41, cyp2d6_allele_1 == 41, cyp2d6_definition_42, cyp2d6_allele_1 == 42, cyp2d6_definition_43, cyp2d6_allele_1 == 43, cyp2d6_definition_44, cyp2d6_allele_1 == 44, cyp2d6_definition_45, cyp2d6_allele_1 == 45, cyp2d6_definition_46, cyp2d6_allele_1 == 46, cyp2d6_definition_47, cyp2d6_allele_1 == 47, cyp2d6_definition_48, cyp2d6_allele_1 == 48, cyp2d6_definition_49, cyp2d6_allele_1 == 49, cyp2d6_definition_50, cyp2d6_allele_1 == 50, cyp2d6_definition_51, cyp2d6_allele_1 == 51, cyp2d6_definition_52, cyp2d6_allele_1 == 52, cyp2d6_definition_53, cyp2d6_allele_1 == 53, cyp2d6_definition_54, cyp2d6_allele_1 == 54, cyp2d6_definition_55, cyp2d6_allele_1 == 55, cyp2d6_definition_56, cyp2d6_allele_1 == 56, cyp2d6_definition_57, cyp2d6_allele_1 == 57, cyp2d6_definition_58, cyp2d6_allele_1 == 58, cyp2d6_definition_59, cyp2d6_allele_1 == 59, cyp2d6_definition_60, cyp2d6_allele_1 == 60, cyp2d6_definition_61, cyp2d6_allele_1 == 61, cyp2d6_definition_62, cyp2d6_allele_1 == 62, cyp2d6_definition_63, cyp2d6_allele_1 == 63, cyp2d6_definition_64, cyp2d6_allele_1 == 64, cyp2d6_definition_65, cyp2d6_allele_1 == 65, cyp2d6_definition_66, cyp2d6_allele_1 == 66, cyp2d6_definition_67, cyp2d6_allele_1 == 67, cyp2d6_definition_68, cyp2d6_allele_1 == 68, cyp2d6_definition_69, cyp2d6_allele_1 == 69, cyp2d6_definition_70, cyp2d6_allele_1 == 70, cyp2d6_definition_71, cyp2d6_allele_1 == 71, cyp2d6_definition_72, cyp2d6_allele_1 == 72, cyp2d6_definition_73, cyp2d6_allele_1 == 73, cyp2d6_definition_74, cyp2d6_allele_1 == 74, cyp2d6_definition_75, cyp2d6_allele_1 == 75, cyp2d6_definition_76, cyp2d6_allele_1 == 76, cyp2d6_definition_77, cyp2d6_allele_1 == 77, cyp2d6_definition_78, cyp2d6_allele_1 == 78, cyp2d6_definition_79, cyp2d6_allele_1 == 79, cyp2d6_definition_80, cyp2d6_allele_1 == 80, cyp2d6_definition_81, cyp2d6_allele_1 == 81, cyp2d6_definition_82, cyp2d6_allele_1 == 82, cyp2d6_definition_83, cyp2d6_allele_1 == 83, cyp2d6_definition_84, cyp2d6_allele_1 == 84, cyp2d6_definition_custom);
  cyp2d6_activity_2 := piecewise(cyp2d6_definition_custom, cyp2d6_allele_2 == 0, cyp2d6_definition_0, cyp2d6_allele_2 == 0, cyp2d6_definition_1, cyp2d6_allele_2 == 1, cyp2d6_definition_2, cyp2d6_allele_2 == 2, cyp2d6_definition_3, cyp2d6_allele_2 == 3, cyp2d6_definition_4, cyp2d6_allele_2 == 4, cyp2d6_definition_5, cyp2d6_allele_2 == 5, cyp2d6_definition_6, cyp2d6_allele_2 == 6, cyp2d6_definition_7, cyp2d6_allele_2 == 7, cyp2d6_definition_8, cyp2d6_allele_2 == 8, cyp2d6_definition_9, cyp2d6_allele_2 == 9, cyp2d6_definition_10, cyp2d6_allele_2 == 10, cyp2d6_definition_11, cyp2d6_allele_2 == 11, cyp2d6_definition_12, cyp2d6_allele_2 == 12, cyp2d6_definition_13, cyp2d6_allele_2 == 13, cyp2d6_definition_14, cyp2d6_allele_2 == 14, cyp2d6_definition_15, cyp2d6_allele_2 == 15, cyp2d6_definition_16, cyp2d6_allele_2 == 16, cyp2d6_definition_17, cyp2d6_allele_2 == 17, cyp2d6_definition_18, cyp2d6_allele_2 == 18, cyp2d6_definition_19, cyp2d6_allele_2 == 19, cyp2d6_definition_20, cyp2d6_allele_2 == 20, cyp2d6_definition_21, cyp2d6_allele_2 == 21, cyp2d6_definition_22, cyp2d6_allele_2 == 22, cyp2d6_definition_23, cyp2d6_allele_2 == 23, cyp2d6_definition_24, cyp2d6_allele_2 == 24, cyp2d6_definition_25, cyp2d6_allele_2 == 25, cyp2d6_definition_26, cyp2d6_allele_2 == 26, cyp2d6_definition_27, cyp2d6_allele_2 == 27, cyp2d6_definition_28, cyp2d6_allele_2 == 28, cyp2d6_definition_29, cyp2d6_allele_2 == 29, cyp2d6_definition_30, cyp2d6_allele_2 == 30, cyp2d6_definition_31, cyp2d6_allele_2 == 31, cyp2d6_definition_32, cyp2d6_allele_2 == 32, cyp2d6_definition_33, cyp2d6_allele_2 == 33, cyp2d6_definition_34, cyp2d6_allele_2 == 34, cyp2d6_definition_35, cyp2d6_allele_2 == 35, cyp2d6_definition_36, cyp2d6_allele_2 == 36, cyp2d6_definition_37, cyp2d6_allele_2 == 37, cyp2d6_definition_38, cyp2d6_allele_2 == 38, cyp2d6_definition_39, cyp2d6_allele_2 == 39, cyp2d6_definition_40, cyp2d6_allele_2 == 40, cyp2d6_definition_41, cyp2d6_allele_2 == 41, cyp2d6_definition_42, cyp2d6_allele_2 == 42, cyp2d6_definition_43, cyp2d6_allele_2 == 43, cyp2d6_definition_44, cyp2d6_allele_2 == 44, cyp2d6_definition_45, cyp2d6_allele_2 == 45, cyp2d6_definition_46, cyp2d6_allele_2 == 46, cyp2d6_definition_47, cyp2d6_allele_2 == 47, cyp2d6_definition_48, cyp2d6_allele_2 == 48, cyp2d6_definition_49, cyp2d6_allele_2 == 49, cyp2d6_definition_50, cyp2d6_allele_2 == 50, cyp2d6_definition_51, cyp2d6_allele_2 == 51, cyp2d6_definition_52, cyp2d6_allele_2 == 52, cyp2d6_definition_53, cyp2d6_allele_2 == 53, cyp2d6_definition_54, cyp2d6_allele_2 == 54, cyp2d6_definition_55, cyp2d6_allele_2 == 55, cyp2d6_definition_56, cyp2d6_allele_2 == 56, cyp2d6_definition_57, cyp2d6_allele_2 == 57, cyp2d6_definition_58, cyp2d6_allele_2 == 58, cyp2d6_definition_59, cyp2d6_allele_2 == 59, cyp2d6_definition_60, cyp2d6_allele_2 == 60, cyp2d6_definition_61, cyp2d6_allele_2 == 61, cyp2d6_definition_62, cyp2d6_allele_2 == 62, cyp2d6_definition_63, cyp2d6_allele_2 == 63, cyp2d6_definition_64, cyp2d6_allele_2 == 64, cyp2d6_definition_65, cyp2d6_allele_2 == 65, cyp2d6_definition_66, cyp2d6_allele_2 == 66, cyp2d6_definition_67, cyp2d6_allele_2 == 67, cyp2d6_definition_68, cyp2d6_allele_2 == 68, cyp2d6_definition_69, cyp2d6_allele_2 == 69, cyp2d6_definition_70, cyp2d6_allele_2 == 70, cyp2d6_definition_71, cyp2d6_allele_2 == 71, cyp2d6_definition_72, cyp2d6_allele_2 == 72, cyp2d6_definition_73, cyp2d6_allele_2 == 73, cyp2d6_definition_74, cyp2d6_allele_2 == 74, cyp2d6_definition_75, cyp2d6_allele_2 == 75, cyp2d6_definition_76, cyp2d6_allele_2 == 76, cyp2d6_definition_77, cyp2d6_allele_2 == 77, cyp2d6_definition_78, cyp2d6_allele_2 == 78, cyp2d6_definition_79, cyp2d6_allele_2 == 79, cyp2d6_definition_80, cyp2d6_allele_2 == 80, cyp2d6_definition_81, cyp2d6_allele_2 == 81, cyp2d6_definition_82, cyp2d6_allele_2 == 82, cyp2d6_definition_83, cyp2d6_allele_2 == 83, cyp2d6_definition_84, cyp2d6_allele_2 == 84, cyp2d6_definition_custom);
  DEXCYP2D6_activity := 10^(cyp2d6_activity_1 + cyp2d6_activity_2);

  // Reactions:
  DEXIM: dex_ext => dex; DEXIM_Vmax*Vli*dex_ext/(DEXIM_Km_dex + dex_ext);
  DEXCYP2D6: dex => dor; DEXCYP2D6_Vmax*DEXCYP2D6_phenotype*DEXCYP2D6_activity/(1 + qui_ext/DEXCYP2D6_Ki_qui)*Vli*dex/(DEXCYP2D6_Km_dex + dex);  // modifiers: qui_ext
  DEXCYP3A4: dex => ; DEXCYP3A4_Vmax*DEXCYP3A4_switch*DEXCYP3A4_activity*Vli*dex/(DEXCYP3A4_Km_dex + dex);
  DOREX: dor => dor_ext; DOREX_Vmax*Vli*dor/(DOREX_Km_dor + dor);

  // Unit definitions:
  unit mmole = 1e-3 mole;
  unit min = 60 second;
  unit m = metre;
  unit m2 = metre^2;
  unit mM = 1e-3 mole / litre;
  unit mmole_per_min = 1e-3 mole / (60 second);
  unit mmole_per_min_l = 1e-3 mole / (60 second * litre);
  unit litre_per_min = litre / (60 second);
  unit per_min = 1 / (60 second);
  unit mg = 1e-3 gram;
  unit g_per_mole = gram / mole;
end
