// SBML level 3 version 1

model icg_liver(Vext, Vli, Vbi, Vfeces, icg_ext, icg_feces)
  // model units - substance: mmole, time: min, volume: litre, area: m2, length: m, extent: mmole

  // Compartments:
  compartment Vext = 4 litre; Vext is "blood";  // FMA:62970 ncit:C12434 BTO:0000089
  compartment Vli = 1.5 litre; Vli is "liver";  // FMA:7197 BTO:0000759 ncit:C12392
  compartment Vbi = 1 litre; Vbi is "bile";  // FMA:62971 ncit:C13192
  compartment Vfeces = 1 litre;  // FMA:64183 ncit:C13234 BTO:0000440

  // Species:
  // Reference range: 0.01 [mmole/l] (~ 1 mg/dl)
  species $bil_ext in Vext = 0.01; bil_ext is "bilirubin (extern)";  // inchikey:BPYKTIZUTYGOLE-IFADSCNNSA-N CHEBI:16990 ncit:C305
  species icg_ext in Vext = 0; icg_ext is "icg (extern)";  // inchikey:MOFVSTNWEDAEEK-UHFFFAOYSA-M CHEBI:31696 ncit:C65913
  species icg in Vli = 0; icg is "icg (liver)";  // inchikey:MOFVSTNWEDAEEK-UHFFFAOYSA-M CHEBI:31696 ncit:C65913
  species icg_bi in Vbi = 0; icg_bi is "icg (bile)";  // inchikey:MOFVSTNWEDAEEK-UHFFFAOYSA-M CHEBI:31696 ncit:C65913
  substanceOnly species icg_feces in Vfeces = 0; icg_feces is "icg (feces)";  // inchikey:MOFVSTNWEDAEEK-UHFFFAOYSA-M CHEBI:31696 ncit:C65913

  // Parameters:
  ICGIM_Vmax = 0.03695988 mmole_per_min_l;
  ICGIM_Km = 0.02165918 mM;
  // bilirubin reference range: ~ 0.1 - 5 [g/dl] (10 [mg/l] /584.6623 [g/mole]) ~ 0.0171 mmole/l setting Ki in reference range
  ICGIM_ki_bil = 0.02 mM;
  // Parameter for scaling transport protein amount.
  f_oatp1b3 = 1 dimensionless;
  ICGLI2CA_Vmax = 0.0009436728 mmole_per_min_l;
  ICGLI2CA_Km = 0.01238866 mM;
  ICGLI2BI_Vmax = 0.0001145966 per_min;

  // Reactions:
  // Solute carrier organic anion transporter family member 1B3 (SLCO1B3)
  ICGIM: icg_ext => icg; f_oatp1b3*ICGIM_Vmax*Vli*icg_ext/(ICGIM_Km*(1 + bil_ext/ICGIM_ki_bil) + icg_ext); ICGIM is "ICG import";  // modifiers: bil_ext
  // Phosphatidylcholine translocator ABCB4
  ICGLI2CA: icg => icg_bi; ICGLI2CA_Vmax*Vli*icg/(ICGLI2CA_Km + icg); ICGLI2CA is "ICG export (bile)";
  // As simplification transport directly into feces (no information on timecourse available).
  ICGLI2BI: icg_bi => icg_feces; ICGLI2BI_Vmax*Vli*icg_bi; ICGLI2BI is "ICG bile transport";

  // Unit definitions:
  unit mmole = 1e-3 mole;
  unit min = 60 second;
  unit m = metre;
  unit m2 = metre^2;
  unit mM = 1e-3 mole / litre;
  unit mmole_per_min = 1e-3 mole / (60 second);
  unit mmole_per_min_l = 1e-3 mole / (60 second * litre);
  unit litre_per_min = litre / (60 second);
  unit per_min = 1 / (60 second);
end
