// SBML level 3 version 1

model BIOMD0000000004()
  // Goldbeter1991 - Min Mit Oscil, Expl Inact
  // This model represents the inactive forms of CDC-2 Kinase and Cyclin Protease as separate species, unlike the ODEs in the published paper, in which the equations for the inactive forms are substituted into the equations for the active forms using a mass conservation rule M+MI=1,X+XI=1. Mass is still conserved in this model through the explicit reactions M<->MI and X<->XI. The terms in the kinetic laws are identical to the corresponding terms in the kinetic laws in the published paper.
  // This model has been generated by MathSBML 2.4.6 (14-January-2005) 14-January-2005 18:37:35.503857.
  // This model is described in the article:
  // A minimal cascade model for the mitotic oscillator involving cyclin and cdc2 kinase.
  // Goldbeter A.
  // Proc. Natl. Acad. Sci. USA 1991 Oct; 88(20):9107-11
  // Abstract:
  // A minimal model for the mitotic oscillator is presented. The model, built on recent experimental advances, is based on the cascade of post-translational modification that modulates the activity of cdc2 kinase during the cell cycle. The model pertains to the situation encountered in early amphibian embryos, where the accumulation of cyclin suffices to trigger the onset of mitosis. In the first cycle ofthe bicyclic cascade model, cyclin promotes the activation of cdc2 kinase through reversible dephosphorylation, and in the second cycle, cdc2 kinase activates a cyclin protease by reversible phosphorylation. That cyclin activates cdc2 kinase while the kinase triggers the degradation of cyclin has suggested that oscillations may originate from such a negative feedback loop [Félix, M. A., Labbé, J. C., Dorée, M., Hunt, T. & Karsenti, E. (1990) Nature (London) 346, 379-382]. Thisconjecture is corroborated by the model, which indicates that sustained oscillations of the limit cycle type can arise in the cascade, provided that a threshold exists in the activation of cdc2 kinase by cyclin and in the activation of cyclinproteolysis by cdc2 kinase. The analysis shows how miototic oscillations may readily arise from time lags associated with these thresholds and from the delayed negative feedback provided by cdc2-induced cyclin degradation. A mechanism for theorigin of the thresholds is proposed in terms of the phenomenon of zero-order ultrasensitivity previously described for biochemical systems regulated by covalent modification.
  // This model is hosted on BioModels Database and identified by: BIOMD0000000004 .
  // To cite BioModels Database, please use: BioModels Database: An enhanced, curated and annotated resource for published quantitative kinetic models .
  // To the extent possible under law, all copyright and related or neighbouring rights to this encoded model have been dedicated to the public domain worldwide. Please refer to CC0 Public Domain Dedication for more information.
  // biomodels.db:MODEL6614389071
  // biomodels.db:BIOMD0000000004
  // isDescribedBy pubmed:1833774
  // isVersionOf kegg.pathway:hsa04110 GO:0000278
  // isHomologTo reactome:REACT_152
  // occursIn taxonomy:8292
  // model units - substance: substance, time: second, volume: volume, area: area, length: metre, extent: substance

  // Compartments:
  compartment cell = 1 volume;  // GO:0005623

  // Species:
  species C in cell = 0.01; C is "Cyclin";  // isVersionOf interpro:IPR006670
  species M in cell = 0.01; M is "Active CDC-2 Kinase";  // hasVersion uniprot:P24033 uniprot:P35567
  species X in cell = 0.01; X is "Active Cyclin Protease";
  species MI in cell = 0.99; MI is "Inactive CDC-2 Kinase";  // hasVersion uniprot:P24033 uniprot:P35567
  species XI in cell = 0.99; XI is "Inactive Cyclin Protease";

  // Parameters:
  VM1 = 3;
  VM3 = 1;
  Kc = 0.5;

  // Assignment rules:
  V1 := C*VM1*(C + Kc)^(-1);
  V3 := M*VM3;

  // Reactions:
  creation_of_cyclin: => C; cell*vi;  // isVersionOf GO:0006412
    vi = 0.025;
  default_degradation_of_cyclin: C => ; C*cell*kd;  // isVersionOf GO:0008054
    kd = 0.01;
  reaction3: C => ; C*cell*vd*X*(C + Kd)^(-1); reaction3 is "cdc2 kinase triggered degration of cyclin";  // modifiers: X; isVersionOf GO:0008054
    vd = 0.25; Kd = 0.02;
  activation_of_cdc2_kinase: MI => M; cell*MI*V1*(K1 + MI)^(-1);  // isVersionOf ec-code:3.1.3.16 GO:0045737 GO:0006470
    K1 = 0.005;
  deactivation_of_cdc2_kinase: M => MI; cell*M*V2*(K2 + M)^(-1);  // isVersionOf ec-code:2.7.10.2 GO:0045736 GO:0006468
    V2 = 1.5; K2 = 0.005;
  activation_of_cyclin_protease: XI => X; cell*V3*XI*(K3 + XI)^(-1);
    K3 = 0.005;
  deactivation_of_cyclin_protease: X => XI; cell*V4*X*(K4 + X)^(-1);
    K4 = 0.005; V4 = 0.5;

  // Unit definitions:
  unit volume = litre;
  unit substance = mole;
  unit area = metre^2;
end
