// SBML level 3 version 2

function mm(S, km)
  S/(km + S);
end

model events_model()

  // Compartments:
  compartment c = 1;
  compartment V = 2;

  // Species:
  species S in c = S0; S is "substrate";
  species P in c = 0;
  species A in V = 5;
  species B in V = 1;

  // Parameters:
  vmax = 2;
  km = 0.5;
  k1 = 0.1;
  S0 = 10;
  total = 0;

  // Assignment rules:
  k2 := 2*k1;

  // Rate rules:
  B' = -0.1*B;
  V' = 0.1;

  // Reactions:
  J0: S -> P; vmax*mm(S, km);
  J1: S + A -> 2 P; k1*S*A;

  // Events:
  E1: at (time > 5), priority = 1: V = 2*V, S = 10; E1 is "reset";
  E2: at (1) after (S < 2): A = 1, total = total + 1;
end
