// SBML level 3 version 1

function max(x, y)
  piecewise(x, x > y, y);
end
max is "minimum";

function min(x, y)
  piecewise(x, x < y, y);
end
min is "maximum";

function heav(x)
  piecewise(0, x < 0, 0.5, x == 0, 1, x > 0, 0);
end
heav is "heavyside";

function mod(x, y)
  piecewise(x - y*ceil(x/y), xor(x < 0, y < 0), x - y*floor(x/y));
end
mod is "modulo";

function minf(v, beta_m, gamma_m)
  0.5*(1 + tanh((v - beta_m)/gamma_m));
end

function winf(v, beta_w, gamma_w)
  0.5*(1 + tanh((v - beta_w)/gamma_w));
end

function tauw(v, beta_w, gamma_w)
  1/cosh((v - beta_w)/(2*gamma_w));
end

model main()
  // XPP model
  // This model was converted from XPP ode format to SBML using sbmlutils-0.1.5a6.
  // # Modified Morris-Lecar model
  // # modified from ml_salka.ode
  // dV/dt = (i_dc-gna*minf(V)*(V-Vna)-gk*w*(V-VK)-gl*(V-Vl))/c
  // dw/dt = phi_w*(winf(V)-w)/tauw(V)
  // param c=2
  // # HERE IS EVERYTHING YOU NEED TO KNOW ABOUT THE STIMULuS
  // # DC OFFSET
  // # this is controlled by i_dc
  // param i_dc=0
  // ## noise not included here.
  // ## To add it, uncomment lines below by removing one "#" per line, and add "i_noise" to line 3 (dv/dt=...) above
  // ## NOISE
  // ## This is modeled as an Ornstein-Uhlenbeck process, gives new noise on each trial
  // ## Here is the Wiener variable
  // #wiener nz
  // ## With scale=0 you get no noise
  // ## effects of changing dt are automatically controlled for in XPP
  // ## However, variance of i_noise also depends on tau_inoise (variance = sigma^2*tau/2)
  // ## Therefore, if you want to keep the same variance, you must manually change sigma_inoise if you change tau_inoise
  // #di_noise/dt=-1/tau_inoise*(i_noise-i_avg)+sigma*nz
  // #param sigma=0, tau_inoise=5, i_avg=0
  // ## frozen noise can be repeated on multiple trials by saving i_noise to a .tab file and playing it back
  // ## see xpp documentation about tables
  // # HERE IS EVERYTHING YOU NEED TO KNOW ABOUT INTRINSIC CURRENTS
  // # Initial conditions
  // V(0)=-70
  // w(0)=0.000025
  // #z(0)=0
  // # if you want to make sure initial conditions are at steady state
  // # run trial with no stim, then select "initial conditions/last" from main menu... this will start you at the conditions at the end of your previous trial
  // # FAST INWARD CURRENT (INa or activation variable)
  // # This is assumed to activate instantaneously with changes in voltage
  // # voltage-dependent activation curve is described by m
  // minf(V)=.5*(1+tanh((V-beta_m)/gamma_m))
  // # maximal conductance and reversal potential
  // param beta_m=-1.2, gamma_m=18
  // param gna=20, vna=50
  // # DELAYED RECTIFIER CURRENT (IKdr or recovery variable)
  // # this current activates more slowly than INa, but is still faster than Isub or Iadapt (not included here)
  // # In this code, activation of IKdr is controlled by w (equivalent to y in 3D model)
  // winf(V)=.5*(1+tanh((V-beta_w)/gamma_w))
  // tauw(V)=1/cosh((V-beta_w)/(2*gamma_w))
  // # in the 2D model, varying beta_w shifts the w activation curve (w=y here) and can convert the neuron between class 1, 2, and 3
  // param beta_w=-10, gamma_w=10
  // # maximal conductance and reversal potential
  // param gk=20, vk=-100, phi_w=0.15
  // # LEAK CURRENT (Il)
  // # just a passive leak conductance
  // param gl=2, vl=-70
  // ## ISub is not included in 2D model
  // ## SLOW SUBTHRESHOLD INWARD OR OUTWARD CURRENT (Isub)
  // #zinf(V)=.5*(1+tanh((V-beta_z)/gamma_z))
  // #tauz(V)=1/cosh((V-beta_z)/(2*gamma_z))
  // #param beta_z=-21, gamma_z=15
  // ## parameters below are for outward current
  // #param gsub=7, Vsub=-100, phi_z=0.15
  // ## for inward current, change to gsub=3, Vsub=50, phi_z=0.5
  // ## these parameters for Isub correspond to those used in Figure 4 of the paper
  // # slow adaptation is not included in this 3D model.
  // # following parameters control duration of simulation and axes of default plot
  // @ total=100000,dt=.1,xlo=-100,xhi=60,ylo=-.125,yhi=.6,xp=v,yp=w
  // @ meth=euler
  // @ MAXSTOR=1000000
  // done
  // This file has been produced by sbmlutils.
  // Terms of use
  // Copyright © 2017 Matthias Koenig
  // Redistribution and use of any part of this model, with or without modification, are permitted provided that the following conditions are met:
  // Redistributions of this SBML file must retain the above copyright notice, this list of conditions and the following disclaimer.
  // Redistributions in a different form must reproduce the above copyright notice, this list of conditions and the following disclaimer in the documentation and/or other materials provided with the distribution.
  // This model is distributed in the hope that it will be useful, but WITHOUT ANY WARRANTY; without even the implied warranty of MERCHANTABILITY or FITNESS FOR A PARTICULAR PURPOSE.

  // Parameters:
  c = 2; c is "c = 2";
  i_dc = 0; i_dc is "i_dc = 0";
  v = -70; v is "v = -70";
  w = 2.5e-5; w is "w = 0.000025";
  beta_m = -1.2; beta_m is "beta_m = -1.2";
  gamma_m = 18; gamma_m is "gamma_m = 18";
  gna = 20; gna is "gna = 20";
  vna = 50; vna is "vna = 50";
  beta_w = -10; beta_w is "beta_w = -10";
  gamma_w = 10; gamma_w is "gamma_w = 10";
  gk = 20; gk is "gk = 20";
  vk = -100; vk is "vk = -100";
  phi_w = 0.15; phi_w is "phi_w = 0.15";
  gl = 2; gl is "gl = 2";
  vl = -70; vl is "vl = -70";
  t has dimensionless; t is "model time";

  // Assignment rules:
  t := time;

  // Rate rules:
  v' = (i_dc - gna*minf(v, beta_m, gamma_m)*(v - vna) - gk*w*(v - vk) - gl*(v - vl))/c;
  w' = phi_w*(winf(v, beta_w, gamma_w) - w)/tauw(v, beta_w, gamma_w);
end
