// SBML level 3 version 1

function max(x, y)
  piecewise(x, x > y, y);
end
max is "minimum";

function min(x, y)
  piecewise(x, x < y, y);
end
min is "maximum";

function heav(x)
  piecewise(0, x < 0, 0.5, x == 0, 1, x > 0, 0);
end
heav is "heavyside";

function mod(x, y)
  piecewise(x - y*ceil(x/y), xor(x < 0, y < 0), x - y*floor(x/y));
end
mod is "modulo";

model main()
  // XPP model
  // This model was converted from XPP ode format to SBML using sbmlutils-0.1.5a6.
  // # Rate-based model of coupled neuron populations to
  // # perform discrimination using integral feedback control.
  // # Continuous attractor version.
  // par w1_2=1.0 w2_1=-1.0 i0=0.5 tau=0.05 di=0.001
  // par tstim=0.5 t1=5.0 t2=10.0 tauapp=0.005 dtapp=0.001
  // par f1=20 f2=16
  // init r1=0.0 r2=0.0
  // # init sapp1=0.0 sapp2=0.0
  // init s1=0.0 s2=0.0
  // sapp1=f1/((1+exp(-2*(t-t1)/dtapp))*(1+exp(-2*(t1+tstim-t)/dtapp)))
  // sapp2=f2/((1+exp(-2*(t-t2)/dtapp))*(1+exp(-2*(t2+tstim-t)/dtapp)))
  // ds1/dt=(sapp1-s1)/tauapp
  // ds2/dt=(sapp2-s2)/tauapp
  // dr2/dt=w1_2*r1/tau
  // i1=w2_1*r2+s1+s2-i0
  // dr1/dt=(-r1+i1/(1+exp(-2*i1/di)))/tau
  // # dsapp1/dt=(s1-sapp1)/tauapp
  // # dsapp2/dt=(s2-sapp2)/tauapp
  // # ds1/dt=0.0
  // # ds2/dt=0.0
  // # global 1 {t-t1} {s1=f1}
  // # global 2 {t-t1-tstim} {s1=0.0}
  // # global 3 {t-t2} {s2=f2}
  // # global 4 {t-t2-tstim} {s2=0}
  // @total=15,bound=100,dt=.001,dtmin=1e-5,dtmax=10,atoler=1e-4
  // @toler=1e-5,xhi=15,yhi=2,ylo=0 njmp=50,bell=0
  // @bell=off,nout=50
  // done
  // This file has been produced by sbmlutils.
  // Terms of use
  // Copyright © 2017 Matthias Koenig
  // Redistribution and use of any part of this model, with or without modification, are permitted provided that the following conditions are met:
  // Redistributions of this SBML file must retain the above copyright notice, this list of conditions and the following disclaimer.
  // Redistributions in a different form must reproduce the above copyright notice, this list of conditions and the following disclaimer in the documentation and/or other materials provided with the distribution.
  // This model is distributed in the hope that it will be useful, but WITHOUT ANY WARRANTY; without even the implied warranty of MERCHANTABILITY or FITNESS FOR A PARTICULAR PURPOSE.

  // Parameters:
  w1_2 = 1; w1_2 is "w1_2 = 1.0";
  w2_1 = -1; w2_1 is "w2_1 = -1.0";
  i0 = 0.5; i0 is "i0 = 0.5";
  tau = 0.05; tau is "tau = 0.05";
  di = 0.001; di is "di = 0.001";
  tstim = 0.5; tstim is "tstim = 0.5";
  t1 = 5; t1 is "t1 = 5.0";
  t2 = 10; t2 is "t2 = 10.0";
  tauapp = 0.005; tauapp is "tauapp = 0.005";
  dtapp = 0.001; dtapp is "dtapp = 0.001";
  f1 = 20; f1 is "f1 = 20";
  f2 = 16; f2 is "f2 = 16";
  r1_0_0 = 0; r1_0_0 is "r1 = 0.0";
  r2_0_0 = 0; r2_0_0 is "r2 = 0.0";
  s1_0_0 = 0; s1_0_0 is "s1 = 0.0";
  s2_0_0 = 0; s2_0_0 is "s2 = 0.0";
  sapp1 has dimensionless;
  sapp2 has dimensionless;
  i1 has dimensionless;
  t has dimensionless; t is "model time";

  // Assignment rules:
  sapp1 := f1/((1 + exp(-2*(t - t1)/dtapp))*(1 + exp(-2*(t1 + tstim - t)/dtapp)));
  sapp2 := f2/((1 + exp(-2*(t - t2)/dtapp))*(1 + exp(-2*(t2 + tstim - t)/dtapp)));
  i1 := w2_1*r2_0_0 + s1_0_0 + s2_0_0 - i0;
  t := time;

  // Rate rules:
  s1_0_0' = (sapp1 - s1_0_0)/tauapp;
  s2_0_0' = (sapp2 - s2_0_0)/tauapp;
  r2_0_0' = w1_2*r1_0_0/tau;
  r1_0_0' = (-r1_0_0 + i1/(1 + exp(-2*i1/di)))/tau;
end
