// SBML level 3 version 1

function max(x, y)
  piecewise(x, x > y, y);
end
max is "minimum";

function min(x, y)
  piecewise(x, x < y, y);
end
min is "maximum";

function heav(x)
  piecewise(0, x < 0, 0.5, x == 0, 1, x > 0, 0);
end
heav is "heavyside";

function mod(x, y)
  piecewise(x - y*ceil(x/y), xor(x < 0, y < 0), x - y*floor(x/y));
end
mod is "modulo";

function minf(v, beta_m, gamma_m)
  0.5*(1 + tanh((v - beta_m)/gamma_m));
end

function winf(v, beta_w, gamma_w)
  0.5*(1 + tanh((v - beta_w)/gamma_w));
end

function tauw(v, beta_w, gamma_w)
  1/cosh((v - beta_w)/(2*gamma_w));
end

model main()
  // XPP model
  // This model was converted from XPP ode format to SBML using sbmlutils-0.1.5a6.
  // # from Rho and Prescott, PLoS Comput Biol 2012
  // # to be run in XPP
  // # 2-D model plus noise (to get oscillations near the bifurcation) and adaptation (to getting bursting) (see Figs 3-5)
  // # DIFFERENTIAL EQUATIONS
  // dv/dt = (Istim+sqrt(Qi)*ni-gna*minf(V)*(V-Vna)-gk*w*(V-VK)-gl*(V-Vl)-gadapt*z*(v-VK))/cap
  // dw/dt = phi_w*(winf(V)-w)/tauw(V)
  // dz/dt = (1/(1+exp((beta_z-v)/gamma_z))-z)/tauz
  // # TO IMPLEMENT NOISE
  // wiener ni
  // param Qi=1
  // # noise amplitude is adjusted by varying Qi. Remove noise by setting to 0
  // # FUNCTIONS AND PARAMETERS
  // minf(v)=.5*(1+tanh((v-beta_m)/gamma_m))
  // winf(v)=.5*(1+tanh((v-beta_w)/gamma_w))
  // tauw(v)=1/cosh((v-beta_w)/(2*gamma_w))
  // param Istim=0
  // param vna=50,vk=-100,vl=-70
  // param gk=20,gl=2,gna=20
  // param beta_m=-1.2,gamma_m=18
  // param beta_w=-13,gamma_w=10
  // # beta_w = -21 for transient spiking; beta_w = -13 for repetitive spiking
  // param phi_w=.15
  // param cap=2
  // param gadapt=0.5,tauz=300,beta_z=0,gamma_z=4
  // # this implements a spike-dependent form of adaptation... activated only as V crosses 0 mV
  // # INITIAL CONDITIONS
  // V(0)=-70
  // w(0)=0.000025
  // z(0)=0
  // # ALWAYS USE EULER! - Actually this is only true for noise
  // @ total=10000,dt=.05,xlo=-100,xhi=60,ylo=-.125,yhi=.6,xp=v,yp=w
  // @ meth=euler
  // @ MAXSTOR=1000000,bounds=10000
  // done
  // This file has been produced by sbmlutils.
  // Terms of use
  // Copyright © 2017 Matthias Koenig
  // Redistribution and use of any part of this model, with or without modification, are permitted provided that the following conditions are met:
  // Redistributions of this SBML file must retain the above copyright notice, this list of conditions and the following disclaimer.
  // Redistributions in a different form must reproduce the above copyright notice, this list of conditions and the following disclaimer in the documentation and/or other materials provided with the distribution.
  // This model is distributed in the hope that it will be useful, but WITHOUT ANY WARRANTY; without even the implied warranty of MERCHANTABILITY or FITNESS FOR A PARTICULAR PURPOSE.

  // Parameters:
  ni = 0;
  qi = 1; qi is "qi = 1";
  istim = 0; istim is "istim = 0";
  vna = 50; vna is "vna = 50";
  vk = -100; vk is "vk = -100";
  vl = -70; vl is "vl = -70";
  gk = 20; gk is "gk = 20";
  gl = 2; gl is "gl = 2";
  gna = 20; gna is "gna = 20";
  beta_m = -1.2; beta_m is "beta_m = -1.2";
  gamma_m = 18; gamma_m is "gamma_m = 18";
  beta_w = -13; beta_w is "beta_w = -13";
  gamma_w = 10; gamma_w is "gamma_w = 10";
  phi_w = 0.15; phi_w is "phi_w = .15";
  cap = 2; cap is "cap = 2";
  gadapt = 0.5; gadapt is "gadapt = 0.5";
  tauz = 300; tauz is "tauz = 300";
  beta_z = 0; beta_z is "beta_z = 0";
  gamma_z = 4; gamma_z is "gamma_z = 4";
  v = -70; v is "v = -70";
  w = 2.5e-5; w is "w = 0.000025";
  z = 0; z is "z = 0";
  t has dimensionless; t is "model time";

  // Assignment rules:
  t := time;

  // Rate rules:
  v' = (istim + sqrt(qi)*ni - gna*minf(v, beta_m, gamma_m)*(v - vna) - gk*w*(v - vk) - gl*(v - vl) - gadapt*z*(v - vk))/cap;
  w' = phi_w*(winf(v, beta_w, gamma_w) - w)/tauw(v, beta_w, gamma_w);
  z' = (1/(1 + exp((beta_z - v)/gamma_z)) - z)/tauz;
end
