// SBML level 3 version 1

function max(x, y)
  piecewise(x, x > y, y);
end
max is "minimum";

function min(x, y)
  piecewise(x, x < y, y);
end
min is "maximum";

function heav(x)
  piecewise(0, x < 0, 0.5, x == 0, 1, x > 0, 0);
end
heav is "heavyside";

function mod(x, y)
  piecewise(x - y*ceil(x/y), xor(x < 0, y < 0), x - y*floor(x/y));
end
mod is "modulo";

function fion(v, gka, gkdr, gl, gna, h, i, l, m, n, nkdr, vk, vl, vna)
  ina(v, m, h, gna, i, vna) + ikdr(v, gkdr, vk, nkdr) + ika(v, n, vk, gka, l) + il(v, gl, vl);
end

function ina(v, gna, h, i, m, vna)
  gna*m^3*h*i*(v - vna);
end

function ikdr(v, gkdr, nkdr, vk)
  gkdr*nkdr*(v - vk);
end

function ika(v, gka, l, n, vk)
  gka*n*l*(v - vk);
end

function il(v, gl, vl)
  gl*(v - vl);
end

function minf(v)
  alm(v)/(alm(v) + bem(v));
end

function taum1(v)
  0.5/(alm(v) + bem(v));
end

function taum(v)
  piecewise(0.02, taum1(v) < 0.02, taum1(v));
end

function alm(v)
  0.4*(v + 30)/(1 - exp(-(v + 30)/7.2));
end

function bem(v)
  0.124*(v + 30)/(exp((v + 30)/7.2) - 1);
end

function hinf(v)
  1/(1 + exp((v + 50)/4));
end

function tauh1(v)
  0.5/(alh(v) + beh(v));
end

function tauh(v)
  piecewise(0.5, tauh1(v) < 0.5, tauh1(v));
end

function alh(v)
  0.03*(v + 45)/(1 - exp(-(v + 45)/1.5));
end

function beh(v)
  0.01*(v + 45)/(exp((v + 45)/1.5) - 1);
end

function iinf(v, b)
  (1 + b*exp((v + 58)/2))/(1 + exp((v + 58)/2));
end

function taui1(v)
  3e4*bei(v)/(1 + ali(v));
end

function taui(v)
  piecewise(10, taui1(v) < 10, taui1(v));
end

function ali(v)
  exp(0.45*(v + 60));
end

function bei(v)
  exp(0.09*(v + 60));
end

function nkdrinf(v)
  1/(1 + alnkdr(v));
end

function taunkdr1(v)
  50*benkdr(v)/(1 + alnkdr(v));
end

function taunkdr(v)
  piecewise(2, taunkdr1(v) < 2, taunkdr1(v));
end

function alnkdr(v)
  exp(-0.11*(v - 13));
end

function benkdr(v)
  exp(-0.08*(v - 13));
end

function ninfprox(v)
  1/(1 + alnprox(v));
end

function taunprox1(v)
  4*benprox(v)/(1 + alnprox(v));
end

function taunprox(v)
  piecewise(0.1, taunprox1(v) < 0.1, taunprox1(v));
end

function alnprox(v)
  exp(-0.038*(1.5 + 1/(1 + exp(v + 40)/5))*(v - 11));
end

function benprox(v)
  exp(-0.038*(0.825 + 1/(1 + exp(v + 40)/5))*(v - 11));
end

function ninfdist(v)
  1/(1 + alndist(v));
end

function taundist1(v)
  2*bendist(v)/(1 + alndist(v));
end

function taundist(v)
  piecewise(0.1, taundist1(v) < 0.1, taundist1(v));
end

function alndist(v)
  exp(-0.038*(1.8 + 1/(1 + exp(v + 40)/5))*(v + 1));
end

function bendist(v)
  exp(-0.038*(0.7 + 1/(1 + exp(v + 40)/5))*(v + 1));
end

function taun(v, d_tau)
  d_tau*taunprox(v) + (1 - d_tau)*taundist(v);
end

function ninf(v, d_inf)
  d_inf*ninfprox(v) + (1 - d_inf)*ninfdist(v);
end

function linf(v)
  1/(1 + all(v));
end

function taul1(v)
  0.26*(v + 50);
end

function taul(v)
  piecewise(2, taul1(v) < 2, taul1(v));
end

function all(v)
  exp(0.11*(v + 56));
end

model main()
  // XPP model
  // This model was converted from XPP ode format to SBML using sbmlutils-0.1.5a6.
  // # Traveling waves equations for model CA1 pyramidal cell apical dendrite
  // # For simulation in XPPAUT (Bard Ermentrout)
  // # Download: http://www.pitt.edu/~phase/
  // # Get the book too: Ermentrout B. Simulating, analyzing, and animating dynamical systems: SIAM, 2002.
  // # Corey Acker
  // # Boston University
  // # July 16, 2004
  // # Membrane equations from Migliore et al. (1999) J Comput Neurosci 7: 5-15
  // # Model parameters, including shooting parameter K
  // param Cm=2.0,Ra=150
  // param VNa=55.0,VK=-90,VL=-65
  // param GNa=32,GKDR=10,GL=0.2,b=0.5
  // param d_tau=0.1
  // param d_inf=0.1
  // param GKA=48
  // param diam=1.8
  // param Iapp=0.925
  // param K=4 # bad initial guess
  // # param K=5.010975 # actual value to be found by shooting method
  // # Wave Speed
  // aux c = sqrt((K*diam*10)/(4*Ra*Cm))
  // # Initial conditions
  // init V=-68.1,Vdot=0,m=0.016,h=0.99,i=0.95,nKDR=0.0002,n=0.0005,l=0.8
  // # Dynamic equations
  // V'=Vdot
  // Vdot'=K*(Vdot+(fion(V)-Iapp)/Cm)
  // m'=1/taum(V)*(minf(V)-m)
  // h'=1/tauh(V)*(hinf(V)-h)
  // i'=1/taui(V)*(iinf(V)-i)
  // nKDR'=1/taunKDR(V)*(nKDRinf(V)-nKDR)
  // n'=1/taun(V)*(ninf(V)-n)
  // l'=1/taul(V)*(linf(V)-l)
  // # All other equations
  // fion(V)=INa(V)+IKDR(V)+IKA(V)+IL(V)
  // INa(V)=GNa*m^3*h*i*(V-VNa)
  // IKDR(V)=GKDR*nKDR*(V-VK)
  // IKA(V)=GKA*n*l*(V-VK)
  // IL(V)=GL*(V-VL)
  // # Rate equations
  // # Sodium activation, m
  // minf(V)=alm(V)/(alm(V)+bem(V))
  // taum1(V)=0.5/(alm(V)+bem(V))
  // taum(V)=if(taum1(V)<0.02)then(0.02)else(taum1(V))
  // alm(V)=0.4*(V+30)/(1-exp(-(V+30)/7.2))
  // bem(V)=0.124*(V+30)/(exp((V+30)/7.2)-1)
  // # Sodium inactivation, h
  // hinf(V)=1/(1+exp((V+50)/4))
  // tauh1(V)=0.5/(alh(V)+beh(V))
  // tauh(V)=if(tauh1(V)<0.5)then(0.5)else(tauh1(V))
  // alh(V)=0.03*(V+45)/(1-exp(-(V+45)/1.5))
  // beh(V)=0.01*(V+45)/(exp((V+45)/1.5)-1)
  // # Slow Inactivation of INa, i
  // iinf(V)=(1+b*exp((V+58)/2))/(1+exp((V+58)/2))
  // taui1(V)=3e4*bei(V)/(1+ali(V))
  // taui(V)=if(taui1(V)<10)then(10)else(taui1(V))
  // ali(V)=exp(0.45*(V+60))
  // bei(V)=exp(0.09*(V+60))
  // # Activation of IKDR
  // nKDRinf(V)=1/(1+alnKDR(V))
  // taunKDR1(V)=50*benKDR(V)/(1+alnKDR(V))
  // taunKDR(V)=if(taunKDR1(V)<2)then(2)else(taunKDR1(V))
  // alnKDR(V)=exp(-0.11*(V-13))
  // benKDR(V)=exp(-0.08*(V-13))
  // # Equations for proximal version of IA activation
  // ninfprox(V)=1/(1+alnprox(V))
  // taunprox1(V)=4*benprox(V)/(1+alnprox(V))
  // taunprox(V)=if(taunprox1(V)<0.1)then(0.1)else(taunprox1(V))
  // alnprox(V)=exp(-0.038*(1.5+1/(1+exp(V+40)/5))*(V-11))
  // benprox(V)=exp(-0.038*(0.825+1/(1+exp(V+40)/5))*(V-11))
  // # Equations for distal version of IA activation
  // ninfdist(V)=1/(1+alndist(V))
  // taundist1(V)=2*bendist(V)/(1+alndist(V))
  // taundist(V)=if(taundist1(V)<0.1)then(0.1)else(taundist1(V))
  // alndist(V)=exp(-0.038*(1.8+1/(1+exp(V+40)/5))*(V+1))
  // bendist(V)=exp(-0.038*(0.7+1/(1+exp(V+40)/5))*(V+1))
  // # Weighted averaging of IA equations
  // taun(V)=d_tau*taunprox(V)+(1-d_tau)*taundist(V)
  // ninf(V)=d_inf*ninfprox(V)+(1-d_inf)*ninfdist(V)
  // # IA inactivation, l
  // linf(V)=1/(1+all(V))
  // taul1(V)=0.26*(V+50)
  // taul(V)=if(taul1(V)<2)then(2)else(taul1(V))
  // all(V)=exp(0.11*(V+56))
  // # Setup XPP's numerics, and plotting
  // @ xp=V,yp=vdot,xlo=-90,xhi=30,ylo=-1000,yhi=300
  // @ dt=0.01,total=20
  // @ method=cvode,tol=1e-6,atoler=1e-5,bounds=1e4
  // @ jac_eps=1e-5,newt_tol=1e-5,newt_iter=10000
  // done
  // This file has been produced by sbmlutils.
  // Terms of use
  // Copyright © 2017 Matthias Koenig
  // Redistribution and use of any part of this model, with or without modification, are permitted provided that the following conditions are met:
  // Redistributions of this SBML file must retain the above copyright notice, this list of conditions and the following disclaimer.
  // Redistributions in a different form must reproduce the above copyright notice, this list of conditions and the following disclaimer in the documentation and/or other materials provided with the distribution.
  // This model is distributed in the hope that it will be useful, but WITHOUT ANY WARRANTY; without even the implied warranty of MERCHANTABILITY or FITNESS FOR A PARTICULAR PURPOSE.

  // Parameters:
  cm = 2; cm is "cm = 2.0";
  ra = 150; ra is "ra = 150";
  vna = 55; vna is "vna = 55.0";
  vk = -90; vk is "vk = -90";
  vl = -65; vl is "vl = -65";
  gna = 32; gna is "gna = 32";
  gkdr = 10; gkdr is "gkdr = 10";
  gl = 0.2; gl is "gl = 0.2";
  b = 0.5; b is "b = 0.5";
  d_tau = 0.1; d_tau is "d_tau = 0.1";
  d_inf = 0.1; d_inf is "d_inf = 0.1";
  gka = 48; gka is "gka = 48";
  diam = 1.8; diam is "diam = 1.8";
  iapp = 0.925; iapp is "iapp = 0.925";
  k = 0;
  v = -68.1; v is "v = -68.1";
  vdot = 0; vdot is "vdot = 0";
  m = 0.016; m is "m = 0.016";
  h = 0.99; h is "h = 0.99";
  i = 0.95; i is "i = 0.95";
  nkdr = 0.0002; nkdr is "nkdr = 0.0002";
  n = 0.0005; n is "n = 0.0005";
  l = 0.8; l is "l = 0.8";
  c has dimensionless;
  t has dimensionless; t is "model time";

  // Assignment rules:
  c := sqrt(k*diam*10/(4*ra*cm));
  t := time;

  // Rate rules:
  v' = vdot;
  vdot' = k*(vdot + (fion(v, gka, gkdr, gl, gna, h, i, l, m, n, nkdr, vk, vl, vna) - iapp)/cm);
  m' = 1/taum(v)*(minf(v) - m);
  h' = 1/tauh(v)*(hinf(v) - h);
  i' = 1/taui(v)*(iinf(v, b) - i);
  nkdr' = 1/taunkdr(v)*(nkdrinf(v) - nkdr);
  n' = 1/taun(v, d_tau)*(ninf(v, d_inf) - n);
  l' = 1/taul(v)*(linf(v) - l);
end
