// SBML level 3 version 1

function max(x, y)
  piecewise(x, x > y, y);
end
max is "minimum";

function min(x, y)
  piecewise(x, x < y, y);
end
min is "maximum";

function heav(x)
  piecewise(0, x < 0, 0.5, x == 0, 1, x > 0, 0);
end
heav is "heavyside";

function mod(x, y)
  piecewise(x - y*ceil(x/y), xor(x < 0, y < 0), x - y*floor(x/y));
end
mod is "modulo";

model main()
  // XPP model
  // This model was converted from XPP ode format to SBML using sbmlutils-0.1.5a6.
  // #CA3_cell_fastslow_q.ode
  // #Atherton et al., 2016
  // #
  // #
  // #Declare parameters
  // param q=0.0001
  // param Is=0.3, Id=0.0, gCa_h=10.0, gKCa_h=15
  // param p=0.5, C_h=3, gL=0.1
  // param VL=-60, gNa_h=30, VNa_h=60
  // param gK_h=15, VK_h=-75
  // param VCa_h=80, gKAHP_h=0.8, gsd=2.1
  // param tau_AMPA=2
  // param gAMPA_PP_h=1e-0.6, VAMPA=0, tau_GABA_IP=7
  // param gGABA_IP_h=1e-06, VGABA=-75
  // #
  // # Define some functions
  // alpham=0.32*(-46.9-Vs)/(exp((-46.9-Vs)/4)-1)
  // betam=0.28*(Vs+19.9)/(exp((Vs+19.9)/5)-1)
  // m_inf=alpham/(alpham + betam)
  // alphah=0.128*exp((-43-Vs)/18)
  // betah=4./(1+exp((-20-Vs)/5))
  // alphan=0.016*(-24.9-Vs)/(exp((-24.9-Vs)/5)-1)
  // betan=0.25*exp(-1-0.025*Vs)
  // alphas=1.6 / (exp(-0.072*(Vd-5))+1)
  // betas=0.02*(Vd+8.9)/(exp((Vd+8.9)/5)-1)
  // qinf=(0.7894*exp(0.0002726*Ca))-(0.7292*exp(-0.01672*Ca))
  // tauq=(657.9*exp(-0.02023*Ca))+(301.8*exp(-0.002381*Ca))
  // cinf=(1.0/(1.0+exp((-10.1-Vd)/0.1016)))^0.00925
  // tauc=3.627*exp(0.03704*Vd)
  // #
  // # Define the fixed variables
  // I_Ls=gL*(Vs-VL)
  // I_Na=gNa_h*(m_inf^2)*h*(Vs-VNa_h)
  // I_K=gK_h*n*(Vs-VK_h)
  // I_sd=gsd*(Vs-Vd)
  // I_Ld=gL*(Vd-VL)
  // I_Ca=gCa_h*(s^2)*(Vd-VCa_h)
  // I_KAHP=gKAHP_h*q*(Vd-VK_h)
  // I_KCa=gKCa_h*c*(1.073*sin(0.003453*Ca+0.08095) + 0.08408*sin(0.01634*Ca-2.34) + 0.01811*sin(0.0348*Ca-0.9918))*(Vd-VK_h)
  // # Define the right-hand sides
  // Vs'=(-(I_Ls + I_Na + I_K) - I_sd/p + Is/p)/C_h
  // Vd'=(-( I_Ld + I_Ca + I_KAHP + I_KCa ) + I_sd/(1-p) + Id/(1-p))/C_h
  // Ca'=(-0.13*I_Ca - 0.075*Ca)
  // h'=(alphah - h*(alphah + betah))
  // n'=(alphan - n*(alphan + betan))
  // s'=(alphas - s*(alphas + betas))
  // #q'=(qinf-q)/tauq
  // c'=(cinf-c)/tauc
  // # Initial conditions
  // init Vs= -62.89223689
  // init Vd= -62.98248752
  // init Ca=0.21664282
  // init h=0.99806345
  // init n=0.00068604
  // init s=0.01086703
  // #init q=0.0811213
  // init c=0.00809387
  // #init sAMPA_PP=0
  // #init sGABA_IP=0
  // #
  // @ meth=cvode, toler=1.0e-10, atoler=1.0e-10, dt=0.05, total=10000
  // @ maxstore=10000000, bounds=10000000, noutput=10
  // @ xp=t, yp=vs, xlo=0, xhi=10000, ylo=-120, yhi=40
  // @ ntst=100.,nmax=2000000.,npr=2000000.,dsmin=0.00001,dsmax=0.5,ds=0.1,parmin=-500,parmax=500.
  // @ epsl=1e-08, epsu=1e-08, epss=1e-06, normmax=1000000
  // @ autoxmin=-100.,autoxmax=100,autoymin=-120.,autoymax=40.
  // done
  // This file has been produced by sbmlutils.
  // Terms of use
  // Copyright © 2017 Matthias Koenig
  // Redistribution and use of any part of this model, with or without modification, are permitted provided that the following conditions are met:
  // Redistributions of this SBML file must retain the above copyright notice, this list of conditions and the following disclaimer.
  // Redistributions in a different form must reproduce the above copyright notice, this list of conditions and the following disclaimer in the documentation and/or other materials provided with the distribution.
  // This model is distributed in the hope that it will be useful, but WITHOUT ANY WARRANTY; without even the implied warranty of MERCHANTABILITY or FITNESS FOR A PARTICULAR PURPOSE.

  // Parameters:
  q = 0.0001; q is "q = 0.0001";
  is = 0.3; is is "is = 0.3";
  id = 0; id is "id = 0.0";
  gca_h = 10; gca_h is "gca_h = 10.0";
  gkca_h = 15; gkca_h is "gkca_h = 15";
  p = 0.5; p is "p = 0.5";
  c_h = 3; c_h is "c_h = 3";
  gl = 0.1; gl is "gl = 0.1";
  vl = -60; vl is "vl = -60";
  gna_h = 30; gna_h is "gna_h = 30";
  vna_h = 60; vna_h is "vna_h = 60";
  gk_h = 15; gk_h is "gk_h = 15";
  vk_h = -75; vk_h is "vk_h = -75";
  vca_h = 80; vca_h is "vca_h = 80";
  gkahp_h = 0.8; gkahp_h is "gkahp_h = 0.8";
  gsd = 2.1; gsd is "gsd = 2.1";
  tau_ampa = 2; tau_ampa is "tau_ampa = 2";
  gampa_pp_h = 0;
  vampa = 0; vampa is "vampa = 0";
  tau_gaba_ip = 7; tau_gaba_ip is "tau_gaba_ip = 7";
  ggaba_ip_h = 1e-6; ggaba_ip_h is "ggaba_ip_h = 1e-06";
  vgaba = -75; vgaba is "vgaba = -75";
  vs = -62.89224; vs is "vs = -62.89223689";
  vd = -62.98249; vd is "vd = -62.98248752";
  ca = 0.21664282; ca is "ca = 0.21664282";
  h = 0.99806345; h is "h = 0.99806345";
  n = 0.00068604; n is "n = 0.00068604";
  s = 0.01086703; s is "s = 0.01086703";
  c = 0.00809387; c is "c = 0.00809387";
  alpham has dimensionless;
  betam has dimensionless;
  m_inf has dimensionless;
  alphah has dimensionless;
  betah has dimensionless;
  alphan has dimensionless;
  betan has dimensionless;
  alphas has dimensionless;
  betas has dimensionless;
  qinf has dimensionless;
  tauq has dimensionless;
  cinf has dimensionless;
  tauc has dimensionless;
  i_ls has dimensionless;
  i_na has dimensionless;
  i_k has dimensionless;
  i_sd has dimensionless;
  i_ld has dimensionless;
  i_ca has dimensionless;
  i_kahp has dimensionless;
  i_kca has dimensionless;
  t has dimensionless; t is "model time";

  // Assignment rules:
  alpham := 0.32*(-46.9 - vs)/(exp((-46.9 - vs)/4) - 1);
  betam := 0.28*(vs + 19.9)/(exp((vs + 19.9)/5) - 1);
  m_inf := alpham/(alpham + betam);
  alphah := 0.128*exp((-43 - vs)/18);
  betah := 4/(1 + exp((-20 - vs)/5));
  alphan := 0.016*(-24.9 - vs)/(exp((-24.9 - vs)/5) - 1);
  betan := 0.25*exp(-1 - 0.025*vs);
  alphas := 1.6/(exp(-0.072*(vd - 5)) + 1);
  betas := 0.02*(vd + 8.9)/(exp((vd + 8.9)/5) - 1);
  qinf := 0.7894*exp(0.0002726*ca) - 0.7292*exp(-0.01672*ca);
  tauq := 657.9*exp(-0.02023*ca) + 301.8*exp(-0.002381*ca);
  cinf := (1/(1 + exp((-10.1 - vd)/0.1016)))^0.00925;
  tauc := 3.627*exp(0.03704*vd);
  i_ls := gl*(vs - vl);
  i_na := gna_h*m_inf^2*h*(vs - vna_h);
  i_k := gk_h*n*(vs - vk_h);
  i_sd := gsd*(vs - vd);
  i_ld := gl*(vd - vl);
  i_ca := gca_h*s^2*(vd - vca_h);
  i_kahp := gkahp_h*q*(vd - vk_h);
  i_kca := gkca_h*c*(1.073*sin(0.003453*ca + 0.08095) + 0.08408*sin(0.01634*ca - 2.34) + 0.01811*sin(0.0348*ca - 0.9918))*(vd - vk_h);
  t := time;

  // Rate rules:
  vs' = (-(i_ls + i_na + i_k) - i_sd/p + is/p)/c_h;
  vd' = (-(i_ld + i_ca + i_kahp + i_kca) + i_sd/(1 - p) + id/(1 - p))/c_h;
  ca' = -0.13*i_ca - 0.075*ca;
  h' = alphah - h*(alphah + betah);
  n' = alphan - n*(alphan + betan);
  s' = alphas - s*(alphas + betas);
  c' = (cinf - c)/tauc;
end
