// SBML level 3 version 1

function max(x, y)
  piecewise(x, x > y, y);
end
max is "minimum";

function min(x, y)
  piecewise(x, x < y, y);
end
min is "maximum";

function heav(x)
  piecewise(0, x < 0, 0.5, x == 0, 1, x > 0, 0);
end
heav is "heavyside";

function mod(x, y)
  piecewise(x - y*ceil(x/y), xor(x < 0, y < 0), x - y*floor(x/y));
end
mod is "modulo";

model main()
  // XPP model
  // This model was converted from XPP ode format to SBML using sbmlutils-0.1.5a6.
  // % Ca-Oscil-Astrocyte.ode
  // % Ref: Laventovich and Hemkin, A mathematical model of spontaneous calcium(II) oscillations
  // % in astrocytes. J Theor Biol 2008; 251(4):553-60.
  // % Units: microM/sec; microM; sec
  // % x: cytosolic Ca; y: Ca concencentration in ER; z: IP3 concentration
  // init x=0.1, y=1.5, z=0.1
  // parm vm2=15, vm3=40, vin=0.05, vp=0.05, k2=0.1
  // parm kcaa=0.15, kcat=0.15, kip3=0.1, kp=0.3
  // parm kdeg=0.08, kout=0.5, kf=0.5, n=2.02, m=2.2
  // vserca=vm2*(x^2/(x^2+k2^2))
  // vplc=vp*(x^2/(x^2+kp^2))
  // vcicr=4*vm3*((kcaa^n)*(x^n)/((x^n+kcaa^n)*(x^n+kcat^n)))*(z^m/(z^m+kip3^m))*(y-x)
  // dx/dt=vin-kout*x+vcicr-vserca+kf*(y-x)
  // dy/dt=vserca-vcicr-kf*(y-x)
  // dz/dt=vplc-kdeg*z
  // @ meth=Euler, dt=0.01, total=600
  // @ yp=x, ylo=0, yhi=0.7, xlo=0, xhi=600, bound=10000
  // done
  // This file has been produced by sbmlutils.
  // Terms of use
  // Copyright © 2017 Matthias Koenig
  // Redistribution and use of any part of this model, with or without modification, are permitted provided that the following conditions are met:
  // Redistributions of this SBML file must retain the above copyright notice, this list of conditions and the following disclaimer.
  // Redistributions in a different form must reproduce the above copyright notice, this list of conditions and the following disclaimer in the documentation and/or other materials provided with the distribution.
  // This model is distributed in the hope that it will be useful, but WITHOUT ANY WARRANTY; without even the implied warranty of MERCHANTABILITY or FITNESS FOR A PARTICULAR PURPOSE.

  // Parameters:
  x = 0.1; x is "x = 0.1";
  y = 1.5; y is "y = 1.5";
  z = 0.1; z is "z = 0.1";
  vm2 = 15; vm2 is "vm2 = 15";
  vm3 = 40; vm3 is "vm3 = 40";
  vin = 0.05; vin is "vin = 0.05";
  vp = 0.05; vp is "vp = 0.05";
  k2 = 0.1; k2 is "k2 = 0.1";
  kcaa = 0.15; kcaa is "kcaa = 0.15";
  kcat = 0.15; kcat is "kcat = 0.15";
  kip3 = 0.1; kip3 is "kip3 = 0.1";
  kp = 0.3; kp is "kp = 0.3";
  kdeg = 0.08; kdeg is "kdeg = 0.08";
  kout = 0.5; kout is "kout = 0.5";
  kf = 0.5; kf is "kf = 0.5";
  n = 2.02; n is "n = 2.02";
  m = 2.2; m is "m = 2.2";
  vserca has dimensionless;
  vplc has dimensionless;
  vcicr has dimensionless;
  t has dimensionless; t is "model time";

  // Assignment rules:
  vserca := vm2*(x^2/(x^2 + k2^2));
  vplc := vp*(x^2/(x^2 + kp^2));
  vcicr := 4*vm3*(kcaa^n*x^n/((x^n + kcaa^n)*(x^n + kcat^n)))*(z^m/(z^m + kip3^m))*(y - x);
  t := time;

  // Rate rules:
  x' = vin - kout*x + vcicr - vserca + kf*(y - x);
  y' = vserca - vcicr - kf*(y - x);
  z' = vplc - kdeg*z;
end
