// SBML level 3 version 1

function max(x, y)
  piecewise(x, x > y, y);
end
max is "minimum";

function min(x, y)
  piecewise(x, x < y, y);
end
min is "maximum";

function heav(x)
  piecewise(0, x < 0, 0.5, x == 0, 1, x > 0, 0);
end
heav is "heavyside";

function mod(x, y)
  piecewise(x - y*ceil(x/y), xor(x < 0, y < 0), x - y*floor(x/y));
end
mod is "modulo";

function g1(na_ratio)
  420*(1 - 0.75*(1 - 0.93*exp(-2.6*na_ratio))^0.3);
end

function g2(k_ratio, na_ratio)
  exp((1 - 7.41*k_ratio)/(1.94 + 1.98*exp(-2.6*na_ratio)));
end

function g3(k_ratio, na_ratio)
  (1/(1 + exp(35.7*(1 + 1.94*na_ratio - 24.3*k_ratio))))^5*(1/(1 + exp(0.88*(1 + 1.48*na_ratio - 24.6*k_ratio))))^5;
end

function glk(k_ratio)
  2.6*exp(-32.5*k_ratio);
end

function ik(k_ratio, na_ratio)
  0.94*(g1(na_ratio)*g2(k_ratio, na_ratio)*g3(k_ratio, na_ratio) + glk(k_ratio));
end

function ina(k_ratio, na_ratio)
  g1(na_ratio)*g2(k_ratio, na_ratio)*g3(k_ratio, na_ratio) + 1.5;
end

model main()
  // XPP model
  // This model was converted from XPP ode format to SBML using sbmlutils-0.1.5a6.
  // # This is the reduced model for the ion concentrations
  // # published in Cressman et al., JCNS 26, 159-170 (2009).
  // #
  // # The variables are:
  // # ki = intracellular potassium concentration
  // # ko = extracellular potassium concentration
  // # nai = intracellular sodium concentration
  // # nao = extracellular sodium concentration
  // #
  // # The parameters of interest are
  // # rho = strength of pumps
  // # epsilon = diffusion constant for potassium diffusion from the extracellular space to the bath
  // # kbath = bath potassium concentration
  // # glia = strength of glia
  // par rho=01.25, epsilon=1.2, kbath=4.0, glia=66
  // # Below are the fits to the average potassium and sodium membrane currents.
  // # The published paper has a few typographical errors. Most importantly, note
  // # the factors in the expression for g2, and the expression for g3 should read
  // # g3=(expression)*(the expresion below it, which is mislabeled as g4). One
  // # should cross out the "g4=".
  // #
  // # na_ratio represents the ratio nai/naout; k_ratio represents the ratio ko/ki.
  // #
  // # The following are the equations for the fits appear in the paper
  // # taking the typo described above into account.
  // #
  // # g1(na_ratio)=420.0*(1.0-0.75*(1.0-0.93*exp(-2.6*na_ratio))^(1/3))
  // # g2(k_ratio,na_ratio)=exp(2.0*(1.0-7.41*k_ratio)/(1.0+exp(-2.6*na_ratio)))
  // # See typo note above about g3
  // # g3(k_ratio,na_ratio)=((1.0/(1+exp(35.7*(1.0+1.94*na_ratio-24.3*k_ratio))))^5)*((1.0/(1+exp(0.88*(1.0+1.48*na_ratio-24.6*k_ratio))))^5)
  // # glk(k_ratio)=2.6*exp(-32.5*k_ratio)
  // # Ik(k_ratio,na_ratio)=g1(na_ratio)*g2(k_ratio,na_ratio)*g3(k_ratio,na_ratio)+glk(k_ratio)
  // # Ina(k_ratio,na_ratio)=g1(na_ratio)*g2(k_ratio,na_ratio)*g3(k_ratio,na_ratio)+1.5
  // #
  // # However, the following very slightly different equations are what were actually used
  // # to generate the figures in the paper
  // #
  // g1(na_ratio)=420.0*(1.0-0.75*(1.0-0.93*exp(-2.6*na_ratio))^(0.3))
  // g2(k_ratio,na_ratio)=exp((1.0-7.41*k_ratio)/(1.94+1.98*exp(-2.6*na_ratio)))
  // g3(k_ratio,na_ratio)=((1.0/(1+exp(35.7*(1.0+1.94*na_ratio-24.3*k_ratio))))^5)*((1.0/(1+exp(0.88*(1.0+1.48*na_ratio-24.6*k_ratio))))^5)
  // glk(k_ratio)=2.6*exp(-32.5*k_ratio)
  // Ik(k_ratio,na_ratio)=0.94*(g1(na_ratio)*g2(k_ratio,na_ratio)*g3(k_ratio,na_ratio)+glk(k_ratio))
  // Ina(k_ratio,na_ratio)=g1(na_ratio)*g2(k_ratio,na_ratio)*g3(k_ratio,na_ratio)+1.5
  // ########
  // ipumps=(rho/(1.0+exp((25-nai)/3)))*(1.0/(1.0+exp(5.5-ko)))
  // iglia=glia/(1.0+exp((18.0-ko)/2.5))
  // idiff=epsilon*(ko-kbath)
  // ki=140.0+(18.0-nai)
  // nao=144.0-7.0*(nai-18.0)
  // # In the following equation, the published paper has a minus sign that should be ignored.
  // ko'=0.33*Ik((ko/ki),(nai/nao))-14.0*ipumps-iglia-idiff
  // nai'=0.04714*Ina((ko/ki),(nai/nao))-3.0*ipumps
  // ####
  // @ TOTAL=1000,BOUND=10000
  // done
  // This file has been produced by sbmlutils.
  // Terms of use
  // Copyright © 2017 Matthias Koenig
  // Redistribution and use of any part of this model, with or without modification, are permitted provided that the following conditions are met:
  // Redistributions of this SBML file must retain the above copyright notice, this list of conditions and the following disclaimer.
  // Redistributions in a different form must reproduce the above copyright notice, this list of conditions and the following disclaimer in the documentation and/or other materials provided with the distribution.
  // This model is distributed in the hope that it will be useful, but WITHOUT ANY WARRANTY; without even the implied warranty of MERCHANTABILITY or FITNESS FOR A PARTICULAR PURPOSE.

  // Parameters:
  rho = 1.25; rho is "rho = 01.25";
  epsilon = 1.2; epsilon is "epsilon = 1.2";
  kbath = 4; kbath is "kbath = 4.0";
  glia = 66; glia is "glia = 66";
  ko = 0 dimensionless;
  nai = 0 dimensionless;
  ipumps has dimensionless;
  iglia has dimensionless;
  idiff has dimensionless;
  ki has dimensionless;
  nao has dimensionless;
  t has dimensionless; t is "model time";

  // Assignment rules:
  ipumps := rho/(1 + exp((25 - nai)/3))*(1/(1 + exp(5.5 - ko)));
  iglia := glia/(1 + exp((18 - ko)/2.5));
  idiff := epsilon*(ko - kbath);
  ki := 140 + (18 - nai);
  nao := 144 - 7*(nai - 18);
  t := time;

  // Rate rules:
  ko' = 0.33*ik(ko/ki, nai/nao) - 14*ipumps - iglia - idiff;
  nai' = 0.04714*ina(ko/ki, nai/nao) - 3*ipumps;
end
