// SBML level 3 version 1

function max(x, y)
  piecewise(x, x > y, y);
end
max is "minimum";

function min(x, y)
  piecewise(x, x < y, y);
end
min is "maximum";

function heav(x)
  piecewise(0, x < 0, 0.5, x == 0, 1, x > 0, 0);
end
heav is "heavyside";

function mod(x, y)
  piecewise(x - y*ceil(x/y), xor(x < 0, y < 0), x - y*floor(x/y));
end
mod is "modulo";

model main()
  // XPP model
  // This model was converted from XPP ode format to SBML using sbmlutils-0.1.5a6.
  // ##########################################################################
  // # Detailed Model of Mammalian Circadian Clock
  // # Generated: 11-Sep-2012 20:26:23
  // # Generated by Jae Kyoung Kim and Daniel Forger by using SBtoolbox2.
  // # This file can be used by XPPAUT for simulation and
  // # bifurcation analysis.
  // ##########################################################################
  // ########################################################
  // # DIFFERENTIAL EQUATIONS
  // ########################################################
  // #Since XPP does not distinguish GR and Gr, Gr is changed to Grn
  // GR'=-(unbin*GR)+bin*(1-G-GR)*(x01011+x02011)
  // G'=-(unbin*G)+bin*(1-G-GR)*x00011
  // GrR'=-(unbinr*GrR)+binr*(1-Grn-GrR)*(x01011+x02011)
  // Grn'=-(unbinr*Grn)+binr*(1-Grn-GrR)*x00011
  // GcR'=-(unbinc*GcR)+binc*(1-Gc-GcR)*(x01011+x02011)
  // Gc'=-(unbinc*Gc)+binc*(1-Gc-GcR)*x00011
  // GBR'=-(unbinrev*GBR)+binrev*GB*(revn+revng+revngp+revnp)
  // GB'=unbinrev*GBR-binrev*GB*(revn+revng+revngp+revnp)
  // GBRb'=-(unbinrevb*GBRb)+binrevb*GBb*(revn+revng+revngp+revnp)
  // GBb'=unbinrevb*GBRb-binrevb*GBb*(revn+revng+revngp+revnp)
  // MnPo'=trPo*G-tmc*MnPo-umPo*MnPo
  // McPo'=-(umPo*McPo)+tmc*MnPo
  // MnPt'=trPt*G-tmc*MnPt-umPt*MnPt
  // McPt'=-(umPt*McPt)+tmc*MnPt
  // MnRt'=trRt*Gc-tmc*MnRt-umRt*MnRt
  // McRt'=-(umRt*McRt)+tmc*MnRt
  // MnRev'=-(tmcrev*MnRev)-umRev*MnRev+trRev*Grn*x00011
  // McRev'=-(umRev*McRev)+tmcrev*MnRev
  // MnRo'=trRo*G*GB-tmc*MnRo-umRo*MnRo
  // McRo'=-(umRo*McRo)+tmc*MnRo
  // MnB'=trB*GBb-tmc*MnB-umB*MnB
  // McB'=-(umB*McB)+tmc*MnB
  // MnNp'=trNp*GB-tmc*MnNp-umNp*MnNp
  // McNp'=-(umNp*McNp)+tmc*MnNp
  // B'=-(ub*B)+uncbin*BC-cbin*B*Cl+tlb*McB
  // Cl'=tlc+uncbin*BC-uc*Cl-cbin*B*Cl+tlnp*McNp
  // BC'=-(phos*BC)-ubc*BC-uncbin*BC+cbin*B*Cl
  // cyrev'=-((nlrev+urev)*cyrev)+dg*cyrevg+tlrev*McRev+nerev*revn-ag*cyrev*x00200
  // revn'=nlrev*cyrev+(-nerev-urev)*revn+dg*revng-ag*Nf*revn*x00210
  // cyrevg'=-(cyrevg*(dg+nlrev+urev+gto))+nerev*revng+ag*cyrev*x00200
  // revng'=nlrev*cyrevg-(dg+nerev+urev+gto)*revng+ag*Nf*revn*x00210
  // cyrevgp'=-((dg+nlrev+uprev)*cyrevgp)+cyrevg*gto+nerev*revngp
  // revngp'=nlrev*cyrevgp+gto*revng-(dg+nerev+uprev)*revngp
  // cyrevp'=dg*cyrevgp-(nlrev+uprev)*cyrevp+nerev*revnp
  // revnp'=nlrev*cyrevp+dg*revngp-(nerev+uprev)*revnp
  // gto'=trgto*G*GB-ugto*gto
  // x00001'=phos*BC-nlbc*x00001-ubc*x00001
  // x00011'=nlbc*x00001-ubc*x00011+uro*x01011-cbbin*Nf*x00011*(x01010+x02010)+urt*x02011+uncbbin*(x01011+x02011)+upu*(x50011+x50111+x50211+x50311)+up*(x20011+x20111+x40011+x40111+x40211+x40311+x60011+x60111+x60211+x60311)-bbin*Nf*x00011*(x20010+x20110+x21010+x21110+x22010+x22110+x40010+x40110+x40210+x40310+x41010+x41110+x41210+x41310+x42010+x42110+x42210+x42310+x50010+x50110+x50210+x50310+x51010+x51110+x51210+x51310+x52010+x52110+x52210+x52310+x60010+x60110+x60210+x60310+x61010+x61110+x61210+x61310+x62010+x62110+x62210+x62310)+unbbin*(x20011+x20111+x21011+x21111+x22011+x22111+x40011+x40111+x40211+x40311+x41011+x41111+x41211+x41311+x42011+x42111+x42211+x42311+x50011+x50111+x50211+x50311+x51011+x51111+x51211+x51311+x52011+x52111+x52211+x52311+x60011+x60111+x60211+x60311+x61011+x61111+x61211+x61311+x62011+x62111+x62211+x62311)
  // x00100'=lne*x00110+upu*(x10100+x30100+x30300+x50100+x50300)+up*(x20100+x40100+x40300+x60100+x60300)-ac*x00100*(x10000+x20000+x21000+x22000+x30000+x40000+x41000+x42000+x50000+x51000+x52000+x60000+x61000+x62000)+dc*(x10100+x20100+x21100+x22100+x30100+x40100+x41100+x42100+x50100+x51100+x52100+x60100+x61100+x62100)-ac*x00100*(x30200+x40200+x41200+x42200+x50200+x51200+x52200+x60200+x61200+x62200)+dc*(x30300+x40300+x41300+x42300+x50300+x51300+x52300+x60300+x61300+x62300)
  // x00110'=-(lne*x00110)+upu*(x50110+x50111+x50310+x50311)+up*(x20110+x20111+x40110+x40111+x40310+x40311+x60110+x60111+x60310+x60311)-ac*Nf*x00110*(x20010+x21010+x22010+x40010+x41010+x42010+x50010+x51010+x52010+x60010+x61010+x62010)-ac*Nf*x00110*(x20011+x21011+x22011+x40011+x41011+x42011+x50011+x51011+x52011+x60011+x61011+x62011)+dc*(x20110+x21110+x22110+x40110+x41110+x42110+x50110+x51110+x52110+x60110+x61110+x62110)+dc*(x20111+x21111+x22111+x40111+x41111+x42111+x50111+x51111+x52111+x60111+x61111+x62111)-ac*Nf*x00110*(x40210+x41210+x42210+x50210+x51210+x52210+x60210+x61210+x62210)-ac*Nf*x00110*(x40211+x41211+x42211+x50211+x51211+x52211+x60211+x61211+x62211)+dc*(x40310+x41310+x42310+x50310+x51310+x52310+x60310+x61310+x62310)+dc*(x40311+x41311+x42311+x50311+x51311+x52311+x60311+x61311+x62311)
  // x00200'=dg*cyrevg+urev*cyrevg+dg*cyrevgp+uprev*cyrevgp-ag*cyrev*x00200+lne*x00210+upu*(x30200+x30300+x50200+x50300)+up*(x40200+x40300+x60200+x60300)-agp*x00200*(x30000+x30100+x40000+x40100+x41000+x41100+x42000+x42100+x50000+x50100+x51000+x51100+x52000+x52100+x60000+x60100+x61000+x61100+x62000+x62100)+dg*(x30200+x30300+x40200+x40300+x41200+x41300+x42200+x42300+x50200+x50300+x51200+x51300+x52200+x52300+x60200+x60300+x61200+x61300+x62200+x62300)
  // x00210'=dg*revng+urev*revng+dg*revngp+uprev*revngp-lne*x00210-ag*Nf*revn*x00210+upu*(x50210+x50211+x50310+x50311)+up*(x40210+x40211+x40310+x40311+x60210+x60211+x60310+x60311)-agp*Nf*x00210*(x40010+x40011+x40110+x40111+x41010+x41011+x41110+x41111+x42010+x42011+x42110+x42111+x50010+x50011+x50110+x50111+x51010+x51011+x51110+x51111+x52010+x52011+x52110+x52111+x60010+x60011+x60110+x60111+x61010+x61011+x61110+x61111+x62010+x62011+x62110+x62111)+dg*(x40210+x40211+x40310+x40311+x41210+x41211+x41310+x41311+x42210+x42211+x42310+x42311+x50210+x50211+x50310+x50311+x51210+x51211+x51310+x51311+x52210+x52211+x52310+x52311+x60210+x60211+x60310+x60311+x61210+x61211+x61310+x61311+x62210+x62211+x62310+x62311)
  // x01000'=tlr*McRo-uro*x01000-ar*x01000*(x20000+x20100+x40000+x40100+x40200+x40300+x50000+x50100+x50200+x50300+x60000+x60100+x60200+x60300)+dr*(x21000+x21100+x41000+x41100+x41200+x41300+x51000+x51100+x51200+x51300+x61000+x61100+x61200+x61300)
  // x01010'=-(uro*x01010)-cbbin*Nf*x00011*x01010+uncbbin*x01011-ar*Nf*x01010*(x20010+x20110+x40010+x40110+x40210+x40310+x50010+x50110+x50210+x50310+x60010+x60110+x60210+x60310)-ar*Nf*x01010*(x20011+x20111+x40011+x40111+x40211+x40311+x50011+x50111+x50211+x50311+x60011+x60111+x60211+x60311)+dr*(x21010+x21110+x41010+x41110+x41210+x41310+x51010+x51110+x51210+x51310+x61010+x61110+x61210+x61310)+dr*(x21011+x21111+x41011+x41111+x41211+x41311+x51011+x51111+x51211+x51311+x61011+x61111+x61211+x61311)
  // x01011'=cbbin*Nf*x00011*x01010-uncbbin*x01011-uro*x01011-ar*Nf*x01011*(x20010+x20110+x40010+x40110+x40210+x40310+x50010+x50110+x50210+x50310+x60010+x60110+x60210+x60310)+dr*(x21011+x21111+x41011+x41111+x41211+x41311+x51011+x51111+x51211+x51311+x61011+x61111+x61211+x61311)
  // x02000'=tlr*McRt-urt*x02000-ar*x02000*(x20000+x20100+x40000+x40100+x40200+x40300+x50000+x50100+x50200+x50300+x60000+x60100+x60200+x60300)+dr*(x22000+x22100+x42000+x42100+x42200+x42300+x52000+x52100+x52200+x52300+x62000+x62100+x62200+x62300)
  // x02010'=-(urt*x02010)-cbbin*Nf*x00011*x02010+uncbbin*x02011-ar*Nf*x02010*(x20010+x20110+x40010+x40110+x40210+x40310+x50010+x50110+x50210+x50310+x60010+x60110+x60210+x60310)-ar*Nf*x02010*(x20011+x20111+x40011+x40111+x40211+x40311+x50011+x50111+x50211+x50311+x60011+x60111+x60211+x60311)+dr*(x22010+x22110+x42010+x42110+x42210+x42310+x52010+x52110+x52210+x52310+x62010+x62110+x62210+x62310)+dr*(x22011+x22111+x42011+x42111+x42211+x42311+x52011+x52111+x52211+x52311+x62011+x62111+x62211+x62311)
  // x02011'=cbbin*Nf*x00011*x02010-uncbbin*x02011-urt*x02011-ar*Nf*x02011*(x20010+x20110+x40010+x40110+x40210+x40310+x50010+x50110+x50210+x50310+x60010+x60110+x60210+x60310)+dr*(x22011+x22111+x42011+x42111+x42211+x42311+x52011+x52111+x52211+x52311+x62011+x62111+x62211+x62311)
  // x10000'=tlp*McPo-upu*x10000-ac*x00100*x10000+dc*x10100
  // x10100'=ac*x00100*x10000-dc*x10100-hoo*x10100-upu*x10100
  // x20000'=-(nl*x20000)-up*x20000-ac*x00100*x20000-ar*(x01000+x02000)*x20000+ne*x20010+dc*x20100+dr*(x21000+x22000)
  // x20010'=nl*x20000-ne*x20010-up*x20010-bbin*Nf*x00011*x20010-ac*Nf*x00110*x20010-ar*Nf*(x01010+x02010)*x20010-ar*Nf*(x01011+x02011)*x20010+ubc*x20011+unbbin*x20011+dc*x20110+dr*(x21010+x22010)+dr*(x21011+x22011)
  // x20011'=bbin*Nf*x00011*x20010-ubc*x20011-unbbin*x20011-up*x20011-ac*Nf*x00110*x20011-ar*Nf*(x01010+x02010)*x20011+dc*x20111+dr*(x21011+x22011)
  // x20100'=hoo*x10100+ac*x00100*x20000-dc*x20100-nl*x20100-up*x20100-ar*(x01000+x02000)*x20100+ne*x20110+dr*(x21100+x22100)
  // x20110'=ac*Nf*x00110*x20010+nl*x20100-dc*x20110-ne*x20110-up*x20110-bbin*Nf*x00011*x20110-ar*Nf*(x01010+x02010)*x20110-ar*Nf*(x01011+x02011)*x20110+ubc*x20111+unbbin*x20111+dr*(x21110+x22110)+dr*(x21111+x22111)
  // x20111'=ac*Nf*x00110*x20011+bbin*Nf*x00011*x20110-dc*x20111-ubc*x20111-unbbin*x20111-up*x20111-ar*Nf*(x01010+x02010)*x20111+dr*(x21111+x22111)
  // x21000'=ar*x01000*x20000-dr*x21000-nl*x21000-ac*x00100*x21000+ne*x21010+dc*x21100
  // x21010'=ar*Nf*x01010*x20010+nl*x21000-dr*x21010-ne*x21010-bbin*Nf*x00011*x21010-ac*Nf*x00110*x21010+unbbin*x21011+dc*x21110
  // x21011'=ar*Nf*x01011*x20010+ar*Nf*x01010*x20011+bbin*Nf*x00011*x21010-2*dr*x21011-unbbin*x21011-ac*Nf*x00110*x21011+dc*x21111
  // x21100'=ar*x01000*x20100+ac*x00100*x21000-dc*x21100-dr*x21100-nl*x21100+ne*x21110
  // x21110'=ar*Nf*x01010*x20110+ac*Nf*x00110*x21010+nl*x21100-dc*x21110-dr*x21110-ne*x21110-bbin*Nf*x00011*x21110+unbbin*x21111
  // x21111'=ar*Nf*x01011*x20110+ar*Nf*x01010*x20111+ac*Nf*x00110*x21011+bbin*Nf*x00011*x21110-dc*x21111-2*dr*x21111-unbbin*x21111
  // x22000'=ar*x02000*x20000-dr*x22000-nl*x22000-ac*x00100*x22000+ne*x22010+dc*x22100
  // x22010'=ar*Nf*x02010*x20010+nl*x22000-dr*x22010-ne*x22010-bbin*Nf*x00011*x22010-ac*Nf*x00110*x22010+unbbin*x22011+dc*x22110
  // x22011'=ar*Nf*x02011*x20010+ar*Nf*x02010*x20011+bbin*Nf*x00011*x22010-2*dr*x22011-unbbin*x22011-ac*Nf*x00110*x22011+dc*x22111
  // x22100'=ar*x02000*x20100+ac*x00100*x22000-dc*x22100-dr*x22100-nl*x22100+ne*x22110
  // x22110'=ar*Nf*x02010*x20110+ac*Nf*x00110*x22010+nl*x22100-dc*x22110-dr*x22110-ne*x22110-bbin*Nf*x00011*x22110+unbbin*x22111
  // x22111'=ar*Nf*x02011*x20110+ar*Nf*x02010*x20111+ac*Nf*x00110*x22011+bbin*Nf*x00011*x22110-dc*x22111-2*dr*x22111-unbbin*x22111
  // x30000'=tlp*McPt-upu*x30000-ac*x00100*x30000-agp*x00200*x30000+dc*x30100+dg*x30200
  // x30100'=ac*x00100*x30000-dc*x30100-hto*x30100-upu*x30100-agp*x00200*x30100+dg*x30300
  // x30200'=agp*x00200*x30000-dg*x30200-upu*x30200-gto*x30200-ac*x00100*x30200+dc*x30300
  // x30300'=agp*x00200*x30100+ac*x00100*x30200-dc*x30300-dg*x30300-hto*x30300-upu*x30300-gto*x30300
  // x40000'=-(nl*x40000)-up*x40000-ac*x00100*x40000-agp*x00200*x40000-ar*(x01000+x02000)*x40000+ne*x40010+dc*x40100+dg*x40200+dr*(x41000+x42000)
  // x40010'=nl*x40000-ne*x40010-up*x40010-bbin*Nf*x00011*x40010-ac*Nf*x00110*x40010-agp*Nf*x00210*x40010-ar*Nf*(x01010+x02010)*x40010-ar*Nf*(x01011+x02011)*x40010+ubc*x40011+unbbin*x40011+dc*x40110+dg*x40210+dr*(x41010+x42010)+dr*(x41011+x42011)
  // x40011'=bbin*Nf*x00011*x40010-ubc*x40011-unbbin*x40011-up*x40011-ac*Nf*x00110*x40011-agp*Nf*x00210*x40011-ar*Nf*(x01010+x02010)*x40011+dc*x40111+dg*x40211+dr*(x41011+x42011)
  // x40100'=hto*x30100+ac*x00100*x40000-dc*x40100-nl*x40100-up*x40100-agp*x00200*x40100-ar*(x01000+x02000)*x40100+ne*x40110+dg*x40300+dr*(x41100+x42100)
  // x40110'=ac*Nf*x00110*x40010+nl*x40100-dc*x40110-ne*x40110-up*x40110-bbin*Nf*x00011*x40110-agp*Nf*x00210*x40110-ar*Nf*(x01010+x02010)*x40110-ar*Nf*(x01011+x02011)*x40110+ubc*x40111+unbbin*x40111+dg*x40310+dr*(x41110+x42110)+dr*(x41111+x42111)
  // x40111'=ac*Nf*x00110*x40011+bbin*Nf*x00011*x40110-dc*x40111-ubc*x40111-unbbin*x40111-up*x40111-agp*Nf*x00210*x40111-ar*Nf*(x01010+x02010)*x40111+dg*x40311+dr*(x41111+x42111)
  // x40200'=agp*x00200*x40000-dg*x40200-nl*x40200-up*x40200-gto*x40200-ac*x00100*x40200-ar*(x01000+x02000)*x40200+ne*x40210+dc*x40300+dr*(x41200+x42200)
  // x40210'=agp*Nf*x00210*x40010+nl*x40200-dg*x40210-ne*x40210-up*x40210-gto*x40210-bbin*Nf*x00011*x40210-ac*Nf*x00110*x40210-ar*Nf*(x01010+x02010)*x40210-ar*Nf*(x01011+x02011)*x40210+ubc*x40211+unbbin*x40211+dc*x40310+dr*(x41210+x42210)+dr*(x41211+x42211)
  // x40211'=agp*Nf*x00210*x40011+bbin*Nf*x00011*x40210-dg*x40211-ubc*x40211-unbbin*x40211-up*x40211-gto*x40211-ac*Nf*x00110*x40211-ar*Nf*(x01010+x02010)*x40211+dc*x40311+dr*(x41211+x42211)
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  // Terms of use
  // Copyright © 2017 Matthias Koenig
  // Redistributions of this SBML file must retain the above copyright notice, this list of conditions and the following disclaimer.
  // Redistributions in a different form must reproduce the above copyright notice, this list of conditions and the following disclaimer in the documentation and/or other materials provided with the distribution.

  // Parameters:
  trpo = 25.9201; trpo is "trpo = 25.9201";
  trpt = 44.854; trpt is "trpt = 44.854";
  trro = 23.0747; trro is "trro = 23.0747";
  trrt = 39.9409; trrt is "trrt = 39.9409";
  trb = 46.1038; trb is "trb = 46.1038";
  trrev = 102.923; trrev is "trrev = 102.923";
  trnp = 0.329749; trnp is "trnp = 0.329749";
  tlp = 1.81031; tlp is "tlp = 1.81031";
  tlr = 5.03882; tlr is "tlr = 5.03882";
  tlb = 0.530436; tlb is "tlb = 0.530436";
  tlrev = 8.90744; tlrev is "tlrev = 8.90744";
  tlc = 4.64589; tlc is "tlc = 4.64589";
  tlnp = 1.25099; tlnp is "tlnp = 1.25099";
  agp = 1.3962; agp is "agp = 1.3962";
  dg = 2.93521; dg is "dg = 2.93521";
  ac = 0.0456572; ac is "ac = 0.0456572";
  dc = 0.108072; dc is "dc = 0.108072";
  ar = 0.0235285; ar is "ar = 0.0235285";
  dr = 0.605268; dr is "dr = 0.605268";
  cbin = 0.0454894; cbin is "cbin = 0.0454894";
  uncbin = 7.27215; uncbin is "uncbin = 7.27215";
  bbin = 6.92686; bbin is "bbin = 6.92686";
  unbbin = 0.130196; unbbin is "unbbin = 0.130196";
  cbbin = 6.59924; cbbin is "cbbin = 6.59924";
  uncbbin = 0.304176; uncbbin is "uncbbin = 0.304176";
  ag = 0.162392; ag is "ag = 0.162392";
  bin = 6.97166; bin is "bin = 6.97166";
  unbin = 0.255032; unbin is "unbin = 0.255032";
  binrev = 0.0120525; binrev is "binrev = 0.0120525";
  unbinrev = 10.9741; unbinrev is "unbinrev = 10.9741";
  binr = 6.15445; binr is "binr = 6.15445";
  unbinr = 2.91009; unbinr is "unbinr = 2.91009";
  binc = 0.280863; binc is "binc = 0.280863";
  unbinc = 0.00886752; unbinc is "unbinc = 0.00886752";
  binrevb = 0.00626588; binrevb is "binrevb = 0.00626588";
  unbinrevb = 5.30559; unbinrevb is "unbinrevb = 5.30559";
  tmc = 0.16426; tmc is "tmc = 0.16426";
  tmcrev = 9.2631; tmcrev is "tmcrev = 9.2631";
  nl = 0.643086; nl is "nl = 0.643086";
  ne = 0.0269078; ne is "ne = 0.0269078";
  nlrev = 9.63702; nlrev is "nlrev = 9.63702";
  nerev = 0.0152514; nerev is "nerev = 0.0152514";
  lne = 0.594609; lne is "lne = 0.594609";
  nlbc = 5.26501; nlbc is "nlbc = 5.26501";
  hoo = 0.527453; hoo is "hoo = 0.527453";
  hto = 2.45584; hto is "hto = 2.45584";
  phos = 0.291429; phos is "phos = 0.291429";
  lono = 0.205813; lono is "lono = 0.205813";
  lont = 0.396392; lont is "lont = 0.396392";
  lta = 0.607387; lta is "lta = 0.607387";
  ltb = 0.013; ltb is "ltb = 0.013";
  trgto = 0.644602; trgto is "trgto = 0.644602";
  ugto = 0.0625777; ugto is "ugto = 0.0625777";
  nf = 3.35063; nf is "nf = 3.35063";
  up = 3.537; up is "up = 3.537";
  uro = 0.17491; uro is "uro = 0.17491";
  urt = 0.481895; urt is "urt = 0.481895";
  umnp = 0.369493; umnp is "umnp = 0.369493";
  umpo = 0.766962; umpo is "umpo = 0.766962";
  umpt = 0.58892; umpt is "umpt = 0.58892";
  umro = 0.403425; umro is "umro = 0.403425";
  umrt = 0.455544; umrt is "umrt = 0.455544";
  ub = 0.0188002; ub is "ub = 0.0188002";
  uc = 0.0251651; uc is "uc = 0.0251651";
  ubc = 0.348829; ubc is "ubc = 0.348829";
  upu = 0.0700322; upu is "upu = 0.0700322";
  urev = 1.64876; urev is "urev = 1.64876";
  uprev = 0.517303; uprev is "uprev = 0.517303";
  umb = 0.795402; umb is "umb = 0.795402";
  umrev = 1.51019; umrev is "umrev = 1.51019";
  gr = 0.787955; gr is "gr = 0.787955";
  g = 0.210048; g is "g = 0.210048";
  grr = 0.558565; grr is "grr = 0.558565";
  grn = 0.416217; grn is "grn = 0.416217";
  gcr = 0.804404; gcr is "gcr = 0.804404";
  gc = 0.193886; gc is "gc = 0.193886";
  gbr = 0.39359; gbr is "gbr = 0.39359";
  gb = 0.599965; gb is "gb = 0.599965";
  gbrb = 0.404247; gbrb is "gbrb = 0.404247";
  gbb = 0.589308; gbb is "gbb = 0.589308";
  mnpo = 4.18947; mnpo is "mnpo = 4.18947";
  mcpo = 0.579108; mcpo is "mcpo = 0.579108";
  mnpt = 8.34963; mnpt is "mnpt = 8.34963";
  mcpt = 1.41168; mcpt is "mcpt = 1.41168";
  mnrt = 12.3735; mnrt is "mnrt = 12.3735";
  mcrt = 4.47054; mcrt is "mcrt = 4.47054";
  mnrev = 31.869; mnrev is "mnrev = 31.869";
  mcrev = 161.144; mcrev is "mcrev = 161.144";
  mnro = 3.76085; mnro is "mnro = 3.76085";
  mcro = 1.09547; mcro is "mcro = 1.09547";
  mnb = 35.1842; mnb is "mnb = 35.1842";
  mcb = 8.56043; mcb is "mcb = 8.56043";
  mnnp = 0.520367; mnnp is "mnnp = 0.520367";
  mcnp = 0.25596; mcnp is "mcnp = 0.25596";
  b = 23.7741; b is "b = 23.7741";
  cl = 48.0977; cl is "cl = 48.0977";
  bc = 6.5815; bc is "bc = 6.5815";
  cyrev = 123.95; cyrev is "cyrev = 123.95";
  revn = 467.844; revn is "revn = 467.844";
  cyrevg = 0.193289; cyrevg is "cyrevg = 0.193289";
  revng = 58.2391; revng is "revng = 58.2391";
  cyrevgp = 0.0397137; cyrevgp is "cyrevgp = 0.0397137";
  revngp = 19.0662; revngp is "revngp = 19.0662";
  cyrevp = 0.11012; cyrevp is "cyrevp = 0.11012";
  revnp = 67.6175; revnp is "revnp = 67.6175";
  gto = 1.13837; gto is "gto = 1.13837";
  x00001_0_342061 = 0.342061; x00001_0_342061 is "x00001 = 0.342061";
  x00011_8_17977 = 8.17977; x00011_8_17977 is "x00011 = 8.17977";
  x00100_50_5794 = 50.5794; x00100_50_5794 is "x00100 = 50.5794";
  x00110_3_08486 = 3.08486; x00110_3_08486 is "x00110 = 3.08486";
  x00200_0_0985802 = 0.0985802; x00200_0_0985802 is "x00200 = 0.0985802";
  x00210_1_30846 = 1.30846; x00210_1_30846 is "x00210 = 1.30846";
  x01000_41_1658 = 41.1658; x01000_41_1658 is "x01000 = 41.1658";
  x01010_0_0156084 = 0.0156084; x01010_0_0156084 is "x01010 = 0.0156084";
  x01011_8_72089 = 8.72089; x01011_8_72089 is "x01011 = 8.72089";
  x02000_46_5721 = 46.5721; x02000_46_5721 is "x02000 = 46.5721";
  x02010_0_0031953 = 0.0031953; x02010_0_0031953 is "x02010 = 0.0031953";
  x02011_1_36799 = 1.36799; x02011_1_36799 is "x02011 = 1.36799";
  x10000_0_422898 = 0.422898; x10000_0_422898 is "x10000 = 0.422898";
  x10100_1_09254 = 1.09254; x10100_1_09254 is "x10100 = 1.09254";
  x20000_0_00181722 = 0.00181722; x20000_0_00181722 is "x20000 = 0.00181722";
  x20010_5_19698e_05 = 5.19698e-5; x20010_5_19698e_05 is "x20010 = 5.19698e-05";
  x20011_0_00512223 = 0.00512223; x20011_0_00512223 is "x20011 = 0.00512223";
  x20100_0_106575 = 0.106575; x20100_0_106575 is "x20100 = 0.106575";
  x20110_0_000833073 = 0.000833073; x20110_0_000833073 is "x20110 = 0.000833073";
  x20111_0_0566636 = 0.0566636; x20111_0_0566636 is "x20111 = 0.0566636";
  x21000_0_00329174 = 0.00329174; x21000_0_00329174 is "x21000 = 0.00329174";
  x21010_1_4996e_05 = 1.4996e-5; x21010_1_4996e_05 is "x21010 = 1.4996e-05";
  x21011_0_00543134 = 0.00543134; x21011_0_00543134 is "x21011 = 0.00543134";
  x21100_0_0876909 = 0.0876909; x21100_0_0876909 is "x21100 = 0.0876909";
  x21110_0_000333744 = 0.000333744; x21110_0_000333744 is "x21110 = 0.000333744";
  x21111_0_0548927 = 0.0548927; x21111_0_0548927 is "x21111 = 0.0548927";
  x22000_0_00348546 = 0.00348546; x22000_0_00348546 is "x22000 = 0.00348546";
  x22010_1_54312e_05 = 1.54312e-5; x22010_1_54312e_05 is "x22010 = 1.54312e-05";
  x22011_0_00510457 = 0.00510457; x22011_0_00510457 is "x22011 = 0.00510457";
  x22100_0_0938758 = 0.0938758; x22100_0_0938758 is "x22100 = 0.0938758";
  x22110_0_000353611 = 0.000353611; x22110_0_000353611 is "x22110 = 0.000353611";
  x22111_0_0535918 = 0.0535918; x22111_0_0535918 is "x22111 = 0.0535918";
  x30000_0_914365 = 0.914365; x30000_0_914365 is "x30000 = 0.914365";
  x30100_0_664039 = 0.664039; x30100_0_664039 is "x30100 = 0.664039";
  x30200_0_0226162 = 0.0226162; x30200_0_0226162 is "x30200 = 0.0226162";
  x30300_0_0241531 = 0.0241531; x30300_0_0241531 is "x30300 = 0.0241531";
  x40000_0_00356643 = 0.00356643; x40000_0_00356643 is "x40000 = 0.00356643";
  x40010_1_94469e_05 = 1.94469e-5; x40010_1_94469e_05 is "x40010 = 1.94469e-05";
  x40011_0_000959363 = 0.000959363; x40011_0_000959363 is "x40011 = 0.000959363";
  x40100_0_258442 = 0.258442; x40100_0_258442 is "x40100 = 0.258442";
  x40110_0_000985386 = 0.000985386; x40110_0_000985386 is "x40110 = 0.000985386";
  x40111_0_0249991 = 0.0249991; x40111_0_0249991 is "x40111 = 0.0249991";
  x40200_0_000157103 = 0.000157103; x40200_0_000157103 is "x40200 = 0.000157103";
  x40210_1_1242e_05 = 1.1242e-5; x40210_1_1242e_05 is "x40210 = 1.1242e-05";
  x40211_0_00132337 = 0.00132337; x40211_0_00132337 is "x40211 = 0.00132337";
  x40300_0_0105914 = 0.0105914; x40300_0_0105914 is "x40300 = 0.0105914";
  x40310_0_00023062 = 0.00023062; x40310_0_00023062 is "x40310 = 0.00023062";
  x40311_0_025311 = 0.025311; x40311_0_025311 is "x40311 = 0.025311";
  x41000_0_00390694 = 0.00390694; x41000_0_00390694 is "x41000 = 0.00390694";
  x41010_1_34882e_05 = 1.34882e-5; x41010_1_34882e_05 is "x41010 = 1.34882e-05";
  x41011_0_000809309 = 0.000809309; x41011_0_000809309 is "x41011 = 0.000809309";
  x41100_0_124712 = 0.124712; x41100_0_124712 is "x41100 = 0.124712";
  x41110_0_000416813 = 0.000416813; x41110_0_000416813 is "x41110 = 0.000416813";
  x41111_0_0148919 = 0.0148919; x41111_0_0148919 is "x41111 = 0.0148919";
  x41200_0_000188833 = 0.000188833; x41200_0_000188833 is "x41200 = 0.000188833";
  x41210_1_79979e_06 = 1.79979e-6; x41210_1_79979e_06 is "x41210 = 1.79979e-06";
  x41211_0_00109293 = 0.00109293; x41211_0_00109293 is "x41211 = 0.00109293";
  x41300_0_00584769 = 0.00584769; x41300_0_00584769 is "x41300 = 0.00584769";
  x41310_4_35837e_05 = 4.35837e-5; x41310_4_35837e_05 is "x41310 = 4.35837e-05";
  x41311_0_0166107 = 0.0166107; x41311_0_0166107 is "x41311 = 0.0166107";
  x42000_0_00428454 = 0.00428454; x42000_0_00428454 is "x42000 = 0.00428454";
  x42010_1_47716e_05 = 1.47716e-5; x42010_1_47716e_05 is "x42010 = 1.47716e-05";
  x42011_0_00086132 = 0.00086132; x42011_0_00086132 is "x42011 = 0.00086132";
  x42100_0_137696 = 0.137696; x42100_0_137696 is "x42100 = 0.137696";
  x42110_0_000459811 = 0.000459811; x42110_0_000459811 is "x42110 = 0.000459811";
  x42111_0_0160349 = 0.0160349; x42111_0_0160349 is "x42111 = 0.0160349";
  x42200_0_0002068 = 0.0002068; x42200_0_0002068 is "x42200 = 0.0002068";
  x42210_1_94018e_06 = 1.94018e-6; x42210_1_94018e_06 is "x42210 = 1.94018e-06";
  x42211_0_0011516 = 0.0011516; x42211_0_0011516 is "x42211 = 0.0011516";
  x42300_0_00644626 = 0.00644626; x42300_0_00644626 is "x42300 = 0.00644626";
  x42310_4_76349e_05 = 4.76349e-5; x42310_4_76349e_05 is "x42310 = 4.76349e-05";
  x42311_0_0177021 = 0.0177021; x42311_0_0177021 is "x42311 = 0.0177021";
  x50000_0_00569806 = 0.00569806; x50000_0_00569806 is "x50000 = 0.00569806";
  x50010_0_000190832 = 0.000190832; x50010_0_000190832 is "x50010 = 0.000190832";
  x50011_0_0566834 = 0.0566834; x50011_0_0566834 is "x50011 = 0.0566834";
  x50100_0_0287569 = 0.0287569; x50100_0_0287569 is "x50100 = 0.0287569";
  x50110_0_000413832 = 0.000413832; x50110_0_000413832 is "x50110 = 0.000413832";
  x50111_0_0494651 = 0.0494651; x50111_0_0494651 is "x50111 = 0.0494651";
  x50200_0_00414505 = 0.00414505; x50200_0_00414505 is "x50200 = 0.00414505";
  x50210_0_000386223 = 0.000386223; x50210_0_000386223 is "x50210 = 0.000386223";
  x50211_0_124464 = 0.124464; x50211_0_124464 is "x50211 = 0.124464";
  x50300_0_00740796 = 0.00740796; x50300_0_00740796 is "x50300 = 0.00740796";
  x50310_0_000654378 = 0.000654378; x50310_0_000654378 is "x50310 = 0.000654378";
  x50311_0_104089 = 0.104089; x50311_0_104089 is "x50311 = 0.104089";
  x51000_0_00666974 = 0.00666974; x51000_0_00666974 is "x51000 = 0.00666974";
  x51010_2_54221e_05 = 2.54221e-5; x51010_2_54221e_05 is "x51010 = 2.54221e-05";
  x51011_0_00484524 = 0.00484524; x51011_0_00484524 is "x51011 = 0.00484524";
  x51100_0_0828541 = 0.0828541; x51100_0_0828541 is "x51100 = 0.0828541";
  x51110_0_000294564 = 0.000294564; x51110_0_000294564 is "x51110 = 0.000294564";
  x51111_0_0323573 = 0.0323573; x51111_0_0323573 is "x51111 = 0.0323573";
  x51200_0_0012142 = 0.0012142; x51200_0_0012142 is "x51200 = 0.0012142";
  x51210_1_1508e_05 = 1.1508e-5; x51210_1_1508e_05 is "x51210 = 1.1508e-05";
  x51211_0_00976858 = 0.00976858; x51211_0_00976858 is "x51211 = 0.00976858";
  x51300_0_0087474 = 0.0087474; x51300_0_0087474 is "x51300 = 0.0087474";
  x51310_7_98494e_05 = 7.98494e-5; x51310_7_98494e_05 is "x51310 = 7.98494e-05";
  x51311_0_0607878 = 0.0607878; x51311_0_0607878 is "x51311 = 0.0607878";
  x52000_0_00706385 = 0.00706385; x52000_0_00706385 is "x52000 = 0.00706385";
  x52010_2_64292e_05 = 2.64292e-5; x52010_2_64292e_05 is "x52010 = 2.64292e-05";
  x52011_0_00442251 = 0.00442251; x52011_0_00442251 is "x52011 = 0.00442251";
  x52100_0_0852703 = 0.0852703; x52100_0_0852703 is "x52100 = 0.0852703";
  x52110_0_000300906 = 0.000300906; x52110_0_000300906 is "x52110 = 0.000300906";
  x52111_0_0301143 = 0.0301143; x52111_0_0301143 is "x52111 = 0.0301143";
  x52200_0_00132641 = 0.00132641; x52200_0_00132641 is "x52200 = 0.00132641";
  x52210_1_12497e_05 = 1.12497e-5; x52210_1_12497e_05 is "x52210 = 1.12497e-05";
  x52211_0_00878991 = 0.00878991; x52211_0_00878991 is "x52211 = 0.00878991";
  x52300_0_0091505 = 0.0091505; x52300_0_0091505 is "x52300 = 0.0091505";
  x52310_7_78605e_05 = 7.78605e-5; x52310_7_78605e_05 is "x52310 = 7.78605e-05";
  x52311_0_055586 = 0.055586; x52311_0_055586 is "x52311 = 0.055586";
  x60000_0_000792825 = 0.000792825; x60000_0_000792825 is "x60000 = 0.000792825";
  x60010_2_57804e_05 = 2.57804e-5; x60010_2_57804e_05 is "x60010 = 2.57804e-05";
  x60011_0_00334582 = 0.00334582; x60011_0_00334582 is "x60011 = 0.00334582";
  x60100_0_0274125 = 0.0274125; x60100_0_0274125 is "x60100 = 0.0274125";
  x60110_0_000385498 = 0.000385498; x60110_0_000385498 is "x60110 = 0.000385498";
  x60111_0_0589937 = 0.0589937; x60111_0_0589937 is "x60111 = 0.0589937";
  x60200_0_000125512 = 0.000125512; x60200_0_000125512 is "x60200 = 0.000125512";
  x60210_4_99769e_05 = 4.99769e-5; x60210_4_99769e_05 is "x60210 = 4.99769e-05";
  x60211_0_00735186 = 0.00735186; x60211_0_00735186 is "x60211 = 0.00735186";
  x60300_0_00550233 = 0.00550233; x60300_0_00550233 is "x60300 = 0.00550233";
  x60310_0_000631987 = 0.000631987; x60310_0_000631987 is "x60310 = 0.000631987";
  x60311_0_12768 = 0.12768; x60311_0_12768 is "x60311 = 0.12768";
  x61000_0_00252101 = 0.00252101; x61000_0_00252101 is "x61000 = 0.00252101";
  x61010_1_00779e_05 = 1.00779e-5; x61010_1_00779e_05 is "x61010 = 1.00779e-05";
  x61011_0_00248103 = 0.00248103; x61011_0_00248103 is "x61011 = 0.00248103";
  x61100_0_0581233 = 0.0581233; x61100_0_0581233 is "x61100 = 0.0581233";
  x61110_0_000207429 = 0.000207429; x61110_0_000207429 is "x61110 = 0.000207429";
  x61111_0_0239137 = 0.0239137; x61111_0_0239137 is "x61111 = 0.0239137";
  x61200_0_000305307 = 0.000305307; x61200_0_000305307 is "x61200 = 0.000305307";
  x61210_4_90217e_06 = 4.90217e-6; x61210_4_90217e_06 is "x61210 = 4.90217e-06";
  x61211_0_00521949 = 0.00521949; x61211_0_00521949 is "x61211 = 0.00521949";
  x61300_0_00753943 = 0.00753943; x61300_0_00753943 is "x61300 = 0.00753943";
  x61310_6_39585e_05 = 6.39585e-5; x61310_6_39585e_05 is "x61310 = 6.39585e-05";
  x61311_0_0471435 = 0.0471435; x61311_0_0471435 is "x61311 = 0.0471435";
  x62000_0_00259772 = 0.00259772; x62000_0_00259772 is "x62000 = 0.00259772";
  x62010_1_01709e_05 = 1.01709e-5; x62010_1_01709e_05 is "x62010 = 1.01709e-05";
  x62011_0_00224807 = 0.00224807; x62011_0_00224807 is "x62011 = 0.00224807";
  x62100_0_0602479 = 0.0602479; x62100_0_0602479 is "x62100 = 0.0602479";
  x62110_0_000213449 = 0.000213449; x62110_0_000213449 is "x62110 = 0.000213449";
  x62111_0_0225783 = 0.0225783; x62111_0_0225783 is "x62111 = 0.0225783";
  x62200_0_000320067 = 0.000320067; x62200_0_000320067 is "x62200 = 0.000320067";
  x62210_4_60372e_06 = 4.60372e-6; x62210_4_60372e_06 is "x62210 = 4.60372e-06";
  x62211_0_004701 = 0.004701; x62211_0_004701 is "x62211 = 0.004701";
  x62300_0_00797183 = 0.00797183; x62300_0_00797183 is "x62300 = 0.00797183";
  x62310_6_35261e_05 = 6.35261e-5; x62310_6_35261e_05 is "x62310 = 6.35261e-05";
  x62311_0_0440794 = 0.0440794; x62311_0_0440794 is "x62311 = 0.0440794";
  t has dimensionless; t is "model time";

  // Assignment rules:
  t := time;

  // Rate rules:
  gr' = -(unbin*gr) + bin*(1 - g - gr)*(x01011_8_72089 + x02011_1_36799);
  g' = -(unbin*g) + bin*(1 - g - gr)*x00011_8_17977;
  grr' = -(unbinr*grr) + binr*(1 - grn - grr)*(x01011_8_72089 + x02011_1_36799);
  grn' = -(unbinr*grn) + binr*(1 - grn - grr)*x00011_8_17977;
  gcr' = -(unbinc*gcr) + binc*(1 - gc - gcr)*(x01011_8_72089 + x02011_1_36799);
  gc' = -(unbinc*gc) + binc*(1 - gc - gcr)*x00011_8_17977;
  gbr' = -(unbinrev*gbr) + binrev*gb*(revn + revng + revngp + revnp);
  gb' = unbinrev*gbr - binrev*gb*(revn + revng + revngp + revnp);
  gbrb' = -(unbinrevb*gbrb) + binrevb*gbb*(revn + revng + revngp + revnp);
  gbb' = unbinrevb*gbrb - binrevb*gbb*(revn + revng + revngp + revnp);
  mnpo' = trpo*g - tmc*mnpo - umpo*mnpo;
  mcpo' = -(umpo*mcpo) + tmc*mnpo;
  mnpt' = trpt*g - tmc*mnpt - umpt*mnpt;
  mcpt' = -(umpt*mcpt) + tmc*mnpt;
  mnrt' = trrt*gc - tmc*mnrt - umrt*mnrt;
  mcrt' = -(umrt*mcrt) + tmc*mnrt;
  mnrev' = -(tmcrev*mnrev) - umrev*mnrev + trrev*grn*x00011_8_17977;
  mcrev' = -(umrev*mcrev) + tmcrev*mnrev;
  mnro' = trro*g*gb - tmc*mnro - umro*mnro;
  mcro' = -(umro*mcro) + tmc*mnro;
  mnb' = trb*gbb - tmc*mnb - umb*mnb;
  mcb' = -(umb*mcb) + tmc*mnb;
  mnnp' = trnp*gb - tmc*mnnp - umnp*mnnp;
  mcnp' = -(umnp*mcnp) + tmc*mnnp;
  b' = -(ub*b) + uncbin*bc - cbin*b*cl + tlb*mcb;
  cl' = tlc + uncbin*bc - uc*cl - cbin*b*cl + tlnp*mcnp;
  bc' = -(phos*bc) - ubc*bc - uncbin*bc + cbin*b*cl;
  cyrev' = -((nlrev + urev)*cyrev) + dg*cyrevg + tlrev*mcrev + nerev*revn - ag*cyrev*x00200_0_0985802;
  revn' = nlrev*cyrev + (-nerev - urev)*revn + dg*revng - ag*nf*revn*x00210_1_30846;
  cyrevg' = -(cyrevg*(dg + nlrev + urev + gto)) + nerev*revng + ag*cyrev*x00200_0_0985802;
  revng' = nlrev*cyrevg - (dg + nerev + urev + gto)*revng + ag*nf*revn*x00210_1_30846;
  cyrevgp' = -((dg + nlrev + uprev)*cyrevgp) + cyrevg*gto + nerev*revngp;
  revngp' = nlrev*cyrevgp + gto*revng - (dg + nerev + uprev)*revngp;
  cyrevp' = dg*cyrevgp - (nlrev + uprev)*cyrevp + nerev*revnp;
  revnp' = nlrev*cyrevp + dg*revngp - (nerev + uprev)*revnp;
  gto' = trgto*g*gb - ugto*gto;
  x00001_0_342061' = phos*bc - nlbc*x00001_0_342061 - ubc*x00001_0_342061;
  x00011_8_17977' = nlbc*x00001_0_342061 - ubc*x00011_8_17977 + uro*x01011_8_72089 - cbbin*nf*x00011_8_17977*(x01010_0_0156084 + x02010_0_0031953) + urt*x02011_1_36799 + uncbbin*(x01011_8_72089 + x02011_1_36799) + upu*(x50011_0_0566834 + x50111_0_0494651 + x50211_0_124464 + x50311_0_104089) + up*(x20011_0_00512223 + x20111_0_0566636 + x40011_0_000959363 + x40111_0_0249991 + x40211_0_00132337 + x40311_0_025311 + x60011_0_00334582 + x60111_0_0589937 + x60211_0_00735186 + x60311_0_12768) - bbin*nf*x00011_8_17977*(x20010_5_19698e_05 + x20110_0_000833073 + x21010_1_4996e_05 + x21110_0_000333744 + x22010_1_54312e_05 + x22110_0_000353611 + x40010_1_94469e_05 + x40110_0_000985386 + x40210_1_1242e_05 + x40310_0_00023062 + x41010_1_34882e_05 + x41110_0_000416813 + x41210_1_79979e_06 + x41310_4_35837e_05 + x42010_1_47716e_05 + x42110_0_000459811 + x42210_1_94018e_06 + x42310_4_76349e_05 + x50010_0_000190832 + x50110_0_000413832 + x50210_0_000386223 + x50310_0_000654378 + x51010_2_54221e_05 + x51110_0_000294564 + x51210_1_1508e_05 + x51310_7_98494e_05 + x52010_2_64292e_05 + x52110_0_000300906 + x52210_1_12497e_05 + x52310_7_78605e_05 + x60010_2_57804e_05 + x60110_0_000385498 + x60210_4_99769e_05 + x60310_0_000631987 + x61010_1_00779e_05 + x61110_0_000207429 + x61210_4_90217e_06 + x61310_6_39585e_05 + x62010_1_01709e_05 + x62110_0_000213449 + x62210_4_60372e_06 + x62310_6_35261e_05) + unbbin*(x20011_0_00512223 + x20111_0_0566636 + x21011_0_00543134 + x21111_0_0548927 + x22011_0_00510457 + x22111_0_0535918 + x40011_0_000959363 + x40111_0_0249991 + x40211_0_00132337 + x40311_0_025311 + x41011_0_000809309 + x41111_0_0148919 + x41211_0_00109293 + x41311_0_0166107 + x42011_0_00086132 + x42111_0_0160349 + x42211_0_0011516 + x42311_0_0177021 + x50011_0_0566834 + x50111_0_0494651 + x50211_0_124464 + x50311_0_104089 + x51011_0_00484524 + x51111_0_0323573 + x51211_0_00976858 + x51311_0_0607878 + x52011_0_00442251 + x52111_0_0301143 + x52211_0_00878991 + x52311_0_055586 + x60011_0_00334582 + x60111_0_0589937 + x60211_0_00735186 + x60311_0_12768 + x61011_0_00248103 + x61111_0_0239137 + x61211_0_00521949 + x61311_0_0471435 + x62011_0_00224807 + x62111_0_0225783 + x62211_0_004701 + x62311_0_0440794);
  x00100_50_5794' = lne*x00110_3_08486 + upu*(x10100_1_09254 + x30100_0_664039 + x30300_0_0241531 + x50100_0_0287569 + x50300_0_00740796) + up*(x20100_0_106575 + x40100_0_258442 + x40300_0_0105914 + x60100_0_0274125 + x60300_0_00550233) - ac*x00100_50_5794*(x10000_0_422898 + x20000_0_00181722 + x21000_0_00329174 + x22000_0_00348546 + x30000_0_914365 + x40000_0_00356643 + x41000_0_00390694 + x42000_0_00428454 + x50000_0_00569806 + x51000_0_00666974 + x52000_0_00706385 + x60000_0_000792825 + x61000_0_00252101 + x62000_0_00259772) + dc*(x10100_1_09254 + x20100_0_106575 + x21100_0_0876909 + x22100_0_0938758 + x30100_0_664039 + x40100_0_258442 + x41100_0_124712 + x42100_0_137696 + x50100_0_0287569 + x51100_0_0828541 + x52100_0_0852703 + x60100_0_0274125 + x61100_0_0581233 + x62100_0_0602479) - ac*x00100_50_5794*(x30200_0_0226162 + x40200_0_000157103 + x41200_0_000188833 + x42200_0_0002068 + x50200_0_00414505 + x51200_0_0012142 + x52200_0_00132641 + x60200_0_000125512 + x61200_0_000305307 + x62200_0_000320067) + dc*(x30300_0_0241531 + x40300_0_0105914 + x41300_0_00584769 + x42300_0_00644626 + x50300_0_00740796 + x51300_0_0087474 + x52300_0_0091505 + x60300_0_00550233 + x61300_0_00753943 + x62300_0_00797183);
  x00110_3_08486' = -(lne*x00110_3_08486) + upu*(x50110_0_000413832 + x50111_0_0494651 + x50310_0_000654378 + x50311_0_104089) + up*(x20110_0_000833073 + x20111_0_0566636 + x40110_0_000985386 + x40111_0_0249991 + x40310_0_00023062 + x40311_0_025311 + x60110_0_000385498 + x60111_0_0589937 + x60310_0_000631987 + x60311_0_12768) - ac*nf*x00110_3_08486*(x20010_5_19698e_05 + x21010_1_4996e_05 + x22010_1_54312e_05 + x40010_1_94469e_05 + x41010_1_34882e_05 + x42010_1_47716e_05 + x50010_0_000190832 + x51010_2_54221e_05 + x52010_2_64292e_05 + x60010_2_57804e_05 + x61010_1_00779e_05 + x62010_1_01709e_05) - ac*nf*x00110_3_08486*(x20011_0_00512223 + x21011_0_00543134 + x22011_0_00510457 + x40011_0_000959363 + x41011_0_000809309 + x42011_0_00086132 + x50011_0_0566834 + x51011_0_00484524 + x52011_0_00442251 + x60011_0_00334582 + x61011_0_00248103 + x62011_0_00224807) + dc*(x20110_0_000833073 + x21110_0_000333744 + x22110_0_000353611 + x40110_0_000985386 + x41110_0_000416813 + x42110_0_000459811 + x50110_0_000413832 + x51110_0_000294564 + x52110_0_000300906 + x60110_0_000385498 + x61110_0_000207429 + x62110_0_000213449) + dc*(x20111_0_0566636 + x21111_0_0548927 + x22111_0_0535918 + x40111_0_0249991 + x41111_0_0148919 + x42111_0_0160349 + x50111_0_0494651 + x51111_0_0323573 + x52111_0_0301143 + x60111_0_0589937 + x61111_0_0239137 + x62111_0_0225783) - ac*nf*x00110_3_08486*(x40210_1_1242e_05 + x41210_1_79979e_06 + x42210_1_94018e_06 + x50210_0_000386223 + x51210_1_1508e_05 + x52210_1_12497e_05 + x60210_4_99769e_05 + x61210_4_90217e_06 + x62210_4_60372e_06) - ac*nf*x00110_3_08486*(x40211_0_00132337 + x41211_0_00109293 + x42211_0_0011516 + x50211_0_124464 + x51211_0_00976858 + x52211_0_00878991 + x60211_0_00735186 + x61211_0_00521949 + x62211_0_004701) + dc*(x40310_0_00023062 + x41310_4_35837e_05 + x42310_4_76349e_05 + x50310_0_000654378 + x51310_7_98494e_05 + x52310_7_78605e_05 + x60310_0_000631987 + x61310_6_39585e_05 + x62310_6_35261e_05) + dc*(x40311_0_025311 + x41311_0_0166107 + x42311_0_0177021 + x50311_0_104089 + x51311_0_0607878 + x52311_0_055586 + x60311_0_12768 + x61311_0_0471435 + x62311_0_0440794);
  x00200_0_0985802' = dg*cyrevg + urev*cyrevg + dg*cyrevgp + uprev*cyrevgp - ag*cyrev*x00200_0_0985802 + lne*x00210_1_30846 + upu*(x30200_0_0226162 + x30300_0_0241531 + x50200_0_00414505 + x50300_0_00740796) + up*(x40200_0_000157103 + x40300_0_0105914 + x60200_0_000125512 + x60300_0_00550233) - agp*x00200_0_0985802*(x30000_0_914365 + x30100_0_664039 + x40000_0_00356643 + x40100_0_258442 + x41000_0_00390694 + x41100_0_124712 + x42000_0_00428454 + x42100_0_137696 + x50000_0_00569806 + x50100_0_0287569 + x51000_0_00666974 + x51100_0_0828541 + x52000_0_00706385 + x52100_0_0852703 + x60000_0_000792825 + x60100_0_0274125 + x61000_0_00252101 + x61100_0_0581233 + x62000_0_00259772 + x62100_0_0602479) + dg*(x30200_0_0226162 + x30300_0_0241531 + x40200_0_000157103 + x40300_0_0105914 + x41200_0_000188833 + x41300_0_00584769 + x42200_0_0002068 + x42300_0_00644626 + x50200_0_00414505 + x50300_0_00740796 + x51200_0_0012142 + x51300_0_0087474 + x52200_0_00132641 + x52300_0_0091505 + x60200_0_000125512 + x60300_0_00550233 + x61200_0_000305307 + x61300_0_00753943 + x62200_0_000320067 + x62300_0_00797183);
  x00210_1_30846' = dg*revng + urev*revng + dg*revngp + uprev*revngp - lne*x00210_1_30846 - ag*nf*revn*x00210_1_30846 + upu*(x50210_0_000386223 + x50211_0_124464 + x50310_0_000654378 + x50311_0_104089) + up*(x40210_1_1242e_05 + x40211_0_00132337 + x40310_0_00023062 + x40311_0_025311 + x60210_4_99769e_05 + x60211_0_00735186 + x60310_0_000631987 + x60311_0_12768) - agp*nf*x00210_1_30846*(x40010_1_94469e_05 + x40011_0_000959363 + x40110_0_000985386 + x40111_0_0249991 + x41010_1_34882e_05 + x41011_0_000809309 + x41110_0_000416813 + x41111_0_0148919 + x42010_1_47716e_05 + x42011_0_00086132 + x42110_0_000459811 + x42111_0_0160349 + x50010_0_000190832 + x50011_0_0566834 + x50110_0_000413832 + x50111_0_0494651 + x51010_2_54221e_05 + x51011_0_00484524 + x51110_0_000294564 + x51111_0_0323573 + x52010_2_64292e_05 + x52011_0_00442251 + x52110_0_000300906 + x52111_0_0301143 + x60010_2_57804e_05 + x60011_0_00334582 + x60110_0_000385498 + x60111_0_0589937 + x61010_1_00779e_05 + x61011_0_00248103 + x61110_0_000207429 + x61111_0_0239137 + x62010_1_01709e_05 + x62011_0_00224807 + x62110_0_000213449 + x62111_0_0225783) + dg*(x40210_1_1242e_05 + x40211_0_00132337 + x40310_0_00023062 + x40311_0_025311 + x41210_1_79979e_06 + x41211_0_00109293 + x41310_4_35837e_05 + x41311_0_0166107 + x42210_1_94018e_06 + x42211_0_0011516 + x42310_4_76349e_05 + x42311_0_0177021 + x50210_0_000386223 + x50211_0_124464 + x50310_0_000654378 + x50311_0_104089 + x51210_1_1508e_05 + x51211_0_00976858 + x51310_7_98494e_05 + x51311_0_0607878 + x52210_1_12497e_05 + x52211_0_00878991 + x52310_7_78605e_05 + x52311_0_055586 + x60210_4_99769e_05 + x60211_0_00735186 + x60310_0_000631987 + x60311_0_12768 + x61210_4_90217e_06 + x61211_0_00521949 + x61310_6_39585e_05 + x61311_0_0471435 + x62210_4_60372e_06 + x62211_0_004701 + x62310_6_35261e_05 + x62311_0_0440794);
  x01000_41_1658' = tlr*mcro - uro*x01000_41_1658 - ar*x01000_41_1658*(x20000_0_00181722 + x20100_0_106575 + x40000_0_00356643 + x40100_0_258442 + x40200_0_000157103 + x40300_0_0105914 + x50000_0_00569806 + x50100_0_0287569 + x50200_0_00414505 + x50300_0_00740796 + x60000_0_000792825 + x60100_0_0274125 + x60200_0_000125512 + x60300_0_00550233) + dr*(x21000_0_00329174 + x21100_0_0876909 + x41000_0_00390694 + x41100_0_124712 + x41200_0_000188833 + x41300_0_00584769 + x51000_0_00666974 + x51100_0_0828541 + x51200_0_0012142 + x51300_0_0087474 + x61000_0_00252101 + x61100_0_0581233 + x61200_0_000305307 + x61300_0_00753943);
  x01010_0_0156084' = -(uro*x01010_0_0156084) - cbbin*nf*x00011_8_17977*x01010_0_0156084 + uncbbin*x01011_8_72089 - ar*nf*x01010_0_0156084*(x20010_5_19698e_05 + x20110_0_000833073 + x40010_1_94469e_05 + x40110_0_000985386 + x40210_1_1242e_05 + x40310_0_00023062 + x50010_0_000190832 + x50110_0_000413832 + x50210_0_000386223 + x50310_0_000654378 + x60010_2_57804e_05 + x60110_0_000385498 + x60210_4_99769e_05 + x60310_0_000631987) - ar*nf*x01010_0_0156084*(x20011_0_00512223 + x20111_0_0566636 + x40011_0_000959363 + x40111_0_0249991 + x40211_0_00132337 + x40311_0_025311 + x50011_0_0566834 + x50111_0_0494651 + x50211_0_124464 + x50311_0_104089 + x60011_0_00334582 + x60111_0_0589937 + x60211_0_00735186 + x60311_0_12768) + dr*(x21010_1_4996e_05 + x21110_0_000333744 + x41010_1_34882e_05 + x41110_0_000416813 + x41210_1_79979e_06 + x41310_4_35837e_05 + x51010_2_54221e_05 + x51110_0_000294564 + x51210_1_1508e_05 + x51310_7_98494e_05 + x61010_1_00779e_05 + x61110_0_000207429 + x61210_4_90217e_06 + x61310_6_39585e_05) + dr*(x21011_0_00543134 + x21111_0_0548927 + x41011_0_000809309 + x41111_0_0148919 + x41211_0_00109293 + x41311_0_0166107 + x51011_0_00484524 + x51111_0_0323573 + x51211_0_00976858 + x51311_0_0607878 + x61011_0_00248103 + x61111_0_0239137 + x61211_0_00521949 + x61311_0_0471435);
  x01011_8_72089' = cbbin*nf*x00011_8_17977*x01010_0_0156084 - uncbbin*x01011_8_72089 - uro*x01011_8_72089 - ar*nf*x01011_8_72089*(x20010_5_19698e_05 + x20110_0_000833073 + x40010_1_94469e_05 + x40110_0_000985386 + x40210_1_1242e_05 + x40310_0_00023062 + x50010_0_000190832 + x50110_0_000413832 + x50210_0_000386223 + x50310_0_000654378 + x60010_2_57804e_05 + x60110_0_000385498 + x60210_4_99769e_05 + x60310_0_000631987) + dr*(x21011_0_00543134 + x21111_0_0548927 + x41011_0_000809309 + x41111_0_0148919 + x41211_0_00109293 + x41311_0_0166107 + x51011_0_00484524 + x51111_0_0323573 + x51211_0_00976858 + x51311_0_0607878 + x61011_0_00248103 + x61111_0_0239137 + x61211_0_00521949 + x61311_0_0471435);
  x02000_46_5721' = tlr*mcrt - urt*x02000_46_5721 - ar*x02000_46_5721*(x20000_0_00181722 + x20100_0_106575 + x40000_0_00356643 + x40100_0_258442 + x40200_0_000157103 + x40300_0_0105914 + x50000_0_00569806 + x50100_0_0287569 + x50200_0_00414505 + x50300_0_00740796 + x60000_0_000792825 + x60100_0_0274125 + x60200_0_000125512 + x60300_0_00550233) + dr*(x22000_0_00348546 + x22100_0_0938758 + x42000_0_00428454 + x42100_0_137696 + x42200_0_0002068 + x42300_0_00644626 + x52000_0_00706385 + x52100_0_0852703 + x52200_0_00132641 + x52300_0_0091505 + x62000_0_00259772 + x62100_0_0602479 + x62200_0_000320067 + x62300_0_00797183);
  x02010_0_0031953' = -(urt*x02010_0_0031953) - cbbin*nf*x00011_8_17977*x02010_0_0031953 + uncbbin*x02011_1_36799 - ar*nf*x02010_0_0031953*(x20010_5_19698e_05 + x20110_0_000833073 + x40010_1_94469e_05 + x40110_0_000985386 + x40210_1_1242e_05 + x40310_0_00023062 + x50010_0_000190832 + x50110_0_000413832 + x50210_0_000386223 + x50310_0_000654378 + x60010_2_57804e_05 + x60110_0_000385498 + x60210_4_99769e_05 + x60310_0_000631987) - ar*nf*x02010_0_0031953*(x20011_0_00512223 + x20111_0_0566636 + x40011_0_000959363 + x40111_0_0249991 + x40211_0_00132337 + x40311_0_025311 + x50011_0_0566834 + x50111_0_0494651 + x50211_0_124464 + x50311_0_104089 + x60011_0_00334582 + x60111_0_0589937 + x60211_0_00735186 + x60311_0_12768) + dr*(x22010_1_54312e_05 + x22110_0_000353611 + x42010_1_47716e_05 + x42110_0_000459811 + x42210_1_94018e_06 + x42310_4_76349e_05 + x52010_2_64292e_05 + x52110_0_000300906 + x52210_1_12497e_05 + x52310_7_78605e_05 + x62010_1_01709e_05 + x62110_0_000213449 + x62210_4_60372e_06 + x62310_6_35261e_05) + dr*(x22011_0_00510457 + x22111_0_0535918 + x42011_0_00086132 + x42111_0_0160349 + x42211_0_0011516 + x42311_0_0177021 + x52011_0_00442251 + x52111_0_0301143 + x52211_0_00878991 + x52311_0_055586 + x62011_0_00224807 + x62111_0_0225783 + x62211_0_004701 + x62311_0_0440794);
  x02011_1_36799' = cbbin*nf*x00011_8_17977*x02010_0_0031953 - uncbbin*x02011_1_36799 - urt*x02011_1_36799 - ar*nf*x02011_1_36799*(x20010_5_19698e_05 + x20110_0_000833073 + x40010_1_94469e_05 + x40110_0_000985386 + x40210_1_1242e_05 + x40310_0_00023062 + x50010_0_000190832 + x50110_0_000413832 + x50210_0_000386223 + x50310_0_000654378 + x60010_2_57804e_05 + x60110_0_000385498 + x60210_4_99769e_05 + x60310_0_000631987) + dr*(x22011_0_00510457 + x22111_0_0535918 + x42011_0_00086132 + x42111_0_0160349 + x42211_0_0011516 + x42311_0_0177021 + x52011_0_00442251 + x52111_0_0301143 + x52211_0_00878991 + x52311_0_055586 + x62011_0_00224807 + x62111_0_0225783 + x62211_0_004701 + x62311_0_0440794);
  x10000_0_422898' = tlp*mcpo - upu*x10000_0_422898 - ac*x00100_50_5794*x10000_0_422898 + dc*x10100_1_09254;
  x10100_1_09254' = ac*x00100_50_5794*x10000_0_422898 - dc*x10100_1_09254 - hoo*x10100_1_09254 - upu*x10100_1_09254;
  x20000_0_00181722' = -(nl*x20000_0_00181722) - up*x20000_0_00181722 - ac*x00100_50_5794*x20000_0_00181722 - ar*(x01000_41_1658 + x02000_46_5721)*x20000_0_00181722 + ne*x20010_5_19698e_05 + dc*x20100_0_106575 + dr*(x21000_0_00329174 + x22000_0_00348546);
  x20010_5_19698e_05' = nl*x20000_0_00181722 - ne*x20010_5_19698e_05 - up*x20010_5_19698e_05 - bbin*nf*x00011_8_17977*x20010_5_19698e_05 - ac*nf*x00110_3_08486*x20010_5_19698e_05 - ar*nf*(x01010_0_0156084 + x02010_0_0031953)*x20010_5_19698e_05 - ar*nf*(x01011_8_72089 + x02011_1_36799)*x20010_5_19698e_05 + ubc*x20011_0_00512223 + unbbin*x20011_0_00512223 + dc*x20110_0_000833073 + dr*(x21010_1_4996e_05 + x22010_1_54312e_05) + dr*(x21011_0_00543134 + x22011_0_00510457);
  x20011_0_00512223' = bbin*nf*x00011_8_17977*x20010_5_19698e_05 - ubc*x20011_0_00512223 - unbbin*x20011_0_00512223 - up*x20011_0_00512223 - ac*nf*x00110_3_08486*x20011_0_00512223 - ar*nf*(x01010_0_0156084 + x02010_0_0031953)*x20011_0_00512223 + dc*x20111_0_0566636 + dr*(x21011_0_00543134 + x22011_0_00510457);
  x20100_0_106575' = hoo*x10100_1_09254 + ac*x00100_50_5794*x20000_0_00181722 - dc*x20100_0_106575 - nl*x20100_0_106575 - up*x20100_0_106575 - ar*(x01000_41_1658 + x02000_46_5721)*x20100_0_106575 + ne*x20110_0_000833073 + dr*(x21100_0_0876909 + x22100_0_0938758);
  x20110_0_000833073' = ac*nf*x00110_3_08486*x20010_5_19698e_05 + nl*x20100_0_106575 - dc*x20110_0_000833073 - ne*x20110_0_000833073 - up*x20110_0_000833073 - bbin*nf*x00011_8_17977*x20110_0_000833073 - ar*nf*(x01010_0_0156084 + x02010_0_0031953)*x20110_0_000833073 - ar*nf*(x01011_8_72089 + x02011_1_36799)*x20110_0_000833073 + ubc*x20111_0_0566636 + unbbin*x20111_0_0566636 + dr*(x21110_0_000333744 + x22110_0_000353611) + dr*(x21111_0_0548927 + x22111_0_0535918);
  x20111_0_0566636' = ac*nf*x00110_3_08486*x20011_0_00512223 + bbin*nf*x00011_8_17977*x20110_0_000833073 - dc*x20111_0_0566636 - ubc*x20111_0_0566636 - unbbin*x20111_0_0566636 - up*x20111_0_0566636 - ar*nf*(x01010_0_0156084 + x02010_0_0031953)*x20111_0_0566636 + dr*(x21111_0_0548927 + x22111_0_0535918);
  x21000_0_00329174' = ar*x01000_41_1658*x20000_0_00181722 - dr*x21000_0_00329174 - nl*x21000_0_00329174 - ac*x00100_50_5794*x21000_0_00329174 + ne*x21010_1_4996e_05 + dc*x21100_0_0876909;
  x21010_1_4996e_05' = ar*nf*x01010_0_0156084*x20010_5_19698e_05 + nl*x21000_0_00329174 - dr*x21010_1_4996e_05 - ne*x21010_1_4996e_05 - bbin*nf*x00011_8_17977*x21010_1_4996e_05 - ac*nf*x00110_3_08486*x21010_1_4996e_05 + unbbin*x21011_0_00543134 + dc*x21110_0_000333744;
  x21011_0_00543134' = ar*nf*x01011_8_72089*x20010_5_19698e_05 + ar*nf*x01010_0_0156084*x20011_0_00512223 + bbin*nf*x00011_8_17977*x21010_1_4996e_05 - 2*dr*x21011_0_00543134 - unbbin*x21011_0_00543134 - ac*nf*x00110_3_08486*x21011_0_00543134 + dc*x21111_0_0548927;
  x21100_0_0876909' = ar*x01000_41_1658*x20100_0_106575 + ac*x00100_50_5794*x21000_0_00329174 - dc*x21100_0_0876909 - dr*x21100_0_0876909 - nl*x21100_0_0876909 + ne*x21110_0_000333744;
  x21110_0_000333744' = ar*nf*x01010_0_0156084*x20110_0_000833073 + ac*nf*x00110_3_08486*x21010_1_4996e_05 + nl*x21100_0_0876909 - dc*x21110_0_000333744 - dr*x21110_0_000333744 - ne*x21110_0_000333744 - bbin*nf*x00011_8_17977*x21110_0_000333744 + unbbin*x21111_0_0548927;
  x21111_0_0548927' = ar*nf*x01011_8_72089*x20110_0_000833073 + ar*nf*x01010_0_0156084*x20111_0_0566636 + ac*nf*x00110_3_08486*x21011_0_00543134 + bbin*nf*x00011_8_17977*x21110_0_000333744 - dc*x21111_0_0548927 - 2*dr*x21111_0_0548927 - unbbin*x21111_0_0548927;
  x22000_0_00348546' = ar*x02000_46_5721*x20000_0_00181722 - dr*x22000_0_00348546 - nl*x22000_0_00348546 - ac*x00100_50_5794*x22000_0_00348546 + ne*x22010_1_54312e_05 + dc*x22100_0_0938758;
  x22010_1_54312e_05' = ar*nf*x02010_0_0031953*x20010_5_19698e_05 + nl*x22000_0_00348546 - dr*x22010_1_54312e_05 - ne*x22010_1_54312e_05 - bbin*nf*x00011_8_17977*x22010_1_54312e_05 - ac*nf*x00110_3_08486*x22010_1_54312e_05 + unbbin*x22011_0_00510457 + dc*x22110_0_000353611;
  x22011_0_00510457' = ar*nf*x02011_1_36799*x20010_5_19698e_05 + ar*nf*x02010_0_0031953*x20011_0_00512223 + bbin*nf*x00011_8_17977*x22010_1_54312e_05 - 2*dr*x22011_0_00510457 - unbbin*x22011_0_00510457 - ac*nf*x00110_3_08486*x22011_0_00510457 + dc*x22111_0_0535918;
  x22100_0_0938758' = ar*x02000_46_5721*x20100_0_106575 + ac*x00100_50_5794*x22000_0_00348546 - dc*x22100_0_0938758 - dr*x22100_0_0938758 - nl*x22100_0_0938758 + ne*x22110_0_000353611;
  x22110_0_000353611' = ar*nf*x02010_0_0031953*x20110_0_000833073 + ac*nf*x00110_3_08486*x22010_1_54312e_05 + nl*x22100_0_0938758 - dc*x22110_0_000353611 - dr*x22110_0_000353611 - ne*x22110_0_000353611 - bbin*nf*x00011_8_17977*x22110_0_000353611 + unbbin*x22111_0_0535918;
  x22111_0_0535918' = ar*nf*x02011_1_36799*x20110_0_000833073 + ar*nf*x02010_0_0031953*x20111_0_0566636 + ac*nf*x00110_3_08486*x22011_0_00510457 + bbin*nf*x00011_8_17977*x22110_0_000353611 - dc*x22111_0_0535918 - 2*dr*x22111_0_0535918 - unbbin*x22111_0_0535918;
  x30000_0_914365' = tlp*mcpt - upu*x30000_0_914365 - ac*x00100_50_5794*x30000_0_914365 - agp*x00200_0_0985802*x30000_0_914365 + dc*x30100_0_664039 + dg*x30200_0_0226162;
  x30100_0_664039' = ac*x00100_50_5794*x30000_0_914365 - dc*x30100_0_664039 - hto*x30100_0_664039 - upu*x30100_0_664039 - agp*x00200_0_0985802*x30100_0_664039 + dg*x30300_0_0241531;
  x30200_0_0226162' = agp*x00200_0_0985802*x30000_0_914365 - dg*x30200_0_0226162 - upu*x30200_0_0226162 - gto*x30200_0_0226162 - ac*x00100_50_5794*x30200_0_0226162 + dc*x30300_0_0241531;
  x30300_0_0241531' = agp*x00200_0_0985802*x30100_0_664039 + ac*x00100_50_5794*x30200_0_0226162 - dc*x30300_0_0241531 - dg*x30300_0_0241531 - hto*x30300_0_0241531 - upu*x30300_0_0241531 - gto*x30300_0_0241531;
  x40000_0_00356643' = -(nl*x40000_0_00356643) - up*x40000_0_00356643 - ac*x00100_50_5794*x40000_0_00356643 - agp*x00200_0_0985802*x40000_0_00356643 - ar*(x01000_41_1658 + x02000_46_5721)*x40000_0_00356643 + ne*x40010_1_94469e_05 + dc*x40100_0_258442 + dg*x40200_0_000157103 + dr*(x41000_0_00390694 + x42000_0_00428454);
  x40010_1_94469e_05' = nl*x40000_0_00356643 - ne*x40010_1_94469e_05 - up*x40010_1_94469e_05 - bbin*nf*x00011_8_17977*x40010_1_94469e_05 - ac*nf*x00110_3_08486*x40010_1_94469e_05 - agp*nf*x00210_1_30846*x40010_1_94469e_05 - ar*nf*(x01010_0_0156084 + x02010_0_0031953)*x40010_1_94469e_05 - ar*nf*(x01011_8_72089 + x02011_1_36799)*x40010_1_94469e_05 + ubc*x40011_0_000959363 + unbbin*x40011_0_000959363 + dc*x40110_0_000985386 + dg*x40210_1_1242e_05 + dr*(x41010_1_34882e_05 + x42010_1_47716e_05) + dr*(x41011_0_000809309 + x42011_0_00086132);
  x40011_0_000959363' = bbin*nf*x00011_8_17977*x40010_1_94469e_05 - ubc*x40011_0_000959363 - unbbin*x40011_0_000959363 - up*x40011_0_000959363 - ac*nf*x00110_3_08486*x40011_0_000959363 - agp*nf*x00210_1_30846*x40011_0_000959363 - ar*nf*(x01010_0_0156084 + x02010_0_0031953)*x40011_0_000959363 + dc*x40111_0_0249991 + dg*x40211_0_00132337 + dr*(x41011_0_000809309 + x42011_0_00086132);
  x40100_0_258442' = hto*x30100_0_664039 + ac*x00100_50_5794*x40000_0_00356643 - dc*x40100_0_258442 - nl*x40100_0_258442 - up*x40100_0_258442 - agp*x00200_0_0985802*x40100_0_258442 - ar*(x01000_41_1658 + x02000_46_5721)*x40100_0_258442 + ne*x40110_0_000985386 + dg*x40300_0_0105914 + dr*(x41100_0_124712 + x42100_0_137696);
  x40110_0_000985386' = ac*nf*x00110_3_08486*x40010_1_94469e_05 + nl*x40100_0_258442 - dc*x40110_0_000985386 - ne*x40110_0_000985386 - up*x40110_0_000985386 - bbin*nf*x00011_8_17977*x40110_0_000985386 - agp*nf*x00210_1_30846*x40110_0_000985386 - ar*nf*(x01010_0_0156084 + x02010_0_0031953)*x40110_0_000985386 - ar*nf*(x01011_8_72089 + x02011_1_36799)*x40110_0_000985386 + ubc*x40111_0_0249991 + unbbin*x40111_0_0249991 + dg*x40310_0_00023062 + dr*(x41110_0_000416813 + x42110_0_000459811) + dr*(x41111_0_0148919 + x42111_0_0160349);
  x40111_0_0249991' = ac*nf*x00110_3_08486*x40011_0_000959363 + bbin*nf*x00011_8_17977*x40110_0_000985386 - dc*x40111_0_0249991 - ubc*x40111_0_0249991 - unbbin*x40111_0_0249991 - up*x40111_0_0249991 - agp*nf*x00210_1_30846*x40111_0_0249991 - ar*nf*(x01010_0_0156084 + x02010_0_0031953)*x40111_0_0249991 + dg*x40311_0_025311 + dr*(x41111_0_0148919 + x42111_0_0160349);
  x40200_0_000157103' = agp*x00200_0_0985802*x40000_0_00356643 - dg*x40200_0_000157103 - nl*x40200_0_000157103 - up*x40200_0_000157103 - gto*x40200_0_000157103 - ac*x00100_50_5794*x40200_0_000157103 - ar*(x01000_41_1658 + x02000_46_5721)*x40200_0_000157103 + ne*x40210_1_1242e_05 + dc*x40300_0_0105914 + dr*(x41200_0_000188833 + x42200_0_0002068);
  x40210_1_1242e_05' = agp*nf*x00210_1_30846*x40010_1_94469e_05 + nl*x40200_0_000157103 - dg*x40210_1_1242e_05 - ne*x40210_1_1242e_05 - up*x40210_1_1242e_05 - gto*x40210_1_1242e_05 - bbin*nf*x00011_8_17977*x40210_1_1242e_05 - ac*nf*x00110_3_08486*x40210_1_1242e_05 - ar*nf*(x01010_0_0156084 + x02010_0_0031953)*x40210_1_1242e_05 - ar*nf*(x01011_8_72089 + x02011_1_36799)*x40210_1_1242e_05 + ubc*x40211_0_00132337 + unbbin*x40211_0_00132337 + dc*x40310_0_00023062 + dr*(x41210_1_79979e_06 + x42210_1_94018e_06) + dr*(x41211_0_00109293 + x42211_0_0011516);
  x40211_0_00132337' = agp*nf*x00210_1_30846*x40011_0_000959363 + bbin*nf*x00011_8_17977*x40210_1_1242e_05 - dg*x40211_0_00132337 - ubc*x40211_0_00132337 - unbbin*x40211_0_00132337 - up*x40211_0_00132337 - gto*x40211_0_00132337 - ac*nf*x00110_3_08486*x40211_0_00132337 - ar*nf*(x01010_0_0156084 + x02010_0_0031953)*x40211_0_00132337 + dc*x40311_0_025311 + dr*(x41211_0_00109293 + x42211_0_0011516);
  x40300_0_0105914' = hto*x30300_0_0241531 + agp*x00200_0_0985802*x40100_0_258442 + ac*x00100_50_5794*x40200_0_000157103 - dc*x40300_0_0105914 - dg*x40300_0_0105914 - nl*x40300_0_0105914 - up*x40300_0_0105914 - gto*x40300_0_0105914 - ar*(x01000_41_1658 + x02000_46_5721)*x40300_0_0105914 + ne*x40310_0_00023062 + dr*(x41300_0_00584769 + x42300_0_00644626);
  x40310_0_00023062' = agp*nf*x00210_1_30846*x40110_0_000985386 + ac*nf*x00110_3_08486*x40210_1_1242e_05 + nl*x40300_0_0105914 - dc*x40310_0_00023062 - dg*x40310_0_00023062 - ne*x40310_0_00023062 - up*x40310_0_00023062 - gto*x40310_0_00023062 - bbin*nf*x00011_8_17977*x40310_0_00023062 - ar*nf*(x01010_0_0156084 + x02010_0_0031953)*x40310_0_00023062 - ar*nf*(x01011_8_72089 + x02011_1_36799)*x40310_0_00023062 + ubc*x40311_0_025311 + unbbin*x40311_0_025311 + dr*(x41310_4_35837e_05 + x42310_4_76349e_05) + dr*(x41311_0_0166107 + x42311_0_0177021);
  x40311_0_025311' = agp*nf*x00210_1_30846*x40111_0_0249991 + ac*nf*x00110_3_08486*x40211_0_00132337 + bbin*nf*x00011_8_17977*x40310_0_00023062 - dc*x40311_0_025311 - dg*x40311_0_025311 - ubc*x40311_0_025311 - unbbin*x40311_0_025311 - up*x40311_0_025311 - gto*x40311_0_025311 - ar*nf*(x01010_0_0156084 + x02010_0_0031953)*x40311_0_025311 + dr*(x41311_0_0166107 + x42311_0_0177021);
  x41000_0_00390694' = ar*x01000_41_1658*x40000_0_00356643 - dr*x41000_0_00390694 - nl*x41000_0_00390694 - ac*x00100_50_5794*x41000_0_00390694 - agp*x00200_0_0985802*x41000_0_00390694 + ne*x41010_1_34882e_05 + dc*x41100_0_124712 + dg*x41200_0_000188833;
  x41010_1_34882e_05' = ar*nf*x01010_0_0156084*x40010_1_94469e_05 + nl*x41000_0_00390694 - dr*x41010_1_34882e_05 - ne*x41010_1_34882e_05 - bbin*nf*x00011_8_17977*x41010_1_34882e_05 - ac*nf*x00110_3_08486*x41010_1_34882e_05 - agp*nf*x00210_1_30846*x41010_1_34882e_05 + unbbin*x41011_0_000809309 + dc*x41110_0_000416813 + dg*x41210_1_79979e_06;
  x41011_0_000809309' = ar*nf*x01011_8_72089*x40010_1_94469e_05 + ar*nf*x01010_0_0156084*x40011_0_000959363 + bbin*nf*x00011_8_17977*x41010_1_34882e_05 - 2*dr*x41011_0_000809309 - unbbin*x41011_0_000809309 - ac*nf*x00110_3_08486*x41011_0_000809309 - agp*nf*x00210_1_30846*x41011_0_000809309 + dc*x41111_0_0148919 + dg*x41211_0_00109293;
  x41100_0_124712' = ar*x01000_41_1658*x40100_0_258442 + ac*x00100_50_5794*x41000_0_00390694 - dc*x41100_0_124712 - dr*x41100_0_124712 - nl*x41100_0_124712 - agp*x00200_0_0985802*x41100_0_124712 + ne*x41110_0_000416813 + dg*x41300_0_00584769;
  x41110_0_000416813' = ar*nf*x01010_0_0156084*x40110_0_000985386 + ac*nf*x00110_3_08486*x41010_1_34882e_05 + nl*x41100_0_124712 - dc*x41110_0_000416813 - dr*x41110_0_000416813 - ne*x41110_0_000416813 - bbin*nf*x00011_8_17977*x41110_0_000416813 - agp*nf*x00210_1_30846*x41110_0_000416813 + unbbin*x41111_0_0148919 + dg*x41310_4_35837e_05;
  x41111_0_0148919' = ar*nf*x01011_8_72089*x40110_0_000985386 + ar*nf*x01010_0_0156084*x40111_0_0249991 + ac*nf*x00110_3_08486*x41011_0_000809309 + bbin*nf*x00011_8_17977*x41110_0_000416813 - dc*x41111_0_0148919 - 2*dr*x41111_0_0148919 - unbbin*x41111_0_0148919 - agp*nf*x00210_1_30846*x41111_0_0148919 + dg*x41311_0_0166107;
  x41200_0_000188833' = ar*x01000_41_1658*x40200_0_000157103 + agp*x00200_0_0985802*x41000_0_00390694 - dg*x41200_0_000188833 - dr*x41200_0_000188833 - nl*x41200_0_000188833 - gto*x41200_0_000188833 - ac*x00100_50_5794*x41200_0_000188833 + ne*x41210_1_79979e_06 + dc*x41300_0_00584769;
  x41210_1_79979e_06' = ar*nf*x01010_0_0156084*x40210_1_1242e_05 + agp*nf*x00210_1_30846*x41010_1_34882e_05 + nl*x41200_0_000188833 - dg*x41210_1_79979e_06 - dr*x41210_1_79979e_06 - ne*x41210_1_79979e_06 - gto*x41210_1_79979e_06 - bbin*nf*x00011_8_17977*x41210_1_79979e_06 - ac*nf*x00110_3_08486*x41210_1_79979e_06 + unbbin*x41211_0_00109293 + dc*x41310_4_35837e_05;
  x41211_0_00109293' = ar*nf*x01011_8_72089*x40210_1_1242e_05 + ar*nf*x01010_0_0156084*x40211_0_00132337 + agp*nf*x00210_1_30846*x41011_0_000809309 + bbin*nf*x00011_8_17977*x41210_1_79979e_06 - dg*x41211_0_00109293 - 2*dr*x41211_0_00109293 - unbbin*x41211_0_00109293 - gto*x41211_0_00109293 - ac*nf*x00110_3_08486*x41211_0_00109293 + dc*x41311_0_0166107;
  x41300_0_00584769' = ar*x01000_41_1658*x40300_0_0105914 + agp*x00200_0_0985802*x41100_0_124712 + ac*x00100_50_5794*x41200_0_000188833 - dc*x41300_0_00584769 - dg*x41300_0_00584769 - dr*x41300_0_00584769 - nl*x41300_0_00584769 - gto*x41300_0_00584769 + ne*x41310_4_35837e_05;
  x41310_4_35837e_05' = ar*nf*x01010_0_0156084*x40310_0_00023062 + agp*nf*x00210_1_30846*x41110_0_000416813 + ac*nf*x00110_3_08486*x41210_1_79979e_06 + nl*x41300_0_00584769 - dc*x41310_4_35837e_05 - dg*x41310_4_35837e_05 - dr*x41310_4_35837e_05 - ne*x41310_4_35837e_05 - gto*x41310_4_35837e_05 - bbin*nf*x00011_8_17977*x41310_4_35837e_05 + unbbin*x41311_0_0166107;
  x41311_0_0166107' = ar*nf*x01011_8_72089*x40310_0_00023062 + ar*nf*x01010_0_0156084*x40311_0_025311 + agp*nf*x00210_1_30846*x41111_0_0148919 + ac*nf*x00110_3_08486*x41211_0_00109293 + bbin*nf*x00011_8_17977*x41310_4_35837e_05 - dc*x41311_0_0166107 - dg*x41311_0_0166107 - 2*dr*x41311_0_0166107 - unbbin*x41311_0_0166107 - gto*x41311_0_0166107;
  x42000_0_00428454' = ar*x02000_46_5721*x40000_0_00356643 - dr*x42000_0_00428454 - nl*x42000_0_00428454 - ac*x00100_50_5794*x42000_0_00428454 - agp*x00200_0_0985802*x42000_0_00428454 + ne*x42010_1_47716e_05 + dc*x42100_0_137696 + dg*x42200_0_0002068;
  x42010_1_47716e_05' = ar*nf*x02010_0_0031953*x40010_1_94469e_05 + nl*x42000_0_00428454 - dr*x42010_1_47716e_05 - ne*x42010_1_47716e_05 - bbin*nf*x00011_8_17977*x42010_1_47716e_05 - ac*nf*x00110_3_08486*x42010_1_47716e_05 - agp*nf*x00210_1_30846*x42010_1_47716e_05 + unbbin*x42011_0_00086132 + dc*x42110_0_000459811 + dg*x42210_1_94018e_06;
  x42011_0_00086132' = ar*nf*x02011_1_36799*x40010_1_94469e_05 + ar*nf*x02010_0_0031953*x40011_0_000959363 + bbin*nf*x00011_8_17977*x42010_1_47716e_05 - 2*dr*x42011_0_00086132 - unbbin*x42011_0_00086132 - ac*nf*x00110_3_08486*x42011_0_00086132 - agp*nf*x00210_1_30846*x42011_0_00086132 + dc*x42111_0_0160349 + dg*x42211_0_0011516;
  x42100_0_137696' = ar*x02000_46_5721*x40100_0_258442 + ac*x00100_50_5794*x42000_0_00428454 - dc*x42100_0_137696 - dr*x42100_0_137696 - nl*x42100_0_137696 - agp*x00200_0_0985802*x42100_0_137696 + ne*x42110_0_000459811 + dg*x42300_0_00644626;
  x42110_0_000459811' = ar*nf*x02010_0_0031953*x40110_0_000985386 + ac*nf*x00110_3_08486*x42010_1_47716e_05 + nl*x42100_0_137696 - dc*x42110_0_000459811 - dr*x42110_0_000459811 - ne*x42110_0_000459811 - bbin*nf*x00011_8_17977*x42110_0_000459811 - agp*nf*x00210_1_30846*x42110_0_000459811 + unbbin*x42111_0_0160349 + dg*x42310_4_76349e_05;
  x42111_0_0160349' = ar*nf*x02011_1_36799*x40110_0_000985386 + ar*nf*x02010_0_0031953*x40111_0_0249991 + ac*nf*x00110_3_08486*x42011_0_00086132 + bbin*nf*x00011_8_17977*x42110_0_000459811 - dc*x42111_0_0160349 - 2*dr*x42111_0_0160349 - unbbin*x42111_0_0160349 - agp*nf*x00210_1_30846*x42111_0_0160349 + dg*x42311_0_0177021;
  x42200_0_0002068' = ar*x02000_46_5721*x40200_0_000157103 + agp*x00200_0_0985802*x42000_0_00428454 - dg*x42200_0_0002068 - dr*x42200_0_0002068 - nl*x42200_0_0002068 - gto*x42200_0_0002068 - ac*x00100_50_5794*x42200_0_0002068 + ne*x42210_1_94018e_06 + dc*x42300_0_00644626;
  x42210_1_94018e_06' = ar*nf*x02010_0_0031953*x40210_1_1242e_05 + agp*nf*x00210_1_30846*x42010_1_47716e_05 + nl*x42200_0_0002068 - dg*x42210_1_94018e_06 - dr*x42210_1_94018e_06 - ne*x42210_1_94018e_06 - gto*x42210_1_94018e_06 - bbin*nf*x00011_8_17977*x42210_1_94018e_06 - ac*nf*x00110_3_08486*x42210_1_94018e_06 + unbbin*x42211_0_0011516 + dc*x42310_4_76349e_05;
  x42211_0_0011516' = ar*nf*x02011_1_36799*x40210_1_1242e_05 + ar*nf*x02010_0_0031953*x40211_0_00132337 + agp*nf*x00210_1_30846*x42011_0_00086132 + bbin*nf*x00011_8_17977*x42210_1_94018e_06 - dg*x42211_0_0011516 - 2*dr*x42211_0_0011516 - unbbin*x42211_0_0011516 - gto*x42211_0_0011516 - ac*nf*x00110_3_08486*x42211_0_0011516 + dc*x42311_0_0177021;
  x42300_0_00644626' = ar*x02000_46_5721*x40300_0_0105914 + agp*x00200_0_0985802*x42100_0_137696 + ac*x00100_50_5794*x42200_0_0002068 - dc*x42300_0_00644626 - dg*x42300_0_00644626 - dr*x42300_0_00644626 - nl*x42300_0_00644626 - gto*x42300_0_00644626 + ne*x42310_4_76349e_05;
  x42310_4_76349e_05' = ar*nf*x02010_0_0031953*x40310_0_00023062 + agp*nf*x00210_1_30846*x42110_0_000459811 + ac*nf*x00110_3_08486*x42210_1_94018e_06 + nl*x42300_0_00644626 - dc*x42310_4_76349e_05 - dg*x42310_4_76349e_05 - dr*x42310_4_76349e_05 - ne*x42310_4_76349e_05 - gto*x42310_4_76349e_05 - bbin*nf*x00011_8_17977*x42310_4_76349e_05 + unbbin*x42311_0_0177021;
  x42311_0_0177021' = ar*nf*x02011_1_36799*x40310_0_00023062 + ar*nf*x02010_0_0031953*x40311_0_025311 + agp*nf*x00210_1_30846*x42111_0_0160349 + ac*nf*x00110_3_08486*x42211_0_0011516 + bbin*nf*x00011_8_17977*x42310_4_76349e_05 - dc*x42311_0_0177021 - dg*x42311_0_0177021 - 2*dr*x42311_0_0177021 - unbbin*x42311_0_0177021 - gto*x42311_0_0177021;
  x50000_0_00569806' = -(nl*x50000_0_00569806) - upu*x50000_0_00569806 - ac*x00100_50_5794*x50000_0_00569806 - agp*x00200_0_0985802*x50000_0_00569806 - ar*(x01000_41_1658 + x02000_46_5721)*x50000_0_00569806 + ne*x50010_0_000190832 + dc*x50100_0_0287569 + dg*x50200_0_00414505 + dr*(x51000_0_00666974 + x52000_0_00706385);
  x50010_0_000190832' = nl*x50000_0_00569806 - ne*x50010_0_000190832 - upu*x50010_0_000190832 - bbin*nf*x00011_8_17977*x50010_0_000190832 - ac*nf*x00110_3_08486*x50010_0_000190832 - agp*nf*x00210_1_30846*x50010_0_000190832 - ar*nf*(x01010_0_0156084 + x02010_0_0031953)*x50010_0_000190832 - ar*nf*(x01011_8_72089 + x02011_1_36799)*x50010_0_000190832 + ubc*x50011_0_0566834 + unbbin*x50011_0_0566834 + dc*x50110_0_000413832 + dg*x50210_0_000386223 + dr*(x51010_2_54221e_05 + x52010_2_64292e_05) + dr*(x51011_0_00484524 + x52011_0_00442251);
  x50011_0_0566834' = bbin*nf*x00011_8_17977*x50010_0_000190832 - ubc*x50011_0_0566834 - unbbin*x50011_0_0566834 - upu*x50011_0_0566834 - ac*nf*x00110_3_08486*x50011_0_0566834 - agp*nf*x00210_1_30846*x50011_0_0566834 - ar*nf*(x01010_0_0156084 + x02010_0_0031953)*x50011_0_0566834 + dc*x50111_0_0494651 + dg*x50211_0_124464 + dr*(x51011_0_00484524 + x52011_0_00442251);
  x50100_0_0287569' = ac*x00100_50_5794*x50000_0_00569806 - dc*x50100_0_0287569 - hto*x50100_0_0287569 - nl*x50100_0_0287569 - upu*x50100_0_0287569 - agp*x00200_0_0985802*x50100_0_0287569 - ar*(x01000_41_1658 + x02000_46_5721)*x50100_0_0287569 + ne*x50110_0_000413832 + dg*x50300_0_00740796 + dr*(x51100_0_0828541 + x52100_0_0852703);
  x50110_0_000413832' = ac*nf*x00110_3_08486*x50010_0_000190832 + nl*x50100_0_0287569 - dc*x50110_0_000413832 - hto*x50110_0_000413832 - ne*x50110_0_000413832 - upu*x50110_0_000413832 - bbin*nf*x00011_8_17977*x50110_0_000413832 - agp*nf*x00210_1_30846*x50110_0_000413832 - ar*nf*(x01010_0_0156084 + x02010_0_0031953)*x50110_0_000413832 - ar*nf*(x01011_8_72089 + x02011_1_36799)*x50110_0_000413832 + ubc*x50111_0_0494651 + unbbin*x50111_0_0494651 + dg*x50310_0_000654378 + dr*(x51110_0_000294564 + x52110_0_000300906) + dr*(x51111_0_0323573 + x52111_0_0301143);
  x50111_0_0494651' = ac*nf*x00110_3_08486*x50011_0_0566834 + bbin*nf*x00011_8_17977*x50110_0_000413832 - dc*x50111_0_0494651 - hto*x50111_0_0494651 - ubc*x50111_0_0494651 - unbbin*x50111_0_0494651 - upu*x50111_0_0494651 - agp*nf*x00210_1_30846*x50111_0_0494651 - ar*nf*(x01010_0_0156084 + x02010_0_0031953)*x50111_0_0494651 + dg*x50311_0_104089 + dr*(x51111_0_0323573 + x52111_0_0301143);
  x50200_0_00414505' = gto*x30200_0_0226162 + agp*x00200_0_0985802*x50000_0_00569806 - dg*x50200_0_00414505 - nl*x50200_0_00414505 - upu*x50200_0_00414505 - ac*x00100_50_5794*x50200_0_00414505 - ar*(x01000_41_1658 + x02000_46_5721)*x50200_0_00414505 + ne*x50210_0_000386223 + dc*x50300_0_00740796 + dr*(x51200_0_0012142 + x52200_0_00132641);
  x50210_0_000386223' = agp*nf*x00210_1_30846*x50010_0_000190832 + nl*x50200_0_00414505 - dg*x50210_0_000386223 - ne*x50210_0_000386223 - upu*x50210_0_000386223 - bbin*nf*x00011_8_17977*x50210_0_000386223 - ac*nf*x00110_3_08486*x50210_0_000386223 - ar*nf*(x01010_0_0156084 + x02010_0_0031953)*x50210_0_000386223 - ar*nf*(x01011_8_72089 + x02011_1_36799)*x50210_0_000386223 + ubc*x50211_0_124464 + unbbin*x50211_0_124464 + dc*x50310_0_000654378 + dr*(x51210_1_1508e_05 + x52210_1_12497e_05) + dr*(x51211_0_00976858 + x52211_0_00878991);
  x50211_0_124464' = agp*nf*x00210_1_30846*x50011_0_0566834 + bbin*nf*x00011_8_17977*x50210_0_000386223 - dg*x50211_0_124464 - ubc*x50211_0_124464 - unbbin*x50211_0_124464 - upu*x50211_0_124464 - ac*nf*x00110_3_08486*x50211_0_124464 - ar*nf*(x01010_0_0156084 + x02010_0_0031953)*x50211_0_124464 + dc*x50311_0_104089 + dr*(x51211_0_00976858 + x52211_0_00878991);
  x50300_0_00740796' = gto*x30300_0_0241531 + agp*x00200_0_0985802*x50100_0_0287569 + ac*x00100_50_5794*x50200_0_00414505 - dc*x50300_0_00740796 - dg*x50300_0_00740796 - hto*x50300_0_00740796 - nl*x50300_0_00740796 - upu*x50300_0_00740796 - ar*(x01000_41_1658 + x02000_46_5721)*x50300_0_00740796 + ne*x50310_0_000654378 + dr*(x51300_0_0087474 + x52300_0_0091505);
  x50310_0_000654378' = agp*nf*x00210_1_30846*x50110_0_000413832 + ac*nf*x00110_3_08486*x50210_0_000386223 + nl*x50300_0_00740796 - dc*x50310_0_000654378 - dg*x50310_0_000654378 - hto*x50310_0_000654378 - ne*x50310_0_000654378 - upu*x50310_0_000654378 - bbin*nf*x00011_8_17977*x50310_0_000654378 - ar*nf*(x01010_0_0156084 + x02010_0_0031953)*x50310_0_000654378 - ar*nf*(x01011_8_72089 + x02011_1_36799)*x50310_0_000654378 + ubc*x50311_0_104089 + unbbin*x50311_0_104089 + dr*(x51310_7_98494e_05 + x52310_7_78605e_05) + dr*(x51311_0_0607878 + x52311_0_055586);
  x50311_0_104089' = agp*nf*x00210_1_30846*x50111_0_0494651 + ac*nf*x00110_3_08486*x50211_0_124464 + bbin*nf*x00011_8_17977*x50310_0_000654378 - dc*x50311_0_104089 - dg*x50311_0_104089 - hto*x50311_0_104089 - ubc*x50311_0_104089 - unbbin*x50311_0_104089 - upu*x50311_0_104089 - ar*nf*(x01010_0_0156084 + x02010_0_0031953)*x50311_0_104089 + dr*(x51311_0_0607878 + x52311_0_055586);
  x51000_0_00666974' = ar*x01000_41_1658*x50000_0_00569806 - dr*x51000_0_00666974 - nl*x51000_0_00666974 - ac*x00100_50_5794*x51000_0_00666974 - agp*x00200_0_0985802*x51000_0_00666974 + ne*x51010_2_54221e_05 + dc*x51100_0_0828541 + dg*x51200_0_0012142;
  x51010_2_54221e_05' = ar*nf*x01010_0_0156084*x50010_0_000190832 + nl*x51000_0_00666974 - dr*x51010_2_54221e_05 - ne*x51010_2_54221e_05 - bbin*nf*x00011_8_17977*x51010_2_54221e_05 - ac*nf*x00110_3_08486*x51010_2_54221e_05 - agp*nf*x00210_1_30846*x51010_2_54221e_05 + unbbin*x51011_0_00484524 + dc*x51110_0_000294564 + dg*x51210_1_1508e_05;
  x51011_0_00484524' = ar*nf*x01011_8_72089*x50010_0_000190832 + ar*nf*x01010_0_0156084*x50011_0_0566834 + bbin*nf*x00011_8_17977*x51010_2_54221e_05 - 2*dr*x51011_0_00484524 - unbbin*x51011_0_00484524 - ac*nf*x00110_3_08486*x51011_0_00484524 - agp*nf*x00210_1_30846*x51011_0_00484524 + dc*x51111_0_0323573 + dg*x51211_0_00976858;
  x51100_0_0828541' = ar*x01000_41_1658*x50100_0_0287569 + ac*x00100_50_5794*x51000_0_00666974 - dc*x51100_0_0828541 - dr*x51100_0_0828541 - nl*x51100_0_0828541 - agp*x00200_0_0985802*x51100_0_0828541 + ne*x51110_0_000294564 + dg*x51300_0_0087474;
  x51110_0_000294564' = ar*nf*x01010_0_0156084*x50110_0_000413832 + ac*nf*x00110_3_08486*x51010_2_54221e_05 + nl*x51100_0_0828541 - dc*x51110_0_000294564 - dr*x51110_0_000294564 - ne*x51110_0_000294564 - bbin*nf*x00011_8_17977*x51110_0_000294564 - agp*nf*x00210_1_30846*x51110_0_000294564 + unbbin*x51111_0_0323573 + dg*x51310_7_98494e_05;
  x51111_0_0323573' = ar*nf*x01011_8_72089*x50110_0_000413832 + ar*nf*x01010_0_0156084*x50111_0_0494651 + ac*nf*x00110_3_08486*x51011_0_00484524 + bbin*nf*x00011_8_17977*x51110_0_000294564 - dc*x51111_0_0323573 - 2*dr*x51111_0_0323573 - unbbin*x51111_0_0323573 - agp*nf*x00210_1_30846*x51111_0_0323573 + dg*x51311_0_0607878;
  x51200_0_0012142' = ar*x01000_41_1658*x50200_0_00414505 + agp*x00200_0_0985802*x51000_0_00666974 - dg*x51200_0_0012142 - dr*x51200_0_0012142 - nl*x51200_0_0012142 - ac*x00100_50_5794*x51200_0_0012142 + ne*x51210_1_1508e_05 + dc*x51300_0_0087474;
  x51210_1_1508e_05' = ar*nf*x01010_0_0156084*x50210_0_000386223 + agp*nf*x00210_1_30846*x51010_2_54221e_05 + nl*x51200_0_0012142 - dg*x51210_1_1508e_05 - dr*x51210_1_1508e_05 - ne*x51210_1_1508e_05 - bbin*nf*x00011_8_17977*x51210_1_1508e_05 - ac*nf*x00110_3_08486*x51210_1_1508e_05 + unbbin*x51211_0_00976858 + dc*x51310_7_98494e_05;
  x51211_0_00976858' = ar*nf*x01011_8_72089*x50210_0_000386223 + ar*nf*x01010_0_0156084*x50211_0_124464 + agp*nf*x00210_1_30846*x51011_0_00484524 + bbin*nf*x00011_8_17977*x51210_1_1508e_05 - dg*x51211_0_00976858 - 2*dr*x51211_0_00976858 - unbbin*x51211_0_00976858 - ac*nf*x00110_3_08486*x51211_0_00976858 + dc*x51311_0_0607878;
  x51300_0_0087474' = ar*x01000_41_1658*x50300_0_00740796 + agp*x00200_0_0985802*x51100_0_0828541 + ac*x00100_50_5794*x51200_0_0012142 - dc*x51300_0_0087474 - dg*x51300_0_0087474 - dr*x51300_0_0087474 - nl*x51300_0_0087474 + ne*x51310_7_98494e_05;
  x51310_7_98494e_05' = ar*nf*x01010_0_0156084*x50310_0_000654378 + agp*nf*x00210_1_30846*x51110_0_000294564 + ac*nf*x00110_3_08486*x51210_1_1508e_05 + nl*x51300_0_0087474 - dc*x51310_7_98494e_05 - dg*x51310_7_98494e_05 - dr*x51310_7_98494e_05 - ne*x51310_7_98494e_05 - bbin*nf*x00011_8_17977*x51310_7_98494e_05 + unbbin*x51311_0_0607878;
  x51311_0_0607878' = ar*nf*x01011_8_72089*x50310_0_000654378 + ar*nf*x01010_0_0156084*x50311_0_104089 + agp*nf*x00210_1_30846*x51111_0_0323573 + ac*nf*x00110_3_08486*x51211_0_00976858 + bbin*nf*x00011_8_17977*x51310_7_98494e_05 - dc*x51311_0_0607878 - dg*x51311_0_0607878 - 2*dr*x51311_0_0607878 - unbbin*x51311_0_0607878;
  x52000_0_00706385' = ar*x02000_46_5721*x50000_0_00569806 - dr*x52000_0_00706385 - nl*x52000_0_00706385 - ac*x00100_50_5794*x52000_0_00706385 - agp*x00200_0_0985802*x52000_0_00706385 + ne*x52010_2_64292e_05 + dc*x52100_0_0852703 + dg*x52200_0_00132641;
  x52010_2_64292e_05' = ar*nf*x02010_0_0031953*x50010_0_000190832 + nl*x52000_0_00706385 - dr*x52010_2_64292e_05 - ne*x52010_2_64292e_05 - bbin*nf*x00011_8_17977*x52010_2_64292e_05 - ac*nf*x00110_3_08486*x52010_2_64292e_05 - agp*nf*x00210_1_30846*x52010_2_64292e_05 + unbbin*x52011_0_00442251 + dc*x52110_0_000300906 + dg*x52210_1_12497e_05;
  x52011_0_00442251' = ar*nf*x02011_1_36799*x50010_0_000190832 + ar*nf*x02010_0_0031953*x50011_0_0566834 + bbin*nf*x00011_8_17977*x52010_2_64292e_05 - 2*dr*x52011_0_00442251 - unbbin*x52011_0_00442251 - ac*nf*x00110_3_08486*x52011_0_00442251 - agp*nf*x00210_1_30846*x52011_0_00442251 + dc*x52111_0_0301143 + dg*x52211_0_00878991;
  x52100_0_0852703' = ar*x02000_46_5721*x50100_0_0287569 + ac*x00100_50_5794*x52000_0_00706385 - dc*x52100_0_0852703 - dr*x52100_0_0852703 - nl*x52100_0_0852703 - agp*x00200_0_0985802*x52100_0_0852703 + ne*x52110_0_000300906 + dg*x52300_0_0091505;
  x52110_0_000300906' = ar*nf*x02010_0_0031953*x50110_0_000413832 + ac*nf*x00110_3_08486*x52010_2_64292e_05 + nl*x52100_0_0852703 - dc*x52110_0_000300906 - dr*x52110_0_000300906 - ne*x52110_0_000300906 - bbin*nf*x00011_8_17977*x52110_0_000300906 - agp*nf*x00210_1_30846*x52110_0_000300906 + unbbin*x52111_0_0301143 + dg*x52310_7_78605e_05;
  x52111_0_0301143' = ar*nf*x02011_1_36799*x50110_0_000413832 + ar*nf*x02010_0_0031953*x50111_0_0494651 + ac*nf*x00110_3_08486*x52011_0_00442251 + bbin*nf*x00011_8_17977*x52110_0_000300906 - dc*x52111_0_0301143 - 2*dr*x52111_0_0301143 - unbbin*x52111_0_0301143 - agp*nf*x00210_1_30846*x52111_0_0301143 + dg*x52311_0_055586;
  x52200_0_00132641' = ar*x02000_46_5721*x50200_0_00414505 + agp*x00200_0_0985802*x52000_0_00706385 - dg*x52200_0_00132641 - dr*x52200_0_00132641 - nl*x52200_0_00132641 - ac*x00100_50_5794*x52200_0_00132641 + ne*x52210_1_12497e_05 + dc*x52300_0_0091505;
  x52210_1_12497e_05' = ar*nf*x02010_0_0031953*x50210_0_000386223 + agp*nf*x00210_1_30846*x52010_2_64292e_05 + nl*x52200_0_00132641 - dg*x52210_1_12497e_05 - dr*x52210_1_12497e_05 - ne*x52210_1_12497e_05 - bbin*nf*x00011_8_17977*x52210_1_12497e_05 - ac*nf*x00110_3_08486*x52210_1_12497e_05 + unbbin*x52211_0_00878991 + dc*x52310_7_78605e_05;
  x52211_0_00878991' = ar*nf*x02011_1_36799*x50210_0_000386223 + ar*nf*x02010_0_0031953*x50211_0_124464 + agp*nf*x00210_1_30846*x52011_0_00442251 + bbin*nf*x00011_8_17977*x52210_1_12497e_05 - dg*x52211_0_00878991 - 2*dr*x52211_0_00878991 - unbbin*x52211_0_00878991 - ac*nf*x00110_3_08486*x52211_0_00878991 + dc*x52311_0_055586;
  x52300_0_0091505' = ar*x02000_46_5721*x50300_0_00740796 + agp*x00200_0_0985802*x52100_0_0852703 + ac*x00100_50_5794*x52200_0_00132641 - dc*x52300_0_0091505 - dg*x52300_0_0091505 - dr*x52300_0_0091505 - nl*x52300_0_0091505 + ne*x52310_7_78605e_05;
  x52310_7_78605e_05' = ar*nf*x02010_0_0031953*x50310_0_000654378 + agp*nf*x00210_1_30846*x52110_0_000300906 + ac*nf*x00110_3_08486*x52210_1_12497e_05 + nl*x52300_0_0091505 - dc*x52310_7_78605e_05 - dg*x52310_7_78605e_05 - dr*x52310_7_78605e_05 - ne*x52310_7_78605e_05 - bbin*nf*x00011_8_17977*x52310_7_78605e_05 + unbbin*x52311_0_055586;
  x52311_0_055586' = ar*nf*x02011_1_36799*x50310_0_000654378 + ar*nf*x02010_0_0031953*x50311_0_104089 + agp*nf*x00210_1_30846*x52111_0_0301143 + ac*nf*x00110_3_08486*x52211_0_00878991 + bbin*nf*x00011_8_17977*x52310_7_78605e_05 - dc*x52311_0_055586 - dg*x52311_0_055586 - 2*dr*x52311_0_055586 - unbbin*x52311_0_055586;
  x60000_0_000792825' = -(nl*x60000_0_000792825) - up*x60000_0_000792825 - ac*x00100_50_5794*x60000_0_000792825 - agp*x00200_0_0985802*x60000_0_000792825 - ar*(x01000_41_1658 + x02000_46_5721)*x60000_0_000792825 + ne*x60010_2_57804e_05 + dc*x60100_0_0274125 + dg*x60200_0_000125512 + dr*(x61000_0_00252101 + x62000_0_00259772);
  x60010_2_57804e_05' = nl*x60000_0_000792825 - ne*x60010_2_57804e_05 - up*x60010_2_57804e_05 - bbin*nf*x00011_8_17977*x60010_2_57804e_05 - ac*nf*x00110_3_08486*x60010_2_57804e_05 - agp*nf*x00210_1_30846*x60010_2_57804e_05 - ar*nf*(x01010_0_0156084 + x02010_0_0031953)*x60010_2_57804e_05 - ar*nf*(x01011_8_72089 + x02011_1_36799)*x60010_2_57804e_05 + ubc*x60011_0_00334582 + unbbin*x60011_0_00334582 + dc*x60110_0_000385498 + dg*x60210_4_99769e_05 + dr*(x61010_1_00779e_05 + x62010_1_01709e_05) + dr*(x61011_0_00248103 + x62011_0_00224807);
  x60011_0_00334582' = bbin*nf*x00011_8_17977*x60010_2_57804e_05 - ubc*x60011_0_00334582 - unbbin*x60011_0_00334582 - up*x60011_0_00334582 - ac*nf*x00110_3_08486*x60011_0_00334582 - agp*nf*x00210_1_30846*x60011_0_00334582 - ar*nf*(x01010_0_0156084 + x02010_0_0031953)*x60011_0_00334582 + dc*x60111_0_0589937 + dg*x60211_0_00735186 + dr*(x61011_0_00248103 + x62011_0_00224807);
  x60100_0_0274125' = hto*x50100_0_0287569 + ac*x00100_50_5794*x60000_0_000792825 - dc*x60100_0_0274125 - nl*x60100_0_0274125 - up*x60100_0_0274125 - agp*x00200_0_0985802*x60100_0_0274125 - ar*(x01000_41_1658 + x02000_46_5721)*x60100_0_0274125 + ne*x60110_0_000385498 + dg*x60300_0_00550233 + dr*(x61100_0_0581233 + x62100_0_0602479);
  x60110_0_000385498' = hto*x50110_0_000413832 + ac*nf*x00110_3_08486*x60010_2_57804e_05 + nl*x60100_0_0274125 - dc*x60110_0_000385498 - ne*x60110_0_000385498 - up*x60110_0_000385498 - bbin*nf*x00011_8_17977*x60110_0_000385498 - agp*nf*x00210_1_30846*x60110_0_000385498 - ar*nf*(x01010_0_0156084 + x02010_0_0031953)*x60110_0_000385498 - ar*nf*(x01011_8_72089 + x02011_1_36799)*x60110_0_000385498 + ubc*x60111_0_0589937 + unbbin*x60111_0_0589937 + dg*x60310_0_000631987 + dr*(x61110_0_000207429 + x62110_0_000213449) + dr*(x61111_0_0239137 + x62111_0_0225783);
  x60111_0_0589937' = hto*x50111_0_0494651 + ac*nf*x00110_3_08486*x60011_0_00334582 + bbin*nf*x00011_8_17977*x60110_0_000385498 - dc*x60111_0_0589937 - ubc*x60111_0_0589937 - unbbin*x60111_0_0589937 - up*x60111_0_0589937 - agp*nf*x00210_1_30846*x60111_0_0589937 - ar*nf*(x01010_0_0156084 + x02010_0_0031953)*x60111_0_0589937 + dg*x60311_0_12768 + dr*(x61111_0_0239137 + x62111_0_0225783);
  x60200_0_000125512' = gto*x40200_0_000157103 + agp*x00200_0_0985802*x60000_0_000792825 - dg*x60200_0_000125512 - nl*x60200_0_000125512 - up*x60200_0_000125512 - ac*x00100_50_5794*x60200_0_000125512 - ar*(x01000_41_1658 + x02000_46_5721)*x60200_0_000125512 + ne*x60210_4_99769e_05 + dc*x60300_0_00550233 + dr*(x61200_0_000305307 + x62200_0_000320067);
  x60210_4_99769e_05' = gto*x40210_1_1242e_05 + agp*nf*x00210_1_30846*x60010_2_57804e_05 + nl*x60200_0_000125512 - dg*x60210_4_99769e_05 - ne*x60210_4_99769e_05 - up*x60210_4_99769e_05 - bbin*nf*x00011_8_17977*x60210_4_99769e_05 - ac*nf*x00110_3_08486*x60210_4_99769e_05 - ar*nf*(x01010_0_0156084 + x02010_0_0031953)*x60210_4_99769e_05 - ar*nf*(x01011_8_72089 + x02011_1_36799)*x60210_4_99769e_05 + ubc*x60211_0_00735186 + unbbin*x60211_0_00735186 + dc*x60310_0_000631987 + dr*(x61210_4_90217e_06 + x62210_4_60372e_06) + dr*(x61211_0_00521949 + x62211_0_004701);
  x60211_0_00735186' = gto*x40211_0_00132337 + agp*nf*x00210_1_30846*x60011_0_00334582 + bbin*nf*x00011_8_17977*x60210_4_99769e_05 - dg*x60211_0_00735186 - ubc*x60211_0_00735186 - unbbin*x60211_0_00735186 - up*x60211_0_00735186 - ac*nf*x00110_3_08486*x60211_0_00735186 - ar*nf*(x01010_0_0156084 + x02010_0_0031953)*x60211_0_00735186 + dc*x60311_0_12768 + dr*(x61211_0_00521949 + x62211_0_004701);
  x60300_0_00550233' = gto*x40300_0_0105914 + hto*x50300_0_00740796 + agp*x00200_0_0985802*x60100_0_0274125 + ac*x00100_50_5794*x60200_0_000125512 - dc*x60300_0_00550233 - dg*x60300_0_00550233 - nl*x60300_0_00550233 - up*x60300_0_00550233 - ar*(x01000_41_1658 + x02000_46_5721)*x60300_0_00550233 + ne*x60310_0_000631987 + dr*(x61300_0_00753943 + x62300_0_00797183);
  x60310_0_000631987' = gto*x40310_0_00023062 + hto*x50310_0_000654378 + agp*nf*x00210_1_30846*x60110_0_000385498 + ac*nf*x00110_3_08486*x60210_4_99769e_05 + nl*x60300_0_00550233 - dc*x60310_0_000631987 - dg*x60310_0_000631987 - ne*x60310_0_000631987 - up*x60310_0_000631987 - bbin*nf*x00011_8_17977*x60310_0_000631987 - ar*nf*(x01010_0_0156084 + x02010_0_0031953)*x60310_0_000631987 - ar*nf*(x01011_8_72089 + x02011_1_36799)*x60310_0_000631987 + ubc*x60311_0_12768 + unbbin*x60311_0_12768 + dr*(x61310_6_39585e_05 + x62310_6_35261e_05) + dr*(x61311_0_0471435 + x62311_0_0440794);
  x60311_0_12768' = gto*x40311_0_025311 + hto*x50311_0_104089 + agp*nf*x00210_1_30846*x60111_0_0589937 + ac*nf*x00110_3_08486*x60211_0_00735186 + bbin*nf*x00011_8_17977*x60310_0_000631987 - dc*x60311_0_12768 - dg*x60311_0_12768 - ubc*x60311_0_12768 - unbbin*x60311_0_12768 - up*x60311_0_12768 - ar*nf*(x01010_0_0156084 + x02010_0_0031953)*x60311_0_12768 + dr*(x61311_0_0471435 + x62311_0_0440794);
  x61000_0_00252101' = ar*x01000_41_1658*x60000_0_000792825 - dr*x61000_0_00252101 - nl*x61000_0_00252101 - ac*x00100_50_5794*x61000_0_00252101 - agp*x00200_0_0985802*x61000_0_00252101 + ne*x61010_1_00779e_05 + dc*x61100_0_0581233 + dg*x61200_0_000305307;
  x61010_1_00779e_05' = ar*nf*x01010_0_0156084*x60010_2_57804e_05 + nl*x61000_0_00252101 - dr*x61010_1_00779e_05 - ne*x61010_1_00779e_05 - bbin*nf*x00011_8_17977*x61010_1_00779e_05 - ac*nf*x00110_3_08486*x61010_1_00779e_05 - agp*nf*x00210_1_30846*x61010_1_00779e_05 + unbbin*x61011_0_00248103 + dc*x61110_0_000207429 + dg*x61210_4_90217e_06;
  x61011_0_00248103' = ar*nf*x01011_8_72089*x60010_2_57804e_05 + ar*nf*x01010_0_0156084*x60011_0_00334582 + bbin*nf*x00011_8_17977*x61010_1_00779e_05 - 2*dr*x61011_0_00248103 - unbbin*x61011_0_00248103 - ac*nf*x00110_3_08486*x61011_0_00248103 - agp*nf*x00210_1_30846*x61011_0_00248103 + dc*x61111_0_0239137 + dg*x61211_0_00521949;
  x61100_0_0581233' = ar*x01000_41_1658*x60100_0_0274125 + ac*x00100_50_5794*x61000_0_00252101 - dc*x61100_0_0581233 - dr*x61100_0_0581233 - nl*x61100_0_0581233 - agp*x00200_0_0985802*x61100_0_0581233 + ne*x61110_0_000207429 + dg*x61300_0_00753943;
  x61110_0_000207429' = ar*nf*x01010_0_0156084*x60110_0_000385498 + ac*nf*x00110_3_08486*x61010_1_00779e_05 + nl*x61100_0_0581233 - dc*x61110_0_000207429 - dr*x61110_0_000207429 - ne*x61110_0_000207429 - bbin*nf*x00011_8_17977*x61110_0_000207429 - agp*nf*x00210_1_30846*x61110_0_000207429 + unbbin*x61111_0_0239137 + dg*x61310_6_39585e_05;
  x61111_0_0239137' = ar*nf*x01011_8_72089*x60110_0_000385498 + ar*nf*x01010_0_0156084*x60111_0_0589937 + ac*nf*x00110_3_08486*x61011_0_00248103 + bbin*nf*x00011_8_17977*x61110_0_000207429 - dc*x61111_0_0239137 - 2*dr*x61111_0_0239137 - unbbin*x61111_0_0239137 - agp*nf*x00210_1_30846*x61111_0_0239137 + dg*x61311_0_0471435;
  x61200_0_000305307' = gto*x41200_0_000188833 + ar*x01000_41_1658*x60200_0_000125512 + agp*x00200_0_0985802*x61000_0_00252101 - dg*x61200_0_000305307 - dr*x61200_0_000305307 - nl*x61200_0_000305307 - ac*x00100_50_5794*x61200_0_000305307 + ne*x61210_4_90217e_06 + dc*x61300_0_00753943;
  x61210_4_90217e_06' = gto*x41210_1_79979e_06 + ar*nf*x01010_0_0156084*x60210_4_99769e_05 + agp*nf*x00210_1_30846*x61010_1_00779e_05 + nl*x61200_0_000305307 - dg*x61210_4_90217e_06 - dr*x61210_4_90217e_06 - ne*x61210_4_90217e_06 - bbin*nf*x00011_8_17977*x61210_4_90217e_06 - ac*nf*x00110_3_08486*x61210_4_90217e_06 + unbbin*x61211_0_00521949 + dc*x61310_6_39585e_05;
  x61211_0_00521949' = gto*x41211_0_00109293 + ar*nf*x01011_8_72089*x60210_4_99769e_05 + ar*nf*x01010_0_0156084*x60211_0_00735186 + agp*nf*x00210_1_30846*x61011_0_00248103 + bbin*nf*x00011_8_17977*x61210_4_90217e_06 - dg*x61211_0_00521949 - 2*dr*x61211_0_00521949 - unbbin*x61211_0_00521949 - ac*nf*x00110_3_08486*x61211_0_00521949 + dc*x61311_0_0471435;
  x61300_0_00753943' = gto*x41300_0_00584769 + ar*x01000_41_1658*x60300_0_00550233 + agp*x00200_0_0985802*x61100_0_0581233 + ac*x00100_50_5794*x61200_0_000305307 - dc*x61300_0_00753943 - dg*x61300_0_00753943 - dr*x61300_0_00753943 - nl*x61300_0_00753943 + ne*x61310_6_39585e_05;
  x61310_6_39585e_05' = gto*x41310_4_35837e_05 + ar*nf*x01010_0_0156084*x60310_0_000631987 + agp*nf*x00210_1_30846*x61110_0_000207429 + ac*nf*x00110_3_08486*x61210_4_90217e_06 + nl*x61300_0_00753943 - dc*x61310_6_39585e_05 - dg*x61310_6_39585e_05 - dr*x61310_6_39585e_05 - ne*x61310_6_39585e_05 - bbin*nf*x00011_8_17977*x61310_6_39585e_05 + unbbin*x61311_0_0471435;
  x61311_0_0471435' = gto*x41311_0_0166107 + ar*nf*x01011_8_72089*x60310_0_000631987 + ar*nf*x01010_0_0156084*x60311_0_12768 + agp*nf*x00210_1_30846*x61111_0_0239137 + ac*nf*x00110_3_08486*x61211_0_00521949 + bbin*nf*x00011_8_17977*x61310_6_39585e_05 - dc*x61311_0_0471435 - dg*x61311_0_0471435 - 2*dr*x61311_0_0471435 - unbbin*x61311_0_0471435;
  x62000_0_00259772' = ar*x02000_46_5721*x60000_0_000792825 - dr*x62000_0_00259772 - nl*x62000_0_00259772 - ac*x00100_50_5794*x62000_0_00259772 - agp*x00200_0_0985802*x62000_0_00259772 + ne*x62010_1_01709e_05 + dc*x62100_0_0602479 + dg*x62200_0_000320067;
  x62010_1_01709e_05' = ar*nf*x02010_0_0031953*x60010_2_57804e_05 + nl*x62000_0_00259772 - dr*x62010_1_01709e_05 - ne*x62010_1_01709e_05 - bbin*nf*x00011_8_17977*x62010_1_01709e_05 - ac*nf*x00110_3_08486*x62010_1_01709e_05 - agp*nf*x00210_1_30846*x62010_1_01709e_05 + unbbin*x62011_0_00224807 + dc*x62110_0_000213449 + dg*x62210_4_60372e_06;
  x62011_0_00224807' = ar*nf*x02011_1_36799*x60010_2_57804e_05 + ar*nf*x02010_0_0031953*x60011_0_00334582 + bbin*nf*x00011_8_17977*x62010_1_01709e_05 - 2*dr*x62011_0_00224807 - unbbin*x62011_0_00224807 - ac*nf*x00110_3_08486*x62011_0_00224807 - agp*nf*x00210_1_30846*x62011_0_00224807 + dc*x62111_0_0225783 + dg*x62211_0_004701;
  x62100_0_0602479' = ar*x02000_46_5721*x60100_0_0274125 + ac*x00100_50_5794*x62000_0_00259772 - dc*x62100_0_0602479 - dr*x62100_0_0602479 - nl*x62100_0_0602479 - agp*x00200_0_0985802*x62100_0_0602479 + ne*x62110_0_000213449 + dg*x62300_0_00797183;
  x62110_0_000213449' = ar*nf*x02010_0_0031953*x60110_0_000385498 + ac*nf*x00110_3_08486*x62010_1_01709e_05 + nl*x62100_0_0602479 - dc*x62110_0_000213449 - dr*x62110_0_000213449 - ne*x62110_0_000213449 - bbin*nf*x00011_8_17977*x62110_0_000213449 - agp*nf*x00210_1_30846*x62110_0_000213449 + unbbin*x62111_0_0225783 + dg*x62310_6_35261e_05;
  x62111_0_0225783' = ar*nf*x02011_1_36799*x60110_0_000385498 + ar*nf*x02010_0_0031953*x60111_0_0589937 + ac*nf*x00110_3_08486*x62011_0_00224807 + bbin*nf*x00011_8_17977*x62110_0_000213449 - dc*x62111_0_0225783 - 2*dr*x62111_0_0225783 - unbbin*x62111_0_0225783 - agp*nf*x00210_1_30846*x62111_0_0225783 + dg*x62311_0_0440794;
  x62200_0_000320067' = gto*x42200_0_0002068 + ar*x02000_46_5721*x60200_0_000125512 + agp*x00200_0_0985802*x62000_0_00259772 - dg*x62200_0_000320067 - dr*x62200_0_000320067 - nl*x62200_0_000320067 - ac*x00100_50_5794*x62200_0_000320067 + ne*x62210_4_60372e_06 + dc*x62300_0_00797183;
  x62210_4_60372e_06' = gto*x42210_1_94018e_06 + ar*nf*x02010_0_0031953*x60210_4_99769e_05 + agp*nf*x00210_1_30846*x62010_1_01709e_05 + nl*x62200_0_000320067 - dg*x62210_4_60372e_06 - dr*x62210_4_60372e_06 - ne*x62210_4_60372e_06 - bbin*nf*x00011_8_17977*x62210_4_60372e_06 - ac*nf*x00110_3_08486*x62210_4_60372e_06 + unbbin*x62211_0_004701 + dc*x62310_6_35261e_05;
  x62211_0_004701' = gto*x42211_0_0011516 + ar*nf*x02011_1_36799*x60210_4_99769e_05 + ar*nf*x02010_0_0031953*x60211_0_00735186 + agp*nf*x00210_1_30846*x62011_0_00224807 + bbin*nf*x00011_8_17977*x62210_4_60372e_06 - dg*x62211_0_004701 - 2*dr*x62211_0_004701 - unbbin*x62211_0_004701 - ac*nf*x00110_3_08486*x62211_0_004701 + dc*x62311_0_0440794;
  x62300_0_00797183' = gto*x42300_0_00644626 + ar*x02000_46_5721*x60300_0_00550233 + agp*x00200_0_0985802*x62100_0_0602479 + ac*x00100_50_5794*x62200_0_000320067 - dc*x62300_0_00797183 - dg*x62300_0_00797183 - dr*x62300_0_00797183 - nl*x62300_0_00797183 + ne*x62310_6_35261e_05;
  x62310_6_35261e_05' = gto*x42310_4_76349e_05 + ar*nf*x02010_0_0031953*x60310_0_000631987 + agp*nf*x00210_1_30846*x62110_0_000213449 + ac*nf*x00110_3_08486*x62210_4_60372e_06 + nl*x62300_0_00797183 - dc*x62310_6_35261e_05 - dg*x62310_6_35261e_05 - dr*x62310_6_35261e_05 - ne*x62310_6_35261e_05 - bbin*nf*x00011_8_17977*x62310_6_35261e_05 + unbbin*x62311_0_0440794;
  x62311_0_0440794' = gto*x42311_0_0177021 + ar*nf*x02011_1_36799*x60310_0_000631987 + ar*nf*x02010_0_0031953*x60311_0_12768 + agp*nf*x00210_1_30846*x62111_0_0225783 + ac*nf*x00110_3_08486*x62211_0_004701 + bbin*nf*x00011_8_17977*x62310_6_35261e_05 - dc*x62311_0_0440794 - dg*x62311_0_0440794 - 2*dr*x62311_0_0440794 - unbbin*x62311_0_0440794;
end
