// SBML level 3 version 1

function max(x, y)
  piecewise(x, x > y, y);
end
max is "minimum";

function min(x, y)
  piecewise(x, x < y, y);
end
min is "maximum";

function heav(x)
  piecewise(0, x < 0, 0.5, x == 0, 1, x > 0, 0);
end
heav is "heavyside";

function mod(x, y)
  piecewise(x - y*ceil(x/y), xor(x < 0, y < 0), x - y*floor(x/y));
end
mod is "modulo";

function cab(v)
  8*(v + 0.725)^2;
end

function mb(v)
  17.8 + 47.6*v + 33.8*v*v;
end

function rb(v)
  1.24 + 3.7*v + 3.2*v*v;
end

function um(ve1, ve2)
  (ve1 + ve2)/2;
end

model main()
  // XPP model
  // This model was converted from XPP ode format to SBML using sbmlutils-0.1.5a6.
  // # Kuznetsova and Deth, JCN, 2007
  // # 4-cell network, all-to-all connections: E cells (V1, V2) and I cells (V3, V4)
  // init V1=-0.75 R1=0.26 CA1=0.1 H1=0.1
  // init V2=-0.71 R2=0.26 CA2=0.1 H2=0.1
  // init V3=-0.75 R3=0.26 CA3=0.1
  // init V4=-0.71 R4=0.26 CA4=0.1
  // init F1=0.0 S1=0.0 F2=0.0 S2=0.0 F3=0.0 S3=0.0 F4=0.0 S4=0.0
  // init F5=0.0 S5=0.0 F6=0.0 S6=0.0 F7=0.0 S7=0.0 F8=0.0 S8=0.0
  // init F9=0.0 S9=0.0 F10=0.0 S10=0.0 F11=0.0 S11=0.0 F12=0.0 S12=0.0
  // par Ie1=0.6, Ie2=0.6
  // #continuos input in both E cells
  // par GCA=0.1, GH=4.
  // par TR1=2.2, TR2=2.2
  // par GSYNee=6, GSYNei=6, TSYN=2, W=-0.1
  // #GSYNee=6 or 11
  // par GCAi=0.25
  // par TR3=1.5, TR4=1.5
  // par GSYNi=3, TSYNi=8
  // V1'=-MB(V1)*(V1-0.5)-26.*R1*(V1+0.95)-GCA*CA1*(V1-1.2)-GH*H1*(V1+0.95)-GSYNee*S1*(V1+0.0)-GSYNi*(V1+0.75)*(S2+S3)+Ie1
  // R1'=(1./TR1)*(-R1+RB(V1))
  // CA1'=(1./14.)*(-CA1+CAB(V1))
  // H1'=(1./45.)*(-H1+3.*CA1)
  // F1'=(1./TSYN)*(-F1+heav(V2-W))
  // S1'=(1./TSYN)*(-S1+F1)
  // F2'=(1./TSYNi)*(-F2+heav(V3-W))
  // S2'=(1./TSYNi)*(-S2+F2)
  // F3'=(1./TSYNi)*(-F3+heav(V4-W))
  // S3'=(1./TSYNi)*(-S3+F3)
  // V2'=-MB(V2)*(V2-0.5)-26.*R2*(V2+0.95)-GCA*CA2*(V2-1.2)-GH*H2*(V2+0.95)-GSYNee*S4*(V2+0.0)-GSYNi*(V2+0.75)*(S5+S6)+Ie2
  // R2'=(1./TR2)*(-R2+RB(V2))
  // CA2'=(1./14.)*(-CA2+CAB(V2))
  // H2'=(1./45.)*(-H2+3.*CA2)
  // F4'=(1./TSYN)*(-F4+heav(V1-W))
  // S4'=(1./TSYN)*(-S4+F4)
  // F5'=(1./TSYNi)*(-F5+heav(V3-W))
  // S5'=(1./TSYNi)*(-S5+F5)
  // F6'=(1./TSYNi)*(-F6+heav(V4-W))
  // S6'=(1./TSYNi)*(-S6+F6)
  // V3'=-MB(V3)*(V3-0.5)-26.*R3*(V3+0.95)-GCAi*CA3*(V3-1.2)-GSYNi*S7*(V3+0.75)-GSYNei*(V3+0.0)*(S8+S9)
  // R3'=(1./TR3)*(-R3+RB(V3))
  // CA3'=(1./14.)*(-CA3+CAB(V3))
  // F7'=(1./TSYNi)*(-F7+heav(V4-W))
  // S7'=(1./TSYNi)*(-S7+F7)
  // F8'=(1./TSYN)*(-F8+heav(V1-W))
  // S8'=(1./TSYN)*(-S8+F8)
  // F9'=(1./TSYN)*(-F9+heav(V2-W))
  // S9'=(1./TSYN)*(-S9+F9)
  // V4'=-MB(V4)*(V4-0.5)-26.*R4*(V4+0.95)-GCAi*CA4*(V4-1.2)-GSYNi*S10*(V4+0.75)-GSYNei*(V4+0.0)*(S11+S12)
  // R4'=(1./TR4)*(-R4+RB(V4))
  // CA4'=(1./14.)*(-CA4+CAB(V4))
  // F10'=(1./TSYNi)*(-F10+heav(V4-W))
  // S10'=(1./TSYNi)*(-S10+F10)
  // F11'=(1./TSYN)*(-F11+heav(V1-W))
  // S11'=(1./TSYN)*(-S11+F11)
  // F12'=(1./TSYN)*(-F12+heav(V2-W))
  // S12'=(1./TSYN)*(-S12+F12)
  // CAB(V)=8.*(V+0.725)^2
  // MB(V)=17.8+47.6*V+33.8*V*V
  // RB(V)=1.24+3.7*V+3.2*V*V
  // um(Ve1,Ve2)=(Ve1+Ve2)/2
  // @ METHOD=stiff, TOLERANCE=.00001 BELL=0
  // @ dt=.01, total=600, xplot=t,yplot=CA1
  // @ xmin=0.0,xmax=600,ymin=-1.0,ymax=0.4
  // @ xlo=0.0,ylo=0.0,xhi=600,yhi=0.4,bound=30000,MAXSTOR=400000
  // aux n=um(V1,V2)
  // done
  // This file has been produced by sbmlutils.
  // Terms of use
  // Copyright © 2017 Matthias Koenig
  // Redistribution and use of any part of this model, with or without modification, are permitted provided that the following conditions are met:
  // Redistributions of this SBML file must retain the above copyright notice, this list of conditions and the following disclaimer.
  // Redistributions in a different form must reproduce the above copyright notice, this list of conditions and the following disclaimer in the documentation and/or other materials provided with the distribution.
  // This model is distributed in the hope that it will be useful, but WITHOUT ANY WARRANTY; without even the implied warranty of MERCHANTABILITY or FITNESS FOR A PARTICULAR PURPOSE.

  // Parameters:
  v1_0_75 = -0.75; v1_0_75 is "v1 = -0.75";
  r1_0_26 = 0.26; r1_0_26 is "r1 = 0.26";
  ca1_0_1 = 0.1; ca1_0_1 is "ca1 = 0.1";
  h1 = 0.1; h1 is "h1 = 0.1";
  v2_0_71 = -0.71; v2_0_71 is "v2 = -0.71";
  r2_0_26 = 0.26; r2_0_26 is "r2 = 0.26";
  ca2_0_1 = 0.1; ca2_0_1 is "ca2 = 0.1";
  h2 = 0.1; h2 is "h2 = 0.1";
  v3_0_75 = -0.75; v3_0_75 is "v3 = -0.75";
  r3_0_26 = 0.26; r3_0_26 is "r3 = 0.26";
  ca3_0_1 = 0.1; ca3_0_1 is "ca3 = 0.1";
  v4_0_71 = -0.71; v4_0_71 is "v4 = -0.71";
  r4_0_26 = 0.26; r4_0_26 is "r4 = 0.26";
  ca4_0_1 = 0.1; ca4_0_1 is "ca4 = 0.1";
  f1 = 0; f1 is "f1 = 0.0";
  s1_0_0 = 0; s1_0_0 is "s1 = 0.0";
  f2 = 0; f2 is "f2 = 0.0";
  s2_0_0 = 0; s2_0_0 is "s2 = 0.0";
  f3 = 0; f3 is "f3 = 0.0";
  s3_0_0 = 0; s3_0_0 is "s3 = 0.0";
  f4 = 0; f4 is "f4 = 0.0";
  s4_0_0 = 0; s4_0_0 is "s4 = 0.0";
  f5 = 0; f5 is "f5 = 0.0";
  s5_0_0 = 0; s5_0_0 is "s5 = 0.0";
  f6 = 0; f6 is "f6 = 0.0";
  s6_0_0 = 0; s6_0_0 is "s6 = 0.0";
  f7 = 0; f7 is "f7 = 0.0";
  s7_0_0 = 0; s7_0_0 is "s7 = 0.0";
  f8 = 0; f8 is "f8 = 0.0";
  s8_0_0 = 0; s8_0_0 is "s8 = 0.0";
  f9 = 0; f9 is "f9 = 0.0";
  s9_0_0 = 0; s9_0_0 is "s9 = 0.0";
  f10 = 0; f10 is "f10 = 0.0";
  s10_0_0 = 0; s10_0_0 is "s10 = 0.0";
  f11 = 0; f11 is "f11 = 0.0";
  s11_0_0 = 0; s11_0_0 is "s11 = 0.0";
  f12 = 0; f12 is "f12 = 0.0";
  s12_0_0 = 0; s12_0_0 is "s12 = 0.0";
  ie1 = 0.6; ie1 is "ie1 = 0.6";
  ie2 = 0.6; ie2 is "ie2 = 0.6";
  gca = 0.1; gca is "gca = 0.1";
  gh = 4; gh is "gh = 4.";
  tr1 = 2.2; tr1 is "tr1 = 2.2";
  tr2 = 2.2; tr2 is "tr2 = 2.2";
  gsynee = 6; gsynee is "gsynee = 6";
  gsynei = 6; gsynei is "gsynei = 6";
  tsyn = 2; tsyn is "tsyn = 2";
  w = -0.1; w is "w = -0.1";
  gcai = 0.25; gcai is "gcai = 0.25";
  tr3 = 1.5; tr3 is "tr3 = 1.5";
  tr4 = 1.5; tr4 is "tr4 = 1.5";
  gsyni = 3; gsyni is "gsyni = 3";
  tsyni = 8; tsyni is "tsyni = 8";
  n has dimensionless;
  t has dimensionless; t is "model time";

  // Assignment rules:
  n := um(v1_0_75, v2_0_71);
  t := time;

  // Rate rules:
  v1_0_75' = -mb(v1_0_75)*(v1_0_75 - 0.5) - 26*r1_0_26*(v1_0_75 + 0.95) - gca*ca1_0_1*(v1_0_75 - 1.2) - gh*h1*(v1_0_75 + 0.95) - gsynee*s1_0_0*(v1_0_75 + 0) - gsyni*(v1_0_75 + 0.75)*(s2_0_0 + s3_0_0) + ie1;
  r1_0_26' = 1/tr1*(-r1_0_26 + rb(v1_0_75));
  ca1_0_1' = 1/14*(-ca1_0_1 + cab(v1_0_75));
  h1' = 1/45*(-h1 + 3*ca1_0_1);
  f1' = 1/tsyn*(-f1 + heav(v2_0_71 - w));
  s1_0_0' = 1/tsyn*(-s1_0_0 + f1);
  f2' = 1/tsyni*(-f2 + heav(v3_0_75 - w));
  s2_0_0' = 1/tsyni*(-s2_0_0 + f2);
  f3' = 1/tsyni*(-f3 + heav(v4_0_71 - w));
  s3_0_0' = 1/tsyni*(-s3_0_0 + f3);
  v2_0_71' = -mb(v2_0_71)*(v2_0_71 - 0.5) - 26*r2_0_26*(v2_0_71 + 0.95) - gca*ca2_0_1*(v2_0_71 - 1.2) - gh*h2*(v2_0_71 + 0.95) - gsynee*s4_0_0*(v2_0_71 + 0) - gsyni*(v2_0_71 + 0.75)*(s5_0_0 + s6_0_0) + ie2;
  r2_0_26' = 1/tr2*(-r2_0_26 + rb(v2_0_71));
  ca2_0_1' = 1/14*(-ca2_0_1 + cab(v2_0_71));
  h2' = 1/45*(-h2 + 3*ca2_0_1);
  f4' = 1/tsyn*(-f4 + heav(v1_0_75 - w));
  s4_0_0' = 1/tsyn*(-s4_0_0 + f4);
  f5' = 1/tsyni*(-f5 + heav(v3_0_75 - w));
  s5_0_0' = 1/tsyni*(-s5_0_0 + f5);
  f6' = 1/tsyni*(-f6 + heav(v4_0_71 - w));
  s6_0_0' = 1/tsyni*(-s6_0_0 + f6);
  v3_0_75' = -mb(v3_0_75)*(v3_0_75 - 0.5) - 26*r3_0_26*(v3_0_75 + 0.95) - gcai*ca3_0_1*(v3_0_75 - 1.2) - gsyni*s7_0_0*(v3_0_75 + 0.75) - gsynei*(v3_0_75 + 0)*(s8_0_0 + s9_0_0);
  r3_0_26' = 1/tr3*(-r3_0_26 + rb(v3_0_75));
  ca3_0_1' = 1/14*(-ca3_0_1 + cab(v3_0_75));
  f7' = 1/tsyni*(-f7 + heav(v4_0_71 - w));
  s7_0_0' = 1/tsyni*(-s7_0_0 + f7);
  f8' = 1/tsyn*(-f8 + heav(v1_0_75 - w));
  s8_0_0' = 1/tsyn*(-s8_0_0 + f8);
  f9' = 1/tsyn*(-f9 + heav(v2_0_71 - w));
  s9_0_0' = 1/tsyn*(-s9_0_0 + f9);
  v4_0_71' = -mb(v4_0_71)*(v4_0_71 - 0.5) - 26*r4_0_26*(v4_0_71 + 0.95) - gcai*ca4_0_1*(v4_0_71 - 1.2) - gsyni*s10_0_0*(v4_0_71 + 0.75) - gsynei*(v4_0_71 + 0)*(s11_0_0 + s12_0_0);
  r4_0_26' = 1/tr4*(-r4_0_26 + rb(v4_0_71));
  ca4_0_1' = 1/14*(-ca4_0_1 + cab(v4_0_71));
  f10' = 1/tsyni*(-f10 + heav(v4_0_71 - w));
  s10_0_0' = 1/tsyni*(-s10_0_0 + f10);
  f11' = 1/tsyn*(-f11 + heav(v1_0_75 - w));
  s11_0_0' = 1/tsyn*(-s11_0_0 + f11);
  f12' = 1/tsyn*(-f12 + heav(v2_0_71 - w));
  s12_0_0' = 1/tsyn*(-s12_0_0 + f12);
end
