// SBML level 3 version 1

function max(x, y)
  piecewise(x, x > y, y);
end
max is "minimum";

function min(x, y)
  piecewise(x, x < y, y);
end
min is "maximum";

function heav(x)
  piecewise(0, x < 0, 0.5, x == 0, 1, x > 0, 0);
end
heav is "heavyside";

function mod(x, y)
  piecewise(x - y*ceil(x/y), xor(x < 0, y < 0), x - y*floor(x/y));
end
mod is "modulo";

function cinf(v)
  8*(v + 0.725)^2;
end

function minf(v)
  17.8 + 47.6*v + 33.8*v*v;
end

function rinf(v)
  1.24 + 3.7*v + 3.2*v*v;
end

model main()
  // XPP model
  // This model was converted from XPP ode format to SBML using sbmlutils-0.1.5a6.
  // # Kuznetsova and Deth, JCN, 2007
  // # 10-cell model: 8 E cells (Ve1, Ve2, ...Ve8) and 2 I (Vi1, Vi2) cells
  // # only EE neighbours are connected, all E to I
  // # variables: V-voltage, R-K channel, C-Ca channel, H- Ca dependent K chanel, S,F - synapse
  // # different init condit
  // init Ve1=-0.75 Ve2=-0.745 Ve3=-0.73 Ve4=-0.74 Ve5=-0.72 Ve6=-0.735 Ve7=-0.71 Ve8=-0.715
  // init Vi1=-0.75 Vi1=-0.71
  // init Re[1...8]=0.26
  // init Ce[1...8]=0.1
  // init He[1...8]=0.1
  // init Ri[1...2]=0.26
  // init Ci[1...2]=0.1
  // par Ie=0.6
  // #continuos input in all E cells, canceled in I cells
  // par GCe=0.1, GCi=0.25
  // par GHe=4.0
  // par TRe[1]=2.1
  // par TRe[2]=2.2
  // par TRe[3]=2.3
  // par TRe[4]=2.15
  // par TRe[5]=2.25
  // par TRe[6]=2.16
  // par TRe[7]=2.12
  // par TRe[8]=2.22
  // # this is time constant for K channel in E cells, it is varied from 6 to 2
  // par GSee=3.
  // #6/2, 3
  // par GSei=1.5
  // #6/4
  // par GSi=3.
  // #from I to E and I to I
  // par TRi[1..2]=1.5
  // # the same for in I cells, usualy it is not varied
  // par TSe=2., TSi=8.
  // #par ESe=0, ESi=-0.75
  // #excit=0 inhib=-0.75
  // par W=-0.1
  // AlE=Se1+Se2+Se3+Se4+Se5+Se6+Se7+Se8
  // Fe1'=(1./TSe)*(-Fe1+heav(Ve1-W))
  // Se1'=(1./TSe)*(-Se1+Fe1)
  // Fe2'=(1./TSe)*(-Fe2+heav(Ve2-W))
  // Se2'=(1./TSe)*(-Se2+Fe2)
  // Fe3'=(1./TSe)*(-Fe3+heav(Ve3-W))
  // Se3'=(1./TSe)*(-Se3+Fe3)
  // Fe4'=(1./TSe)*(-Fe4+heav(Ve4-W))
  // Se4'=(1./TSe)*(-Se4+Fe4)
  // Fe5'=(1./TSe)*(-Fe5+heav(Ve5-W))
  // Se5'=(1./TSe)*(-Se5+Fe5)
  // Fe6'=(1./TSe)*(-Fe6+heav(Ve6-W))
  // Se6'=(1./TSe)*(-Se6+Fe6)
  // Fe7'=(1./TSe)*(-Fe7+heav(Ve7-W))
  // Se7'=(1./TSe)*(-Se7+Fe7)
  // Fe8'=(1./TSe)*(-Fe8+heav(Ve8-W))
  // Se8'=(1./TSe)*(-Se8+Fe8)
  // AlI=Si1+Si2
  // Fi1'=(1./TSi)*(-Fi1+heav(Vi1-W))
  // Si1'=(1./TSi)*(-Si1+Fi1)
  // Fi2'=(1./TSi)*(-Fi2+heav(Vi2-W))
  // Si2'=(1./TSi)*(-Si2+Fi2)
  // Ve1'=-Minf(Ve1)*(Ve1-0.5)-26.*Re1*(Ve1+0.95)-GCe*Ce1*(Ve1-1.2)-GHe*He1*(Ve1+0.95)-GSi*(Ve1+0.75)*AlI-GSee*(Ve1+0.0)*Se2+Ie
  // Re1'=(1./TRe1)*(-Re1+Rinf(Ve1))
  // Ce1'=(1./14.)*(-Ce1+Cinf(Ve1))
  // He1'=(1./45.)*(-He1+3.*Ce1)
  // Ve2'=-Minf(Ve2)*(Ve2-0.5)-26.*Re2*(Ve2+0.95)-GCe*Ce2*(Ve2-1.2)-GHe*He2*(Ve2+0.95)-GSi*(Ve2+0.75)*AlI-GSee*(Ve2+0.0)*(Se1+Se3)+Ie
  // Re2'=(1./TRe2)*(-Re2+Rinf(Ve2))
  // Ce2'=(1./14.)*(-Ce2+Cinf(Ve2))
  // He2'=(1./45.)*(-He2+3.*Ce2)
  // Ve3'=-Minf(Ve3)*(Ve3-0.5)-26.*Re3*(Ve3+0.95)-GCe*Ce3*(Ve3-1.2)-GHe*He3*(Ve3+0.95)-GSi*(Ve3+0.75)*AlI-GSee*(Ve3+0.0)*(Se2+Se4)+Ie
  // Re3'=(1./TRe3)*(-Re3+Rinf(Ve3))
  // Ce3'=(1./14.)*(-Ce3+Cinf(Ve3))
  // He3'=(1./45.)*(-He3+3.*Ce3)
  // Ve4'=-Minf(Ve4)*(Ve4-0.5)-26.*Re4*(Ve4+0.95)-GCe*Ce4*(Ve4-1.2)-GHe*He4*(Ve4+0.95)-GSi*(Ve4+0.75)*AlI-GSee*(Ve4+0.0)*(Se3+Se5)+Ie
  // Re4'=(1./TRe4)*(-Re4+Rinf(Ve4))
  // Ce4'=(1./14.)*(-Ce4+Cinf(Ve4))
  // He4'=(1./45.)*(-He4+3.*Ce4)
  // Ve5'=-Minf(Ve5)*(Ve5-0.5)-26.*Re5*(Ve5+0.95)-GCe*Ce5*(Ve5-1.2)-GHe*He5*(Ve5+0.95)-GSi*(Ve5+0.75)*AlI-GSee*(Ve5+0.0)*(Se4+Se6)+Ie
  // Re5'=(1./TRe5)*(-Re5+Rinf(Ve5))
  // Ce5'=(1./14.)*(-Ce5+Cinf(Ve5))
  // He5'=(1./45.)*(-He5+3.*Ce5)
  // Ve6'=-Minf(Ve6)*(Ve6-0.5)-26.*Re6*(Ve6+0.95)-GCe*Ce6*(Ve6-1.2)-GHe*He6*(Ve6+0.95)-GSi*(Ve6+0.75)*AlI-GSee*(Ve6+0.0)*(Se5+Se7)+Ie
  // Re6'=(1./TRe6)*(-Re6+Rinf(Ve6))
  // Ce6'=(1./14.)*(-Ce6+Cinf(Ve6))
  // He6'=(1./45.)*(-He6+3.*Ce6)
  // Ve7'=-Minf(Ve7)*(Ve7-0.5)-26.*Re7*(Ve7+0.95)-GCe*Ce7*(Ve7-1.2)-GHe*He7*(Ve7+0.95)-GSi*(Ve7+0.75)*AlI-GSee*(Ve7+0.0)*(Se6+Se8)+Ie
  // Re7'=(1./TRe7)*(-Re7+Rinf(Ve7))
  // Ce7'=(1./14.)*(-Ce7+Cinf(Ve7))
  // He7'=(1./45.)*(-He7+3.*Ce7)
  // Ve8'=-Minf(Ve8)*(Ve8-0.5)-26.*Re8*(Ve8+0.95)-GCe*Ce8*(Ve8-1.2)-GHe*He8*(Ve8+0.95)-GSi*(Ve8+0.75)*AlI-GSee*(Ve8+0.0)*Se7+Ie
  // Re8'=(1./TRe8)*(-Re8+Rinf(Ve8))
  // Ce8'=(1./14.)*(-Ce8+Cinf(Ve8))
  // He8'=(1./45.)*(-He8+3.*Ce8)
  // Vi1'=-Minf(Vi1)*(Vi1-0.5)-26.*Ri1*(Vi1+0.95)-GCi*Ci1*(Vi1-1.2)-GSi*(Vi1+0.75)*Si2-GSei*(Vi1-0.0)*AlE
  // Ri1'=(1./TRi1)*(-Ri1+Rinf(Vi1))
  // Ci1'=(1./14.)*(-Ci1+Cinf(Vi1))
  // Vi2'=-Minf(Vi2)*(Vi2-0.5)-26.*Ri2*(Vi2+0.95)-GCi*Ci2*(Vi2-1.2)-GSi*(Vi2+0.75)*Si1-GSei*(Vi2-0.0)*AlE
  // Ri2'=(1./TRi2)*(-Ri2+Rinf(Vi2))
  // Ci2'=(1./14.)*(-Ci2+Cinf(Vi2))
  // Cinf(V)=8.*(V+0.725)^2
  // Minf(V)=17.8+47.6*V+33.8*V*V
  // Rinf(V)=1.24+3.7*V+3.2*V*V
  // aux n=(Ve1+Ve2+Ve3+Ve4+Ve5+Ve6+Ve7+Ve8)/8.
  // #if(Ve1-W>0)then(Q(Ve1-W)=1)else(Q(Ve1-W)=0)
  // @ METHOD=stiff, TOLERANCE=.00001
  // @ MAXSTOR=400000, TOTAL=1000, XP=t,YP=n, BELL=0
  // @ xmin=0.0,xmax=1000,ymin=-1,ymax=0.5
  // @ DT=0.01, xlo=0.0,ylo=-1.0,xhi=1000,yhi=0.5,bound=30000
  // done
  // This file has been produced by sbmlutils.
  // Terms of use
  // Copyright © 2017 Matthias Koenig
  // Redistribution and use of any part of this model, with or without modification, are permitted provided that the following conditions are met:
  // Redistributions of this SBML file must retain the above copyright notice, this list of conditions and the following disclaimer.
  // Redistributions in a different form must reproduce the above copyright notice, this list of conditions and the following disclaimer in the documentation and/or other materials provided with the distribution.
  // This model is distributed in the hope that it will be useful, but WITHOUT ANY WARRANTY; without even the implied warranty of MERCHANTABILITY or FITNESS FOR A PARTICULAR PURPOSE.

  // Parameters:
  ve1 = -0.75; ve1 is "ve1 = -0.75";
  ve2 = -0.745; ve2 is "ve2 = -0.745";
  ve3 = -0.73; ve3 is "ve3 = -0.73";
  ve4 = -0.74; ve4 is "ve4 = -0.74";
  ve5 = -0.72; ve5 is "ve5 = -0.72";
  ve6 = -0.735; ve6 is "ve6 = -0.735";
  ve7 = -0.71; ve7 is "ve7 = -0.71";
  ve8 = -0.715; ve8 is "ve8 = -0.715";
  vi1 = -0.75; vi1 is "vi1 = -0.75";
  vi1 = -0.71; vi1 is "vi1 = -0.71";
  re[1...8] = 0.26 = 0.26;
  ce[1...8] = 0.1 = 0.1;
  he[1...8] = 0.1 = 0.1;
  ri[1...2] = 0.26 = 0.26;
  ci[1...2] = 0.1 = 0.1;
  ie = 0.6; ie is "ie = 0.6";
  gce = 0.1; gce is "gce = 0.1";
  gci = 0.25; gci is "gci = 0.25";
  ghe = 4; ghe is "ghe = 4.0";
  tre[1] = 2.1 = 2.1;
  tre[2] = 2.2 = 2.2;
  tre[3] = 2.3 = 2.3;
  tre[4] = 2.15 = 2.15;
  tre[5] = 2.25 = 2.25;
  tre[6] = 2.16 = 2.16;
  tre[7] = 2.12 = 2.12;
  tre[8] = 2.22 = 2.22;
  gsee = 3; gsee is "gsee = 3.";
  gsei = 1.5; gsei is "gsei = 1.5";
  gsi = 3; gsi is "gsi = 3.";
  tri[1..2] = 1.5 = 1.5;
  tse = 2; tse is "tse = 2.";
  tsi = 8; tsi is "tsi = 8.";
  w = -0.1; w is "w = -0.1";
  fe1 = 0 dimensionless;
  se1 = 0 dimensionless;
  fe2 = 0 dimensionless;
  se2 = 0 dimensionless;
  fe3 = 0 dimensionless;
  se3 = 0 dimensionless;
  fe4 = 0 dimensionless;
  se4 = 0 dimensionless;
  fe5 = 0 dimensionless;
  se5 = 0 dimensionless;
  fe6 = 0 dimensionless;
  se6 = 0 dimensionless;
  fe7 = 0 dimensionless;
  se7 = 0 dimensionless;
  fe8 = 0 dimensionless;
  se8 = 0 dimensionless;
  fi1 = 0 dimensionless;
  si1 = 0 dimensionless;
  fi2 = 0 dimensionless;
  si2 = 0 dimensionless;
  re1 = 0 dimensionless;
  ce1 = 0 dimensionless;
  he1 = 0 dimensionless;
  re2 = 0 dimensionless;
  ce2 = 0 dimensionless;
  he2 = 0 dimensionless;
  re3 = 0 dimensionless;
  ce3 = 0 dimensionless;
  he3 = 0 dimensionless;
  re4 = 0 dimensionless;
  ce4 = 0 dimensionless;
  he4 = 0 dimensionless;
  re5 = 0 dimensionless;
  ce5 = 0 dimensionless;
  he5 = 0 dimensionless;
  re6 = 0 dimensionless;
  ce6 = 0 dimensionless;
  he6 = 0 dimensionless;
  re7 = 0 dimensionless;
  ce7 = 0 dimensionless;
  he7 = 0 dimensionless;
  re8 = 0 dimensionless;
  ce8 = 0 dimensionless;
  he8 = 0 dimensionless;
  ri1 = 0 dimensionless;
  ci1 = 0 dimensionless;
  vi2 = 0 dimensionless;
  ri2 = 0 dimensionless;
  ci2 = 0 dimensionless;
  ale has dimensionless;
  ali has dimensionless;
  n has dimensionless;
  t has dimensionless; t is "model time";

  // Assignment rules:
  ale := se1 + se2 + se3 + se4 + se5 + se6 + se7 + se8;
  ali := si1 + si2;
  n := (ve1 + ve2 + ve3 + ve4 + ve5 + ve6 + ve7 + ve8)/8;
  t := time;

  // Rate rules:
  fe1' = 1/tse*(-fe1 + heav(ve1 - w));
  se1' = 1/tse*(-se1 + fe1);
  fe2' = 1/tse*(-fe2 + heav(ve2 - w));
  se2' = 1/tse*(-se2 + fe2);
  fe3' = 1/tse*(-fe3 + heav(ve3 - w));
  se3' = 1/tse*(-se3 + fe3);
  fe4' = 1/tse*(-fe4 + heav(ve4 - w));
  se4' = 1/tse*(-se4 + fe4);
  fe5' = 1/tse*(-fe5 + heav(ve5 - w));
  se5' = 1/tse*(-se5 + fe5);
  fe6' = 1/tse*(-fe6 + heav(ve6 - w));
  se6' = 1/tse*(-se6 + fe6);
  fe7' = 1/tse*(-fe7 + heav(ve7 - w));
  se7' = 1/tse*(-se7 + fe7);
  fe8' = 1/tse*(-fe8 + heav(ve8 - w));
  se8' = 1/tse*(-se8 + fe8);
  fi1' = 1/tsi*(-fi1 + heav(vi1 - w));
  si1' = 1/tsi*(-si1 + fi1);
  fi2' = 1/tsi*(-fi2 + heav(vi2 - w));
  si2' = 1/tsi*(-si2 + fi2);
  ve1' = -minf(ve1)*(ve1 - 0.5) - 26*re1*(ve1 + 0.95) - gce*ce1*(ve1 - 1.2) - ghe*he1*(ve1 + 0.95) - gsi*(ve1 + 0.75)*ali - gsee*(ve1 + 0)*se2 + ie;
  re1' = 1/tre1*(-re1 + rinf(ve1));
  ce1' = 1/14*(-ce1 + cinf(ve1));
  he1' = 1/45*(-he1 + 3*ce1);
  ve2' = -minf(ve2)*(ve2 - 0.5) - 26*re2*(ve2 + 0.95) - gce*ce2*(ve2 - 1.2) - ghe*he2*(ve2 + 0.95) - gsi*(ve2 + 0.75)*ali - gsee*(ve2 + 0)*(se1 + se3) + ie;
  re2' = 1/tre2*(-re2 + rinf(ve2));
  ce2' = 1/14*(-ce2 + cinf(ve2));
  he2' = 1/45*(-he2 + 3*ce2);
  ve3' = -minf(ve3)*(ve3 - 0.5) - 26*re3*(ve3 + 0.95) - gce*ce3*(ve3 - 1.2) - ghe*he3*(ve3 + 0.95) - gsi*(ve3 + 0.75)*ali - gsee*(ve3 + 0)*(se2 + se4) + ie;
  re3' = 1/tre3*(-re3 + rinf(ve3));
  ce3' = 1/14*(-ce3 + cinf(ve3));
  he3' = 1/45*(-he3 + 3*ce3);
  ve4' = -minf(ve4)*(ve4 - 0.5) - 26*re4*(ve4 + 0.95) - gce*ce4*(ve4 - 1.2) - ghe*he4*(ve4 + 0.95) - gsi*(ve4 + 0.75)*ali - gsee*(ve4 + 0)*(se3 + se5) + ie;
  re4' = 1/tre4*(-re4 + rinf(ve4));
  ce4' = 1/14*(-ce4 + cinf(ve4));
  he4' = 1/45*(-he4 + 3*ce4);
  ve5' = -minf(ve5)*(ve5 - 0.5) - 26*re5*(ve5 + 0.95) - gce*ce5*(ve5 - 1.2) - ghe*he5*(ve5 + 0.95) - gsi*(ve5 + 0.75)*ali - gsee*(ve5 + 0)*(se4 + se6) + ie;
  re5' = 1/tre5*(-re5 + rinf(ve5));
  ce5' = 1/14*(-ce5 + cinf(ve5));
  he5' = 1/45*(-he5 + 3*ce5);
  ve6' = -minf(ve6)*(ve6 - 0.5) - 26*re6*(ve6 + 0.95) - gce*ce6*(ve6 - 1.2) - ghe*he6*(ve6 + 0.95) - gsi*(ve6 + 0.75)*ali - gsee*(ve6 + 0)*(se5 + se7) + ie;
  re6' = 1/tre6*(-re6 + rinf(ve6));
  ce6' = 1/14*(-ce6 + cinf(ve6));
  he6' = 1/45*(-he6 + 3*ce6);
  ve7' = -minf(ve7)*(ve7 - 0.5) - 26*re7*(ve7 + 0.95) - gce*ce7*(ve7 - 1.2) - ghe*he7*(ve7 + 0.95) - gsi*(ve7 + 0.75)*ali - gsee*(ve7 + 0)*(se6 + se8) + ie;
  re7' = 1/tre7*(-re7 + rinf(ve7));
  ce7' = 1/14*(-ce7 + cinf(ve7));
  he7' = 1/45*(-he7 + 3*ce7);
  ve8' = -minf(ve8)*(ve8 - 0.5) - 26*re8*(ve8 + 0.95) - gce*ce8*(ve8 - 1.2) - ghe*he8*(ve8 + 0.95) - gsi*(ve8 + 0.75)*ali - gsee*(ve8 + 0)*se7 + ie;
  re8' = 1/tre8*(-re8 + rinf(ve8));
  ce8' = 1/14*(-ce8 + cinf(ve8));
  he8' = 1/45*(-he8 + 3*ce8);
  vi1' = -minf(vi1)*(vi1 - 0.5) - 26*ri1*(vi1 + 0.95) - gci*ci1*(vi1 - 1.2) - gsi*(vi1 + 0.75)*si2 - gsei*(vi1 - 0)*ale;
  ri1' = 1/tri1*(-ri1 + rinf(vi1));
  ci1' = 1/14*(-ci1 + cinf(vi1));
  vi2' = -minf(vi2)*(vi2 - 0.5) - 26*ri2*(vi2 + 0.95) - gci*ci2*(vi2 - 1.2) - gsi*(vi2 + 0.75)*si1 - gsei*(vi2 - 0)*ale;
  ri2' = 1/tri2*(-ri2 + rinf(vi2));
  ci2' = 1/14*(-ci2 + cinf(vi2));
end
