// SBML level 3 version 1

function max(x, y)
  piecewise(x, x > y, y);
end
max is "minimum";

function min(x, y)
  piecewise(x, x < y, y);
end
min is "maximum";

function heav(x)
  piecewise(0, x < 0, 0.5, x == 0, 1, x > 0, 0);
end
heav is "heavyside";

function mod(x, y)
  piecewise(x - y*ceil(x/y), xor(x < 0, y < 0), x - y*floor(x/y));
end
mod is "modulo";

function alphairn(v)
  0.09/(1 + exp(0.11*(v + 100)));
end

function betairn(v)
  0.00035*exp(0.07*(v + 25));
end

function nirinf(v)
  1/(1 + betairn(v)/alphairn(v));
end

function tauirn(v)
  1/(alphairn(v) + betairn(v));
end

function alphairr(v)
  30/(1 + exp(0.04*(v + 230)));
end

function betairr(v)
  0.15/(1 + exp(-0.05*(v + 120)));
end

function ririnf(v)
  1/(1 + betairr(v)/alphairr(v));
end

function tauirr(v)
  1/(alphairr(v) + betairr(v));
end

function ica(v, gca, sm, vca, vm)
  gca*minf(v, sm, vm)*(v - vca);
end

function ik(v, gk, n, vk)
  gk*n*(v - vk);
end

function ikca(v, gkca, vk, w)
  gkca*w*(v - vk);
end

function ikatp(v, a, gkatp, vk)
  gkatp*a*(v - vk);
end

function iir(v, gir, nir, rir, vir)
  gir*nir*rir*(v - vir);
end

function minf(v, sm, vm)
  1/(1 + exp((vm - v)/sm));
end

function ninf(v, sn, vn)
  1/(1 + exp((vn - v)/sn));
end

function ainf(c, r, sa)
  1/(1 + exp((r - c)/sa));
end

model main()
  // XPP model
  // This model was converted from XPP ode format to SBML using sbmlutils-0.1.5a6.
  // #Simulation of pituitary GH(3) cells, firing of action potentials with three slow variable
  // #IK(erg) was incorporated. gkatp channels were regulated.
  // # Wu SN and Chang HD, Diethyl pyrocarbonate, a histidine-modifying agent,
  // # directly stimulate activity of ATP-sensitive potassium channels in pituitary GH(3) cells.
  // # Biochem Pharmacol 2005 Dec 19; [Epub ahead of print].
  // #units: V=mV; t=ms; g=pS; I=fA
  // #Reference: Bertram and Sherman.
  // #Calcium-based model for pituitary GH3 cells
  // #
  // #Ica- calcium current
  // #Ik- delayed rectifier K+ current
  // #Ik(Ca)- Ca2+ dependent K+ current
  // #Ik(ATP)- nucleotide-sensitive K+ current
  // #Iir- erg-like K+ current
  // #c - cytosolic free Ca2+ concentration
  // #cer - ER Ca2+ concentration
  // #initial conditions
  // init v=-60.0, c=0.10, n=0.01, cer=100, a=0.46, nIR=0.008, rIR=0.282
  // #parameters
  // par gca=1000, gkca=900, gk=1400, gir=5
  // par vca=50, vk=-75, vir=-75, cm=5300
  // par taun=16, alpha=4.5e-6
  // par fcyt=0.01, kpmca=0.2, kd=0.3
  // par vn=-16, vm=-20, sn=5, sm=12
  // par kserca=0.4, dact=0.35, dinact=0.4
  // par fer=0.01, pleak=0.0005, dip3=0.5, vcytver=5
  // par ip3=0, sa=0.1, r=0.14 taua=300000
  // par tstim=3e4
  // gkatp=if(t<tstim)then(500)else(530)
  // # Iir parameters
  // alphaIRn(v) = 0.09/(1+exp(0.11*(v+100)))
  // betaIRn(v) = 0.00035*exp(0.07*(v+25))
  // nIRinf(v) = 1/(1+betaIRn(v)/alphaIRn(v))
  // tauIRn(v) = 1/(alphaIRn(v) + betaIRn(v))
  // alphaIRr(v) = 30/(1+exp(0.04*(v+230)))
  // betaIRr(v) = 0.15/(1+exp(-0.05*(v+120)))
  // rIRinf(v) = 1/(1+betaIRr(v)/alphaIRr(v))
  // tauIRr(v) = 1/(alphaIRr(v) + betaIRr(v))
  // #Iir activation and inactivation functions
  // nIR' = (nIRinf(v) - nIR)/tauIRn(v)
  // rIR' = (rIRinf(v) - rIR)/tauIRr(v)
  // # ionic currents
  // ica(v)=gca*minf(v)*(v-vca)
  // ik(v)=gk*n*(v-vk)
  // ikca(v)=gkca*w*(v-vk)
  // ikatp(v)=gkatp*a*(v-vk)
  // iir(v)=gir*nIR*rIR*(v-vir)
  // #activation functions
  // minf(v)=1.0/(1.0+exp((vm-v)/sm))
  // ninf(v)=1.0/(1.0+exp((vn-v)/sn))
  // ainf(c)=1.0/(1.0+exp((r-c)/sa))
  // #fraction of K(Ca) channels activated by cytosolic Ca2+
  // w=c^5/(c^5+kd^5)
  // #flux of Ca2+ through the membrane
  // jmem=-(alpha*Ica(v)+kpmca*c)
  // #Ca2+ influx into the ER via SERCA
  // jserca=kserca*c
  // #efflux out of the ER has two components
  // # 1. Ca2+ leak is proportional to gradient between Ca2+ and ER
  // jleak=pleak*(cer-c)
  // # 2. Ca2+ efflux through the IP3R
  // jip3=oinf*(cer-c)
  // #fraction of open channels
  // oinf=(c/(dact+c))*(ip3/(dip3+ip3))*(dinact/(dinact+c))
  // #net Ca2+ efflux from the ER
  // jer=jleak+jip3-jserca
  // #differential equations
  // v'=-(ica(v)+ik(v)+ikca(v)+ikatp(v)+iir(v))/cm
  // n'=(ninf(v)-n)/taun
  // c'=fcyt*(jmem+jer)
  // cer'=-fer*(vcytver)*jer
  // a'=(ainf(c)-a)/taua
  // aux tsec=t/1000.0
  // @ meth=cvode, dtmax=1, dt=2, total=8e4, maxstor=80000
  // @ bounds=1000, xp=tsec, yp=v, toler=1.0e-7, atoler=1.0e-7
  // @ xlo=0, xhi=80, ylo=-80, yhi=5
  // done
  // This file has been produced by sbmlutils.
  // Terms of use
  // Copyright © 2017 Matthias Koenig
  // Redistribution and use of any part of this model, with or without modification, are permitted provided that the following conditions are met:
  // Redistributions of this SBML file must retain the above copyright notice, this list of conditions and the following disclaimer.
  // Redistributions in a different form must reproduce the above copyright notice, this list of conditions and the following disclaimer in the documentation and/or other materials provided with the distribution.
  // This model is distributed in the hope that it will be useful, but WITHOUT ANY WARRANTY; without even the implied warranty of MERCHANTABILITY or FITNESS FOR A PARTICULAR PURPOSE.

  // Parameters:
  v = -60; v is "v = -60.0";
  c = 0.1; c is "c = 0.10";
  n = 0.01; n is "n = 0.01";
  cer = 100; cer is "cer = 100";
  a = 0.46; a is "a = 0.46";
  nir = 0.008; nir is "nir = 0.008";
  rir = 0.282; rir is "rir = 0.282";
  gca = 1000; gca is "gca = 1000";
  gkca = 900; gkca is "gkca = 900";
  gk = 1400; gk is "gk = 1400";
  gir = 5; gir is "gir = 5";
  vca = 50; vca is "vca = 50";
  vk = -75; vk is "vk = -75";
  vir = -75; vir is "vir = -75";
  cm = 5300; cm is "cm = 5300";
  taun = 16; taun is "taun = 16";
  alpha = 4.5e-6; alpha is "alpha = 4.5e-6";
  fcyt = 0.01; fcyt is "fcyt = 0.01";
  kpmca = 0.2; kpmca is "kpmca = 0.2";
  kd = 0.3; kd is "kd = 0.3";
  vn = -16; vn is "vn = -16";
  vm = -20; vm is "vm = -20";
  sn = 5; sn is "sn = 5";
  sm = 12; sm is "sm = 12";
  kserca = 0.4; kserca is "kserca = 0.4";
  dact = 0.35; dact is "dact = 0.35";
  dinact = 0.4; dinact is "dinact = 0.4";
  fer = 0.01; fer is "fer = 0.01";
  pleak = 0.0005; pleak is "pleak = 0.0005";
  dip3 = 0.5; dip3 is "dip3 = 0.5";
  vcytver = 5; vcytver is "vcytver = 5";
  ip3 = 0; ip3 is "ip3 = 0";
  sa = 0.1; sa is "sa = 0.1";
  r = 0.14; r is "r = 0.14";
  taua = 300000; taua is "taua = 300000";
  tstim = 30000; tstim is "tstim = 3e4";
  gkatp has dimensionless;
  w has dimensionless;
  jmem has dimensionless;
  jserca has dimensionless;
  jleak has dimensionless;
  jip3 has dimensionless;
  oinf has dimensionless;
  jer has dimensionless;
  tsec has dimensionless;
  t has dimensionless; t is "model time";

  // Assignment rules:
  gkatp := piecewise(500, t < tstim, 530);
  w := c^5/(c^5 + kd^5);
  jmem := -(alpha*ica(v, gca, sm, vca, vm) + kpmca*c);
  jserca := kserca*c;
  jleak := pleak*(cer - c);
  jip3 := oinf*(cer - c);
  oinf := c/(dact + c)*(ip3/(dip3 + ip3))*(dinact/(dinact + c));
  jer := jleak + jip3 - jserca;
  tsec := t/1000;
  t := time;

  // Rate rules:
  nir' = (nirinf(v) - nir)/tauirn(v);
  rir' = (ririnf(v) - rir)/tauirr(v);
  v' = -(ica(v, gca, sm, vca, vm) + ik(v, gk, n, vk) + ikca(v, gkca, vk, w) + ikatp(v, a, gkatp, vk) + iir(v, gir, nir, rir, vir))/cm;
  n' = (ninf(v, sn, vn) - n)/taun;
  c' = fcyt*(jmem + jer);
  cer' = -fer*vcytver*jer;
  a' = (ainf(c, r, sa) - a)/taua;
end
