// SBML level 3 version 1

function max(x, y)
  piecewise(x, x > y, y);
end
max is "minimum";

function min(x, y)
  piecewise(x, x < y, y);
end
min is "maximum";

function heav(x)
  piecewise(0, x < 0, 0.5, x == 0, 1, x > 0, 0);
end
heav is "heavyside";

function mod(x, y)
  piecewise(x - y*ceil(x/y), xor(x < 0, y < 0), x - y*floor(x/y));
end
mod is "modulo";

model main()
  // XPP model
  // This model was converted from XPP ode format to SBML using sbmlutils-0.1.5a6.
  // # Allosteric model for large-conductance calcium-activated potassium channel
  // # Horrigan, Cui, Aldrich, J Gen Physiol 1999;114:277-304.
  // # Scheme IX
  // # Constant:
  // R=8.14
  // Fara=96.485
  // Temp=310
  // # Initial values
  // ini c0=1, c1=0, c2=0, c3=0, c4=0, o0=0, o1=0, o2=0, o3=0, o4=0
  // # Values of the model parameters
  // par a_0=.257, b_0=7.129, d0_0=.00384e-3, d1_0=.0653e-3, d2_0=1.11e-3, d3_0=6.99e-3, d4_0=44.0e-3
  // par r0_0=1.923, r1_0=1.923, r2_0=1.923, r3_0=.712, r4_0=.294
  // par ko=140
  // par ki=140
  // par vhold=0, vtest=220
  // par za=.275, zb=-.275 , zd=.262, zr=-.138, D=17
  // par scale=5
  // par GKbar=0.200
  // par ton=5, toff=35
  // v=vhold+heav(t-ton)*heav(toff-t)*(vtest-vhold)
  // # Expressions:
  // Ek=((R*Temp)/F)*ln(ko/ki)
  // a=a_0*exp((v)*(za*Fara/(R*Temp)))
  // b=b_0*exp((v)*(zb*Fara/(R*Temp)))
  // d0=d0_0*exp((v)*(zd*Fara/(R*Temp)))
  // d1=d1_0*exp((v)*(zd*Fara/(R*Temp)))
  // d2=d2_0*exp((v)*(zd*Fara/(R*Temp)))
  // d3=d3_0*exp((v)*(zd*Fara/(R*Temp)))
  // d4=d4_0*exp((v)*(zd*Fara/(R*Temp)))
  // r0=r0_0*exp((v)*(zr*Fara/(R*Temp)))
  // r1=r1_0*exp((v)*(zr*Fara/(R*Temp)))
  // r2=r2_0*exp((v)*(zr*Fara/(R*Temp)))
  // r3=r3_0*exp((v)*(zr*Fara/(R*Temp)))
  // r4=r4_0*exp((v)*(zr*Fara/(R*Temp)))
  // f=17^0.5
  // # Gating functions
  // c0'=c1*b+o0*r0-c0*(4*a+d0)
  // c1'=c0*4*a+c2*2*b+o1*r1-c1*(b+3*a+d1)
  // c2'=c1*3*a+c3*3*b+o2*r2-c2*(2*b+2*a+d2)
  // c3'=c2*2*a+c4*4*b+o3*r3-c3*(3*b+a+d3)
  // c4'=c3*a+o4*r4-c4*(4*b+d4)
  // o0'=o1*4*b/f+c0*d0-o0*(4*a*f+r0)
  // o1'=o0*4*a*f+o2*2*b/f+c1*d1-o1*(b/f+3*a*f+r1)
  // o2'=o1*3*a*f+o3*3*b/f+c2*d2-o2*(2*b/f+2*a*f+r2)
  // o3'=o2*2*a*f+o4*4*b/f+c3*d3-o3*(3*b/f+a*f+r3)
  // o4'=o3*a*f+c4*d4-o4*(4*b/f+r4)
  // aux ik=Gkbar*(o0+o1+o2+o3+o4)/(c0+c1+c2+c3+c4+o0+o1+o2+o3+o4)*(v-Ek)/scale
  // @ meth=Euler, dt=.01, total=50
  // @ yp=ik, yhi=15, ylo=-3, xlo=0, xhi=50, bound=100
  // done
  // This file has been produced by sbmlutils.
  // Terms of use
  // Copyright © 2017 Matthias Koenig
  // Redistribution and use of any part of this model, with or without modification, are permitted provided that the following conditions are met:
  // Redistributions of this SBML file must retain the above copyright notice, this list of conditions and the following disclaimer.
  // Redistributions in a different form must reproduce the above copyright notice, this list of conditions and the following disclaimer in the documentation and/or other materials provided with the distribution.
  // This model is distributed in the hope that it will be useful, but WITHOUT ANY WARRANTY; without even the implied warranty of MERCHANTABILITY or FITNESS FOR A PARTICULAR PURPOSE.

  // Parameters:
  c0_1 = 1; c0_1 is "c0 = 1";
  c1_0 = 0; c1_0 is "c1 = 0";
  c2_0 = 0; c2_0 is "c2 = 0";
  c3_0 = 0; c3_0 is "c3 = 0";
  c4_0 = 0; c4_0 is "c4 = 0";
  o0 = 0; o0 is "o0 = 0";
  o1 = 0; o1 is "o1 = 0";
  o2 = 0; o2 is "o2 = 0";
  o3 = 0; o3 is "o3 = 0";
  o4 = 0; o4 is "o4 = 0";
  a_0 = 0.257; a_0 is "a_0 = .257";
  b_0 = 7.129; b_0 is "b_0 = 7.129";
  d0_0 = 3.84e-6; d0_0 is "d0_0 = .00384e-3";
  d1_0 = 6.53e-5; d1_0 is "d1_0 = .0653e-3";
  d2_0 = 0.00111; d2_0 is "d2_0 = 1.11e-3";
  d3_0 = 0.00699; d3_0 is "d3_0 = 6.99e-3";
  d4_0 = 0.044; d4_0 is "d4_0 = 44.0e-3";
  r0_0 = 1.923; r0_0 is "r0_0 = 1.923";
  r1_0 = 1.923; r1_0 is "r1_0 = 1.923";
  r2_0 = 1.923; r2_0 is "r2_0 = 1.923";
  r3_0 = 0.712; r3_0 is "r3_0 = .712";
  r4_0 = 0.294; r4_0 is "r4_0 = .294";
  ko = 140; ko is "ko = 140";
  ki = 140; ki is "ki = 140";
  vhold = 0; vhold is "vhold = 0";
  vtest = 220; vtest is "vtest = 220";
  za = 0.275; za is "za = .275";
  zb = -0.275; zb is "zb = -.275";
  zd = 0.262; zd is "zd = .262";
  zr = -0.138; zr is "zr = -.138";
  d = 17; d is "d = 17";
  scale = 5; scale is "scale = 5";
  gkbar = 0.2; gkbar is "gkbar = 0.200";
  ton = 5; ton is "ton = 5";
  toff = 35; toff is "toff = 35";
  r has dimensionless;
  fara has dimensionless;
  temp has dimensionless;
  v has dimensionless;
  ek has dimensionless;
  a has dimensionless;
  b has dimensionless;
  d0 has dimensionless;
  d1 has dimensionless;
  d2 has dimensionless;
  d3 has dimensionless;
  d4 has dimensionless;
  r0 has dimensionless;
  r1 has dimensionless;
  r2 has dimensionless;
  r3 has dimensionless;
  r4 has dimensionless;
  f has dimensionless;
  ik has dimensionless;
  t has dimensionless; t is "model time";

  // Assignment rules:
  r := 8.14;
  fara := 96.485;
  temp := 310;
  v := vhold + heav(t - ton)*heav(toff - t)*(vtest - vhold);
  ek := r*temp/f*ln(ko/ki);
  a := a_0*exp(v*(za*fara/(r*temp)));
  b := b_0*exp(v*(zb*fara/(r*temp)));
  d0 := d0_0*exp(v*(zd*fara/(r*temp)));
  d1 := d1_0*exp(v*(zd*fara/(r*temp)));
  d2 := d2_0*exp(v*(zd*fara/(r*temp)));
  d3 := d3_0*exp(v*(zd*fara/(r*temp)));
  d4 := d4_0*exp(v*(zd*fara/(r*temp)));
  r0 := r0_0*exp(v*(zr*fara/(r*temp)));
  r1 := r1_0*exp(v*(zr*fara/(r*temp)));
  r2 := r2_0*exp(v*(zr*fara/(r*temp)));
  r3 := r3_0*exp(v*(zr*fara/(r*temp)));
  r4 := r4_0*exp(v*(zr*fara/(r*temp)));
  f := 17^0.5;
  ik := gkbar*(o0 + o1 + o2 + o3 + o4)/(c0_1 + c1_0 + c2_0 + c3_0 + c4_0 + o0 + o1 + o2 + o3 + o4)*(v - ek)/scale;
  t := time;

  // Rate rules:
  c0_1' = c1_0*b + o0*r0 - c0_1*(4*a + d0);
  c1_0' = c0_1*4*a + c2_0*2*b + o1*r1 - c1_0*(b + 3*a + d1);
  c2_0' = c1_0*3*a + c3_0*3*b + o2*r2 - c2_0*(2*b + 2*a + d2);
  c3_0' = c2_0*2*a + c4_0*4*b + o3*r3 - c3_0*(3*b + a + d3);
  c4_0' = c3_0*a + o4*r4 - c4_0*(4*b + d4);
  o0' = o1*4*b/f + c0_1*d0 - o0*(4*a*f + r0);
  o1' = o0*4*a*f + o2*2*b/f + c1_0*d1 - o1*(b/f + 3*a*f + r1);
  o2' = o1*3*a*f + o3*3*b/f + c2_0*d2 - o2*(2*b/f + 2*a*f + r2);
  o3' = o2*2*a*f + o4*4*b/f + c3_0*d3 - o3*(3*b/f + a*f + r3);
  o4' = o3*a*f + c4_0*d4 - o4*(4*b/f + r4);
end
