// SBML level 3 version 1

function max(x, y)
  piecewise(x, x > y, y);
end
max is "minimum";

function min(x, y)
  piecewise(x, x < y, y);
end
min is "maximum";

function heav(x)
  piecewise(0, x < 0, 0.5, x == 0, 1, x > 0, 0);
end
heav is "heavyside";

function mod(x, y)
  piecewise(x - y*ceil(x/y), xor(x < 0, y < 0), x - y*floor(x/y));
end
mod is "modulo";

model main()
  // XPP model
  // This model was converted from XPP ode format to SBML using sbmlutils-0.1.5a6.
  // # Markovian model for IK(ur) (Kv2.1) in heart-derived H9c2 cells
  // # Liu et al., The mechanisms of propofol-induced block on ion currents in differentiated H9c2
  // # cardiac cells. Eur J Pharmacol 2008;590:93-98.
  // # Initial values
  // init c0=1, c1=0, c2=0, c3=0
  // init ci0=0, ci1=0, ci2=0, ci3=0
  // init o=0, oi=0
  // # Voltage clamp protocols
  // par vhold=-50, vtest_1=50, vtest_2=-50
  // par ton=30, toff=330, toff_r=430
  // par prop=0.0, propa=2.141e-5, propb=0.00132
  // v = vhold+heav(t-ton)*heav(toff-t)*(vtest_1-vhold)+heav(t-toff)*heav(toff_r-t)*(vtest_2-vhold)
  // # Values of the model parameters
  // par aa0=0.06212, aa=0.00912, ba0=0.1243, ba=0.0323, ai0=50.512, ai=4.944e-6, bi0=2.825e-6, bi=4.096e-8
  // par f1=2.303, f2=16.4, f3=265.833, f4=259.12, b1=1.1653, b2=1.5137, b3=13.072, b4=529.125
  // par scale=1
  // # Expressions
  // Ek=-80.1
  // par gkbar=25
  // aaa=aa0*exp(aa*v)
  // baa=ba0*exp(-ba*v)
  // aia=ai0*exp(-ai*v)
  // bia=bi0*exp(bi*v)
  // # Gating functions
  // c0' = c1*baa + ci0*aia -c0*(4*aaa + bia)
  // c1' = c0*4*aaa + c2*2*baa + ci1*aia/b1 - c1*(baa + 3*aaa + f1*bia)
  // c2' = c1*3*aaa +c3*3*baa + ci2*aia/b2 - c2*(2*baa +2*aaa + f2*bia)
  // c3' = c2*2*aaa + o*4*baa + ci3*aia/b3 - c3*(3*baa + aaa + f3*bia)
  // o' = c3*aaa + oi*aia/b4 - o*(4*baa + f4*bia) + poi*propb - o*prop*propa
  // ci0' = c0*bia + ci1*baa/f1 - ci0*(aia + b1*4*aaa)
  // ci1' = c1*f1*bia + ci0* b1*4*aaa +ci2*f1*2*baa/f2 - ci1*(baa/f1 + aia/b1 + b2*3*aaa/b1)
  // ci2' = c2*f2*bia + ci1*b2*3*aaa/b1 + ci3*f2*3*baa/f3 - ci2*(f1*2**baa/f2 + aia/b2 +b3*2*aaa/b2)
  // ci3' = c3*f3*bia + ci2*b3*2*aaa/b2 + oi*f3*4*baa/f4 -ci3*(f2*3*baa/f3 + aia/b3 +b4*aaa/b3)
  // oi' = o*f4*bia - oi*f3*4*baa/f4 + poi*propb - oi*prop*propa
  // poi' = oi*prop*propa + o*prop*propa - poi*propb - poi*propb
  // aux ik = Gkbar*(o+oi)*(v-Ek)/scale
  // aux Pro = o+oi
  // @ meth=Euler, dt=0.03, total=500
  // @ yp=ik, yhi=1500, ylo=-100, xlo=0, xhi=500, bound=10000, maxstor=100000
  // done
  // This file has been produced by sbmlutils.
  // Terms of use
  // Copyright © 2017 Matthias Koenig
  // Redistribution and use of any part of this model, with or without modification, are permitted provided that the following conditions are met:
  // Redistributions of this SBML file must retain the above copyright notice, this list of conditions and the following disclaimer.
  // Redistributions in a different form must reproduce the above copyright notice, this list of conditions and the following disclaimer in the documentation and/or other materials provided with the distribution.
  // This model is distributed in the hope that it will be useful, but WITHOUT ANY WARRANTY; without even the implied warranty of MERCHANTABILITY or FITNESS FOR A PARTICULAR PURPOSE.

  // Parameters:
  c0_1 = 1; c0_1 is "c0 = 1";
  c1_0 = 0; c1_0 is "c1 = 0";
  c2_0 = 0; c2_0 is "c2 = 0";
  c3_0 = 0; c3_0 is "c3 = 0";
  ci0 = 0; ci0 is "ci0 = 0";
  ci1 = 0; ci1 is "ci1 = 0";
  ci2 = 0; ci2 is "ci2 = 0";
  ci3 = 0; ci3 is "ci3 = 0";
  o = 0; o is "o = 0";
  oi = 0; oi is "oi = 0";
  vhold = -50; vhold is "vhold = -50";
  vtest_1 = 50; vtest_1 is "vtest_1 = 50";
  vtest_2 = -50; vtest_2 is "vtest_2 = -50";
  ton = 30; ton is "ton = 30";
  toff = 330; toff is "toff = 330";
  toff_r = 430; toff_r is "toff_r = 430";
  prop = 0; prop is "prop = 0.0";
  propa = 2.141e-5; propa is "propa = 2.141e-5";
  propb = 0.00132; propb is "propb = 0.00132";
  aa0 = 0.06212; aa0 is "aa0 = 0.06212";
  aa = 0.00912; aa is "aa = 0.00912";
  ba0 = 0.1243; ba0 is "ba0 = 0.1243";
  ba = 0.0323; ba is "ba = 0.0323";
  ai0 = 50.512; ai0 is "ai0 = 50.512";
  ai = 4.944e-6; ai is "ai = 4.944e-6";
  bi0 = 2.825e-6; bi0 is "bi0 = 2.825e-6";
  bi = 4.096e-8; bi is "bi = 4.096e-8";
  f1 = 2.303; f1 is "f1 = 2.303";
  f2 = 16.4; f2 is "f2 = 16.4";
  f3 = 265.833; f3 is "f3 = 265.833";
  f4 = 259.12; f4 is "f4 = 259.12";
  b1 = 1.1653; b1 is "b1 = 1.1653";
  b2 = 1.5137; b2 is "b2 = 1.5137";
  b3 = 13.072; b3 is "b3 = 13.072";
  b4 = 529.125; b4 is "b4 = 529.125";
  scale = 1; scale is "scale = 1";
  gkbar = 25; gkbar is "gkbar = 25";
  poi = 0 dimensionless;
  v has dimensionless;
  ek has dimensionless;
  aaa has dimensionless;
  baa has dimensionless;
  aia has dimensionless;
  bia has dimensionless;
  ik has dimensionless;
  pro has dimensionless;
  t has dimensionless; t is "model time";

  // Assignment rules:
  v := vhold + heav(t - ton)*heav(toff - t)*(vtest_1 - vhold) + heav(t - toff)*heav(toff_r - t)*(vtest_2 - vhold);
  ek := -80.1;
  aaa := aa0*exp(aa*v);
  baa := ba0*exp(-ba*v);
  aia := ai0*exp(-ai*v);
  bia := bi0*exp(bi*v);
  ik := gkbar*(o + oi)*(v - ek)/scale;
  pro := o + oi;
  t := time;

  // Rate rules:
  c0_1' = c1_0*baa + ci0*aia - c0_1*(4*aaa + bia);
  c1_0' = c0_1*4*aaa + c2_0*2*baa + ci1*aia/b1 - c1_0*(baa + 3*aaa + f1*bia);
  c2_0' = c1_0*3*aaa + c3_0*3*baa + ci2*aia/b2 - c2_0*(2*baa + 2*aaa + f2*bia);
  c3_0' = c2_0*2*aaa + o*4*baa + ci3*aia/b3 - c3_0*(3*baa + aaa + f3*bia);
  o' = c3_0*aaa + oi*aia/b4 - o*(4*baa + f4*bia) + poi*propb - o*prop*propa;
  ci0' = c0_1*bia + ci1*baa/f1 - ci0*(aia + b1*4*aaa);
  ci1' = c1_0*f1*bia + ci0*b1*4*aaa + ci2*f1*2*baa/f2 - ci1*(baa/f1 + aia/b1 + b2*3*aaa/b1);
  ci2' = c2_0*f2*bia + ci1*b2*3*aaa/b1 + ci3*f2*3*baa/f3 - ci2*(f1*2^baa/f2 + aia/b2 + b3*2*aaa/b2);
  ci3' = c3_0*f3*bia + ci2*b3*2*aaa/b2 + oi*f3*4*baa/f4 - ci3*(f2*3*baa/f3 + aia/b3 + b4*aaa/b3);
  oi' = o*f4*bia - oi*f3*4*baa/f4 + poi*propb - oi*prop*propa;
  poi' = oi*prop*propa + o*prop*propa - poi*propb - poi*propb;
end
