// SBML level 3 version 1

function max(x, y)
  piecewise(x, x > y, y);
end
max is "minimum";

function min(x, y)
  piecewise(x, x < y, y);
end
min is "maximum";

function heav(x)
  piecewise(0, x < 0, 0.5, x == 0, 1, x > 0, 0);
end
heav is "heavyside";

function mod(x, y)
  piecewise(x - y*ceil(x/y), xor(x < 0, y < 0), x - y*floor(x/y));
end
mod is "modulo";

function alp(v, abar, cai, celsius, d1, fara, k1)
  abar/(1 + k1*exp(-2*d1*fara*v/8.313424/(273.15 + celsius))/cai);
end

function beta(v, bbar, cai, celsius, d2, fara, k2)
  bbar/(1 + cai/(k2*exp(-2*d2*fara*v/8.313424/(273.15 + celsius))));
end

function tau(v, abar, bbar, cai, celsius, d1, d2, fara, k1, k2)
  1/(alp(v, fara, abar, celsius, cai, k1, d1) + beta(v, fara, bbar, celsius, cai, k2, d2));
end

function oinf(v, abar, bbar, cai, celsius, d1, d2, fara, k1, k2)
  alp(v, fara, abar, celsius, cai, k1, d1)*tau(v, abar, bbar, cai, celsius, d1, d2, fara, k1, k2);
end

model main()
  // XPP model
  // This model was converted from XPP ode format to SBML using sbmlutils-0.1.5a6.
  // % ikca_Mocz.ode
  // % simplified mode for calcium-activated K+ current
  // % (Ref: From Moczydlowski and Latorre (1983) J. Gen. Physiol. 82:511-542.)
  // % Model 3. (Scheme R1 page 523)
  // % (Ref: From Wang et al (2008) J. Membr. Biol. 213:175-185.)
  // % Model has been briefly described in Computational Cell Biology (pp 88-90)
  // % Results are similar to those in 'cagk' in NEURON
  // % Equation was incorporated to model skeletal muscle cell (Wang et al., 2008)
  // % Initial values of the variables
  // init o=0.0
  // % Values of the model parameters; Units= mM, ms(-1), mV
  // % k1 and k2 are zero-voltage dissociation constants.
  // % d1 and d2 are fractional distances of the electric field.
  // % bbar is alpha in originanl paper (1983) (p 524)
  // par d1=0.84, d2=1.0, k1=0.18, k2=0.011, bbar=0.28, abar=0.48, celsius=20
  // par gkbar=0.01, cai=0.1
  // number fara=96.485
  // par ko=5.4, ki=140
  // par vhold=-65, vtest=20
  // par ton=2, toff=12
  // v = vhold + heav(t-ton)*heav(toff-t)*(vtest-vhold)
  // % Gating functions
  // ek = (8.313424*(273.15+celsius)/fara)*ln(ko/ki)
  // alp(v) = abar/(1+k1*exp(-2*d1*fara*v/8.313424/(273.15+celsius))/cai)
  // beta(v) = bbar/(1+cai/(k2*exp(-2*d2*fara*v/8.313424/(273.15+celsius))))
  // tau(v) = 1/(alp(v)+beta(v))
  // oinf(v) = alp(v)*tau(v)
  // % Differential equation
  // o' = (oinf(v)-o)/tau(v)
  // aux ikca = gkbar*o*(v-ek)
  // aux vm=v
  // % Numerical and plotting parameters for xpp
  // @ yp=ikca, xlo=0, xhi=18 ylo=-.04, yhi=1.0, total=18, dt=0.01, method=Euler, LT=1
  // done
  // This file has been produced by sbmlutils.
  // Terms of use
  // Copyright © 2017 Matthias Koenig
  // Redistribution and use of any part of this model, with or without modification, are permitted provided that the following conditions are met:
  // Redistributions of this SBML file must retain the above copyright notice, this list of conditions and the following disclaimer.
  // Redistributions in a different form must reproduce the above copyright notice, this list of conditions and the following disclaimer in the documentation and/or other materials provided with the distribution.
  // This model is distributed in the hope that it will be useful, but WITHOUT ANY WARRANTY; without even the implied warranty of MERCHANTABILITY or FITNESS FOR A PARTICULAR PURPOSE.

  // Parameters:
  o = 0; o is "o = 0.0";
  d1 = 0.84; d1 is "d1 = 0.84";
  d2 = 1; d2 is "d2 = 1.0";
  k1 = 0.18; k1 is "k1 = 0.18";
  k2 = 0.011; k2 is "k2 = 0.011";
  bbar = 0.28; bbar is "bbar = 0.28";
  abar = 0.48; abar is "abar = 0.48";
  celsius = 20; celsius is "celsius = 20";
  gkbar = 0.01; gkbar is "gkbar = 0.01";
  cai = 0.1; cai is "cai = 0.1";
  fara = 96.485; fara is "fara = 96.485";
  ko = 5.4; ko is "ko = 5.4";
  ki = 140; ki is "ki = 140";
  vhold = -65; vhold is "vhold = -65";
  vtest = 20; vtest is "vtest = 20";
  ton = 2; ton is "ton = 2";
  toff = 12; toff is "toff = 12";
  v has dimensionless;
  ek has dimensionless;
  ikca has dimensionless;
  vm has dimensionless;
  t has dimensionless; t is "model time";

  // Assignment rules:
  v := vhold + heav(t - ton)*heav(toff - t)*(vtest - vhold);
  ek := 8.313424*(273.15 + celsius)/fara*ln(ko/ki);
  ikca := gkbar*o*(v - ek);
  vm := v;
  t := time;

  // Rate rules:
  o' = (oinf(v, abar, bbar, cai, celsius, d1, d2, fara, k1, k2) - o)/tau(v, abar, bbar, cai, celsius, d1, d2, fara, k1, k2);
end
