// SBML level 3 version 1

function max(x, y)
  piecewise(x, x > y, y);
end
max is "minimum";

function min(x, y)
  piecewise(x, x < y, y);
end
min is "maximum";

function heav(x)
  piecewise(0, x < 0, 0.5, x == 0, 1, x > 0, 0);
end
heav is "heavyside";

function mod(x, y)
  piecewise(x - y*ceil(x/y), xor(x < 0, y < 0), x - y*floor(x/y));
end
mod is "modulo";

model main()
  // XPP model
  // This model was converted from XPP ode format to SBML using sbmlutils-0.1.5a6.
  // # Luo-Rudy phase 1 kinetics for cardiac action potential
  // # Ref: Luo CH, Rudy T. Circ Res 1991;68:1501-1526
  // # Ref: Wu SN, Chinese J Physiol 2004;47:15-22
  // #Constant:
  // number R=8314.0, Fara=96484.6, Temp=310.0, C=1.0
  // # Initial values
  // initial V=-81.0, m=0.0, h=0.98, j=0.99, d=0.0, f=1.0, X=0.0, Cai=0.0002
  // # Value sof the model parameters
  // param Nao=140.0, Nai=18.0, Ko=5.4, Ki=145.0, Cao=1.8
  // param g_Na=23.0, g_Kmax=0.282, g_Kp=0.0183, g_bl=0.03921, g_b=0.03921
  // param E_Na=54.4, E_b=-59.87, E_b1=-59.87, PR_NaK=0.01833
  // param period=500, iStim_mag=8.0, iStim_beg=20.0, iStim_dur=5.0
  // # Stimulus
  // i_Stim= iStim_mag*(heav(mod(t,period)-iStim_beg)*heav((iStim_beg+iStim_dur)-mod(t,period)))
  // # Expressions
  // E_K1= (ln((Ko / Ki)) * R * Temp / Fara)
  // E_Kp= E_K1
  // E_K= (ln(((Ko + (PR_NaK * Nao)) / (Ki + (PR_NaK * Nai)))) * R * Temp / Fara)
  // E_si= (7.7 - (13.0287 * ln(Cai)))
  // alpha_m= (0.32 * (47.13 + V) / (1.0 - exp( - (0.1 * (47.13 + V)))))
  // alpha_j= heav(-V-40)*(( - (127140.0 * exp((0.2444 * V))) - (3.474E-5 * exp( - (0.04391 * V)))) * (37.78 + V) / (1.0 + exp((0.311 * (79.23 + V)))))
  // alpha_h=heav(-V-40)*(0.135 * exp( - (0.14705882352941177 * (80.0 + V))))
  // alpha_K1= (1.02 / (1.0 + exp((0.2385 * (-59.215 + V - E_K1)))))
  // alpha_f= (0.012 * exp( - (0.0080 * (28.0 + V))) / (1.0 + exp((0.15 * (28.0 + V)))))
  // alpha_d= (0.095 * exp( - (0.01 * (-5.0 + V))) / (1.0 + exp( - (0.072 * (-5.0 + V)))))
  // alpha_X= (5.0E-4 * exp((0.083 * (50.0 + V))) / (1.0 + exp((0.057 * (50.0 + V)))))
  // Xi=heav(V+100)*((2.837 * (-1.0 + exp((0.04 * (77.0 + V)))) / ((77.0 + V) * exp((0.04 * (35.0 + V))))))
  // beta_m= (0.08 * exp( - (0.09090909090909091 * V)))
  // beta_j= heav(-V-40)*((0.1212 * exp( - (0.01052 * V)) / (1.0 + exp( - (0.1378 * (40.14 + V)))))) + heav(V+40)*((0.3 * exp( - (2.535E-7 * V)) / (1.0 + exp( - (0.1 * (32.0 + V))))))
  // beta_h= heav(-V-40)*((((3.56 * exp((0.079 * V))) + (310000.0 * exp((0.35 * V)))))) + heav(V+40)*((1 / (0.13 * (1.0 + exp( - (0.0900900900900901 * (10.66 + V)))))))
  // beta_f= (0.0065 * exp( - (0.02 * (30.0 + V))) / (1.0 + exp( - (0.2 * (30.0 + V)))))
  // Kp= (1.0 / (1.0 + exp((0.16722408026755853 * (7.488 - V)))))
  // beta_d= (0.07 * exp( - (0.017 * (44.0 + V))) / (1.0 + exp((0.05 * (44.0 + V)))))
  // beta_K1= (((0.49124 * exp((0.08032 * (5.476 - E_K1 + V)))) + exp((0.06175 * (V - (594.31 + E_K1))))) / (1.0 + exp( - (0.5143 * (4.753 + V - E_K1)))))
  // K1_inf= (alpha_K1 / (alpha_K1 + beta_K1))
  // beta_X= (0.0013 * exp( - (0.06 * (20.0 + V))) / (1.0 + exp( - (0.04 * (20.0 + V)))))
  // g_K= (g_Kmax *(0.18518518518518517 * Ko)^0.5)
  // g_K1= (0.6047 * (0.18518518518518517 * Ko)^0.5)
  // i_Na= (g_Na * m^3 * h * j * (V - E_Na))
  // i_si= (0.09 * d * f * (V - E_si))
  // i_K= (g_K * X * Xi * (V - E_K))
  // i_K1= (g_K1 * K1_inf * (V - E_K1))
  // i_Kp= (g_Kp * Kp * (V - E_Kp))
  // i_b= (g_b * (V - E_b))
  // # Differential equations
  // V'= - ((-i_Stim + i_Na + i_si + i_K + i_K1 + i_Kp + i_b) / C)
  // m'= ((alpha_m * (1.0 - m)) - (beta_m * m))
  // h'= ((alpha_h * (1.0 - h)) - (beta_h * h))
  // j'= ((alpha_j * (1.0 - j)) - (beta_j * j))
  // d'= ((alpha_d * (1.0 - d)) - (beta_d * d))
  // f'= ((alpha_f * (1.0 - f)) - (beta_f * f))
  // X'= ((alpha_X * (1.0 - X)) - (beta_X * X))
  // Cai'= ( - (1.0E-4 * i_si) + (0.07 * (1.0E-4 - Cai)))
  // aux iapp=i_Stim
  // aux ina=I_Na
  // aux isi=i_si
  // aux ik=i_K
  // aux ik1=i_K1
  // aux ikp=i_Kp
  // aux iktot=i_K+i_K1+i_Kp
  // # Numerical and plotting parameters for xpp
  // @ maxstor=1000000, total=1000, bounds=100000, total=2000, xp=t, yp=V, xlo=0, xhi=2000, ylo=-100, yhi=60
  // @ meth=Euler, dt=0.01
  // done
  // This file has been produced by sbmlutils.
  // Terms of use
  // Copyright © 2017 Matthias Koenig
  // Redistribution and use of any part of this model, with or without modification, are permitted provided that the following conditions are met:
  // Redistributions of this SBML file must retain the above copyright notice, this list of conditions and the following disclaimer.
  // Redistributions in a different form must reproduce the above copyright notice, this list of conditions and the following disclaimer in the documentation and/or other materials provided with the distribution.
  // This model is distributed in the hope that it will be useful, but WITHOUT ANY WARRANTY; without even the implied warranty of MERCHANTABILITY or FITNESS FOR A PARTICULAR PURPOSE.

  // Parameters:
  r = 8314; r is "r = 8314.0";
  fara = 96484.6; fara is "fara = 96484.6";
  temp = 310; temp is "temp = 310.0";
  c = 1; c is "c = 1.0";
  v = -81; v is "v = -81.0";
  m = 0; m is "m = 0.0";
  h = 0.98; h is "h = 0.98";
  j = 0.99; j is "j = 0.99";
  d = 0; d is "d = 0.0";
  f = 1; f is "f = 1.0";
  x = 0; x is "x = 0.0";
  cai = 0.0002; cai is "cai = 0.0002";
  nao = 140; nao is "nao = 140.0";
  nai = 18; nai is "nai = 18.0";
  ko = 5.4; ko is "ko = 5.4";
  ki = 145; ki is "ki = 145.0";
  cao = 1.8; cao is "cao = 1.8";
  g_na = 23; g_na is "g_na = 23.0";
  g_kmax = 0.282; g_kmax is "g_kmax = 0.282";
  g_kp = 0.0183; g_kp is "g_kp = 0.0183";
  g_bl = 0.03921; g_bl is "g_bl = 0.03921";
  g_b = 0.03921; g_b is "g_b = 0.03921";
  e_na = 54.4; e_na is "e_na = 54.4";
  e_b = -59.87; e_b is "e_b = -59.87";
  e_b1 = -59.87; e_b1 is "e_b1 = -59.87";
  pr_nak = 0.01833; pr_nak is "pr_nak = 0.01833";
  period = 500; period is "period = 500";
  istim_mag = 8; istim_mag is "istim_mag = 8.0";
  istim_beg = 20; istim_beg is "istim_beg = 20.0";
  istim_dur = 5; istim_dur is "istim_dur = 5.0";
  i_stim has dimensionless;
  e_k1 has dimensionless;
  e_kp has dimensionless;
  e_k has dimensionless;
  e_si has dimensionless;
  alpha_m has dimensionless;
  alpha_j has dimensionless;
  alpha_h has dimensionless;
  alpha_k1 has dimensionless;
  alpha_f has dimensionless;
  alpha_d has dimensionless;
  alpha_x has dimensionless;
  xi has dimensionless;
  beta_m has dimensionless;
  beta_j has dimensionless;
  beta_h has dimensionless;
  beta_f has dimensionless;
  kp has dimensionless;
  beta_d has dimensionless;
  beta_k1 has dimensionless;
  k1_inf has dimensionless;
  beta_x has dimensionless;
  g_k has dimensionless;
  g_k1 has dimensionless;
  i_na has dimensionless;
  i_si has dimensionless;
  i_k has dimensionless;
  i_k1 has dimensionless;
  i_kp has dimensionless;
  i_b has dimensionless;
  iapp has dimensionless;
  ina has dimensionless;
  isi has dimensionless;
  ik has dimensionless;
  ik1 has dimensionless;
  ikp has dimensionless;
  iktot has dimensionless;
  t has dimensionless; t is "model time";

  // Assignment rules:
  i_stim := istim_mag*heav(mod(t, period) - istim_beg)*heav(istim_beg + istim_dur - mod(t, period));
  e_k1 := ln(ko/ki)*r*temp/fara;
  e_kp := e_k1;
  e_k := ln((ko + pr_nak*nao)/(ki + pr_nak*nai))*r*temp/fara;
  e_si := 7.7 - 13.0287*ln(cai);
  alpha_m := 0.32*(47.13 + v)/(1 - exp(-(0.1*(47.13 + v))));
  alpha_j := heav(-v - 40)*((-(127140*exp(0.2444*v)) - 3.474e-5*exp(-(0.04391*v)))*(37.78 + v)/(1 + exp(0.311*(79.23 + v))));
  alpha_h := heav(-v - 40)*0.135*exp(-(0.1470588*(80 + v)));
  alpha_k1 := 1.02/(1 + exp(0.2385*(-59.215 + v - e_k1)));
  alpha_f := 0.012*exp(-(0.008*(28 + v)))/(1 + exp(0.15*(28 + v)));
  alpha_d := 0.095*exp(-(0.01*(-5 + v)))/(1 + exp(-(0.072*(-5 + v))));
  alpha_x := 5e-4*exp(0.083*(50 + v))/(1 + exp(0.057*(50 + v)));
  xi := heav(v + 100)*(2.837*(-1 + exp(0.04*(77 + v)))/((77 + v)*exp(0.04*(35 + v))));
  beta_m := 0.08*exp(-(0.09090909*v));
  beta_j := heav(-v - 40)*(0.1212*exp(-(0.01052*v))/(1 + exp(-(0.1378*(40.14 + v))))) + heav(v + 40)*(0.3*exp(-(2.535e-7*v))/(1 + exp(-(0.1*(32 + v)))));
  beta_h := heav(-v - 40)*(3.56*exp(0.079*v) + 310000*exp(0.35*v)) + heav(v + 40)*(1/(0.13*(1 + exp(-(0.09009009*(10.66 + v))))));
  beta_f := 0.0065*exp(-(0.02*(30 + v)))/(1 + exp(-(0.2*(30 + v))));
  kp := 1/(1 + exp(0.1672241*(7.488 - v)));
  beta_d := 0.07*exp(-(0.017*(44 + v)))/(1 + exp(0.05*(44 + v)));
  beta_k1 := (0.49124*exp(0.08032*(5.476 - e_k1 + v)) + exp(0.06175*(v - (594.31 + e_k1))))/(1 + exp(-(0.5143*(4.753 + v - e_k1))));
  k1_inf := alpha_k1/(alpha_k1 + beta_k1);
  beta_x := 0.0013*exp(-(0.06*(20 + v)))/(1 + exp(-(0.04*(20 + v))));
  g_k := g_kmax*(0.1851852*ko)^0.5;
  g_k1 := 0.6047*(0.1851852*ko)^0.5;
  i_na := g_na*m^3*h*j*(v - e_na);
  i_si := 0.09*d*f*(v - e_si);
  i_k := g_k*x*xi*(v - e_k);
  i_k1 := g_k1*k1_inf*(v - e_k1);
  i_kp := g_kp*kp*(v - e_kp);
  i_b := g_b*(v - e_b);
  iapp := i_stim;
  ina := i_na;
  isi := i_si;
  ik := i_k;
  ik1 := i_k1;
  ikp := i_kp;
  iktot := i_k + i_k1 + i_kp;
  t := time;

  // Rate rules:
  v' = -((-i_stim + i_na + i_si + i_k + i_k1 + i_kp + i_b)/c);
  m' = alpha_m*(1 - m) - beta_m*m;
  h' = alpha_h*(1 - h) - beta_h*h;
  j' = alpha_j*(1 - j) - beta_j*j;
  d' = alpha_d*(1 - d) - beta_d*d;
  f' = alpha_f*(1 - f) - beta_f*f;
  x' = alpha_x*(1 - x) - beta_x*x;
  cai' = -(1e-4*i_si) + 0.07*(1e-4 - cai);
end
