// SBML level 3 version 1

function max(x, y)
  piecewise(x, x > y, y);
end
max is "minimum";

function min(x, y)
  piecewise(x, x < y, y);
end
min is "maximum";

function heav(x)
  piecewise(0, x < 0, 0.5, x == 0, 1, x > 0, 0);
end
heav is "heavyside";

function mod(x, y)
  piecewise(x - y*ceil(x/y), xor(x < 0, y < 0), x - y*floor(x/y));
end
mod is "modulo";

model main()
  // XPP model
  // This model was converted from XPP ode format to SBML using sbmlutils-0.1.5a6.
  // # XPP has its own rule of naming parameters, so the parameter names in this code might be different from those in the paper.
  // # Equations of PKA and ERK dynamics are same as the ones in Nature Neuroscience paper
  // pRaf'=(K_fRaf*(delay(5HT, 25)))*Raf-K_bRaf*pRaf
  // Raf=Raf_total-pRaf
  // MAPKK'=-K_fMAPKK*pRaf*(MAPKK/(MAPKK+K_1mkk))+K_bMAPKK*(pMAPKK/(pMAPKK+K_2mkk))
  // ppMAPKK'=K_fMAPKK*pRaf*(pMAPKK/(pMAPKK+K_1mkk))-K_bMAPKK*(ppMAPKK/(ppMAPKK+K_2mkk))
  // pMAPKK=MAPKK_tt-MAPKK-ppMAPKK
  // MAPK'=-K_fMAPK*ppMAPKK*(MAPK/(MAPK+K_1mk))+K_bMAPK*(pMAPK/(pMAPK+K_2mk))
  // ppMAPK'=K_fMAPK*ppMAPKK*(pMAPK/(pMAPK+K_1mk))-K_bMAPK*(ppMAPK/(ppMAPK+K_2mk))
  // pMAPK=MAPK_tt-ppMAPK-MAPK
  // cAMP'=lamda*(5HT/(5HT+K_5HT))-K_bcamp*cAMP
  // PKAR'=K_fpka*PKARC*cAMP^2-K_bpka*PKAR*PKAC
  // PKARC'=-K_fpka*PKARC*cAMP^2+K_bpka*PKAR*PKAC
  // PKAC'=K_fpka*PKARC*cAMP^2-K_bpka*PKAR*PKAC
  // p K_fRaf=0.004
  // p K_bRaf=0.1
  // p Raf_total=0.5
  // p K_fMAPKK=0.41
  // p K_bMAPKK=0.04
  // p K_1mkk=0.20
  // p K_2mkk=0.19
  // p MAPKK_tt=0.5
  // p K_fMAPK=0.41
  // p K_bMAPK=0.12
  // p K_1mk=0.19
  // p K_2mk=0.21
  // p MAPK_tt=0.5
  // p lamda=3.64
  // p K_bcamp=1
  // p K_5HT=85
  // p K_fpka=20
  // p K_bpka=12
  // # PKACA is the activity of PKA, calculated in the way as described in Muller and Carew 1998.
  // # 3.8 is the maximal PKAC.
  // PKACA=PKAC/3.8
  // inducer=PKACA*ppMAPK
  // init pRaf=0
  // init MAPKK=0.5
  // init ppMAPKK=0
  // init MAPK=0.5
  // init PPMAPK=0
  // init PKAC=0
  // init cAMP=0
  // init PKAR=0
  // init PKARC=4
  // # the following are the equations of CREB1, CREB2, and CEBP
  // #phosphorylated CREB1 protein
  // pCREB1'=K_phosC1*PKACA*CREB1-K_dephC1*pCREB1
  // #phosphorylated CREB2 protein
  // pCREB2'=K_phosC2*ppMAPK*CREB2-K_dephC2*pCREB2
  // CREB1=0.05-pCREB1
  // CREB2=0.05-pCREB2
  // p K_phosC1=0.15
  // p K_dephC1=0.05
  // p K_phosC2=3.5
  // p K_dephC2=0.5
  // #synthesis OF CEBP protein
  // CEBP'=((V_xCBP*((f5^2/K_xCBP)/(1+f5^2/K_xCBP+f6^2/K_yCBP)))-K_dxCBP*CEBP)-(K_phosC3*ppMAPK*CEBP-K_dephC3*pCEBP)
  // #phosphorylated CEBP protein
  // pCEBP'=(K_phosC3*ppMAPK*CEBP-K_dephC3*pCEBP-K_dZ2*pCEBP)
  // f5=pCREB1
  // f6=CREB2
  // # CBP would be reduced to 0.65 when CBP knockdown was simulated.
  // CBP=1
  // # we do not know the binding affinity of CBP, so we actually tried different Kcbp, ranging from 1 to 20.
  // # We found that varying Kcbp did not change the rank of the Rescue Protocol in 10000 protocols, which always ended up as the one with highest peak pCEBP.
  // # Varying Kcbp, we got different numbers of potential rescue protocols. The maximum number of potential rescue protocols we got was 421.
  // Kcbp=20
  // v_xCBP=20*(CBP/(Kcbp+CBP))
  // # parameters K5 and K6 in J Neurosci. paper are the square root of K_xCBP and K_yCBP.
  // p K_xCBP=0.00009
  // p K_yCBP=0.00001
  // p K_dxCBP=0.075
  // p K_dZ2=0.0015
  // p K_phosC3=0.25
  // p K_dephC3=0.5
  // #init pCREB1, pCREB2, CEBP
  // init pCREB1=0
  // init pCREB2=0
  // init CEBP=0
  // # 5 pulses of 5-HT
  // 5HT'=50*(on0*heav(t-t2)*heav(t2+5-t)+on1*heav(t-t2-inter1)*heav(inter1+5+t2-t)+on2*heav(t-t2-inter1-inter2)*heav(inter1+inter2+5+t2-t)+on3*heav(t-t2-inter1-inter2-inter3)*heav(inter1+inter2+inter3+5+t2-t)+on4*heav(t-t2-inter1-inter2-inter3-inter4)*heav(inter1+inter2+inter3+inter4+5+t2-t))*turnon-5HT
  // # calculation of ISIs
  // inter1=5*(1+a1)
  // inter2=5*(1+a2)
  // inter3=5*(1+a3)
  // inter4=5*(1+a4)
  // # on0 - on4 control how many pulses of 5-HT we will use
  // p on0=1
  // p on1=1
  // p on2=1
  // p on3=1
  // p on4=1
  // p turnon=1
  // p t1=2995
  // p t2=2910
  // aux 1=(t-t2)
  // aux 4=5HT
  // aux 7=a1
  // aux 8=a2
  // aux 9=a3
  // aux 10=a4
  // aux 13=inducer
  // aux 14=PKACA
  // aux 15=ppMAPK
  // auX 17=CEBP+pCEBP
  // aux 18=pCEBP
  // p step=1131
  // # This is how we code 10,000 protocols
  // a4=(step-10*flr(step/10))
  // a3=flr((step-100*flr(step/100))/10)
  // a2=flr((step-1000*flr(step/1000))/100)
  // a1=flr(step/1000)
  // @ total=4000, xlo=0, xhi=5000, ylo=0, yhi=10, bounds=10e30, MAXSTOR=1300000,xp=vs, yp=mk,nout=250, dt=0.01,
  // @ delay=6000
  // #@ output=test.txt
  // # This is how we run 10,000 simulations.
  // @ RANGE=1, RANGEOVER=step, RANGESTEP=10000, RANGELOW=0, RANGEHIGH=10000, RANGERESET=yes, RANGEOLDIC=yes, output=test
  // This file has been produced by sbmlutils.
  // Terms of use
  // Copyright © 2017 Matthias Koenig
  // Redistribution and use of any part of this model, with or without modification, are permitted provided that the following conditions are met:
  // Redistributions of this SBML file must retain the above copyright notice, this list of conditions and the following disclaimer.
  // Redistributions in a different form must reproduce the above copyright notice, this list of conditions and the following disclaimer in the documentation and/or other materials provided with the distribution.
  // This model is distributed in the hope that it will be useful, but WITHOUT ANY WARRANTY; without even the implied warranty of MERCHANTABILITY or FITNESS FOR A PARTICULAR PURPOSE.

  // Parameters:
  k_fraf = 0.004; k_fraf is "k_fraf = 0.004";
  k_braf = 0.1; k_braf is "k_braf = 0.1";
  raf_total = 0.5; raf_total is "raf_total = 0.5";
  k_fmapkk = 0.41; k_fmapkk is "k_fmapkk = 0.41";
  k_bmapkk = 0.04; k_bmapkk is "k_bmapkk = 0.04";
  k_1mkk = 0.2; k_1mkk is "k_1mkk = 0.20";
  k_2mkk = 0.19; k_2mkk is "k_2mkk = 0.19";
  mapkk_tt = 0.5; mapkk_tt is "mapkk_tt = 0.5";
  k_fmapk = 0.41; k_fmapk is "k_fmapk = 0.41";
  k_bmapk = 0.12; k_bmapk is "k_bmapk = 0.12";
  k_1mk = 0.19; k_1mk is "k_1mk = 0.19";
  k_2mk = 0.21; k_2mk is "k_2mk = 0.21";
  mapk_tt = 0.5; mapk_tt is "mapk_tt = 0.5";
  lamda = 3.64; lamda is "lamda = 3.64";
  k_bcamp = 1; k_bcamp is "k_bcamp = 1";
  k_5ht = 85; k_5ht is "k_5ht = 85";
  k_fpka = 20; k_fpka is "k_fpka = 20";
  k_bpka = 12; k_bpka is "k_bpka = 12";
  praf = 0; praf is "praf = 0";
  mapkk = 0.5; mapkk is "mapkk = 0.5";
  ppmapkk = 0; ppmapkk is "ppmapkk = 0";
  mapk = 0.5; mapk is "mapk = 0.5";
  ppmapk = 0; ppmapk is "ppmapk = 0";
  pkac = 0; pkac is "pkac = 0";
  camp = 0; camp is "camp = 0";
  pkar = 0; pkar is "pkar = 0";
  pkarc = 4; pkarc is "pkarc = 4";
  k_phosc1 = 0.15; k_phosc1 is "k_phosc1 = 0.15";
  k_dephc1 = 0.05; k_dephc1 is "k_dephc1 = 0.05";
  k_phosc2 = 3.5; k_phosc2 is "k_phosc2 = 3.5";
  k_dephc2 = 0.5; k_dephc2 is "k_dephc2 = 0.5";
  k_xcbp = 9e-5; k_xcbp is "k_xcbp = 0.00009";
  k_ycbp = 1e-5; k_ycbp is "k_ycbp = 0.00001";
  k_dxcbp = 0.075; k_dxcbp is "k_dxcbp = 0.075";
  k_dz2 = 0.0015; k_dz2 is "k_dz2 = 0.0015";
  k_phosc3 = 0.25; k_phosc3 is "k_phosc3 = 0.25";
  k_dephc3 = 0.5; k_dephc3 is "k_dephc3 = 0.5";
  pcreb1 = 0; pcreb1 is "pcreb1 = 0";
  pcreb2 = 0; pcreb2 is "pcreb2 = 0";
  cebp = 0; cebp is "cebp = 0";
  on0 = 1; on0 is "on0 = 1";
  on1 = 1; on1 is "on1 = 1";
  on2 = 1; on2 is "on2 = 1";
  on3 = 1; on3 is "on3 = 1";
  on4 = 1; on4 is "on4 = 1";
  turnon = 1; turnon is "turnon = 1";
  t1 = 2995; t1 is "t1 = 2995";
  t2 = 2910; t2 is "t2 = 2910";
  step = 1131; step is "step = 1131";
  pcebp = 0 dimensionless;
  raf has dimensionless;
  pmapkk has dimensionless;
  pmapk has dimensionless;
  pkaca has dimensionless;
  inducer has dimensionless;
  creb1 has dimensionless;
  creb2 has dimensionless;
  f5 has dimensionless;
  f6 has dimensionless;
  cbp has dimensionless;
  kcbp has dimensionless;
  v_xcbp has dimensionless;
  inter1 has dimensionless;
  inter2 has dimensionless;
  inter3 has dimensionless;
  inter4 has dimensionless;
  a4 has dimensionless;
  a3 has dimensionless;
  a2 has dimensionless;
  a1 has dimensionless;
  t has dimensionless; t is "model time";

  // Assignment rules:
  raf := raf_total - praf;
  pmapkk := mapkk_tt - mapkk - ppmapkk;
  pmapk := mapk_tt - ppmapk - mapk;
  pkaca := pkac/3.8;
  inducer := pkaca*ppmapk;
  creb1 := 0.05 - pcreb1;
  creb2 := 0.05 - pcreb2;
  f5 := pcreb1;
  f6 := creb2;
  cbp := 1;
  kcbp := 20;
  v_xcbp := 20*(cbp/(kcbp + cbp));
  inter1 := 5*(1 + a1);
  inter2 := 5*(1 + a2);
  inter3 := 5*(1 + a3);
  inter4 := 5*(1 + a4);
  // (no variable named) := t - t2;
  // (no variable named) := 5 ht;
  // (no variable named) := a1;
  // (no variable named) := a2;
  // (no variable named) := a3;
  // (no variable named) := a4;
  // (no variable named) := inducer;
  // (no variable named) := pkaca;
  // (no variable named) := ppmapk;
  // (no variable named) := cebp + pcebp;
  // (no variable named) := pcebp;
  a4 := step - 10*flr(step/10);
  a3 := flr((step - 100*flr(step/100))/10);
  a2 := flr((step - 1000*flr(step/1000))/100);
  a1 := flr(step/1000);
  t := time;

  // Rate rules:
  praf' = k_fraf*delay(5 ht, 25)*raf - k_braf*praf;
  mapkk' = -k_fmapkk*praf*(mapkk/(mapkk + k_1mkk)) + k_bmapkk*(pmapkk/(pmapkk + k_2mkk));
  ppmapkk' = k_fmapkk*praf*(pmapkk/(pmapkk + k_1mkk)) - k_bmapkk*(ppmapkk/(ppmapkk + k_2mkk));
  mapk' = -k_fmapk*ppmapkk*(mapk/(mapk + k_1mk)) + k_bmapk*(pmapk/(pmapk + k_2mk));
  ppmapk' = k_fmapk*ppmapkk*(pmapk/(pmapk + k_1mk)) - k_bmapk*(ppmapk/(ppmapk + k_2mk));
  camp' = lamda*(5 ht/(5 ht + k_5ht)) - k_bcamp*camp;
  pkar' = k_fpka*pkarc*camp^2 - k_bpka*pkar*pkac;
  pkarc' = -k_fpka*pkarc*camp^2 + k_bpka*pkar*pkac;
  pkac' = k_fpka*pkarc*camp^2 - k_bpka*pkar*pkac;
  pcreb1' = k_phosc1*pkaca*creb1 - k_dephc1*pcreb1;
  pcreb2' = k_phosc2*ppmapk*creb2 - k_dephc2*pcreb2;
  cebp' = v_xcbp*(f5^2/k_xcbp/(1 + f5^2/k_xcbp + f6^2/k_ycbp)) - k_dxcbp*cebp - (k_phosc3*ppmapk*cebp - k_dephc3*pcebp);
  pcebp' = k_phosc3*ppmapk*cebp - k_dephc3*pcebp - k_dz2*pcebp;
  // (no variable named)' = 50*(on0*heav(t - t2)*heav(t2 + 5 - t) + on1*heav(t - t2 - inter1)*heav(inter1 + 5 + t2 - t) + on2*heav(t - t2 - inter1 - inter2)*heav(inter1 + inter2 + 5 + t2 - t) + on3*heav(t - t2 - inter1 - inter2 - inter3)*heav(inter1 + inter2 + inter3 + 5 + t2 - t) + on4*heav(t - t2 - inter1 - inter2 - inter3 - inter4)*heav(inter1 + inter2 + inter3 + inter4 + 5 + t2 - t))*turnon - (5 ht);
end
