// SBML level 3 version 1

function max(x, y)
  piecewise(x, x > y, y);
end
max is "minimum";

function min(x, y)
  piecewise(x, x < y, y);
end
min is "maximum";

function heav(x)
  piecewise(0, x < 0, 0.5, x == 0, 1, x > 0, 0);
end
heav is "heavyside";

function mod(x, y)
  piecewise(x - y*ceil(x/y), xor(x < 0, y < 0), x - y*floor(x/y));
end
mod is "modulo";

model main()
  // XPP model
  // This model was converted from XPP ode format to SBML using sbmlutils-0.1.5a6.
  // # NG108_Acon.ode
  // #
  // # IK(erg) was incorporated into the model.
  // # Ref: Lin et al., Neuropharmacology 2008;
  // #
  // # Initial values of the variables
  // initial V=-63, A_na=0.2, inhibitedA=1.0, D=0.1, inhibitedD=0.2, m1=0.0, m=0.0, h=0.0, n1=0.0, h1=0.0, n=0.0
  // init nIR=0.003, rIR=0.282, h2=0.9
  // # Values of the model parameters: kio=k-1; koi=k+1 shown in the article
  // param g_Na=60.0, g_Ca_L=1.1, g_Ca_T=0.94, g_K_dr=20.0, g_M=4.0, g_ir=1.71, g_d=0.0277
  // param kio=0.00132, koi=0.00111
  // param ACO=0.001
  // param V_K=-75
  // number V_Na=60.0, V_Ca=100.0, Vh=-40.0
  // number k1=0.3, k1_=0.03, k3=0.001, k3_=0.01
  // param tau_h=22.0, tau_h1=1000.0, Cm=14.0
  // param girbar=50
  // # Kinetic equations
  // alpha= (10.0 / (1.0 + exp( - (0.1 * (6.0 + V)))))
  // beta= (10.0 / (1.0 + exp((0.2173913043478261 * (54.4 + V)))))
  // m_inf= (1.0 / (1.0 + exp( - (0.1 * (-56.1 + V)))))
  // m_inf1= (1.0 / (1.0 + exp( - (0.08333333333333333 * (V - Vh)))))
  // h_inf= (1.0 / (1.0 + exp((0.2127659574468085 * (86.4 + V)))))
  // n_inf= (1.0 / (1.0 + exp( - (0.25 * (37.0 + V)))))
  // n_inf1= (0.2 + (0.8 / (1.0 + exp((0.08333333333333333 * (80.0 + V))))))
  // n_inf2= (1.0 / (1.0 + exp( - (0.06666666666666667 * (25.0 + V)))))
  // h_inf1= (0.3 + (0.7 / (1.0 + exp( - (0.1 * (35.0 + V))))))
  // alphaIRn = 0.09/(1+exp(0.11*(V+50)))
  // betaIRn = 0.00035*exp(0.07*(V+25))
  // nIRinf = 1/(1+alphaIRn/betaIRn)
  // tauIRn = 1/(alphaIRn + betaIRn)
  // alphaIRr = 30/(1+exp(0.04*(V+245)))
  // betaIRr = 0.15/(1+exp(-0.05*(V+120)))
  // rIRinf = 1/(1+betaIRr/alphaIRr)
  // tauIRr = 1/(alphaIRr + betaIRr)
  // tau_n= (80.0 / (exp((0.06666666666666667 * (30.0 + V))) + exp( - (0.06666666666666667 * (30.0 + V)))))
  // tau_m= (0.8 + (7.0 / (exp((0.1111111111111111 * (50.0 + V))) + exp( - (0.1111111111111111 * (50.0 + V))))))
  // tau_n1= (1.0 + (15.0 / (exp((0.06666666666666667 * (30.0 + V))) + exp( - (0.06666666666666667 * (30.0 + V))))))
  // tau_m1= (5.0 / (exp((0.04 * (15.0 + V))) + exp( - (0.04 * (15.0 + V)))))
  // a= (k1 * k3_ / (k1_ * k3))^0.5
  // O= A_na^3
  // i_Na= (g_Na * O * (V - V_Na))
  // i_Ca_L= (g_Ca_L * m1^2 * (V - V_Ca))
  // i_Ca_T= (g_Ca_T * m^2 * h * (V - V_Ca))
  // i_K_dr= (g_K_dr * n1^4 * h1 * h2 * (V - V_K))
  // i_M= (g_M * n * (V - V_K))
  // iir=(g_ir)*n_inf1*(V-V_K)
  // i_d= (g_d * (V - V_Ca))
  // iKir=girbar*nIR*rIR*(V - V_K)
  // # Differential equations
  // V'=(-(i_Na + i_Ca_L + i_Ca_T + i_K_dr + i_M + iir + i_d + iKir) / Cm)
  // A_na'= D*alpha+inhibitedA*k1_-A_na*(beta+k1)
  // inhibitedA'=A_na*k1+inhibitedD*alpha*a-inhibitedA*(k1_+beta*a)
  // inhibitedD'=inhibitedA*beta*a+D*k3-inhibitedD*(alpha*a+k3_)
  // D'=A_na*beta+inhibitedD*k3_-D*(alpha+k3)
  // m1'=((m_inf1 - m1) / tau_m1)
  // m'=((m_inf - m) / tau_m)
  // h'=((h_inf - h) / tau_h)
  // n1'=((n_inf2 - n1) / tau_n1)
  // h1'=((h_inf1 - h1) / tau_h1)
  // n'=((n_inf - n) / tau_n)
  // nIR' = (nIRinf - nIR)/tauIRn
  // rIR' = (rIRinf - rIR)/tauIRr
  // h2'= kio*(1-h2)-koi*ACO*n^4*h2
  // aux ina=i_Na
  // aux iKdr=i_K_dr
  // # Numerical and plotting parameters for xpp
  // @ maxstor=800000, total=10000, bound=100000, dt=0.1
  // @ xlo=0, xhi=10000, ylo=-80, yhi=45
  // @ method=cvode, atol=0.0001, toler=0.0001
  // done
  // This file has been produced by sbmlutils.
  // Terms of use
  // Copyright © 2017 Matthias Koenig
  // Redistribution and use of any part of this model, with or without modification, are permitted provided that the following conditions are met:
  // Redistributions of this SBML file must retain the above copyright notice, this list of conditions and the following disclaimer.
  // Redistributions in a different form must reproduce the above copyright notice, this list of conditions and the following disclaimer in the documentation and/or other materials provided with the distribution.
  // This model is distributed in the hope that it will be useful, but WITHOUT ANY WARRANTY; without even the implied warranty of MERCHANTABILITY or FITNESS FOR A PARTICULAR PURPOSE.

  // Parameters:
  v = -63; v is "v = -63";
  a_na = 0.2; a_na is "a_na = 0.2";
  inhibiteda = 1; inhibiteda is "inhibiteda = 1.0";
  d = 0.1; d is "d = 0.1";
  inhibitedd = 0.2; inhibitedd is "inhibitedd = 0.2";
  m1 = 0; m1 is "m1 = 0.0";
  m = 0; m is "m = 0.0";
  h = 0; h is "h = 0.0";
  n1 = 0; n1 is "n1 = 0.0";
  h1 = 0; h1 is "h1 = 0.0";
  n = 0; n is "n = 0.0";
  nir = 0.003; nir is "nir = 0.003";
  rir = 0.282; rir is "rir = 0.282";
  h2 = 0.9; h2 is "h2 = 0.9";
  g_na = 60; g_na is "g_na = 60.0";
  g_ca_l = 1.1; g_ca_l is "g_ca_l = 1.1";
  g_ca_t = 0.94; g_ca_t is "g_ca_t = 0.94";
  g_k_dr = 20; g_k_dr is "g_k_dr = 20.0";
  g_m = 4; g_m is "g_m = 4.0";
  g_ir = 1.71; g_ir is "g_ir = 1.71";
  g_d = 0.0277; g_d is "g_d = 0.0277";
  kio = 0.00132; kio is "kio = 0.00132";
  koi = 0.00111; koi is "koi = 0.00111";
  aco = 0.001; aco is "aco = 0.001";
  v_k = -75; v_k is "v_k = -75";
  v_na = 60; v_na is "v_na = 60.0";
  v_ca = 100; v_ca is "v_ca = 100.0";
  vh = -40; vh is "vh = -40.0";
  k1 = 0.3; k1 is "k1 = 0.3";
  k1_ = 0.03; k1_ is "k1_ = 0.03";
  k3 = 0.001; k3 is "k3 = 0.001";
  k3_ = 0.01; k3_ is "k3_ = 0.01";
  tau_h = 22; tau_h is "tau_h = 22.0";
  tau_h1 = 1000; tau_h1 is "tau_h1 = 1000.0";
  cm = 14; cm is "cm = 14.0";
  girbar = 50; girbar is "girbar = 50";
  alpha has dimensionless;
  beta has dimensionless;
  m_inf has dimensionless;
  m_inf1 has dimensionless;
  h_inf has dimensionless;
  n_inf has dimensionless;
  n_inf1 has dimensionless;
  n_inf2 has dimensionless;
  h_inf1 has dimensionless;
  alphairn has dimensionless;
  betairn has dimensionless;
  nirinf has dimensionless;
  tauirn has dimensionless;
  alphairr has dimensionless;
  betairr has dimensionless;
  ririnf has dimensionless;
  tauirr has dimensionless;
  tau_n has dimensionless;
  tau_m has dimensionless;
  tau_n1 has dimensionless;
  tau_m1 has dimensionless;
  a has dimensionless;
  o has dimensionless;
  i_na has dimensionless;
  i_ca_l has dimensionless;
  i_ca_t has dimensionless;
  i_k_dr has dimensionless;
  i_m has dimensionless;
  iir has dimensionless;
  i_d has dimensionless;
  ikir has dimensionless;
  ina has dimensionless;
  ikdr has dimensionless;
  t has dimensionless; t is "model time";

  // Assignment rules:
  alpha := 10/(1 + exp(-(0.1*(6 + v))));
  beta := 10/(1 + exp(0.2173913*(54.4 + v)));
  m_inf := 1/(1 + exp(-(0.1*(-56.1 + v))));
  m_inf1 := 1/(1 + exp(-(0.08333333*(v - vh))));
  h_inf := 1/(1 + exp(0.212766*(86.4 + v)));
  n_inf := 1/(1 + exp(-(0.25*(37 + v))));
  n_inf1 := 0.2 + 0.8/(1 + exp(0.08333333*(80 + v)));
  n_inf2 := 1/(1 + exp(-(0.06666667*(25 + v))));
  h_inf1 := 0.3 + 0.7/(1 + exp(-(0.1*(35 + v))));
  alphairn := 0.09/(1 + exp(0.11*(v + 50)));
  betairn := 0.00035*exp(0.07*(v + 25));
  nirinf := 1/(1 + alphairn/betairn);
  tauirn := 1/(alphairn + betairn);
  alphairr := 30/(1 + exp(0.04*(v + 245)));
  betairr := 0.15/(1 + exp(-0.05*(v + 120)));
  ririnf := 1/(1 + betairr/alphairr);
  tauirr := 1/(alphairr + betairr);
  tau_n := 80/(exp(0.06666667*(30 + v)) + exp(-(0.06666667*(30 + v))));
  tau_m := 0.8 + 7/(exp(0.1111111*(50 + v)) + exp(-(0.1111111*(50 + v))));
  tau_n1 := 1 + 15/(exp(0.06666667*(30 + v)) + exp(-(0.06666667*(30 + v))));
  tau_m1 := 5/(exp(0.04*(15 + v)) + exp(-(0.04*(15 + v))));
  a := (k1*k3_/(k1_*k3))^0.5;
  o := a_na^3;
  i_na := g_na*o*(v - v_na);
  i_ca_l := g_ca_l*m1^2*(v - v_ca);
  i_ca_t := g_ca_t*m^2*h*(v - v_ca);
  i_k_dr := g_k_dr*n1^4*h1*h2*(v - v_k);
  i_m := g_m*n*(v - v_k);
  iir := g_ir*n_inf1*(v - v_k);
  i_d := g_d*(v - v_ca);
  ikir := girbar*nir*rir*(v - v_k);
  ina := i_na;
  ikdr := i_k_dr;
  t := time;

  // Rate rules:
  v' = -(i_na + i_ca_l + i_ca_t + i_k_dr + i_m + iir + i_d + ikir)/cm;
  a_na' = d*alpha + inhibiteda*k1_ - a_na*(beta + k1);
  inhibiteda' = a_na*k1 + inhibitedd*alpha*a - inhibiteda*(k1_ + beta*a);
  inhibitedd' = inhibiteda*beta*a + d*k3 - inhibitedd*(alpha*a + k3_);
  d' = a_na*beta + inhibitedd*k3_ - d*(alpha + k3);
  m1' = (m_inf1 - m1)/tau_m1;
  m' = (m_inf - m)/tau_m;
  h' = (h_inf - h)/tau_h;
  n1' = (n_inf2 - n1)/tau_n1;
  h1' = (h_inf1 - h1)/tau_h1;
  n' = (n_inf - n)/tau_n;
  nir' = (nirinf - nir)/tauirn;
  rir' = (ririnf - rir)/tauirr;
  h2' = kio*(1 - h2) - koi*aco*n^4*h2;
end
