// SBML level 3 version 1

function max(x, y)
  piecewise(x, x > y, y);
end
max is "minimum";

function min(x, y)
  piecewise(x, x < y, y);
end
min is "maximum";

function heav(x)
  piecewise(0, x < 0, 0.5, x == 0, 1, x > 0, 0);
end
heav is "heavyside";

function mod(x, y)
  piecewise(x - y*ceil(x/y), xor(x < 0, y < 0), x - y*floor(x/y));
end
mod is "modulo";

function alphams(v)
  0.32*(-46.9 - v)/(exp((-46.9 - v)/4) - 1);
end

function betams(v)
  0.28*(v + 19.9)/(exp((v + 19.9)/5) - 1);
end

function minfs(v)
  alphams(v)/(alphams(v) + betams(v));
end

function alphans(v)
  0.016*(-24.9 - v)/(exp((-24.9 - v)/5) - 1);
end

function betans(v)
  0.25*exp(-1 - 0.025*v);
end

function alphahs(v)
  0.128*exp((-43 - v)/18);
end

function betahs(v)
  4/(1 + exp((-20 - v)/5));
end

function alphasd(v)
  1.6/(1 + exp(-0.072*(v - 5)));
end

function betasd(v)
  0.02*(v + 8.9)/(exp((v + 8.9)/5) - 1);
end

function alphacd(v)
  (1 - heav(v + 10))*exp((v + 50)/11 - (v + 53.5)/27)/18.975 + heav(v + 10)*2*exp((-53.5 - v)/27);
end

function betacd(v)
  (1 - heav(v + 10))*(2*exp((-53.5 - v)/27) - alphacd(v));
end

model main()
  // XPP model
  // This model was converted from XPP ode format to SBML using sbmlutils-0.1.5a6.
  // # Adoped from Pinsky-Rinzel CA3 pyramidal cell model
  // #
  // # Pinsky and Rinzel, J Comput Neurosci 1994;1:39-60.
  // # K(ATP) channel was inserted into the model.
  // # Parameters for K(ATP) channels were from Koyto model
  // # Matsuoka et al. Prog Biophys Mol Biol 2004;85:279-299.
  // #
  // # stochastic simulation of flunctuations in intracellular ATP
  // # initial conditions
  // init Vs=-60, Vd=-60, s=0.185
  // wiener w
  // # Parameter values
  // par ip0=0.75
  // par gLs=0.1 gLd=0.1 gNa=30 gKdr=15 gCa=9 gKahp=0.8 gKC=15
  // par VNa=60 VCa=80 VK=-75 VL=-60 Vsyn=0
  // par gc=2.1 pp=0.5 Cm=3
  // par alphac=2 betac=0.1
  // par tstim=4.0e3 n=500
  // par gkatp=0.0236*(4^0.24)
  // par init_atp=0.1 final_atp=0.5
  // par natp=10
  // iatp=if(t<tstim)then(init_atp)else(final_atp)
  // # Pyramidal cell functions
  // ICad = gCa*sd*sd*(Vd-VCa)
  // alphams(v) = 0.32*(-46.9-v)/(exp((-46.9-v)/4.0)-1.0)
  // betams(v) = 0.28*(v+19.9)/(exp((v+19.9)/5.0)-1.0)
  // Minfs(v) = alphams(v)/(alphams(v)+betams(v))
  // alphans(v) = 0.016*(-24.9-v)/(exp((-24.9-v)/5.0)-1.0)
  // betans(v) = 0.25*exp(-1.0-0.025*v)
  // alphahs(v) = 0.128*exp((-43.0-v)/18.0)
  // betahs(v) = 4.0/(1.0+exp((-20.0-v)/5.0))
  // alphasd(v) = 1.6/(1.0+exp(-0.072*(v-5.0)))
  // betasd(v) = 0.02*(v+8.9)/(exp((v+8.9)/5.0)-1.0)
  // alphacd(v) = (1.0-heav(v+10.0))*exp((v+50.0)/11-(v+53.5)/27)/18.975+heav(v+10.0)*2.0*exp((-53.5-v)/27.0)
  // betacd(v) = (1.0-heav(v+10.0))*(2.0*exp((-53.5-v)/27.0)-alphacd(v))
  // alphaqd = min(0.00002*Cad,0.01)
  // betaqd = 0.001
  // chid = min(Cad/250.0,1.0)
  // # Level of intracellular ATP concentration
  // poatp = 0.8/(1+(iatp*s/0.023)^2)
  // # Stochastics
  // par alphas=1, taus=100, noise=1, s0=0.2
  // betas = alphas*(1/s0 - 1)
  // varnoise=sqrt((alphas*(1 - s)+betas*s)/(taus*natp))
  // # Output cols are t, ODEs, AUXs in order, here:
  // # t versus vd cad hs ns sd cd qd gqk gkc
  // Vs'=(-gLs*(Vs-VL)-gNa*(Minfs(Vs)^2)*hs*(Vs-VNa)-gKdr*ns*(Vs-VK)-gkatp*natp*poatp*(Vs-VK)+(gc/pp)*(Vd-Vs)+Ip0/pp)/Cm
  // Vd'=(-gLd*(Vd-VL)-ICad-gKahp*qd*(Vd-VK)-gKC*cd*chid*(Vd-VK)-gkatp*natp*poatp*(Vd-VK)+(gc*(Vs-Vd))/(1.0-pp))/Cm
  // Cad'= -0.13*ICad-0.075*Cad
  // hs'= alphahs(Vs)-(alphahs(Vs)+betahs(Vs))*hs
  // ns'= alphans(Vs)-(alphans(Vs)+betans(Vs))*ns
  // sd'= alphasd(Vd)-(alphasd(Vd)+betasd(Vd))*sd
  // cd'= alphacd(Vd)-(alphacd(Vd)+betacd(Vd))*cd
  // qd'= alphaqd-(alphaqd+betaqd)*qd
  // s' = (alphas*(1-s)-betas*s)/taus + noise*w*varnoise
  // # auxiliary equationns
  // aux Ica=ICad
  // aux gkq = gKahp*qd
  // aux gkc = gKC*cd*chid
  // aux ikatp = gkatp*natp*poatp*(Vs-VK)
  // aux iatp=iatp*s
  // # For stochastics, CVODE can not be used.
  // @ maxstor=1000000, total=1.0e4, bounds=10000, xlo=0, xhi=1.0e4, ylo=-90, yhi=60
  // @ meth=Euler, atol=1e-10, toler=1e-10, dt=0.05
  // done
  // This file has been produced by sbmlutils.
  // Terms of use
  // Copyright © 2017 Matthias Koenig
  // Redistribution and use of any part of this model, with or without modification, are permitted provided that the following conditions are met:
  // Redistributions of this SBML file must retain the above copyright notice, this list of conditions and the following disclaimer.
  // Redistributions in a different form must reproduce the above copyright notice, this list of conditions and the following disclaimer in the documentation and/or other materials provided with the distribution.
  // This model is distributed in the hope that it will be useful, but WITHOUT ANY WARRANTY; without even the implied warranty of MERCHANTABILITY or FITNESS FOR A PARTICULAR PURPOSE.

  // Parameters:
  vs = -60; vs is "vs = -60";
  vd = -60; vd is "vd = -60";
  s = 0.185; s is "s = 0.185";
  w = 0;
  ip0 = 0.75; ip0 is "ip0 = 0.75";
  gls = 0.1; gls is "gls = 0.1";
  gld = 0.1; gld is "gld = 0.1";
  gna = 30; gna is "gna = 30";
  gkdr = 15; gkdr is "gkdr = 15";
  gca = 9; gca is "gca = 9";
  gkahp = 0.8; gkahp is "gkahp = 0.8";
  var gkc; gkc is "gkc = 15";
  vna = 60; vna is "vna = 60";
  vca = 80; vca is "vca = 80";
  vk = -75; vk is "vk = -75";
  vl = -60; vl is "vl = -60";
  vsyn = 0; vsyn is "vsyn = 0";
  gc = 2.1; gc is "gc = 2.1";
  pp = 0.5; pp is "pp = 0.5";
  cm = 3; cm is "cm = 3";
  alphac = 2; alphac is "alphac = 2";
  betac = 0.1; betac is "betac = 0.1";
  tstim = 4000; tstim is "tstim = 4.0e3";
  n = 500; n is "n = 500";
  gkatp = 0.0236*4^0.24;
  init_atp = 0.1; init_atp is "init_atp = 0.1";
  final_atp = 0.5; final_atp is "final_atp = 0.5";
  natp = 10; natp is "natp = 10";
  alphas = 1; alphas is "alphas = 1";
  taus = 100; taus is "taus = 100";
  noise = 1; noise is "noise = 1";
  s0_0_2 = 0.2; s0_0_2 is "s0 = 0.2";
  cad = 0 dimensionless;
  hs = 0 dimensionless;
  ns = 0 dimensionless;
  sd = 0 dimensionless;
  cd = 0 dimensionless;
  qd = 0 dimensionless;
  iatp has dimensionless;
  icad has dimensionless;
  alphaqd has dimensionless;
  betaqd has dimensionless;
  chid has dimensionless;
  poatp has dimensionless;
  betas has dimensionless;
  varnoise has dimensionless;
  ica has dimensionless;
  gkq has dimensionless;
  ikatp has dimensionless;
  t has dimensionless; t is "model time";

  // Assignment rules:
  iatp := piecewise(init_atp, t < tstim, final_atp);
  icad := gca*sd*sd*(vd - vca);
  alphaqd := min(2e-5*cad, 0.01);
  betaqd := 0.001;
  chid := min(cad/250, 1);
  poatp := 0.8/(1 + (iatp*s/0.023)^2);
  betas := alphas*(1/s0_0_2 - 1);
  varnoise := sqrt((alphas*(1 - s) + betas*s)/(taus*natp));
  ica := icad;
  gkq := gkahp*qd;
  gkc := gkc*cd*chid;
  ikatp := gkatp*natp*poatp*(vs - vk);
  t := time;

  // Rate rules:
  vs' = (-gls*(vs - vl) - gna*minfs(vs)^2*hs*(vs - vna) - gkdr*ns*(vs - vk) - gkatp*natp*poatp*(vs - vk) + gc/pp*(vd - vs) + ip0/pp)/cm;
  vd' = (-gld*(vd - vl) - icad - gkahp*qd*(vd - vk) - gkc*cd*chid*(vd - vk) - gkatp*natp*poatp*(vd - vk) + gc*(vs - vd)/(1 - pp))/cm;
  cad' = -0.13*icad - 0.075*cad;
  hs' = alphahs(vs) - (alphahs(vs) + betahs(vs))*hs;
  ns' = alphans(vs) - (alphans(vs) + betans(vs))*ns;
  sd' = alphasd(vd) - (alphasd(vd) + betasd(vd))*sd;
  cd' = alphacd(vd) - (alphacd(vd) + betacd(vd))*cd;
  qd' = alphaqd - (alphaqd + betaqd)*qd;
  s' = (alphas*(1 - s) - betas*s)/taus + noise*w*varnoise;
end
