// SBML level 3 version 1

function max(x, y)
  piecewise(x, x > y, y);
end
max is "minimum";

function min(x, y)
  piecewise(x, x < y, y);
end
min is "maximum";

function heav(x)
  piecewise(0, x < 0, 0.5, x == 0, 1, x > 0, 0);
end
heav is "heavyside";

function mod(x, y)
  piecewise(x - y*ceil(x/y), xor(x < 0, y < 0), x - y*floor(x/y));
end
mod is "modulo";

function alphams(v)
  0.32*(-46.9 - v)/(exp((-46.9 - v)/4) - 1);
end

function betams(v)
  0.28*(v + 19.9)/(exp((v + 19.9)/5) - 1);
end

function minfs(v)
  alphams(v)/(alphams(v) + betams(v));
end

function alphans(v)
  0.016*(-24.9 - v)/(exp((-24.9 - v)/5) - 1);
end

function betans(v)
  0.25*exp(-1 - 0.025*v);
end

function alphahs(v)
  0.128*exp((-43 - v)/18);
end

function betahs(v)
  4/(1 + exp((-20 - v)/5));
end

function alphasd(v)
  1.6/(1 + exp(-0.072*(v - 5)));
end

function betasd(v)
  0.02*(v + 8.9)/(exp((v + 8.9)/5) - 1);
end

function alphacd(v)
  (1 - heav(v + 10))*exp((v + 50)/11 - (v + 53.5)/27)/18.975 + heav(v + 10)*2*exp((-53.5 - v)/27);
end

function betacd(v)
  (1 - heav(v + 10))*(2*exp((-53.5 - v)/27) - alphacd(v));
end

model main()
  // XPP model
  // This model was converted from XPP ode format to SBML using sbmlutils-0.1.5a6.
  // # Neuron_EUG01.ode
  // #
  // # gNani - noninactivating sodium conductace
  // # initial conditions
  // init Vs=-59, Vd=-59
  // init cad=0.056, hs=0.995, ma_ni=0.00583, ns=0.00148, sd=0.0153, cd=0.01169, qd=0.00125
  // # Parameter values
  // par ip0=0.75
  // par gLs=0.0, gLd=0.0, gCa=1, gKahp=2.5
  // " Parameter values: simulate EUG (1 uM) effect final_gNa=17.1 final_gNani=0.3
  // par gKC=20
  // par gNa=18, gNani=0.5
  // par gKdr=24
  // par VNa=60 VCa=80 VK=-75 VL=-60 Vsyn=0
  // par gc=2.1 pp=0.5 Cm=3
  // par alphac=2 betac=0.1
  // par tstim=1.0e4 n=500
  // par gkatp=0.0236*(4^0.24)
  // par iatp=0.1
  // par natp=50
  // # Output cols are t, ODEs, AUXs in order, here:
  // # t versus vd cad hs ns sd cd qd gqk gkc
  // Vs'=(-gLs*(Vs-VL)-gNa*(Minfs(Vs)^2)*hs*(Vs-VNa)-gNani*ma_ni^3*(Vs-VNa)-gKdr*ns*(Vs-VK)-gkatp*natp*poatp*(Vs-VK)+(gc/pp)*(Vd-Vs)+Ip0/pp)/Cm
  // Vd'=(-gLd*(Vd-VL)-ICad-gKahp*qd*(Vd-VK)-gKC*cd*chid*(Vd-VK)-gkatp*natp*poatp*(Vd-VK)+(gc*(Vs-Vd))/(1.0-pp))/Cm
  // Cad'= -0.13*ICad-0.075*Cad
  // hs'= alphahs(Vs)-(alphahs(Vs)+betahs(Vs))*hs
  // ma_ni'=(1/(1+exp((-23-Vs)/7.0))-ma_ni)*(alphams(Vs)+betams(Vs))
  // ns'= alphans(Vs)-(alphans(Vs)+betans(Vs))*ns
  // sd'= alphasd(Vd)-(alphasd(Vd)+betasd(Vd))*sd
  // cd'= alphacd(Vd)-(alphacd(Vd)+betacd(Vd))*cd
  // qd'= alphaqd-(alphaqd+betaqd)*qd
  // # Cell functions
  // ICad = gCa*sd*sd*(Vd-VCa)
  // alphams(v) = 0.32*(-46.9-v)/(exp((-46.9-v)/4.0)-1.0)
  // betams(v) = 0.28*(v+19.9)/(exp((v+19.9)/5.0)-1.0)
  // Minfs(v) = alphams(v)/(alphams(v)+betams(v))
  // alphans(v) = 0.016*(-24.9-v)/(exp((-24.9-v)/5.0)-1.0)
  // betans(v) = 0.25*exp(-1.0-0.025*v)
  // alphahs(v) = 0.128*exp((-43.0-v)/18.0)
  // betahs(v) = 4.0/(1.0+exp((-20.0-v)/5.0))
  // alphasd(v) = 1.6/(1.0+exp(-0.072*(v-5.0)))
  // betasd(v) = 0.02*(v+8.9)/(exp((v+8.9)/5.0)-1.0)
  // alphacd(v) = (1.0-heav(v+10.0))*exp((v+50.0)/11-(v+53.5)/27)/18.975+heav(v+10.0)*2.0*exp((-53.5-v)/27.0)
  // betacd(v) = (1.0-heav(v+10.0))*(2.0*exp((-53.5-v)/27.0)-alphacd(v))
  // alphaqd = min(0.00002*Cad,0.01)
  // betaqd = 0.001
  // chid = min(Cad/250.0,1.0)
  // # Level of intracellular ATP concentration
  // poatp = 0.8/(1+(iatp/0.023)^2)
  // # auxiliary equationns
  // # aux Ica=ICad
  // # aux ikca = gKC*cd*chid*(Vd-VK)
  // aux ina = gNa*(Minfs(Vs)^2)*hs*(Vs-VNa)
  // # aux ikdr=gKdr*ns*(Vs-VK)
  // # aux ikatp = gkatp*natp*poatp*(Vs-VK)
  // aux ina_ni=gNani*ma_ni^3*(Vs-VNa)
  // # Numerical and plotting parameters for xpp
  // @ maxstor=1600000,total=5000,bound=10000,xlo=0,xhi=5000,ylo=-90,yhi=40
  // @ meth=cvode,atol=0.0001,toler=0.0001,dt=0.05
  // set EUG {gNa=17.1, gNani=0.3}
  // done
  // This file has been produced by sbmlutils.
  // Terms of use
  // Copyright © 2017 Matthias Koenig
  // Redistribution and use of any part of this model, with or without modification, are permitted provided that the following conditions are met:
  // Redistributions of this SBML file must retain the above copyright notice, this list of conditions and the following disclaimer.
  // Redistributions in a different form must reproduce the above copyright notice, this list of conditions and the following disclaimer in the documentation and/or other materials provided with the distribution.
  // This model is distributed in the hope that it will be useful, but WITHOUT ANY WARRANTY; without even the implied warranty of MERCHANTABILITY or FITNESS FOR A PARTICULAR PURPOSE.

  // Parameters:
  vs = -59; vs is "vs = -59";
  vd = -59; vd is "vd = -59";
  cad = 0.056; cad is "cad = 0.056";
  hs = 0.995; hs is "hs = 0.995";
  ma_ni = 0.00583; ma_ni is "ma_ni = 0.00583";
  ns = 0.00148; ns is "ns = 0.00148";
  sd = 0.0153; sd is "sd = 0.0153";
  cd = 0.01169; cd is "cd = 0.01169";
  qd = 0.00125; qd is "qd = 0.00125";
  ip0 = 0.75; ip0 is "ip0 = 0.75";
  gls = 0; gls is "gls = 0.0";
  gld = 0; gld is "gld = 0.0";
  gca = 1; gca is "gca = 1";
  gkahp = 2.5; gkahp is "gkahp = 2.5";
  gkc = 20; gkc is "gkc = 20";
  gna = 18; gna is "gna = 18";
  gnani = 0.5; gnani is "gnani = 0.5";
  gkdr = 24; gkdr is "gkdr = 24";
  vna = 60; vna is "vna = 60";
  vca = 80; vca is "vca = 80";
  vk = -75; vk is "vk = -75";
  vl = -60; vl is "vl = -60";
  vsyn = 0; vsyn is "vsyn = 0";
  gc = 2.1; gc is "gc = 2.1";
  pp = 0.5; pp is "pp = 0.5";
  cm = 3; cm is "cm = 3";
  alphac = 2; alphac is "alphac = 2";
  betac = 0.1; betac is "betac = 0.1";
  tstim = 10000; tstim is "tstim = 1.0e4";
  n = 500; n is "n = 500";
  gkatp = 0.0236*4^0.24;
  iatp = 0.1; iatp is "iatp = 0.1";
  natp = 50; natp is "natp = 50";
  icad has dimensionless;
  alphaqd has dimensionless;
  betaqd has dimensionless;
  chid has dimensionless;
  poatp has dimensionless;
  ina has dimensionless;
  ina_ni has dimensionless;
  t has dimensionless; t is "model time";

  // Assignment rules:
  icad := gca*sd*sd*(vd - vca);
  alphaqd := min(2e-5*cad, 0.01);
  betaqd := 0.001;
  chid := min(cad/250, 1);
  poatp := 0.8/(1 + (iatp/0.023)^2);
  ina := gna*minfs(vs)^2*hs*(vs - vna);
  ina_ni := gnani*ma_ni^3*(vs - vna);
  t := time;

  // Rate rules:
  vs' = (-gls*(vs - vl) - gna*minfs(vs)^2*hs*(vs - vna) - gnani*ma_ni^3*(vs - vna) - gkdr*ns*(vs - vk) - gkatp*natp*poatp*(vs - vk) + gc/pp*(vd - vs) + ip0/pp)/cm;
  vd' = (-gld*(vd - vl) - icad - gkahp*qd*(vd - vk) - gkc*cd*chid*(vd - vk) - gkatp*natp*poatp*(vd - vk) + gc*(vs - vd)/(1 - pp))/cm;
  cad' = -0.13*icad - 0.075*cad;
  hs' = alphahs(vs) - (alphahs(vs) + betahs(vs))*hs;
  ma_ni' = (1/(1 + exp((-23 - vs)/7)) - ma_ni)*(alphams(vs) + betams(vs));
  ns' = alphans(vs) - (alphans(vs) + betans(vs))*ns;
  sd' = alphasd(vd) - (alphasd(vd) + betasd(vd))*sd;
  cd' = alphacd(vd) - (alphacd(vd) + betacd(vd))*cd;
  qd' = alphaqd - (alphaqd + betaqd)*qd;
end
