// SBML level 3 version 1

function max(x, y)
  piecewise(x, x > y, y);
end
max is "minimum";

function min(x, y)
  piecewise(x, x < y, y);
end
min is "maximum";

function heav(x)
  piecewise(0, x < 0, 0.5, x == 0, 1, x > 0, 0);
end
heav is "heavyside";

function mod(x, y)
  piecewise(x - y*ceil(x/y), xor(x < 0, y < 0), x - y*floor(x/y));
end
mod is "modulo";

model main()
  // XPP model
  // This model was converted from XPP ode format to SBML using sbmlutils-0.1.5a6.
  // # default: gnap=2,gcan=0.7,I=1 (SD-Burst)
  // # AUGUST 2010
  // # cell is combination of Nap and CaN burster (Can closed-cell model with ER in dendrtes)
  // # NaP burster is from from Butera, 1999; setting gcan=0 reproduce Butera 1999 model
  // # Frequency of Ca oscillations controlled by either Catot or I (larger values - faster bursting)
  // # units: V = mV; Cm = pF; g = uS
  // minf=1/(1+exp((v-vm) /sm))
  // ninf=1/(1+exp((v-vn) /sn))
  // minfp=1/(1+exp((v-vmp)/smp))
  // hinf=1/(1+exp((v-vh) /sh))
  // taun=taunb/cosh((v-vn)/(2*sn))
  // tauh=tauhb/cosh((v-vh)/(2*sh))
  // I_na=gna*minf^3*(1-n)*(v-vna)
  // I_k=gk*n^4*(v-Vk)
  // I_nap=gnap*minfp*h*(v-vna)
  // I_l =gl*(v-vleaks)
  // # Equations for CaN current
  // caninf =1/(1+(Kcan/C)^ncan)
  // I_can=gcan*caninf*(v-vna)
  // #Fluxes in and out of ER
  // # l is fraction of open IP3 channels
  // J_ER_in=(LL + P*( (I*C*l)/( (I+Ki)*(C+Ka) ) )^3 )*(Ce - C)
  // J_ER_out=Ve*C^2/(Ke^2+C^2)
  // Ce = (Ct - C)/sigma
  // # Equations
  // v'= (-I_k - I_na-I_nap-I_l-I_aps-I_can)/Cms
  // n'= (ninf-n)/taun
  // h'= (hinf-h)/tauh
  // C' = fi*( J_ER_in- J_ER_out)
  // l' = A*( Kd - (C + Kd)*l )
  // # Auxilary variables
  // aux Ce=Ce
  // aux ican=I_can
  // aux inaps=I_nap
  // #Initial conditions
  // v(0)=-50
  // n(0)=0.004
  // h(0)=0.33
  // C(0)=0.03
  // l(0)=0.93
  // # Voltage parameters
  // par Cms=21, I_aps=0
  // num vna=50,vk=-85, vleaks=-58
  // num vm=-34,vn=-29, vmp=-40, vh=-48
  // num sm=-5, sn=-4, smp=-6, sh=5
  // num taunb=10, tauhb=10000,
  // par gk=11.2, gna=28, gnap=2,gl=2.3
  // # Ca parameters
  // par Kcan=0.74, ncan=0.97,gcan=0.7
  // par I=1
  // par Ct=1.25
  // par fi=0.000025
  // num LL=0.37
  // par P=31000
  // par Ki=1.0
  // par Ka=0.4
  // par Ve=400
  // par Ke=0.2
  // par A=0.005
  // par Kd=0.4
  // par sigma=0.185
  // @ dt=0.1,total=10000,meth=qualrk,xp=t,yp=v
  // @ xlo=0,xhi=10000,ylo=-60,yhi=10.,bound=500001,maxstor=5000001
  // done
  // This file has been produced by sbmlutils.
  // Terms of use
  // Copyright © 2017 Matthias Koenig
  // Redistribution and use of any part of this model, with or without modification, are permitted provided that the following conditions are met:
  // Redistributions of this SBML file must retain the above copyright notice, this list of conditions and the following disclaimer.
  // Redistributions in a different form must reproduce the above copyright notice, this list of conditions and the following disclaimer in the documentation and/or other materials provided with the distribution.
  // This model is distributed in the hope that it will be useful, but WITHOUT ANY WARRANTY; without even the implied warranty of MERCHANTABILITY or FITNESS FOR A PARTICULAR PURPOSE.

  // Parameters:
  v = -50; v is "v = -50";
  n = 0.004; n is "n = 0.004";
  h = 0.33; h is "h = 0.33";
  c = 0.03; c is "c = 0.03";
  l = 0.93; l is "l = 0.93";
  cms = 21; cms is "cms = 21";
  i_aps = 0; i_aps is "i_aps = 0";
  vna = 50; vna is "vna = 50";
  vk = -85; vk is "vk = -85";
  vleaks = -58; vleaks is "vleaks = -58";
  vm = -34; vm is "vm = -34";
  vn = -29; vn is "vn = -29";
  vmp = -40; vmp is "vmp = -40";
  vh = -48; vh is "vh = -48";
  sm = -5; sm is "sm = -5";
  sn = -4; sn is "sn = -4";
  smp = -6; smp is "smp = -6";
  sh = 5; sh is "sh = 5";
  taunb = 10; taunb is "taunb = 10";
  tauhb = 10000; tauhb is "tauhb = 10000";
  gk = 11.2; gk is "gk = 11.2";
  gna = 28; gna is "gna = 28";
  gnap = 2; gnap is "gnap = 2";
  gl = 2.3; gl is "gl = 2.3";
  kcan = 0.74; kcan is "kcan = 0.74";
  ncan = 0.97; ncan is "ncan = 0.97";
  gcan = 0.7; gcan is "gcan = 0.7";
  i = 1; i is "i = 1";
  ct = 1.25; ct is "ct = 1.25";
  fi = 2.5e-5; fi is "fi = 0.000025";
  ll = 0.37; ll is "ll = 0.37";
  p = 31000; p is "p = 31000";
  ki = 1; ki is "ki = 1.0";
  ka = 0.4; ka is "ka = 0.4";
  ve = 400; ve is "ve = 400";
  ke = 0.2; ke is "ke = 0.2";
  a = 0.005; a is "a = 0.005";
  kd = 0.4; kd is "kd = 0.4";
  sigma = 0.185; sigma is "sigma = 0.185";
  minf has dimensionless;
  ninf has dimensionless;
  minfp has dimensionless;
  hinf has dimensionless;
  taun has dimensionless;
  tauh has dimensionless;
  i_na has dimensionless;
  i_k has dimensionless;
  i_nap has dimensionless;
  i_l has dimensionless;
  caninf has dimensionless;
  i_can has dimensionless;
  j_er_in has dimensionless;
  j_er_out has dimensionless;
  ce has dimensionless;
  ican has dimensionless;
  inaps has dimensionless;
  t has dimensionless; t is "model time";

  // Assignment rules:
  minf := 1/(1 + exp((v - vm)/sm));
  ninf := 1/(1 + exp((v - vn)/sn));
  minfp := 1/(1 + exp((v - vmp)/smp));
  hinf := 1/(1 + exp((v - vh)/sh));
  taun := taunb/cosh((v - vn)/(2*sn));
  tauh := tauhb/cosh((v - vh)/(2*sh));
  i_na := gna*minf^3*(1 - n)*(v - vna);
  i_k := gk*n^4*(v - vk);
  i_nap := gnap*minfp*h*(v - vna);
  i_l := gl*(v - vleaks);
  caninf := 1/(1 + (kcan/c)^ncan);
  i_can := gcan*caninf*(v - vna);
  j_er_in := (ll + p*(i*c*l/((i + ki)*(c + ka)))^3)*(ce - c);
  j_er_out := ve*c^2/(ke^2 + c^2);
  ce := (ct - c)/sigma;
  ican := i_can;
  inaps := i_nap;
  t := time;

  // Rate rules:
  v' = (-i_k - i_na - i_nap - i_l - i_aps - i_can)/cms;
  n' = (ninf - n)/taun;
  h' = (hinf - h)/tauh;
  c' = fi*(j_er_in - j_er_out);
  l' = a*(kd - (c + kd)*l);
end
