// SBML level 3 version 1

function max(x, y)
  piecewise(x, x > y, y);
end
max is "minimum";

function min(x, y)
  piecewise(x, x < y, y);
end
min is "maximum";

function heav(x)
  piecewise(0, x < 0, 0.5, x == 0, 1, x > 0, 0);
end
heav is "heavyside";

function mod(x, y)
  piecewise(x - y*ceil(x/y), xor(x < 0, y < 0), x - y*floor(x/y));
end
mod is "modulo";

model main()
  // XPP model
  // This model was converted from XPP ode format to SBML using sbmlutils-0.1.5a6.
  // ##########################################################################
  // # Simple model of circadian clock with PNF structure
  // # Generated: 12-Sep-2012 00:40:24
  // # Generated by Jae Kyoung Kim and Daniel Forger by using SBtoolbox2
  // # This file can be used by XPPAUT for simulation and
  // # bifurcation analysis.
  // ##########################################################################
  // ########################################################
  // # DIFFERENTIAL EQUATIONS
  // ########################################################
  // M'=ao*(A-P-Kd+((A-P-Kd)^2+4*A*Kd)^0.5)/(2*A)-bo*M
  // Pc'=at*M-bt*Pc
  // P'=ah*Pc-bh*P
  // R'=ro*(A-P-Kd+((A-P-Kd)^2+4*A*Kd)^0.5)/(2*A)-do*R
  // A'=rt*R-dt*A
  // ########################################################
  // # PARAMETERS
  // ########################################################
  // param ao=1
  // param at=1
  // param ah=1
  // param bo=1
  // param bt=1
  // param bh=1
  // param ro=1
  // param rt=0.0395
  // param do=0.2
  // param dt=0.2
  // param Kd=1e-05
  // ########################################################
  // # FUNCTIONS
  // ########################################################
  // power(x,y)=x^y
  // ########################################################
  // # INITIAL CONDITIONS
  // ########################################################
  // M(0)=0.1
  // Pc(0)=0.1
  // P(0)=0.1
  // R(0)=0.1
  // A(0)=0.1
  // ########################################################
  // # INTEGRATOR SETTINGS AND DONE
  // ########################################################
  // @ method=stiff
  // @ bounds=100000
  // @ maxstor=20000
  // done
  // This file has been produced by sbmlutils.
  // Terms of use
  // Copyright © 2017 Matthias Koenig
  // Redistribution and use of any part of this model, with or without modification, are permitted provided that the following conditions are met:
  // Redistributions of this SBML file must retain the above copyright notice, this list of conditions and the following disclaimer.
  // Redistributions in a different form must reproduce the above copyright notice, this list of conditions and the following disclaimer in the documentation and/or other materials provided with the distribution.
  // This model is distributed in the hope that it will be useful, but WITHOUT ANY WARRANTY; without even the implied warranty of MERCHANTABILITY or FITNESS FOR A PARTICULAR PURPOSE.

  // Parameters:
  ao = 1; ao is "ao = 1";
  at = 1; at is "at = 1";
  ah = 1; ah is "ah = 1";
  bo = 1; bo is "bo = 1";
  bt = 1; bt is "bt = 1";
  bh = 1; bh is "bh = 1";
  ro = 1; ro is "ro = 1";
  rt = 0.0395; rt is "rt = 0.0395";
  do = 0.2; do is "do = 0.2";
  dt = 0.2; dt is "dt = 0.2";
  kd = 1e-5; kd is "kd = 1e-05";
  m = 0.1; m is "m = 0.1";
  pc = 0.1; pc is "pc = 0.1";
  p = 0.1; p is "p = 0.1";
  r = 0.1; r is "r = 0.1";
  a = 0.1; a is "a = 0.1";
  t has dimensionless; t is "model time";

  // Assignment rules:
  t := time;

  // Rate rules:
  m' = ao*(a - p - kd + ((a - p - kd)^2 + 4*a*kd)^0.5)/(2*a) - bo*m;
  pc' = at*m - bt*pc;
  p' = ah*pc - bh*p;
  r' = ro*(a - p - kd + ((a - p - kd)^2 + 4*a*kd)^0.5)/(2*a) - do*r;
  a' = rt*r - dt*a;
end
