// SBML level 3 version 1

function max(x, y)
  piecewise(x, x > y, y);
end
max is "minimum";

function min(x, y)
  piecewise(x, x < y, y);
end
min is "maximum";

function heav(x)
  piecewise(0, x < 0, 0.5, x == 0, 1, x > 0, 0);
end
heav is "heavyside";

function mod(x, y)
  piecewise(x - y*ceil(x/y), xor(x < 0, y < 0), x - y*floor(x/y));
end
mod is "modulo";

model main()
  // XPP model
  // This model was converted from XPP ode format to SBML using sbmlutils-0.1.5a6.
  // # RatAPtest01.ode
  // # Rat action potential is simulated (bondarenko_model_2004)
  // # (cf. Bondarenko et al. Am J Physiol Heart Circ Physiol 2004;287: H1378-H1403)
  // # (cf. Wang et al. Toxicol Sci 2008;106:454-463)
  // # implemented by Dr. Sheng-Nan Wu
  // # Constant values
  // Number Temp=298.0, R=8.314, Fara=96.5
  // Number E_CaL=63.0, E_Cl=-40.0
  // Number Cm=1.0, Vmyo=2.584E-5, VNSR=2.098E-6, VJSR=1.2E-7
  // # Initial values
  // Initial V=-82.4202, Cai=0.115001
  // Initial Nai=14237.1, Ki=143720.0
  // Initial C_Na1=2.79132E-4, C_Na2=0.020752, O_Na=7.13483E-7
  // Initial IF_Na=1.53176E-4, I1_Na=6.73345E-7, I2_Na=1.55787E-9
  // Initial IC_Na2=0.0113879, IC_Na3=0.34278
  // Initial ato_f=0.00265563, ito_f=0.999977
  // Initial ato_s=4.17069E-4, ito_s=0.998543
  // Initial nKs=2.62753E-4, aur=4.17069E-4, iur=0.998543
  // Initial aKss=4.17069E-4, iKss=1.0
  // Initial C_K1=9.92513E-4, C_K2=6.41229E-4
  // Initial O_K=1.75298E-4, I_K=3.19129E-5
  // Initial Cass=0.115001, CaJSR=1299.5, CaNSR=1299.5
  // Initial P_RyR=0.0
  // Initial LTRPN_Ca=11.2684, HTRPN_Ca=125.29
  // Initial O=9.30308E-19, O1=1.49102E-5, O2=9.51726E-11
  // Initial P_C2=1.6774E-4
  // Initial C2=1.24216E-4, C3=5.78679E-9, C4=1.19816E-13
  // Initial I1=4.97023E-19, I2=3.45847E-14, I3=1.85106E-14
  // # Stimulus protocol
  // Par r0=1, period=300, pulse=10
  // Par tf=0, tp=5, tstart=10
  // ts=t-tstart
  // rstar = r0 + pulse*(heav(mod(ts,period)-tf)-heav(mod(ts,period)-(tf+tp)))
  // Par Nao=140000.0
  // Par LTRPN_tot=70.0
  // Par kf=0.023761
  // Par kb=0.036778
  // Par Km_CSQN=800.0
  // Par i_pCa_max=1.0
  // Par CMDN_tot=50.0
  // Par Kpc_max=0.23324
  // Par Km_CMDN=0.238
  // Par K_mCa=1380.0
  // Par Km_Nai=21.0
  // Par v1=4.5, v2=1.7E-5, v3=0.45
  // Par k_plus_c=0.0090
  // Par k_minus_ltrpn=0.196
  // Par g_Cab=3.67E-4
  // Par k_plus_b=0.00405
  // Par k_plus_a=0.006075
  // Par Km_up=0.5
  // Par K_mNa=87500.0
  // Par Km_Cl=10.0
  // Par CSQN_tot=15000.0
  // Par k_minus_htrpn =3.2E-5
  // Par Km_pCa=0.5
  // Par k_plus_ltrpn=0.0327
  // Par Acap=1.534E-4
  // Par g_Na=13.0, g_CaL=1.51729, g_Ks=0.000575, g_Kr=0.0078, g_Kur=0.0016
  // Par g_ClCa=10.0
  // Par Vss=1.485E-9
  // Par k_NaCa=992.8
  // Par k_plus_htrpn=0.00237
  // Par Ko=5400.0, Cao=1800.0
  // Par tau_xfer=8.0
  // Par k_sat =0.1
  // Par n=4.0
  // Par g_Kto_f=0.4067, g_Kto_s=0.01, g_Nab=0.0026
  // Par m=3.0
  // Par Km_Ko=1.5
  // Par g_Kss=0.05
  // Par HTRPN_tot=140.0
  // Par i_NaK_max=0.88
  // Par i_CaL_max=7.0
  // Par tau_tr=20.0
  // Par k_minus_c=8.0E-4
  // Par k_minus_b=0.965
  // Par k_minus_a=0.07125
  // Par Kpc_half=20.0
  // Par eta=0.35
  // Par Kpcb=5.0E-4
  // ass = (1.0 / (1.0 + exp( - (0.12987012987012986 * (22.5 + V)))))
  // E_K = (ln((Ko / Ki)) * R * Temp / Fara)
  // i_Ks = (g_Ks * (nKs^2.0) * (V - E_K))
  // E_Na = (ln((((0.9 * Nao) + (0.1 * Ko)) / ((0.9 * Nai) + (0.1 * Ki)))) * R * Temp / Fara)
  // i_Kr = (g_Kr * O_K * (V - (ln((((0.98 * Ko) + (0.02 * Nao)) / ((0.98 * Ki) + (0.02 * Nai)))) * R * Temp / Fara)))
  // i_Kur = (g_Kur * aur * iur * (V - E_K))
  // sigma = (0.14285714285714285 * (-1.0 + exp((1.4858841010401188E-5 * Nao))))
  // f_NaK = (1.0 / (1.0 + (0.1245 * exp( - (0.1 * V * Fara / (R * Temp)))) + (0.0365 * sigma * exp( - (Fara * V / (R * Temp))))))
  // J_leak = (v2 * (CaNSR - Cai))
  // i_NaCa = (k_NaCa * ((exp((eta * V * Fara / (R * Temp))) * (Nai^3.0) * Cao) - (exp(((-1.0 + eta) * V * Fara / (R * Temp))) * (Nao^3.0) * Cai)) / ((K_mNa^3.0) + (Nao^3.0)) / (K_mCa + Cao) / (1.0 + (k_sat * exp(((-1.0 + eta) * V * Fara / (R * Temp))))))
  // O_ClCa = (0.2 / (1.0 + exp( - (0.12820512820512822 * (-46.7 + V)))))
  // i_ClCa = (g_ClCa * O_ClCa * (V - E_Cl) * Cai / (Cai + Km_Cl))
  // i_Nab = (g_Nab * (V - E_Na))
  // tau_Kss = (13.17 + (39.3 * exp( - (0.0862 * V))))
  // beta_i1 = (9.5E-4 * exp((0.14285714285714285 * (33.5 + V))) / (1.0 + (0.051335 * exp((0.14285714285714285 * (33.5 + V))))))
  // beta = (0.05 * exp( - (0.07692307692307693 * (12.0 + V))))
  // i_Kss = (g_Kss * aKss * iKss * (V - E_K))
  // i_K1 = (0.2938 * Ko * (V - E_K) / (210.0 + Ko) / (1.0 + exp((0.0896 * (V - E_K)))))
  // i_NaK = (i_NaK_max * f_NaK * Ko / (1.0 + ((Km_Nai / Nai)^0.66667)) / (Ko + Km_Ko))
  // J_rel = (v1 * (O1 + O2) * (CaJSR - Cass) * P_RyR)
  // alpha_n = (4.81333E-6 * (26.5 + V) * (1.0 - exp( - (0.128 * (26.5 + V)))))
  // alpha_i= (0.090821 * exp((0.023391 * (5.0 + V))))
  // alpha_a = (0.18064 * exp((0.03577 * (30.0 + V))))
  // i_pCa = (i_pCa_max * (Cai^2.0) / ((Km_pCa^2.0) + (Cai^2.0)))
  // alpha_i1 = (1.52E-4 * exp( - (0.14285714285714285 * (13.5 + V))) / (1.0 + (0.0067083 * exp( - (0.14285714285714285 * (33.5 + V))))))
  // # i_stim = - (10.0 * (t > 10.0) * (t < 15.0))
  // beta_Na13 = (0.22 * exp( - (0.04926108374384236 * (-7.5 + V))))
  // beta_Na12 = (0.2 * exp( - (0.04926108374384236 * (-2.5 + V))))
  // beta_Na11 = (0.1917 * exp( - (0.04926108374384236 * (2.5 + V))))
  // alpha = (0.4 * exp((0.1 * (12.0 + V))) * (1.0 - (0.75 * exp( - (0.0025 * ((20.0 + V)^2.0)))) + (0.7 * exp( - (0.1 * ((40.0 + V)^2.0))))) / (1.0 + (0.12 * exp((0.1 * (12.0 + V))))))
  // Bi = ((1.0 + (CMDN_tot * Km_CMDN / ((Km_CMDN + Cai)^2.0)))^(-1.0))
  // gamma = (Kpc_max * Cass / (Kpc_half + Cass))
  // P_C1= (1.0 - (P_C2 + O1 + O2))
  // C1= (1.0 - (O + C2 + C2 + C3 + C4 + I1 + I2 + I3))
  // beta_n= (9.53333E-5 * exp( - (0.038 * (26.5 + V))))
  // beta_i= (0.006497 * exp( - (0.03268 * (5.0 + V))))
  // beta_a= (0.3956 * exp( - (0.06237 * (30.0 + V))))
  // i_Kto_s = (g_Kto_s * ato_s * ito_s * (V - E_K))
  // i_Kto_f = (g_Kto_f * (ato_f^3.0) * ito_f * (V - E_K))
  // alpha_Na3 = (7.0E-7 * exp( - (0.12987012987012986 * (7.0 + V))))
  // beta_Na5 = (0.02 * alpha_Na3)
  // beta_Na4 = alpha_Na3
  // beta_Na3 = (0.0084 + (2.0E-5 * (7.0 + V)))
  // alpha_Na13 = (3.802 / ((0.1027 * exp( - (0.08333333333333333 * (2.5 + V)))) + (0.25 * exp( - (0.006666666666666667 * (2.5 + V))))))
  // alpha_Na2 = (1.0 / (0.393956 + (0.188495 * exp( - (0.06024096385542168 * (7.0 + V))))))
  // beta_Na2 = (alpha_Na13 * alpha_Na2 * alpha_Na3 / (beta_Na13 * beta_Na3))
  // BJSR = ((1.0 + (CSQN_tot * Km_CSQN / ((Km_CSQN + CaJSR)^2.0)))^(-1.0))
  // tau_iur= (1200.0 - (170.0 / (1.0 + exp((0.17543859649122806 * (45.2 + V))))))
  // E_CaN= (ln((Cao / Cai)) * R * Temp / (2.0 * Fara))
  // i_Cab= (g_Cab * (V - E_CaN))
  // tau_ti_s= (270.0 + (1050.0 / (1.0 + exp((0.17543859649122806 * (45.2 + V))))))
  // Bss= ((1.0 + (CMDN_tot * Km_CMDN / ((Km_CMDN + Cass)^2.0)))^(-1.0))
  // alpha_Na12= (3.802 / ((0.1027 * exp( - (0.06666666666666667 * (2.5 + V)))) + (0.23 * exp( - (0.006666666666666667 * (2.5 + V))))))
  // alpha_Na11= (3.802 / ((0.1027 * exp( - (0.058823529411764705 * (2.5 + V)))) + (0.2 * exp( - (0.006666666666666667 * (2.5 + V))))))
  // tau_aur= (2.058 + (0.493 * exp( - (0.0629 * V))))
  // beta_a1= (6.89E-5 * exp( - (0.04178 * V)))
  // beta_a0= (0.047002 * exp( - (0.0631 * V)))
  // J_xfer= ((Cass - Cai) / tau_xfer)
  // tau_ta_s= (2.058 + (0.493 * exp( - (0.0629 * V))))
  // J_up= (v3 * (Cai^2.0) / ((Km_up^2.0) + (Cai^2.0)))
  // alpha_Na5 = (1.0526315789473684E-5 * alpha_Na2)
  // alpha_Na4 = (0.0010 * alpha_Na2)
  // iss = (1.0 / (1.0 + exp((0.17543859649122806 * (45.2 + V)))))
  // Kpcf = (13.0 * (1.0 - exp( - (0.01 * ((14.5 + V)^2.0)))))
  // C_K0 = (1.0 - (C_K1 + C_K2 + O_K + I_K))
  // J_tr = ((CaNSR - CaJSR) / tau_tr)
  // alpha_a1= (0.013733 * exp((0.038198 * V)))
  // alpha_a0 = (0.022348 * exp((0.01176 * V)))
  // J_trpn = ( - ((k_minus_htrpn * HTRPN_Ca) + (k_minus_ltrpn * LTRPN_Ca)) + (k_plus_htrpn * Cai * (HTRPN_tot - HTRPN_Ca)) + (k_plus_ltrpn * Cai * (LTRPN_tot - LTRPN_Ca)))
  // C_Na3 = (1.0 - (O_Na + C_Na1 + C_Na2 + IF_Na + I1_Na + I2_Na + IC_Na2 + IC_Na3))
  // i_Na= (g_Na * O_Na * (V - E_Na))
  // i_CaL= (g_CaL * O * (V - E_CaL))
  // V'= - ((i_CaL + i_pCa + i_NaCa + i_Cab + i_Na + i_Nab + i_NaK + i_Kto_f + i_Kto_s + i_K1 + i_Ks + i_Kur + i_Kss + i_Kr + i_ClCa - rstar) / Cm)
  // Cai'=(Bi * ( - (J_up + J_trpn + (( - (2.0 * i_NaCa) + i_Cab + i_pCa) * Acap * Cm / (2.0 * Vmyo * Fara))) + J_leak + J_xfer))
  // Cass'=(Bss * ((J_rel * VJSR / Vss) - ((J_xfer * Vmyo / Vss) + (i_CaL * Acap * Cm / (2.0 * Vss * Fara)))))
  // CaJSR'=(BJSR * (J_tr - J_rel))
  // CaNSR'=(((J_up - J_leak) * Vmyo / VNSR) - (J_tr * VJSR / VNSR))
  // P_RyR'=( - (0.04 * P_RyR) - (0.1 * exp( - (0.0015432098765432098 * ((-5.0 + V)^2.0))) * i_CaL / i_CaL_max))
  // LTRPN_Ca'=((k_plus_ltrpn * Cai * (LTRPN_tot - LTRPN_Ca)) - (k_minus_ltrpn * LTRPN_Ca))
  // HTRPN_Ca'=((k_plus_htrpn * Cai * (HTRPN_tot - HTRPN_Ca)) - (k_minus_htrpn * HTRPN_Ca))
  // O1'=( - ((k_minus_a * O1) + (k_plus_b * (Cass^m) * O1) + (k_plus_c * O1)) + (k_plus_a * (Cass^n) * P_C1) + (k_minus_b * O2) + (k_minus_c * P_C2))
  // O2'=((k_plus_b * (Cass^m) * O1) - (k_minus_b * O2))
  // P_C2'=((k_plus_c * O1) - (k_minus_c * P_C2))
  // O'=( - ((4.0 * beta * O) + (gamma * O)) + (alpha * C4) + (Kpcb * I1) + (0.0010 * ((alpha * I2) - (Kpcf * O))))
  // C2'=( - ((beta * C2) + (3.0 * alpha * C2)) + (4.0 * alpha * C1) + (2.0 * beta * C3))
  // C3'=( - ((2.0 * beta * C3) + (2.0 * alpha * C3)) + (3.0 * alpha * C2) + (3.0 * beta * C4))
  // C4'=( - ((3.0 * beta * C4) + (alpha * C4) + (gamma * Kpcf * C4)) + (2.0 * alpha * C3) + (4.0 * beta * O) + (0.01 * ((4.0 * Kpcb * beta * I1) - (alpha * gamma * C4))) + (0.0020 * ((4.0 * beta * I2) - (Kpcf * C4))) + (4.0 * beta * Kpcb * I3))
  // I1'=( - (Kpcb * I1) + (gamma * O) + (0.0010 * ((alpha * I3) - (Kpcf * I1))) + (0.01 * ((alpha * gamma * C4) - (4.0 * beta * Kpcf * I1))))
  // I2'=( - (gamma * I2) + (0.0010 * ((Kpcf * O) - (alpha * I2))) + (Kpcb * I3) + (0.0020 * ((Kpcf * C4) - (4.0 * beta * I2))))
  // I3'=( - ((4.0 * beta * Kpcb * I3) + (Kpcb * I3)) + (0.0010 * ((Kpcf * I1) - (alpha * I3))) + (gamma * I2) + (gamma * Kpcf * C4))
  // Nai'= - (Acap * Cm * (i_Na + i_Nab + (3.0 * i_NaK) + (3.0 * i_NaCa)) / (Vmyo * Fara))
  // C_Na2'=( - ((beta_Na11 * C_Na2) + (alpha_Na12 * C_Na2) + (beta_Na3 * C_Na2)) + (alpha_Na11 * C_Na3) + (beta_Na12 * C_Na1) + (alpha_Na3 * IC_Na2))
  // C_Na1'=( - ((beta_Na12 * C_Na1) + (alpha_Na13 * C_Na1) + (beta_Na3 * C_Na1)) + (alpha_Na12 * C_Na2) + (beta_Na13 * O_Na) + (alpha_Na3 * IF_Na))
  // O_Na'=( - ((beta_Na13 * O_Na) + (alpha_Na2 * O_Na)) + (alpha_Na13 * C_Na1) + (beta_Na2 * IF_Na))
  // IF_Na'=( - ((beta_Na2 * IF_Na) + (alpha_Na3 * IF_Na) + (alpha_Na4 * IF_Na) + (beta_Na12 * IF_Na)) + (alpha_Na2 * O_Na) + (beta_Na3 * C_Na1) + (beta_Na4 * I1_Na) + (alpha_Na12 * IC_Na2))
  // I1_Na'=( - ((beta_Na4 * I1_Na) + (alpha_Na5 * I1_Na)) + (alpha_Na4 * IF_Na) + (beta_Na5 * I2_Na))
  // I2_Na'=((alpha_Na5 * I1_Na) - (beta_Na5 * I2_Na))
  // IC_Na2'=( - ((beta_Na11 * IC_Na2) + (alpha_Na12 * IC_Na2) + (alpha_Na3 * IC_Na2)) + (alpha_Na11 * IC_Na3) + (beta_Na12 * IF_Na) + (beta_Na3 * IC_Na2))
  // IC_Na3'=( - ((alpha_Na11 * IC_Na3) + (alpha_Na3 * IC_Na3)) + (beta_Na11 * IC_Na2) + (beta_Na3 * C_Na3))
  // Ki'= - (Acap * Cm * (i_Kto_f + i_Kto_s + i_K1 + i_Ks + i_Kss + i_Kur + i_Kr + (2.0 * i_NaK)) / (Vmyo * Fara))
  // ato_f'=((alpha_a * (1.0 - ato_f)) - (beta_a * ato_f))
  // ito_f'=((alpha_i1 * (1.0 - ito_f)) - (beta_i1 * ito_f))
  // ato_s' = ((ass - ato_s) / tau_ta_s)
  // ito_s' = ((iss - ito_s) / tau_ti_s)
  // nKs'=((alpha_n * (1.0 - nKs)) - (beta_n * nKs))
  // aur'=((ass - aur) / tau_aur)
  // iur'=((iss - iur) / tau_iur)
  // aKss'=((ass - aKss) / tau_Kss)
  // iKss'=0.0
  // C_K2'=( - ((kb * C_K2) + (alpha_a1 * C_K2)) + (kf * C_K1) + (beta_a1 * O_K))
  // C_K1'=( - ((beta_a0 * C_K1) + (kf * C_K1)) + (alpha_a0 * C_K0) + (kb * C_K2))
  // O_K'=( - ((beta_a1 * O_K) + (alpha_i * O_K)) + (alpha_a1 * C_K2) + (beta_i * I_K))
  // I_K'=((alpha_i * O_K) - (beta_i * I_K))
  // aux ina=i_Na
  // aux ical=i_CaL
  // aux ikur=i_Kur
  // # Numerical and plotting parameters for xpp
  // @ maxstor=5000000, bounds=10000000, total=1100, xp=t, yp=V, trans=860
  // @ meth=Gear, dt=0.05, toler=0.01, xlo=860, xhi=1100, ylo=-100, yhi=60
  // done
  // This file has been produced by sbmlutils.
  // Terms of use
  // Copyright © 2017 Matthias Koenig
  // Redistribution and use of any part of this model, with or without modification, are permitted provided that the following conditions are met:
  // Redistributions of this SBML file must retain the above copyright notice, this list of conditions and the following disclaimer.
  // Redistributions in a different form must reproduce the above copyright notice, this list of conditions and the following disclaimer in the documentation and/or other materials provided with the distribution.
  // This model is distributed in the hope that it will be useful, but WITHOUT ANY WARRANTY; without even the implied warranty of MERCHANTABILITY or FITNESS FOR A PARTICULAR PURPOSE.

  // Parameters:
  temp = 298; temp is "temp = 298.0";
  r = 8.314; r is "r = 8.314";
  fara = 96.5; fara is "fara = 96.5";
  e_cal = 63; e_cal is "e_cal = 63.0";
  e_cl = -40; e_cl is "e_cl = -40.0";
  cm = 1; cm is "cm = 1.0";
  vmyo = 2.584e-5; vmyo is "vmyo = 2.584e-5";
  vnsr = 2.098e-6; vnsr is "vnsr = 2.098e-6";
  vjsr = 1.2e-7; vjsr is "vjsr = 1.2e-7";
  v = -82.4202; v is "v = -82.4202";
  cai = 0.115001; cai is "cai = 0.115001";
  nai = 14237.1; nai is "nai = 14237.1";
  ki = 143720; ki is "ki = 143720.0";
  c_na1 = 0.000279132; c_na1 is "c_na1 = 2.79132e-4";
  c_na2 = 0.020752; c_na2 is "c_na2 = 0.020752";
  o_na = 7.13483e-7; o_na is "o_na = 7.13483e-7";
  if_na = 0.000153176; if_na is "if_na = 1.53176e-4";
  i1_na = 6.73345e-7; i1_na is "i1_na = 6.73345e-7";
  i2_na = 1.55787e-9; i2_na is "i2_na = 1.55787e-9";
  ic_na2 = 0.0113879; ic_na2 is "ic_na2 = 0.0113879";
  ic_na3 = 0.34278; ic_na3 is "ic_na3 = 0.34278";
  ato_f = 0.00265563; ato_f is "ato_f = 0.00265563";
  ito_f = 0.999977; ito_f is "ito_f = 0.999977";
  ato_s = 0.000417069; ato_s is "ato_s = 4.17069e-4";
  ito_s = 0.998543; ito_s is "ito_s = 0.998543";
  nks = 0.000262753; nks is "nks = 2.62753e-4";
  aur = 0.000417069; aur is "aur = 4.17069e-4";
  iur = 0.998543; iur is "iur = 0.998543";
  akss = 0.000417069; akss is "akss = 4.17069e-4";
  ikss = 1; ikss is "ikss = 1.0";
  c_k1 = 0.000992513; c_k1 is "c_k1 = 9.92513e-4";
  c_k2 = 0.000641229; c_k2 is "c_k2 = 6.41229e-4";
  o_k = 0.000175298; o_k is "o_k = 1.75298e-4";
  i_k = 3.19129e-5; i_k is "i_k = 3.19129e-5";
  cass = 0.115001; cass is "cass = 0.115001";
  cajsr = 1299.5; cajsr is "cajsr = 1299.5";
  cansr = 1299.5; cansr is "cansr = 1299.5";
  p_ryr = 0; p_ryr is "p_ryr = 0.0";
  ltrpn_ca = 11.2684; ltrpn_ca is "ltrpn_ca = 11.2684";
  htrpn_ca = 125.29; htrpn_ca is "htrpn_ca = 125.29";
  o = 9.30308e-19; o is "o = 9.30308e-19";
  o1 = 1.49102e-5; o1 is "o1 = 1.49102e-5";
  o2 = 9.51726e-11; o2 is "o2 = 9.51726e-11";
  p_c2 = 0.00016774; p_c2 is "p_c2 = 1.6774e-4";
  c2_1_24216e_4 = 0.000124216; c2_1_24216e_4 is "c2 = 1.24216e-4";
  c3_5_78679e_9 = 5.78679e-9; c3_5_78679e_9 is "c3 = 5.78679e-9";
  c4_1_19816e_13 = 1.19816e-13; c4_1_19816e_13 is "c4 = 1.19816e-13";
  i1 = 4.97023e-19; i1 is "i1 = 4.97023e-19";
  i2 = 3.45847e-14; i2 is "i2 = 3.45847e-14";
  i3 = 1.85106e-14; i3 is "i3 = 1.85106e-14";
  r0_1 = 1; r0_1 is "r0 = 1";
  period = 300; period is "period = 300";
  pulse = 10; pulse is "pulse = 10";
  tf = 0; tf is "tf = 0";
  tp = 5; tp is "tp = 5";
  tstart = 10; tstart is "tstart = 10";
  nao = 140000; nao is "nao = 140000.0";
  ltrpn_tot = 70; ltrpn_tot is "ltrpn_tot = 70.0";
  kf = 0.023761; kf is "kf = 0.023761";
  kb = 0.036778; kb is "kb = 0.036778";
  km_csqn = 800; km_csqn is "km_csqn = 800.0";
  i_pca_max = 1; i_pca_max is "i_pca_max = 1.0";
  cmdn_tot = 50; cmdn_tot is "cmdn_tot = 50.0";
  kpc_max = 0.23324; kpc_max is "kpc_max = 0.23324";
  km_cmdn = 0.238; km_cmdn is "km_cmdn = 0.238";
  k_mca = 1380; k_mca is "k_mca = 1380.0";
  km_nai = 21; km_nai is "km_nai = 21.0";
  v1_4_5 = 4.5; v1_4_5 is "v1 = 4.5";
  v2_1_7e_5 = 1.7e-5; v2_1_7e_5 is "v2 = 1.7e-5";
  v3_0_45 = 0.45; v3_0_45 is "v3 = 0.45";
  k_plus_c = 0.009; k_plus_c is "k_plus_c = 0.0090";
  k_minus_ltrpn = 0.196; k_minus_ltrpn is "k_minus_ltrpn = 0.196";
  g_cab = 0.000367; g_cab is "g_cab = 3.67e-4";
  k_plus_b = 0.00405; k_plus_b is "k_plus_b = 0.00405";
  k_plus_a = 0.006075; k_plus_a is "k_plus_a = 0.006075";
  km_up = 0.5; km_up is "km_up = 0.5";
  k_mna = 87500; k_mna is "k_mna = 87500.0";
  km_cl = 10; km_cl is "km_cl = 10.0";
  csqn_tot = 15000; csqn_tot is "csqn_tot = 15000.0";
  k_minus_htrpn = 3.2e-5; k_minus_htrpn is "k_minus_htrpn = 3.2e-5";
  km_pca = 0.5; km_pca is "km_pca = 0.5";
  k_plus_ltrpn = 0.0327; k_plus_ltrpn is "k_plus_ltrpn = 0.0327";
  acap = 0.0001534; acap is "acap = 1.534e-4";
  g_na = 13; g_na is "g_na = 13.0";
  g_cal = 1.51729; g_cal is "g_cal = 1.51729";
  g_ks = 0.000575; g_ks is "g_ks = 0.000575";
  g_kr = 0.0078; g_kr is "g_kr = 0.0078";
  g_kur = 0.0016; g_kur is "g_kur = 0.0016";
  g_clca = 10; g_clca is "g_clca = 10.0";
  vss = 1.485e-9; vss is "vss = 1.485e-9";
  k_naca = 992.8; k_naca is "k_naca = 992.8";
  k_plus_htrpn = 0.00237; k_plus_htrpn is "k_plus_htrpn = 0.00237";
  ko = 5400; ko is "ko = 5400.0";
  cao = 1800; cao is "cao = 1800.0";
  tau_xfer = 8; tau_xfer is "tau_xfer = 8.0";
  k_sat = 0.1; k_sat is "k_sat = 0.1";
  n = 4; n is "n = 4.0";
  g_kto_f = 0.4067; g_kto_f is "g_kto_f = 0.4067";
  g_kto_s = 0.01; g_kto_s is "g_kto_s = 0.01";
  g_nab = 0.0026; g_nab is "g_nab = 0.0026";
  m = 3; m is "m = 3.0";
  km_ko = 1.5; km_ko is "km_ko = 1.5";
  g_kss = 0.05; g_kss is "g_kss = 0.05";
  htrpn_tot = 140; htrpn_tot is "htrpn_tot = 140.0";
  i_nak_max = 0.88; i_nak_max is "i_nak_max = 0.88";
  i_cal_max = 7; i_cal_max is "i_cal_max = 7.0";
  tau_tr = 20; tau_tr is "tau_tr = 20.0";
  k_minus_c = 0.0008; k_minus_c is "k_minus_c = 8.0e-4";
  k_minus_b = 0.965; k_minus_b is "k_minus_b = 0.965";
  k_minus_a = 0.07125; k_minus_a is "k_minus_a = 0.07125";
  kpc_half = 20; kpc_half is "kpc_half = 20.0";
  eta = 0.35; eta is "eta = 0.35";
  kpcb = 0.0005; kpcb is "kpcb = 5.0e-4";
  ts has dimensionless;
  rstar has dimensionless;
  ass has dimensionless;
  e_k has dimensionless;
  i_ks has dimensionless;
  e_na has dimensionless;
  i_kr has dimensionless;
  i_kur has dimensionless;
  sigma has dimensionless;
  f_nak has dimensionless;
  j_leak has dimensionless;
  i_naca has dimensionless;
  o_clca has dimensionless;
  i_clca has dimensionless;
  i_nab has dimensionless;
  tau_kss has dimensionless;
  beta_i1 has dimensionless;
  beta has dimensionless;
  i_kss has dimensionless;
  i_k1 has dimensionless;
  i_nak has dimensionless;
  j_rel has dimensionless;
  alpha_n has dimensionless;
  alpha_i has dimensionless;
  alpha_a has dimensionless;
  i_pca has dimensionless;
  alpha_i1 has dimensionless;
  beta_na13 has dimensionless;
  beta_na12 has dimensionless;
  beta_na11 has dimensionless;
  alpha has dimensionless;
  bi has dimensionless;
  gamma has dimensionless;
  p_c1 has dimensionless;
  c1 has dimensionless;
  beta_n has dimensionless;
  beta_i has dimensionless;
  beta_a has dimensionless;
  i_kto_s has dimensionless;
  i_kto_f has dimensionless;
  alpha_na3 has dimensionless;
  beta_na5 has dimensionless;
  beta_na4 has dimensionless;
  beta_na3 has dimensionless;
  alpha_na13 has dimensionless;
  alpha_na2 has dimensionless;
  beta_na2 has dimensionless;
  bjsr has dimensionless;
  tau_iur has dimensionless;
  e_can has dimensionless;
  i_cab has dimensionless;
  tau_ti_s has dimensionless;
  bss has dimensionless;
  alpha_na12 has dimensionless;
  alpha_na11 has dimensionless;
  tau_aur has dimensionless;
  beta_a1 has dimensionless;
  beta_a0 has dimensionless;
  j_xfer has dimensionless;
  tau_ta_s has dimensionless;
  j_up has dimensionless;
  alpha_na5 has dimensionless;
  alpha_na4 has dimensionless;
  iss has dimensionless;
  kpcf has dimensionless;
  c_k0 has dimensionless;
  j_tr has dimensionless;
  alpha_a1 has dimensionless;
  alpha_a0 has dimensionless;
  j_trpn has dimensionless;
  c_na3 has dimensionless;
  i_na has dimensionless;
  i_cal has dimensionless;
  ina has dimensionless;
  ical has dimensionless;
  ikur has dimensionless;
  t has dimensionless; t is "model time";

  // Assignment rules:
  ts := t - tstart;
  rstar := r0_1 + pulse*(heav(mod(ts, period) - tf) - heav(mod(ts, period) - (tf + tp)));
  ass := 1/(1 + exp(-(0.1298701*(22.5 + v))));
  e_k := ln(ko/ki)*r*temp/fara;
  i_ks := g_ks*nks^2*(v - e_k);
  e_na := ln((0.9*nao + 0.1*ko)/(0.9*nai + 0.1*ki))*r*temp/fara;
  i_kr := g_kr*o_k*(v - ln((0.98*ko + 0.02*nao)/(0.98*ki + 0.02*nai))*r*temp/fara);
  i_kur := g_kur*aur*iur*(v - e_k);
  sigma := 0.1428571*(-1 + exp(1.485884e-5*nao));
  f_nak := 1/(1 + 0.1245*exp(-(0.1*v*fara/(r*temp))) + 0.0365*sigma*exp(-(fara*v/(r*temp))));
  j_leak := v2_1_7e_5*(cansr - cai);
  i_naca := k_naca*(exp(eta*v*fara/(r*temp))*nai^3*cao - exp((-1 + eta)*v*fara/(r*temp))*nao^3*cai)/(k_mna^3 + nao^3)/(k_mca + cao)/(1 + k_sat*exp((-1 + eta)*v*fara/(r*temp)));
  o_clca := 0.2/(1 + exp(-(0.1282051*(-46.7 + v))));
  i_clca := g_clca*o_clca*(v - e_cl)*cai/(cai + km_cl);
  i_nab := g_nab*(v - e_na);
  tau_kss := 13.17 + 39.3*exp(-(0.0862*v));
  beta_i1 := 9.5e-4*exp(0.1428571*(33.5 + v))/(1 + 0.051335*exp(0.1428571*(33.5 + v)));
  beta := 0.05*exp(-(0.07692308*(12 + v)));
  i_kss := g_kss*akss*ikss*(v - e_k);
  i_k1 := 0.2938*ko*(v - e_k)/(210 + ko)/(1 + exp(0.0896*(v - e_k)));
  i_nak := i_nak_max*f_nak*ko/(1 + (km_nai/nai)^0.66667)/(ko + km_ko);
  j_rel := v1_4_5*(o1 + o2)*(cajsr - cass)*p_ryr;
  alpha_n := 4.81333e-6*(26.5 + v)*(1 - exp(-(0.128*(26.5 + v))));
  alpha_i := 0.090821*exp(0.023391*(5 + v));
  alpha_a := 0.18064*exp(0.03577*(30 + v));
  i_pca := i_pca_max*cai^2/(km_pca^2 + cai^2);
  alpha_i1 := 1.52e-4*exp(-(0.1428571*(13.5 + v)))/(1 + 0.0067083*exp(-(0.1428571*(33.5 + v))));
  beta_na13 := 0.22*exp(-(0.04926108*(-7.5 + v)));
  beta_na12 := 0.2*exp(-(0.04926108*(-2.5 + v)));
  beta_na11 := 0.1917*exp(-(0.04926108*(2.5 + v)));
  alpha := 0.4*exp(0.1*(12 + v))*(1 - 0.75*exp(-(0.0025*(20 + v)^2)) + 0.7*exp(-(0.1*(40 + v)^2)))/(1 + 0.12*exp(0.1*(12 + v)));
  bi := (1 + cmdn_tot*km_cmdn/(km_cmdn + cai)^2)^(-1);
  gamma := kpc_max*cass/(kpc_half + cass);
  p_c1 := 1 - (p_c2 + o1 + o2);
  c1 := 1 - (o + c2_1_24216e_4 + c2_1_24216e_4 + c3_5_78679e_9 + c4_1_19816e_13 + i1 + i2 + i3);
  beta_n := 9.53333e-5*exp(-(0.038*(26.5 + v)));
  beta_i := 0.006497*exp(-(0.03268*(5 + v)));
  beta_a := 0.3956*exp(-(0.06237*(30 + v)));
  i_kto_s := g_kto_s*ato_s*ito_s*(v - e_k);
  i_kto_f := g_kto_f*ato_f^3*ito_f*(v - e_k);
  alpha_na3 := 7e-7*exp(-(0.1298701*(7 + v)));
  beta_na5 := 0.02*alpha_na3;
  beta_na4 := alpha_na3;
  beta_na3 := 0.0084 + 2e-5*(7 + v);
  alpha_na13 := 3.802/(0.1027*exp(-(0.08333333*(2.5 + v))) + 0.25*exp(-(0.006666667*(2.5 + v))));
  alpha_na2 := 1/(0.393956 + 0.188495*exp(-(0.06024096*(7 + v))));
  beta_na2 := alpha_na13*alpha_na2*alpha_na3/(beta_na13*beta_na3);
  bjsr := (1 + csqn_tot*km_csqn/(km_csqn + cajsr)^2)^(-1);
  tau_iur := 1200 - 170/(1 + exp(0.1754386*(45.2 + v)));
  e_can := ln(cao/cai)*r*temp/(2*fara);
  i_cab := g_cab*(v - e_can);
  tau_ti_s := 270 + 1050/(1 + exp(0.1754386*(45.2 + v)));
  bss := (1 + cmdn_tot*km_cmdn/(km_cmdn + cass)^2)^(-1);
  alpha_na12 := 3.802/(0.1027*exp(-(0.06666667*(2.5 + v))) + 0.23*exp(-(0.006666667*(2.5 + v))));
  alpha_na11 := 3.802/(0.1027*exp(-(0.05882353*(2.5 + v))) + 0.2*exp(-(0.006666667*(2.5 + v))));
  tau_aur := 2.058 + 0.493*exp(-(0.0629*v));
  beta_a1 := 6.89e-5*exp(-(0.04178*v));
  beta_a0 := 0.047002*exp(-(0.0631*v));
  j_xfer := (cass - cai)/tau_xfer;
  tau_ta_s := 2.058 + 0.493*exp(-(0.0629*v));
  j_up := v3_0_45*cai^2/(km_up^2 + cai^2);
  alpha_na5 := 1.052632e-5*alpha_na2;
  alpha_na4 := 0.001*alpha_na2;
  iss := 1/(1 + exp(0.1754386*(45.2 + v)));
  kpcf := 13*(1 - exp(-(0.01*(14.5 + v)^2)));
  c_k0 := 1 - (c_k1 + c_k2 + o_k + i_k);
  j_tr := (cansr - cajsr)/tau_tr;
  alpha_a1 := 0.013733*exp(0.038198*v);
  alpha_a0 := 0.022348*exp(0.01176*v);
  j_trpn := -(k_minus_htrpn*htrpn_ca + k_minus_ltrpn*ltrpn_ca) + k_plus_htrpn*cai*(htrpn_tot - htrpn_ca) + k_plus_ltrpn*cai*(ltrpn_tot - ltrpn_ca);
  c_na3 := 1 - (o_na + c_na1 + c_na2 + if_na + i1_na + i2_na + ic_na2 + ic_na3);
  i_na := g_na*o_na*(v - e_na);
  i_cal := g_cal*o*(v - e_cal);
  ina := i_na;
  ical := i_cal;
  ikur := i_kur;
  t := time;

  // Rate rules:
  v' = -((i_cal + i_pca + i_naca + i_cab + i_na + i_nab + i_nak + i_kto_f + i_kto_s + i_k1 + i_ks + i_kur + i_kss + i_kr + i_clca - rstar)/cm);
  cai' = bi*(-(j_up + j_trpn + (-(2*i_naca) + i_cab + i_pca)*acap*cm/(2*vmyo*fara)) + j_leak + j_xfer);
  cass' = bss*(j_rel*vjsr/vss - (j_xfer*vmyo/vss + i_cal*acap*cm/(2*vss*fara)));
  cajsr' = bjsr*(j_tr - j_rel);
  cansr' = (j_up - j_leak)*vmyo/vnsr - j_tr*vjsr/vnsr;
  p_ryr' = -(0.04*p_ryr) - 0.1*exp(-(0.00154321*(-5 + v)^2))*i_cal/i_cal_max;
  ltrpn_ca' = k_plus_ltrpn*cai*(ltrpn_tot - ltrpn_ca) - k_minus_ltrpn*ltrpn_ca;
  htrpn_ca' = k_plus_htrpn*cai*(htrpn_tot - htrpn_ca) - k_minus_htrpn*htrpn_ca;
  o1' = -(k_minus_a*o1 + k_plus_b*cass^m*o1 + k_plus_c*o1) + k_plus_a*cass^n*p_c1 + k_minus_b*o2 + k_minus_c*p_c2;
  o2' = k_plus_b*cass^m*o1 - k_minus_b*o2;
  p_c2' = k_plus_c*o1 - k_minus_c*p_c2;
  o' = -(4*beta*o + gamma*o) + alpha*c4_1_19816e_13 + kpcb*i1 + 0.001*(alpha*i2 - kpcf*o);
  c2_1_24216e_4' = -(beta*c2_1_24216e_4 + 3*alpha*c2_1_24216e_4) + 4*alpha*c1 + 2*beta*c3_5_78679e_9;
  c3_5_78679e_9' = -(2*beta*c3_5_78679e_9 + 2*alpha*c3_5_78679e_9) + 3*alpha*c2_1_24216e_4 + 3*beta*c4_1_19816e_13;
  c4_1_19816e_13' = -(3*beta*c4_1_19816e_13 + alpha*c4_1_19816e_13 + gamma*kpcf*c4_1_19816e_13) + 2*alpha*c3_5_78679e_9 + 4*beta*o + 0.01*(4*kpcb*beta*i1 - alpha*gamma*c4_1_19816e_13) + 0.002*(4*beta*i2 - kpcf*c4_1_19816e_13) + 4*beta*kpcb*i3;
  i1' = -(kpcb*i1) + gamma*o + 0.001*(alpha*i3 - kpcf*i1) + 0.01*(alpha*gamma*c4_1_19816e_13 - 4*beta*kpcf*i1);
  i2' = -(gamma*i2) + 0.001*(kpcf*o - alpha*i2) + kpcb*i3 + 0.002*(kpcf*c4_1_19816e_13 - 4*beta*i2);
  i3' = -(4*beta*kpcb*i3 + kpcb*i3) + 0.001*(kpcf*i1 - alpha*i3) + gamma*i2 + gamma*kpcf*c4_1_19816e_13;
  nai' = -(acap*cm*(i_na + i_nab + 3*i_nak + 3*i_naca)/(vmyo*fara));
  c_na2' = -(beta_na11*c_na2 + alpha_na12*c_na2 + beta_na3*c_na2) + alpha_na11*c_na3 + beta_na12*c_na1 + alpha_na3*ic_na2;
  c_na1' = -(beta_na12*c_na1 + alpha_na13*c_na1 + beta_na3*c_na1) + alpha_na12*c_na2 + beta_na13*o_na + alpha_na3*if_na;
  o_na' = -(beta_na13*o_na + alpha_na2*o_na) + alpha_na13*c_na1 + beta_na2*if_na;
  if_na' = -(beta_na2*if_na + alpha_na3*if_na + alpha_na4*if_na + beta_na12*if_na) + alpha_na2*o_na + beta_na3*c_na1 + beta_na4*i1_na + alpha_na12*ic_na2;
  i1_na' = -(beta_na4*i1_na + alpha_na5*i1_na) + alpha_na4*if_na + beta_na5*i2_na;
  i2_na' = alpha_na5*i1_na - beta_na5*i2_na;
  ic_na2' = -(beta_na11*ic_na2 + alpha_na12*ic_na2 + alpha_na3*ic_na2) + alpha_na11*ic_na3 + beta_na12*if_na + beta_na3*ic_na2;
  ic_na3' = -(alpha_na11*ic_na3 + alpha_na3*ic_na3) + beta_na11*ic_na2 + beta_na3*c_na3;
  ki' = -(acap*cm*(i_kto_f + i_kto_s + i_k1 + i_ks + i_kss + i_kur + i_kr + 2*i_nak)/(vmyo*fara));
  ato_f' = alpha_a*(1 - ato_f) - beta_a*ato_f;
  ito_f' = alpha_i1*(1 - ito_f) - beta_i1*ito_f;
  ato_s' = (ass - ato_s)/tau_ta_s;
  ito_s' = (iss - ito_s)/tau_ti_s;
  nks' = alpha_n*(1 - nks) - beta_n*nks;
  aur' = (ass - aur)/tau_aur;
  iur' = (iss - iur)/tau_iur;
  akss' = (ass - akss)/tau_kss;
  ikss' = 0;
  c_k2' = -(kb*c_k2 + alpha_a1*c_k2) + kf*c_k1 + beta_a1*o_k;
  c_k1' = -(beta_a0*c_k1 + kf*c_k1) + alpha_a0*c_k0 + kb*c_k2;
  o_k' = -(beta_a1*o_k + alpha_i*o_k) + alpha_a1*c_k2 + beta_i*i_k;
  i_k' = alpha_i*o_k - beta_i*i_k;
end
