// SBML level 3 version 1

function max(x, y)
  piecewise(x, x > y, y);
end
max is "minimum";

function min(x, y)
  piecewise(x, x < y, y);
end
min is "maximum";

function heav(x)
  piecewise(0, x < 0, 0.5, x == 0, 1, x > 0, 0);
end
heav is "heavyside";

function mod(x, y)
  piecewise(x - y*ceil(x/y), xor(x < 0, y < 0), x - y*floor(x/y));
end
mod is "modulo";

function am(v, amhalf, amphi, amwidth)
  amphi*(v - amhalf)/(1 - exp(-(v - amhalf)/amwidth));
end

function bm(v, bmhalf, bmphi, bmwidth)
  bmphi*exp(-(v - bmhalf)/bmwidth);
end

function ah(v, ahhalf, ahphi, ahwidth)
  ahphi*exp(-(v - ahhalf)/ahwidth);
end

function bh(v, bhhalf, bhphi, bhwidth)
  bhphi/(1 + exp(-(v - bhhalf)/bhwidth));
end

function an(v, anhalf, anphi, anwidth)
  anphi*(v - anhalf)/(1 - exp(-(v - anhalf)/anwidth));
end

function bn(v, bnhalf, bnphi, bnwidth)
  bnphi*exp(-(v - bnhalf)/bnwidth);
end

function ina(v, m, h, ena, gna)
  gna*m^3*h*(v - ena);
end

function ikdr(v, n, ek, gkdr)
  gkdr*n^4*(v - ek);
end

function il(v, el, gl)
  gl*(v - el);
end

function isyn(v, y, esyn, gsyn)
  gsyn*y*(v - esyn);
end

function pinfd(v, vp, vsp)
  1/(1 + exp(-(v - vp)/vsp));
end

function ih(v, y, ena, gld, gnad)
  gnad*y*(v - ena)/gld;
end

function ild(v, el)
  v - el;
end

model main()
  // XPP model
  // This model was converted from XPP ode format to SBML using sbmlutils-0.1.5a6.
  // # Soma is Hodgkin Huxley
  // p Ek=-77,Ena=50, El=-54.4
  // p gl=.3,gkdr=36,gna=120
  // p i=11
  // p C=1.
  // p amphi=.1,amhalf=-40,amwidth=10
  // p bmphi=4,bmhalf=-65,bmwidth=18
  // p ahphi=0.07,ahhalf=-65,ahwidth=20
  // p bhphi=1,bhhalf=-35,bhwidth=10
  // p anphi=.01,anhalf=-55,anwidth=10
  // p bnphi=.125,bnhalf=-65,bnwidth=80
  // # functions
  // am(v)=amphi*(v-amhalf)/(1-exp(-(v-amhalf)/amwidth))
  // bm(v)=bmphi*exp(-(v-bmhalf)/bmwidth)
  // ah(v)=ahphi*exp(-(v-ahhalf)/ahwidth)
  // bh(v)=bhphi/(1+exp(-(v-bhhalf)/bhwidth))
  // an(v)=anphi*(v-anhalf)/(1-exp(-(v-anhalf)/anwidth))
  // bn(v)=bnphi*exp(-(v-bnhalf)/bnwidth)
  // #currents
  // ina(v,m,h)=gna*m^3*h*(v-Ena)
  // ikdr(v,n)=gkdr*n^4*(v-Ek)
  // il(v)=gl*(v-El)
  // Isyn(v,y)=gsyn*y*(v-Esyn)
  // #diff. equ.
  // v1'=(i-(ina(v1,m1,ha)+ikdr(v1,n1)+il(v1)+p0*Isyn(v1,y2))+eps*(ua1-v1)/dx)/C
  // v2'=(i-(ina(v2,m2,hb)+ikdr(v2,n2)+il(v2)+p0*Isyn(v2,y1))+eps*(ub1-v2)/dx)/C
  // m1'=am(v1)*(1-m1)-bm(v1)*m1
  // m2'=am(v2)*(1-m2)-bm(v2)*m2
  // n1'=an(v1)*(1-n1)-bn(v1)*n1
  // n2'=an(v2)*(1-n2)-bn(v2)*n2
  // ha'=ah(v1)*(1-ha)-bh(v1)*ha
  // hb'=ah(v2)*(1-hb)-bh(v2)*hb
  // ## synapse
  // parameter taur=1,taud=3,thresh=-30
  // x1'=(-x1+.5*(1+tanh((v1-thresh)/3.0)))/taur
  // x2'=(-x2+.5*(1+tanh((v2-thresh)/3.0)))/taur
  // y1'=(-y1+x1)/taud
  // y2'=(-y2+x2)/taud
  // init x1=.001, y1=.001,x2=.001, y2=.001
  // p gsyn=.1, Esyn=0
  // p Vp=-50, Vsp=9, gnad=0.02, gld=.1, taupna=10
  // # !!!! the cable is passive if gnad=0 !!!!
  // pinfd(V)=1/(1+exp(-(V-Vp)/Vsp))
  // Ih(V,y)=gnad*y*(V-Ena)/gld
  // Ild(V)=V-El
  // ha[1..50]'=(pinfd(ua[j])-ha[j])/taupna
  // hb[1..50]'=(pinfd(ub[j])-hb[j])/taupna
  // # NOT TO CONFUSE WITH h GATE IN SOMA!!
  // # cable equation
  // ua1'=((lambda/dx)^2*(ua2-2*ua1+v1)-Ild(ua1)-Ih(ua1,ha1)-p1*Isyn(ua1,y2)/gld)/tau
  // ua[2..50]'= ((lambda/dx)^2*(ua[j+1]-2*ua[j]+ua[j-1])-Ild(ua[j])-Ih(ua[j],ha[j]) -p[j]*Isyn(ua[j],y2)/gld )/tau
  // ua51=(c1+b1*ua50/dx)/(a1+b1/dx)
  // ub1'=((lambda/dx)^2*(ub2-2*ub1+v2)-Ild(ub1)-Ih(ub1,hb1)-p1*Isyn(ub1,y1)/gld)/tau
  // ub[2..50]'= ((lambda/dx)^2*(ub[j+1]-2*ub[j]+ub[j-1])-Ild(ub[j])-Ih(ub[j],hb[j])-p[j]*Isyn(ub[j],y1)/gld )/tau
  // ub51=(c1+b1*ub50/dx)/(a1+b1/dx)
  // par lambda=1,tau=10,dx=.1,c1=0,a1=0,b1=1,c0=0,a0=0,b0=1,eps=.025
  // #pulse(t)=heav(t)*heav(sigma-t)
  // par sigma=.05
  // par t0=14.45
  // aux prc=t0-t
  // p p[0..50]=0
  // @ total=300,xlo=0,xhi=300,ylo=-100,yhi=60,dt=0.05,bounds=10000000
  // d
  // This file has been produced by sbmlutils.
  // Terms of use
  // Copyright © 2017 Matthias Koenig
  // Redistribution and use of any part of this model, with or without modification, are permitted provided that the following conditions are met:
  // Redistributions of this SBML file must retain the above copyright notice, this list of conditions and the following disclaimer.
  // Redistributions in a different form must reproduce the above copyright notice, this list of conditions and the following disclaimer in the documentation and/or other materials provided with the distribution.
  // This model is distributed in the hope that it will be useful, but WITHOUT ANY WARRANTY; without even the implied warranty of MERCHANTABILITY or FITNESS FOR A PARTICULAR PURPOSE.

  // Parameters:
  ek = -77; ek is "ek = -77";
  ena = 50; ena is "ena = 50";
  el = -54.4; el is "el = -54.4";
  gl = 0.3; gl is "gl = .3";
  gkdr = 36; gkdr is "gkdr = 36";
  gna = 120; gna is "gna = 120";
  i = 11; i is "i = 11";
  c = 1; c is "c = 1.";
  amphi = 0.1; amphi is "amphi = .1";
  amhalf = -40; amhalf is "amhalf = -40";
  amwidth = 10; amwidth is "amwidth = 10";
  bmphi = 4; bmphi is "bmphi = 4";
  bmhalf = -65; bmhalf is "bmhalf = -65";
  bmwidth = 18; bmwidth is "bmwidth = 18";
  ahphi = 0.07; ahphi is "ahphi = 0.07";
  ahhalf = -65; ahhalf is "ahhalf = -65";
  ahwidth = 20; ahwidth is "ahwidth = 20";
  bhphi = 1; bhphi is "bhphi = 1";
  bhhalf = -35; bhhalf is "bhhalf = -35";
  bhwidth = 10; bhwidth is "bhwidth = 10";
  anphi = 0.01; anphi is "anphi = .01";
  anhalf = -55; anhalf is "anhalf = -55";
  anwidth = 10; anwidth is "anwidth = 10";
  bnphi = 0.125; bnphi is "bnphi = .125";
  bnhalf = -65; bnhalf is "bnhalf = -65";
  bnwidth = 80; bnwidth is "bnwidth = 80";
  taur = 1; taur is "taur = 1";
  taud = 3; taud is "taud = 3";
  thresh = -30; thresh is "thresh = -30";
  x1_001 = 0.001; x1_001 is "x1 = .001";
  y1 = 0.001; y1 is "y1 = .001";
  x2_001 = 0.001; x2_001 is "x2 = .001";
  y2 = 0.001; y2 is "y2 = .001";
  gsyn = 0.1; gsyn is "gsyn = .1";
  esyn = 0; esyn is "esyn = 0";
  vp = -50; vp is "vp = -50";
  vsp = 9; vsp is "vsp = 9";
  gnad = 0.02; gnad is "gnad = 0.02";
  gld = 0.1; gld is "gld = .1";
  taupna = 10; taupna is "taupna = 10";
  lambda = 1; lambda is "lambda = 1";
  tau = 10; tau is "tau = 10";
  dx = 0.1; dx is "dx = .1";
  c1_0 = 0; c1_0 is "c1 = 0";
  a1 = 0; a1 is "a1 = 0";
  b1 = 1; b1 is "b1 = 1";
  c0_0 = 0; c0_0 is "c0 = 0";
  a0 = 0; a0 is "a0 = 0";
  b0 = 1; b0 is "b0 = 1";
  eps = 0.025; eps is "eps = .025";
  sigma = 0.05; sigma is "sigma = .05";
  t0 = 14.45; t0 is "t0 = 14.45";
  p[0..50] = 0 = 0;
  v1 = 0 dimensionless;
  v2 = 0 dimensionless;
  m1 = 0 dimensionless;
  m2 = 0 dimensionless;
  n1 = 0 dimensionless;
  n2 = 0 dimensionless;
  ha = 0 dimensionless;
  hb = 0 dimensionless;
  ua1 = 0 dimensionless;
  ub1 = 0 dimensionless;
  ua51 has dimensionless;
  ub51 has dimensionless;
  prc has dimensionless;
  t has dimensionless; t is "model time";

  // Assignment rules:
  ua51 := (c1_0 + b1*ua50/dx)/(a1 + b1/dx);
  ub51 := (c1_0 + b1*ub50/dx)/(a1 + b1/dx);
  prc := t0 - t;
  t := time;

  // Rate rules:
  v1' = (i - (ina(v1, m1, ha, ena, gna) + ikdr(v1, n1, ek, gkdr) + il(v1, el, gl) + p0*isyn(v1, y2, esyn, gsyn)) + eps*(ua1 - v1)/dx)/c;
  v2' = (i - (ina(v2, m2, hb, ena, gna) + ikdr(v2, n2, ek, gkdr) + il(v2, el, gl) + p0*isyn(v2, y1, esyn, gsyn)) + eps*(ub1 - v2)/dx)/c;
  m1' = am(v1, amhalf, amphi, amwidth)*(1 - m1) - bm(v1, bmhalf, bmphi, bmwidth)*m1;
  m2' = am(v2, amhalf, amphi, amwidth)*(1 - m2) - bm(v2, bmhalf, bmphi, bmwidth)*m2;
  n1' = an(v1, anhalf, anphi, anwidth)*(1 - n1) - bn(v1, bnhalf, bnphi, bnwidth)*n1;
  n2' = an(v2, anhalf, anphi, anwidth)*(1 - n2) - bn(v2, bnhalf, bnphi, bnwidth)*n2;
  ha' = ah(v1, ahhalf, ahphi, ahwidth)*(1 - ha) - bh(v1, bhhalf, bhphi, bhwidth)*ha;
  hb' = ah(v2, ahhalf, ahphi, ahwidth)*(1 - hb) - bh(v2, bhhalf, bhphi, bhwidth)*hb;
  x1_001' = (-x1_001 + 0.5*(1 + tanh((v1 - thresh)/3)))/taur;
  x2_001' = (-x2_001 + 0.5*(1 + tanh((v2 - thresh)/3)))/taur;
  y1' = (-y1 + x1_001)/taud;
  y2' = (-y2 + x2_001)/taud;
  ua1' = ((lambda/dx)^2*(ua2 - 2*ua1 + v1) - ild(ua1, el) - ih(ua1, ha1, ena, gld, gnad) - p1*isyn(ua1, y2, esyn, gsyn)/gld)/tau;
  ub1' = ((lambda/dx)^2*(ub2 - 2*ub1 + v2) - ild(ub1, el) - ih(ub1, hb1, ena, gld, gnad) - p1*isyn(ub1, y1, esyn, gsyn)/gld)/tau;
end
