// SBML level 3 version 1

function max(x, y)
  piecewise(x, x > y, y);
end
max is "minimum";

function min(x, y)
  piecewise(x, x < y, y);
end
min is "maximum";

function heav(x)
  piecewise(0, x < 0, 0.5, x == 0, 1, x > 0, 0);
end
heav is "heavyside";

function mod(x, y)
  piecewise(x - y*ceil(x/y), xor(x < 0, y < 0), x - y*floor(x/y));
end
mod is "modulo";

function am(v, amhalf, amphi, amwidth)
  amphi*(v - amhalf)/(1 - exp(-(v - amhalf)/amwidth));
end

function bm(v, bmhalf, bmphi, bmwidth)
  bmphi*exp(-(v - bmhalf)/bmwidth);
end

function ah(v, ahhalf, ahphi, ahwidth)
  ahphi*exp(-(v - ahhalf)/ahwidth);
end

function bh(v, bhhalf, bhphi, bhwidth)
  bhphi/(1 + exp(-(v - bhhalf)/bhwidth));
end

function an(v, anhalf, anphi, anwidth)
  anphi*(v - anhalf)/(1 - exp(-(v - anhalf)/anwidth));
end

function bn(v, bnhalf, bnphi, bnwidth)
  bnphi*exp(-(v - bnhalf)/bnwidth);
end

function ina(v, m, h, ena, gna)
  gna*m^3*h*(v - ena);
end

function ikdr(v, n, ek, gkdr)
  gkdr*n^4*(v - ek);
end

function il(v, el, gl)
  gl*(v - el);
end

function ild(v, el)
  v - el;
end

function pulse(t, sigma)
  heav(t)*heav(sigma - t);
end

model main()
  // XPP model
  // This model was converted from XPP ode format to SBML using sbmlutils-0.1.5a6.
  // # Soma is Hodgkin-Huxley
  // p Ek=-77,Ena=50, El=-54.4
  // p gl=.3,gkdr=36,gna=120
  // p i=11
  // p C=1.
  // p amphi=.1,amhalf=-40,amwidth=10
  // p bmphi=4,bmhalf=-65,bmwidth=18
  // p ahphi=0.07,ahhalf=-65,ahwidth=20
  // p bhphi=1,bhhalf=-35,bhwidth=10
  // p anphi=.01,anhalf=-55,anwidth=10
  // p bnphi=.125,bnhalf=-65,bnwidth=80
  // # functions
  // am(v)=amphi*(v-amhalf)/(1-exp(-(v-amhalf)/amwidth))
  // bm(v)=bmphi*exp(-(v-bmhalf)/bmwidth)
  // ah(v)=ahphi*exp(-(v-ahhalf)/ahwidth)
  // bh(v)=bhphi/(1+exp(-(v-bhhalf)/bhwidth))
  // an(v)=anphi*(v-anhalf)/(1-exp(-(v-anhalf)/anwidth))
  // bn(v)=bnphi*exp(-(v-bnhalf)/bnwidth)
  // #currents
  // ina(v,m,h)=gna*m^3*h*(v-Ena)
  // ikdr(v,n)=gkdr*n^4*(v-Ek)
  // il(v)=gl*(v-El)
  // #diff. equ.
  // v'=(i-(ina(v,m,h)+ikdr(v,n)+il(v))+p0*pulse(t-taup)+eps*(u1-v)/dx)/C
  // m'=am(v)*(1-m)-bm(v)*m
  // n'=an(v)*(1-n)-bn(v)*n
  // h'=ah(v)*(1-h)-bh(v)*h
  // ## synapse
  // parameter taur=1,taud=3,thresh=-30
  // x'=(-x+.5*(1+tanh((v-thresh)/3.0)))/taur
  // y'=(-y+x)/taud
  // init x=.001, y=.001
  // Ild(V)=V-El
  // # cable equation
  // u1'=((lambda/dx)^2*(u2-2*u1+v)-Ild(u1))/tau+p1*pulse(t-taup)
  // u[2..50]'= ((lambda/dx)^2*(u[j+1]-2*u[j]+u[j-1])-Ild(u[j]))/tau +p[j]*pulse(t-taup)
  // u51=(c1+b1*u50/dx)/(a1+b1/dx)
  // par lambda=1,tau=10,dx=.1,c1=0,a1=0,b1=1,c0=0,a0=0,b0=1,eps=.025
  // pulse(t)=heav(t)*heav(sigma-t)
  // par sigma=.05
  // par t0=14.45
  // aux prc=t0-t
  // taup'=0
  // p p[0..50]=0
  // @ total=300,xlo=0,xhi=300,ylo=-100,yhi=60,dt=0.05,bounds=10000000
  // d
  // This file has been produced by sbmlutils.
  // Terms of use
  // Copyright © 2017 Matthias Koenig
  // Redistribution and use of any part of this model, with or without modification, are permitted provided that the following conditions are met:
  // Redistributions of this SBML file must retain the above copyright notice, this list of conditions and the following disclaimer.
  // Redistributions in a different form must reproduce the above copyright notice, this list of conditions and the following disclaimer in the documentation and/or other materials provided with the distribution.
  // This model is distributed in the hope that it will be useful, but WITHOUT ANY WARRANTY; without even the implied warranty of MERCHANTABILITY or FITNESS FOR A PARTICULAR PURPOSE.

  // Parameters:
  ek = -77; ek is "ek = -77";
  ena = 50; ena is "ena = 50";
  el = -54.4; el is "el = -54.4";
  gl = 0.3; gl is "gl = .3";
  gkdr = 36; gkdr is "gkdr = 36";
  gna = 120; gna is "gna = 120";
  i = 11; i is "i = 11";
  c = 1; c is "c = 1.";
  amphi = 0.1; amphi is "amphi = .1";
  amhalf = -40; amhalf is "amhalf = -40";
  amwidth = 10; amwidth is "amwidth = 10";
  bmphi = 4; bmphi is "bmphi = 4";
  bmhalf = -65; bmhalf is "bmhalf = -65";
  bmwidth = 18; bmwidth is "bmwidth = 18";
  ahphi = 0.07; ahphi is "ahphi = 0.07";
  ahhalf = -65; ahhalf is "ahhalf = -65";
  ahwidth = 20; ahwidth is "ahwidth = 20";
  bhphi = 1; bhphi is "bhphi = 1";
  bhhalf = -35; bhhalf is "bhhalf = -35";
  bhwidth = 10; bhwidth is "bhwidth = 10";
  anphi = 0.01; anphi is "anphi = .01";
  anhalf = -55; anhalf is "anhalf = -55";
  anwidth = 10; anwidth is "anwidth = 10";
  bnphi = 0.125; bnphi is "bnphi = .125";
  bnhalf = -65; bnhalf is "bnhalf = -65";
  bnwidth = 80; bnwidth is "bnwidth = 80";
  taur = 1; taur is "taur = 1";
  taud = 3; taud is "taud = 3";
  thresh = -30; thresh is "thresh = -30";
  x = 0.001; x is "x = .001";
  y = 0.001; y is "y = .001";
  lambda = 1; lambda is "lambda = 1";
  tau = 10; tau is "tau = 10";
  dx = 0.1; dx is "dx = .1";
  c1_0 = 0; c1_0 is "c1 = 0";
  a1 = 0; a1 is "a1 = 0";
  b1 = 1; b1 is "b1 = 1";
  c0_0 = 0; c0_0 is "c0 = 0";
  a0 = 0; a0 is "a0 = 0";
  b0 = 1; b0 is "b0 = 1";
  eps = 0.025; eps is "eps = .025";
  sigma = 0.05; sigma is "sigma = .05";
  t0 = 14.45; t0 is "t0 = 14.45";
  p[0..50] = 0 = 0;
  v = 0 dimensionless;
  m = 0 dimensionless;
  n = 0 dimensionless;
  h = 0 dimensionless;
  u1 = 0 dimensionless;
  taup = 0 dimensionless;
  u51 has dimensionless;
  prc has dimensionless;
  t has dimensionless; t is "model time";

  // Assignment rules:
  u51 := (c1_0 + b1*u50/dx)/(a1 + b1/dx);
  prc := t0 - t;
  t := time;

  // Rate rules:
  v' = (i - (ina(v, m, h, ena, gna) + ikdr(v, n, ek, gkdr) + il(v, el, gl)) + p0*pulse(t - taup, sigma) + eps*(u1 - v)/dx)/c;
  m' = am(v, amhalf, amphi, amwidth)*(1 - m) - bm(v, bmhalf, bmphi, bmwidth)*m;
  n' = an(v, anhalf, anphi, anwidth)*(1 - n) - bn(v, bnhalf, bnphi, bnwidth)*n;
  h' = ah(v, ahhalf, ahphi, ahwidth)*(1 - h) - bh(v, bhhalf, bhphi, bhwidth)*h;
  x' = (-x + 0.5*(1 + tanh((v - thresh)/3)))/taur;
  y' = (-y + x)/taud;
  u1' = ((lambda/dx)^2*(u2 - 2*u1 + v) - ild(u1, el))/tau + p1*pulse(t - taup, sigma);
  taup' = 0;
end
