// SBML level 3 version 1

function max(x, y)
  piecewise(x, x > y, y);
end
max is "minimum";

function min(x, y)
  piecewise(x, x < y, y);
end
min is "maximum";

function heav(x)
  piecewise(0, x < 0, 0.5, x == 0, 1, x > 0, 0);
end
heav is "heavyside";

function mod(x, y)
  piecewise(x - y*ceil(x/y), xor(x < 0, y < 0), x - y*floor(x/y));
end
mod is "modulo";

function am(v, amhalf, amphi, amwidth)
  amphi*(v - amhalf)/(1 - exp(-(v - amhalf)/amwidth));
end

function bm(v, bmhalf, bmphi, bmwidth)
  bmphi*(v - bmhalf)/(exp((v - bmhalf)/bmwidth) - 1);
end

function ah(v, ahhalf, ahphi, ahwidth)
  ahphi*exp(-(v - ahhalf)/ahwidth);
end

function bh(v, bhhalf, bhphi, bhwidth)
  bhphi/(1 + exp(-(v - bhhalf)/bhwidth));
end

function an(v, anhalf, anphi, anwidth)
  anphi*(v - anhalf)/(1 - exp(-(v - anhalf)/anwidth));
end

function bn(v, bnhalf, bnphi, bnwidth)
  bnphi*exp(-(v - bnhalf)/bnwidth);
end

function isyn(y, v, esyn, gsyn)
  gsyn*y*(v - esyn);
end

function ina(v, m, h, gna, vna)
  gna*m^3*h*(v - vna);
end

function ikdr(v, n, gkdr, vk)
  gkdr*n^4*(v - vk);
end

function il(v, gl, vl)
  gl*(v - vl);
end

function hinf(v, vh, vsh)
  1/(1 + exp((v - vh)/vsh));
end

function ild(v, vl)
  v - vl;
end

function ih(v, y, gh, gld, vrh)
  gh*y*(v - vrh)/gld;
end

model main()
  // XPP model
  // This model was converted from XPP ode format to SBML using sbmlutils-0.1.5a6.
  // # Ermentrout 1998 type I oscillator
  // p gl=.2,gkdr=80,gna=80
  // p iapp=0.67
  // p C=1.
  // p amphi=.32,amhalf=-54,amwidth=4
  // p bmphi=.28,bmhalf=-27,bmwidth=5
  // p ahphi=.128,ahhalf=-50,ahwidth=18
  // p bhphi=4,bhhalf=-27,bhwidth=5
  // p anphi=.032,anhalf=-52,anwidth=5
  // p bnphi=.5,bnhalf=-57,bnwidth=40
  // # functions
  // am(v)=amphi*(v-amhalf)/(1-exp(-(v-amhalf)/amwidth))
  // bm(v)=bmphi*(v-bmhalf)/(exp((v-bmhalf)/bmwidth)-1)
  // ah(v)=ahphi*exp(-(v-ahhalf)/ahwidth)
  // bh(v)=bhphi/(1+exp(-(v-bhhalf)/bhwidth))
  // an(v)=anphi*(v-anhalf)/(1-exp(-(v-anhalf)/anwidth))
  // bn(v)=bnphi*exp(-(v-bnhalf)/bnwidth)
  // Isyn(y,V)=gsyn*y*(V-Esyn)
  // #currents
  // ina(v,m,h)=gna*m^3*h*(v-Vna)
  // ikdr(v,n)=gkdr*n^4*(v-Vk)
  // il(v)=gl*(v-Vl)
  // #diff. equ.
  // v1'=(iapp-(ina(v1,m1,ha)+ikdr(v1,n1)+il(v1))+eps*(ua1-v1)/dx-p0*Isyn(y2,v1))/C
  // v2'=(iapp-(ina(v2,m2,hb)+ikdr(v2,n2)+il(v2))+eps*(ub1-v2)/dx-p0*Isyn(y1,v2))/C
  // m1'=am(v1)*(1-m1)-bm(v1)*m1
  // m2'=am(v2)*(1-m2)-bm(v2)*m2
  // n1'=an(v1)*(1-n1)-bn(v1)*n1
  // n2'=an(v2)*(1-n2)-bn(v2)*n2
  // ha'=ah(v1)*(1-ha)-bh(v1)*ha
  // hb'=ah(v2)*(1-hb)-bh(v2)*hb
  // ## synapse
  // par taur=1,taud=3,thresh=-30, gsyn=1 Esyn=0
  // x1'=(-x1+.5*(1+tanh((v1-thresh)/3.0)))/taur
  // x2'=(-x2+.5*(1+tanh((v2-thresh)/3.0)))/taur
  // y1'=(-y1+x1)/taud
  // y2'=(-y2+x2)/taud
  // init x1=0,y1=0,x2=0,y2=0
  // par Vna=50,Vk=-100,Vl=-67,Vh=-65,Vrh=-40,Vsh=6,gld=0.1,gh=0.02,tauh=400
  // hinf(V)=1/(1+exp((V-Vh)/Vsh))
  // Ild(V)=V-Vl
  // Ih(V,y)=gh*y*(V-Vrh)/gld
  // ha[1..50]'=(hinf(ua[j])-ha[j])/tauh
  // hb[1..50]'=(hinf(ub[j])-hb[j])/tauh
  // # cable equation
  // p p[0..50]=0
  // ua1'=((lambda/dx)^2*(ua2-2*ua1+v1)-Ild(ua1)-Ih(ua1,ha1)-p1*Isyn(y2,ua1)/gld)/tau
  // ua[2..50]'= ((lambda/dx)^2*(ua[j+1]-2*ua[j]+ua[j-1])-Ild(ua[j])-Ih(ua[j],ha[j])-p[j]*Isyn(y2,ua[j])/gld)/tau
  // ua51=(c1+b1*ua50/dx)/(a1+b1/dx)
  // ub1'=((lambda/dx)^2*(ub2-2*ub1+v2)-Ild(ub1)-Ih(ub1,hb1)-p1*Isyn(y1,ub1)/gld)/tau
  // ub[2..50]'= ((lambda/dx)^2*(ub[j+1]-2*ub[j]+ub[j-1])-Ild(ub[j])-Ih(ub[j],hb[j])-p[j]*Isyn(y1,ub[j])/gld)/tau
  // ub51=(c1+b1*ub50/dx)/(a1+b1/dx)
  // par lambda=1,tau=10,dx=.1,c1=0,a1=0,b1=1,c0=0,a0=0,b0=1,eps=.025
  // @ total=1000,dt=.05,xlo=0,xhi=1000,ylo=-100,yhi=50,bounds=1e6
  // i ua[1..50]=-60
  // i ha[1..50]=.1
  // i ub[1..50]=-60
  // i hb[1..50]=.1
  // d
  // This file has been produced by sbmlutils.
  // Terms of use
  // Copyright © 2017 Matthias Koenig
  // Redistribution and use of any part of this model, with or without modification, are permitted provided that the following conditions are met:
  // Redistributions of this SBML file must retain the above copyright notice, this list of conditions and the following disclaimer.
  // Redistributions in a different form must reproduce the above copyright notice, this list of conditions and the following disclaimer in the documentation and/or other materials provided with the distribution.
  // This model is distributed in the hope that it will be useful, but WITHOUT ANY WARRANTY; without even the implied warranty of MERCHANTABILITY or FITNESS FOR A PARTICULAR PURPOSE.

  // Parameters:
  gl = 0.2; gl is "gl = .2";
  gkdr = 80; gkdr is "gkdr = 80";
  gna = 80; gna is "gna = 80";
  iapp = 0.67; iapp is "iapp = 0.67";
  c = 1; c is "c = 1.";
  amphi = 0.32; amphi is "amphi = .32";
  amhalf = -54; amhalf is "amhalf = -54";
  amwidth = 4; amwidth is "amwidth = 4";
  bmphi = 0.28; bmphi is "bmphi = .28";
  bmhalf = -27; bmhalf is "bmhalf = -27";
  bmwidth = 5; bmwidth is "bmwidth = 5";
  ahphi = 0.128; ahphi is "ahphi = .128";
  ahhalf = -50; ahhalf is "ahhalf = -50";
  ahwidth = 18; ahwidth is "ahwidth = 18";
  bhphi = 4; bhphi is "bhphi = 4";
  bhhalf = -27; bhhalf is "bhhalf = -27";
  bhwidth = 5; bhwidth is "bhwidth = 5";
  anphi = 0.032; anphi is "anphi = .032";
  anhalf = -52; anhalf is "anhalf = -52";
  anwidth = 5; anwidth is "anwidth = 5";
  bnphi = 0.5; bnphi is "bnphi = .5";
  bnhalf = -57; bnhalf is "bnhalf = -57";
  bnwidth = 40; bnwidth is "bnwidth = 40";
  taur = 1; taur is "taur = 1";
  taud = 3; taud is "taud = 3";
  thresh = -30; thresh is "thresh = -30";
  gsyn = 1; gsyn is "gsyn = 1";
  esyn = 0; esyn is "esyn = 0";
  x1_0 = 0; x1_0 is "x1 = 0";
  y1 = 0; y1 is "y1 = 0";
  x2_0 = 0; x2_0 is "x2 = 0";
  y2 = 0; y2 is "y2 = 0";
  vna = 50; vna is "vna = 50";
  vk = -100; vk is "vk = -100";
  vl = -67; vl is "vl = -67";
  vh = -65; vh is "vh = -65";
  vrh = -40; vrh is "vrh = -40";
  vsh = 6; vsh is "vsh = 6";
  gld = 0.1; gld is "gld = 0.1";
  gh = 0.02; gh is "gh = 0.02";
  tauh = 400; tauh is "tauh = 400";
  p[0..50] = 0 = 0;
  lambda = 1; lambda is "lambda = 1";
  tau = 10; tau is "tau = 10";
  dx = 0.1; dx is "dx = .1";
  c1_0 = 0; c1_0 is "c1 = 0";
  a1 = 0; a1 is "a1 = 0";
  b1 = 1; b1 is "b1 = 1";
  c0_0 = 0; c0_0 is "c0 = 0";
  a0 = 0; a0 is "a0 = 0";
  b0 = 1; b0 is "b0 = 1";
  eps = 0.025; eps is "eps = .025";
  ua[1..50] = -60 = -60;
  ha[1..50] = .1 = 0.1;
  ub[1..50] = -60 = -60;
  hb[1..50] = .1 = 0.1;
  v1 = 0 dimensionless;
  v2 = 0 dimensionless;
  m1 = 0 dimensionless;
  m2 = 0 dimensionless;
  n1 = 0 dimensionless;
  n2 = 0 dimensionless;
  ha = 0 dimensionless;
  hb = 0 dimensionless;
  ua1 = 0 dimensionless;
  ub1 = 0 dimensionless;
  ua51 has dimensionless;
  ub51 has dimensionless;
  t has dimensionless; t is "model time";

  // Assignment rules:
  ua51 := (c1_0 + b1*ua50/dx)/(a1 + b1/dx);
  ub51 := (c1_0 + b1*ub50/dx)/(a1 + b1/dx);
  t := time;

  // Rate rules:
  v1' = (iapp - (ina(v1, m1, ha, gna, vna) + ikdr(v1, n1, gkdr, vk) + il(v1, gl, vl)) + eps*(ua1 - v1)/dx - p0*isyn(y2, v1, esyn, gsyn))/c;
  v2' = (iapp - (ina(v2, m2, hb, gna, vna) + ikdr(v2, n2, gkdr, vk) + il(v2, gl, vl)) + eps*(ub1 - v2)/dx - p0*isyn(y1, v2, esyn, gsyn))/c;
  m1' = am(v1, amhalf, amphi, amwidth)*(1 - m1) - bm(v1, bmhalf, bmphi, bmwidth)*m1;
  m2' = am(v2, amhalf, amphi, amwidth)*(1 - m2) - bm(v2, bmhalf, bmphi, bmwidth)*m2;
  n1' = an(v1, anhalf, anphi, anwidth)*(1 - n1) - bn(v1, bnhalf, bnphi, bnwidth)*n1;
  n2' = an(v2, anhalf, anphi, anwidth)*(1 - n2) - bn(v2, bnhalf, bnphi, bnwidth)*n2;
  ha' = ah(v1, ahhalf, ahphi, ahwidth)*(1 - ha) - bh(v1, bhhalf, bhphi, bhwidth)*ha;
  hb' = ah(v2, ahhalf, ahphi, ahwidth)*(1 - hb) - bh(v2, bhhalf, bhphi, bhwidth)*hb;
  x1_0' = (-x1_0 + 0.5*(1 + tanh((v1 - thresh)/3)))/taur;
  x2_0' = (-x2_0 + 0.5*(1 + tanh((v2 - thresh)/3)))/taur;
  y1' = (-y1 + x1_0)/taud;
  y2' = (-y2 + x2_0)/taud;
  ua1' = ((lambda/dx)^2*(ua2 - 2*ua1 + v1) - ild(ua1, vl) - ih(ua1, ha1, gh, gld, vrh) - p1*isyn(y2, ua1, esyn, gsyn)/gld)/tau;
  ub1' = ((lambda/dx)^2*(ub2 - 2*ub1 + v2) - ild(ub1, vl) - ih(ub1, hb1, gh, gld, vrh) - p1*isyn(y1, ub1, esyn, gsyn)/gld)/tau;
end
