// SBML level 3 version 1

function max(x, y)
  piecewise(x, x > y, y);
end
max is "minimum";

function min(x, y)
  piecewise(x, x < y, y);
end
min is "maximum";

function heav(x)
  piecewise(0, x < 0, 0.5, x == 0, 1, x > 0, 0);
end
heav is "heavyside";

function mod(x, y)
  piecewise(x - y*ceil(x/y), xor(x < 0, y < 0), x - y*floor(x/y));
end
mod is "modulo";

function hinf(v, vh, vsh)
  1/(1 + exp((v - vh)/vsh));
end

function ild(v, vl)
  v - vl;
end

function ih(v, y, gh, gld, vrh)
  gh*y*(v - vrh)/gld;
end

function pulse(t, sigma)
  heav(t)*heav(sigma - t);
end

model main()
  // XPP model
  // This model was converted from XPP ode format to SBML using sbmlutils-0.1.5a6.
  // ###########################################################################
  // # This model has a delayed rectifier, a leak and
  // # a sodium current based on the famous Traub and Miles model but with changes put in
  // # by Bard Ermentrout in linearization of F-I curves by adaptation, Neural computation,
  // # 10:1721-9, 1998
  // #
  // # Input Currents are in nA, maximal conductances in mS/cm2, membrane potential
  // # in mV time in ms, and capacitance in uF/cm2
  // ############################################################################
  // #adjust defaults for xpp internal variables
  // @ MAXSTOR=40000
  // @ YP=v
  // @ TOTAL=1000
  // @ DT=0.05
  // @ BOUND=100000
  // @ XHI=1000
  // @ YLO=-100
  // @ YHI=50
  // #@ METH=gear
  // @ BACKGROUND=white
  // # parameters
  // par gbarNa=80
  // par gbarK=80
  // par gleak=0.2
  // par C=1., i=1
  // v' = (i-(gleak*(v-Vl)+gK*(v-vk)+gNa*(v-vna))+eps*(u1-v)/dx)/C+p0*pulse(t-taup)
  // aux longcur=eps*(u1-v)/dx
  // #****************************************************
  // gNa=gbarNa*(m**3)*h
  // alpham=if (v+54) then (0.32*(V+54)/(1-exp(-(V+54)/4))) else (0.32)
  // betam=if (V+27) then (0.28*(V+27)/(exp((V+27)/5)-1)) else (0.28)
  // alphah=0.128*exp(-(V+50)/18)
  // betah=4/(1+exp(-(V+27)/5))
  // dm/dt=alpham*(1-m)-betam*m
  // dh/dt=alphah*(1-h)-betah*h
  // #**********************************************************
  // gK=gbarK*(n**4)
  // alphan=if (V+52) then (0.032*(V+52)/(1-exp(-(V+52)/5))) else (0.032)
  // betan=0.5*exp(-(V+57)/40)
  // dn/dt=alphan*(1-n)-betan*n
  // # auxiliary variables
  // # sod is sodium current
  // aux sod=gbarNa*(m**3)*h*(v-vna)
  // # pot is potassium current
  // aux pot=gbarK*(n**4)*(v-vk)
  // #initial conditions
  // init v=-70
  // init h=1-.000001,m=.000001,n=.000001
  // par Vna=50,Vk=-100,Vl=-67,Vh=-65,Vrh=-40,Vsh=6,gld=0.1,gh=0.05,tauh=400
  // hinf(V)=1/(1+exp((V-Vh)/Vsh))
  // Ild(V)=V-Vl
  // Ih(V,y)=gh*y*(V-Vrh)/gld
  // h[1..50]'=(hinf(u[j])-h[j])/tauh
  // # NOT TO CONFUSE WITH h GATE IN SOMA!!
  // # cable equation has HCN current
  // p p[0..50]=0
  // u1'=((lambda/dx)^2*(u2-2*u1+v)-Ild(u1)-Ih(u1,h1))/tau +p1*pulse(t-taup)
  // u[2..50]'= ((lambda/dx)^2*(u[j+1]-2*u[j]+u[j-1])-Ild(u[j])-Ih(u[j],h[j]))/tau +p[j]*pulse(t-taup)
  // u51=(c1+b1*u50/dx)/(a1+b1/dx)
  // par lambda=1,tau=10,dx=.1,c1=0,a1=0,b1=1,c0=0,a0=0,b0=1,eps=.025
  // pulse(t)=heav(t)*heav(sigma-t)
  // par sigma=.2
  // par t0=241.3
  // aux prc=t0-t
  // taup'=0
  // i u[1..50]=-60
  // i h[1..50]=.1
  // par taur=1,taud=3,thresh=-30, gsyn=.1 Esyn=0
  // x1'=(-x1+.5*(1+tanh((v-thresh)/3.0)))/taur
  // y1'=(-y1+x1)/taud
  // init x1=0,y1=0
  // d
  // This file has been produced by sbmlutils.
  // Terms of use
  // Copyright © 2017 Matthias Koenig
  // Redistribution and use of any part of this model, with or without modification, are permitted provided that the following conditions are met:
  // Redistributions of this SBML file must retain the above copyright notice, this list of conditions and the following disclaimer.
  // Redistributions in a different form must reproduce the above copyright notice, this list of conditions and the following disclaimer in the documentation and/or other materials provided with the distribution.
  // This model is distributed in the hope that it will be useful, but WITHOUT ANY WARRANTY; without even the implied warranty of MERCHANTABILITY or FITNESS FOR A PARTICULAR PURPOSE.

  // Parameters:
  gbarna = 80; gbarna is "gbarna = 80";
  gbark = 80; gbark is "gbark = 80";
  gleak = 0.2; gleak is "gleak = 0.2";
  c = 1; c is "c = 1.";
  i = 1; i is "i = 1";
  v = -70; v is "v = -70";
  h = 1 - 1e-6;
  m = 1e-6; m is "m = .000001";
  n = 1e-6; n is "n = .000001";
  vna = 50; vna is "vna = 50";
  vk = -100; vk is "vk = -100";
  vl = -67; vl is "vl = -67";
  vh = -65; vh is "vh = -65";
  vrh = -40; vrh is "vrh = -40";
  vsh = 6; vsh is "vsh = 6";
  gld = 0.1; gld is "gld = 0.1";
  gh = 0.05; gh is "gh = 0.05";
  tauh = 400; tauh is "tauh = 400";
  p[0..50] = 0 = 0;
  lambda = 1; lambda is "lambda = 1";
  tau = 10; tau is "tau = 10";
  dx = 0.1; dx is "dx = .1";
  c1_0 = 0; c1_0 is "c1 = 0";
  a1 = 0; a1 is "a1 = 0";
  b1 = 1; b1 is "b1 = 1";
  c0_0 = 0; c0_0 is "c0 = 0";
  a0 = 0; a0 is "a0 = 0";
  b0 = 1; b0 is "b0 = 1";
  eps = 0.025; eps is "eps = .025";
  sigma = 0.2; sigma is "sigma = .2";
  t0 = 241.3; t0 is "t0 = 241.3";
  u[1..50] = -60 = -60;
  h[1..50] = .1 = 0.1;
  taur = 1; taur is "taur = 1";
  taud = 3; taud is "taud = 3";
  thresh = -30; thresh is "thresh = -30";
  gsyn = 0.1; gsyn is "gsyn = .1";
  esyn = 0; esyn is "esyn = 0";
  x1_0 = 0; x1_0 is "x1 = 0";
  y1 = 0; y1 is "y1 = 0";
  u1 = 0 dimensionless;
  taup = 0 dimensionless;
  longcur has dimensionless;
  gna has dimensionless;
  alpham has dimensionless;
  betam has dimensionless;
  alphah has dimensionless;
  betah has dimensionless;
  gk has dimensionless;
  alphan has dimensionless;
  betan has dimensionless;
  sod has dimensionless;
  pot has dimensionless;
  u51 has dimensionless;
  prc has dimensionless;
  t has dimensionless; t is "model time";

  // Assignment rules:
  longcur := eps*(u1 - v)/dx;
  gna := gbarna*m^3*h;
  alpham := piecewise(0.32*(v + 54)/(1 - exp(-(v + 54)/4)), v + 54, 0.32);
  betam := piecewise(0.28*(v + 27)/(exp((v + 27)/5) - 1), v + 27, 0.28);
  alphah := 0.128*exp(-(v + 50)/18);
  betah := 4/(1 + exp(-(v + 27)/5));
  gk := gbark*n^4;
  alphan := piecewise(0.032*(v + 52)/(1 - exp(-(v + 52)/5)), v + 52, 0.032);
  betan := 0.5*exp(-(v + 57)/40);
  sod := gbarna*m^3*h*(v - vna);
  pot := gbark*n^4*(v - vk);
  u51 := (c1_0 + b1*u50/dx)/(a1 + b1/dx);
  prc := t0 - t;
  t := time;

  // Rate rules:
  v' = (i - (gleak*(v - vl) + gk*(v - vk) + gna*(v - vna)) + eps*(u1 - v)/dx)/c + p0*pulse(t - taup, sigma);
  m' = alpham*(1 - m) - betam*m;
  h' = alphah*(1 - h) - betah*h;
  n' = alphan*(1 - n) - betan*n;
  u1' = ((lambda/dx)^2*(u2 - 2*u1 + v) - ild(u1, vl) - ih(u1, h1, gh, gld, vrh))/tau + p1*pulse(t - taup, sigma);
  taup' = 0;
  x1_0' = (-x1_0 + 0.5*(1 + tanh((v - thresh)/3)))/taur;
  y1' = (-y1 + x1_0)/taud;
end
