// SBML level 3 version 1

function max(x, y)
  piecewise(x, x > y, y);
end
max is "minimum";

function min(x, y)
  piecewise(x, x < y, y);
end
min is "maximum";

function heav(x)
  piecewise(0, x < 0, 0.5, x == 0, 1, x > 0);
end
heav is "heavyside";

function mod(x, y)
  piecewise(x - y*ceil(x/y), xor(x < 0, y < 0), x - y*floor(x/y));
end
mod is "modulo";

function ki(x, tmaxi, vsi, vti)
  tmaxi/(1 + exp(-(x - vti)/vsi));
end

function ke(y, tmaxe, vse, vte)
  tmaxe/(1 + exp(-(y - vte)/vse));
end

function mlinf(v, vlth, vshp)
  1/(1 + exp(-(v - vlth)/vshp));
end

function ica(v, eca, gca, vlth, vshp)
  gca*mlinf(v, vshp, vlth)*(v - eca);
end

function iahp(ca, v, Ek, gahp, kd)
  gahp*(ca/(ca + kd))*(v - Ek);
end

function alpham(v, V)
  0.1*(V + 35)/(1 - exp(-(V + 35)/10));
end

function betam(v, V)
  4*exp(-(V + 60)/18);
end

function Minf(v, V)
  alpham(v, V)/(alpham(v, V) + betam(v, V));
end

function alphah(v, V)
  0.07*exp(-(V + 58)/20);
end

function betah(v, V)
  1/(1 + exp(-(V + 28)/10));
end

function Hinf(v, V)
  alphah(v, V)/(alphah(v, V) + betah(v, V));
end

function tauH(v, V)
  1/(alphah(v, V) + betah(v, V));
end

function alphan(v, V)
  0.01*(V + 34)/(1 - exp(-(V + 34)/10));
end

function betan(v, V)
  0.125*exp(-(V + 44)/80);
end

function Ninf(v, V)
  alphan(v, V)/(alphan(v, V) + betan(v, V));
end

function tauN(v, V)
  1/(alphan(v, V) + betan(v, V));
end

model main()
  // XPP model
  // This model was converted from XPP ode format to SBML using sbmlutils-0.1.5a6.
  // # Wang-Buzsaki neuron network with 50E-cells and 20I-cells with all-to-all
  // # connectivity with heterogeneity with tonic input for 1 sec
  // table Ir % 50 0 49 ran(1)*0.5
  // @ autoeval=0
  // wiener ze[0..49]
  // wiener zi[0..19]
  // #
  // # Parameters used
  // p gKLe=0.12, gNaL=0.017, gKLi=0.15
  // p gK=9.0, gNa=35.0
  // p ENa=55.0, EK=-90.0
  // p gei=0.6, gee=0.05, gie=0.6, gii=0.10
  // p sige=1.2,sigi=1.2
  // p phi=5.0
  // p Vsyni=-75,Vti=2,Vsi=5,alphai=5,betai=.1,tmaxi=1
  // p Vsyne=0,Vte=2,Vse=5,alphae=1.1,betae=.19,tmaxe=1
  // p Vlth=-25,Vshp=5
  // #
  // # Tonic input description and parameters
  // Iapp[0..49]=I0+I1*Ir([j])
  // p I0=2.5,I1=2
  // #
  // aveVE=(sum(0,49)of(shift(Ve0,i')))/50
  // inputse=sum(0,49)of(shift(se0,i'))/50
  // inputsi=sum(0,19)of(shift(si0,i'))/20
  // #
  // #ODEs for e-cells
  // Ve[0..49]'=Iapp[j]-gKLe*(Ve[j]-EK)-gNaL*(Ve[j]-ENa)-gNa*(Minf(ve[j])^3)*he[j]*(Ve[j]-ENa)-gK*(ne[j]^4)*(Ve[j]-EK)-gie*inputsi*(Ve[j]-Vsyni)-gee*inputse*(Ve[j]-Vsyne)-ica(ve[j])-iahp(ca[j],ve[j])+sige*ze[j]
  // he[0..49]'=phi*(Hinf(ve[j])-he[j])/tauH(ve[j])
  // ne[0..49]'=phi*(Ninf(ve[j])-ne[j])/tauN(ve[j])
  // se[0..49]'=alphae*ke(ve[j])*(1-se[j])-betae*se[j]
  // #
  // #ODEs for i-cells
  // Vi[0..19]'=-gKLi*(Vi[j]-EK)-gNaL*(Vi[j]-ENa)-gNa*(Minf(vi[j])^3)*hi[j]*(Vi[j]-ENa)-gK*(ni[j]^4)*(Vi[j]-EK)-gei*inputse*(Vi[j]-Vsyne)-gii*inputsi*(Vi[j]-Vsyni)+sigi*zi[j]
  // hi[0..19]'=phi*(Hinf(vi[j])-hi[j])/tauH(vi[j])
  // ni[0..19]'=phi*(Ninf(vi[j])-ni[j])/tauN(vi[j])
  // si[0..19]'=alphai*ki(vi[j])*(1-si[j])-betai*si[j]
  // #
  // ki(x)=tmaxi/(1+exp(-(x-vti)/vsi))
  // ke(y)=tmaxe/(1+exp(-(y-vte)/vse))
  // #
  // # Spike frequency adaptation description with parameters
  // # calcium
  // mlinf(v)=1/(1+exp(-(v-vlth)/vshp))
  // ica(v)=gca*mlinf(v)*(v-eca)
  // ca[0..49]'=(-alpha*ica(ve[j])-ca[j]/tauca)
  // # k-ca
  // iahp(ca,v)=gahp*(ca/(ca+kd))*(v-Ek)
  // # corresponding parameters
  // p kd=30, Eca=120
  // p alpha=.002, tauca=80, gca=1, gahp=3
  // #
  // #
  // alpham(v)=0.1*(V+35.0)/(1.0-exp(-(V+35.0)/10.0))
  // betam(v)=4.0*exp(-(V+60.0)/18.0)
  // Minf(v)=alpham(v)/(alpham(v)+betam(v))
  // #
  // alphah(v)= 0.07*exp(-(V+58.0)/20.0)
  // betah(v)=1.0/(1.0+exp(-(V+28.0)/10.0))
  // Hinf(v)=alphah(v)/(alphah(v)+betah(v))
  // tauH(v)=1.0/(alphah(v)+betah(v))
  // #
  // alphan(v)=0.01*(V+34.0)/(1.0-exp(-(V+34.0)/10.00))
  // betan(v)=0.125*exp(-(V+44.0)/80.0)
  // Ninf(v)=alphan(v)/(alphan(v)+betan(v))
  // tauN(v)=1.0/(alphan(v)+betan(v))
  // #
  // # Initial conditions
  // init Ve[0..49]=-64
  // init he[0..49]=0.78
  // init ne[0..49]=0.09
  // init Vi[0..19]=-64
  // init hi[0..19]=0.78
  // init ni[0..19]=0.09
  // #
  // # Creating some auxiliary variables
  // aux aveSE=inputse
  // auc aveSI=inputsi
  // aux LFP=aveVE
  // #
  // # Numerics description
  // @ XP=T
  // @ YP=LFP
  // @ autoeval=0
  // @ TOTAL=1400,trans=400
  // @ nOut=10
  // @ DT=0.01,bound=100000,maxstor=1000000
  // @ METH=euler
  // @ TOLER=0.00001
  // @ XLO=0.0, XHI=30.0, YLO=-90.0, YHI=30.0
  // done
  // This file has been produced by sbmlutils.
  // Terms of use
  // Copyright © 2017 Matthias Koenig
  // Redistribution and use of any part of this model, with or without modification, are permitted provided that the following conditions are met:
  // Redistributions of this SBML file must retain the above copyright notice, this list of conditions and the following disclaimer.
  // Redistributions in a different form must reproduce the above copyright notice, this list of conditions and the following disclaimer in the documentation and/or other materials provided with the distribution.
  // This model is distributed in the hope that it will be useful, but WITHOUT ANY WARRANTY; without even the implied warranty of MERCHANTABILITY or FITNESS FOR A PARTICULAR PURPOSE.

  // Parameters:
  gKLe = 0.12;
  gNaL = 0.017;
  gKLi = 0.15;
  gK = 9;
  gNa = 35;
  ENa = 55;
  EK = -90;
  gei = 0.6;
  gee = 0.05;
  gie = 0.6;
  gii = 0.1;
  sige = 1.2;
  sigi = 1.2;
  phi = 5;
  Vsyni = -75;
  Vti = 2;
  Vsi = 5;
  alphai = 5;
  betai = 0.1;
  tmaxi = 1;
  Vsyne = 0;
  Vte = 2;
  Vse = 5;
  alphae = 1.1;
  betae = 0.19;
  tmaxe = 1;
  Vlth = -25;
  Vshp = 5;
  I0 = 2.5;
  I1 = 2;
  kd = 30;
  Eca = 120;
  alpha = 0.002;
  tauca = 80;
  gca = 1;
  gahp = 3;
  aveVE has dimensionless;
  inputse has dimensionless;
  inputsi has dimensionless;
  aveSE has dimensionless;
  aveSI has dimensionless;
  LFP has dimensionless;
  t has dimensionless; t is "model time";

  // Assignment rules:
  aveVE := ;
  inputse := ;
  inputsi := ;
  aveSE := inputse;
  aveSI := inputsi;
  LFP := aveVE;
  t := time;
end
