// SBML level 3 version 1

function max(x, y)
  piecewise(x, x > y, y);
end
max is "minimum";

function min(x, y)
  piecewise(x, x < y, y);
end
min is "maximum";

function heav(x)
  piecewise(0, x < 0, 0.5, x == 0, 1, x > 0, 0);
end
heav is "heavyside";

function mod(x, y)
  piecewise(x - y*ceil(x/y), xor(x < 0, y < 0), x - y*floor(x/y));
end
mod is "modulo";

function minfks(v)
  1/(1 + exp((v + 12.85)/(-19.91)));
end

function mtauks(v)
  2.03 + 1.96/(1 + exp((v - 29.83)/3.32));
end

function minfkf(v)
  1/(1 + exp((v + 17.55)/(-7.27)));
end

function mtaukf(v)
  1.94 + 2.66/(1 + exp((v - 8.12)/7.96));
end

function hinfk(v)
  1/(1 + exp((v + 45)/6));
end

function htauk(v)
  1.79 + 515.8/(1 + exp((v + 147.4)/28.66));
end

function hinfk2(v)
  1/(1 + exp((v + 44.2)/1.5));
end

function minfna(v)
  1/(1 + exp((v + 29.13)/(-8.922)));
end

function mtauna(v)
  0.127 + 3.434/(1 + exp((v + 45.35)/5.98));
end

function hinfna(v)
  1/(1 + exp((v + 47)/5));
end

function htauna(v)
  0.36 + exp(-(v + 20.65)/10.47);
end

function minfnap(v)
  1/(1 + exp((v + 48.77)/(-3.68)));
end

function mtaunap(v)
  1;
end

model main()
  // XPP model
  // This model was converted from XPP ode format to SBML using sbmlutils-0.1.5a6.
  // " ball and stick model w 2 comps
  // " copied from model_I_long_range_better_offset.ode
  // " Na params close enough to accept this as wildtype cocktail model.
  // " Can change only 2 out of 3 passive parameters. The last one is dependent to preserve total input resistance.
  // #
  // # conductances in nS, resistances in GOhm
  // # currents in pA
  // # Voltages in mV
  // # time in ms
  // # capacitances in pF
  // # Larger soma capacitance, but still low leak
  // # 3-steps: 16, 36, 56
  // # Params: gaxon=1.8, NaP=0.1, NaT=350, gKs=1, gaKs=550, Cm=15, Ca=10, gL=0.1, gaL=3, eleak=-55, ealeak=-59
  // # principles:
  // # - good for spike height => gaxon, Cm = (3, 20); (1.6, 15)
  // # - gaKs > gNaT makes longer delay
  // # - lowering gaL increases first spike voltage offset
  // # - high gaKs makes spike asymmetric with slow depolarization
  // # - lowering Cm increases spike height
  // # - decreasing gaxon makes spikes shorter and more asymmetric, but requires more current to fire
  // # - increasing zi increases offset slightly
  // # firing rate rules:
  // # - increasing gl decreases galeak and therefore increases f
  // # - increasing gaxon increases f
  // # - increasing zi increases f
  // # - reducing Ca increases f!
  // # Params: gaxon=1, NaP=0.14, NaT=350, gKs=1, gaKs=550, Cm=15, Ca=10, gL=0.1, gaL=dep(zi), zi=1.6, eleak=-60, ealeak=-60
  // # pros: nice spike height, goes up to >-10mV
  // # cons: threshold @ -50mV, spikes a bit too short
  // # Params: gaxon=1.6, NaP=0.05, NaT=450, gKs=1, gaKs=500, Cm=15, Ca=10, gL=0.1, gaL=dep(zi), zi=1.6, eleak=-60, ealeak=-60
  // # pros: nice spike height, goes up to >-10mV, threshold @ -40mV
  // # cons: initial rate too high, spike shape not nice, too small
  // # Params: gaxon=1.6, NaP=0.08, NaT=260, gKs=1, gaKs=1000, Cm=15, Ca=10, gL=0.1, gaL=dep(zi), zi=1.6, eleak=-60, ealeak=-60
  // # pros: nice spike height, asymmetric spike shape, initial rate low
  // # cons: threshold @ -45mV, offset a bit too small
  // # Params: NaP=0.08, NaT=300, gKs=1, gaKs=1000, Cm=15, Ca=10, gaxon=1.6, gL=0.1, gaL=dep(zi), zi=1.1, eleak=-60, ealeak=-60
  // # pros: nice spike height, asymmetric spike shape, initial rate low, threshold @ -40mV
  // # cons: starts firing at 14 pA, must compare f-I curve to recordings
  // # TODO: make mlab figure and attach to bif.lyx
  // #dV/dt=-1/c*(gKs*mKs^4*(V-EK) + gKf*mKf^4*(fh*hKf+(1-fh)*hKf2)*(V-EK) + gNa*mNa^3*hNa*(V-ENa) + gleak*(V-Eleak)-I)
  // # soma voltage
  // dVm/dt=-1/Cm*(IksVm+IkfVm+gleak*(Vm-Eleak)-I+gaxon*(Vm-Va))
  // # axon compartment voltage
  // dVa/dt=-1/Ca*(IksVa+IkfVa+Ina+Inap+galeak*(Va-Ealeak)+gaxon*(Va-Vm))
  // #slow K
  // # orig = 5.1
  // par gKs=1 gaKs=700
  // minfKs(V) = 1/(1+exp((V+12.85)/(-19.91)))
  // mtauKs(V) = 2.03 + 1.96 /(1+exp((V-29.83)/3.32))
  // dmKsVm/dt=(minfKs(Vm)-mKsVm)/mtauKs(Vm)
  // dmKsVa/dt=(minfKs(Va)-mKsVa)/mtauKs(Va)
  // IksVm=gKs*mKsVm^4*(Vm-EK)
  // IksVa=gaKs*mKsVa^4*(Va-EK)
  // aux IksVm=IksVm
  // aux IksVa=IksVa
  // #fast K with 2 inactivation time constants
  // dmKfVm/dt=(minfKf(Vm)-mKfVm)/mtauKf(Vm)
  // dhKfVm/dt=(hinfK(Vm)-hKfVm)/htauK(Vm)
  // dhKf2Vm/dt=(hinfK2(Vm)-hKf2Vm)/116
  // IkfVm=gKf*mKfVm^4*(fh*hKfVm + (1-fh)*hKf2Vm)*(Vm-EK)
  // dmKfVa/dt=(minfKf(Va)-mKfVa)/mtauKf(Va)
  // dhKfVa/dt=(hinfK(Va)-hKfVa)/htauK(Va)
  // dhKf2Va/dt=(hinfK2(Va)-hKf2Va)/116
  // IkfVa=gaKf*mKfVa^4*(fh*hKfVa + (1-fh)*hKf2Va)*(Va-EK)
  // minfKf(V) = 1/(1+exp((V+17.55)/(-7.27)))
  // mtauKf(V) = 1.94+2.66/(1+exp((V-8.12)/7.96))
  // hinfK(V) = 1/(1+exp((V+45)/6))
  // htauK(V) = 1.79+515.8/(1+exp((V+147.4)/(28.66)))
  // # mistake; should be hinfK == hinfK2
  // hinfK2(V) = 1/(1+exp((V+44.2)/1.5))
  // aux IkfVm=IkfVm
  // aux IkfVa=IkfVa
  // #na
  // # from O'Dowd and Aldrich (1988)
  // dmNa/dt=(minfNa(Va)-mNa)/mtauNa(Va)
  // dhNa/dt=(hinfNa(Va)-hNa)/htauNa(Va)
  // Ina=gNa*mNa^3*hNa*(Va-ENa)
  // # gNa reported as 500 pS/pF, multiply with C=20 pF
  // par gNa=180
  // minfNa(V) = 1/(1+exp((V+29.13)/(-8.922)))
  // mtauNa(V) = 0.1270 + 3.434/(1+exp((V+45.35)/(5.98)))
  // hinfNa(V) = 1/(1+exp((V+47)/5))
  // htauNa(V) = 0.36 + exp(-(V+20.65)/(10.47))
  // aux Ina=Ina
  // # NaP from DmNav10 of WHL oocyte #1
  // dmNaP/dt=(minfNaP(Va)-mNaP)/mtauNaP(Va)
  // Inap=(gNaP+modgNaP)*mNaP*(Va-ENa)
  // par gNaP=.01
  // minfNap(V) = 1/(1+exp((V+48.77)/(-3.68)))
  // mtauNap(V) = 1
  // aux Inap=Inap
  // global 1 t {I=Ihold}
  // global 1 t-10 {I=Ipulse}
  // global 1 t-510 {I=Ihold}
  // # initial conditions for settled at I=-6.5
  // # easiest way is to get this is to save "info" from File menu
  // # after running for a long while and then doing a "run last"
  // init VM=-68.81670299025546 VA=-64.34801596094069 MKSVM=0.05673345401938218 MKSVA=0.07000969210752514 MKFVM=0.0008650853390965969 HKFVM=0.9814660312384692 HKF2VM=0.9839995279862832 MKFVA=0.001598416867905559 HKFVA=0.961752460873017 HKF2VA=0.9900602079074428 MNA=0.01894063272630685 HNA=0.9695223296922046 MNAP=0.01429909346846636
  // @ total=600,bounds=10000000000,meth=euler,dt=.001, nout=100, maxstor=10000000
  // # window ranges
  // @ xlo=0, xhi=600, ylo=-65, yhi=0
  // # do a I range from -9 to +51 with 7 steps
  // # do a I range from 5 to +45 with 2 steps
  // par Cm=10 Ca=1.8 Ipulse=-6.5
  // # conserve total input resistance
  // par zi=2.1
  // # connection strength
  // par gaxon=1.3 gleak=0.05
  // # make some parameters dependent to preserve zi
  // gad=1/zi-gleak
  // galeak=1/(1/gad-1/gaxon)
  // par eleak=-55 ealeak=-55 Ihold=-6.5
  // # unneeded pars at the end
  // par gKf=1 gaKf=200
  // par ENa=45 EK=-80 I=0 fh=.95 modNaAct=0 modNaInact=0 modgNaP=0
  // done
  // This file has been produced by sbmlutils.
  // Terms of use
  // Copyright © 2017 Matthias Koenig
  // Redistribution and use of any part of this model, with or without modification, are permitted provided that the following conditions are met:
  // Redistributions of this SBML file must retain the above copyright notice, this list of conditions and the following disclaimer.
  // Redistributions in a different form must reproduce the above copyright notice, this list of conditions and the following disclaimer in the documentation and/or other materials provided with the distribution.
  // This model is distributed in the hope that it will be useful, but WITHOUT ANY WARRANTY; without even the implied warranty of MERCHANTABILITY or FITNESS FOR A PARTICULAR PURPOSE.

  // Parameters:
  gks = 1; gks is "gks = 1";
  gaks = 700; gaks is "gaks = 700";
  gna = 180; gna is "gna = 180";
  gnap = 0.01; gnap is "gnap = .01";
  vm = -68.8167; vm is "vm = -68.81670299025546";
  va = -64.34802; va is "va = -64.34801596094069";
  mksvm = 0.05673345; mksvm is "mksvm = 0.05673345401938218";
  mksva = 0.07000969; mksva is "mksva = 0.07000969210752514";
  mkfvm = 0.0008650853; mkfvm is "mkfvm = 0.0008650853390965969";
  hkfvm = 0.981466; hkfvm is "hkfvm = 0.9814660312384692";
  hkf2vm = 0.9839995; hkf2vm is "hkf2vm = 0.9839995279862832";
  mkfva = 0.001598417; mkfva is "mkfva = 0.001598416867905559";
  hkfva = 0.9617525; hkfva is "hkfva = 0.961752460873017";
  hkf2va = 0.9900602; hkf2va is "hkf2va = 0.9900602079074428";
  mna = 0.01894063; mna is "mna = 0.01894063272630685";
  hna = 0.9695223; hna is "hna = 0.9695223296922046";
  mnap = 0.01429909; mnap is "mnap = 0.01429909346846636";
  cm = 10; cm is "cm = 10";
  ca = 1.8; ca is "ca = 1.8";
  ipulse = -6.5; ipulse is "ipulse = -6.5";
  zi = 2.1; zi is "zi = 2.1";
  gaxon = 1.3; gaxon is "gaxon = 1.3";
  gleak = 0.05; gleak is "gleak = 0.05";
  eleak = -55; eleak is "eleak = -55";
  ealeak = -55; ealeak is "ealeak = -55";
  ihold = -6.5; ihold is "ihold = -6.5";
  gkf = 1; gkf is "gkf = 1";
  gakf = 200; gakf is "gakf = 200";
  ena = 45; ena is "ena = 45";
  ek = -80; ek is "ek = -80";
  i = 0; i is "i = 0";
  fh = 0.95; fh is "fh = .95";
  modnaact = 0; modnaact is "modnaact = 0";
  modnainact = 0; modnainact is "modnainact = 0";
  modgnap = 0; modgnap is "modgnap = 0";
  iksvm has dimensionless;
  iksva has dimensionless;
  ikfvm has dimensionless;
  ikfva has dimensionless;
  ina has dimensionless;
  inap has dimensionless;
  gad has dimensionless;
  galeak has dimensionless;
  t has dimensionless; t is "model time";

  // Assignment rules:
  iksvm := gks*mksvm^4*(vm - ek);
  iksva := gaks*mksva^4*(va - ek);
  ikfvm := gkf*mkfvm^4*(fh*hkfvm + (1 - fh)*hkf2vm)*(vm - ek);
  ikfva := gakf*mkfva^4*(fh*hkfva + (1 - fh)*hkf2va)*(va - ek);
  ina := gna*mna^3*hna*(va - ena);
  inap := (gnap + modgnap)*mnap*(va - ena);
  gad := 1/zi - gleak;
  galeak := 1/(1/gad - 1/gaxon);
  t := time;

  // Rate rules:
  vm' = -1/cm*(iksvm + ikfvm + gleak*(vm - eleak) - i + gaxon*(vm - va));
  va' = -1/ca*(iksva + ikfva + ina + inap + galeak*(va - ealeak) + gaxon*(va - vm));
  mksvm' = (minfks(vm) - mksvm)/mtauks(vm);
  mksva' = (minfks(va) - mksva)/mtauks(va);
  mkfvm' = (minfkf(vm) - mkfvm)/mtaukf(vm);
  hkfvm' = (hinfk(vm) - hkfvm)/htauk(vm);
  hkf2vm' = (hinfk2(vm) - hkf2vm)/116;
  mkfva' = (minfkf(va) - mkfva)/mtaukf(va);
  hkfva' = (hinfk(va) - hkfva)/htauk(va);
  hkf2va' = (hinfk2(va) - hkf2va)/116;
  mna' = (minfna(va) - mna)/mtauna(va);
  hna' = (hinfna(va) - hna)/htauna(va);
  mnap' = (minfnap(va) - mnap)/mtaunap(va);

  // Events:
  e0: at (t >= 0), t0=false: i = ihold;
  e1: at (t - 10 >= 0), t0=false: i = ipulse;
  e2: at (t - 510 >= 0), t0=false: i = ihold;
end
