// SBML level 3 version 1

function max(x, y)
  piecewise(x, x > y, y);
end
max is "minimum";

function min(x, y)
  piecewise(x, x < y, y);
end
min is "maximum";

function heav(x)
  piecewise(0, x < 0, 0.5, x == 0, 1, x > 0, 0);
end
heav is "heavyside";

function mod(x, y)
  piecewise(x - y*ceil(x/y), xor(x < 0, y < 0), x - y*floor(x/y));
end
mod is "modulo";

function alphams(v)
  0.32*(-46.9 - v)/(exp((-46.9 - v)/4) - 1);
end

function betams(v)
  0.28*(v + 19.9)/(exp((v + 19.9)/5) - 1);
end

function minfs(v)
  alphams(v)/(alphams(v) + betams(v));
end

function alphans(v)
  0.016*(-24.9 - v)/(exp((-24.9 - v)/5) - 1);
end

function betans(v)
  0.25*exp(-1 - 0.025*v);
end

function alphahs(v)
  0.125*exp((-43 - v)/18);
end

function betahs(v)
  4/(1 + exp((-20 - v)/5));
end

function alphasd(v)
  1.6/(1 + exp(-0.072*(v - 5)));
end

function betasd(v)
  0.02*(v + 8.9)/(exp((v + 8.9)/5) - 1);
end

function qinf(ca)
  0.7894*exp(0.0002726*ca) - 0.7292*exp(-0.01672*ca);
end

function tauq(ca)
  657.9*exp(-0.02023*ca) + 301.8*exp(-0.002381*ca);
end

function cinf(v)
  (1/(1 + exp((-10.1 - v)/0.1016)))^0.00925;
end

function tauc(v)
  3.627*exp(0.03704*v);
end

model main()
  // XPP model
  // This model was converted from XPP ode format to SBML using sbmlutils-0.1.5a6.
  // # $Id: booth_bose.ode,v 1.29 2004/02/09 21:41:46 billl Exp $
  // # Edited by Luke Yuri Prince on 14/1/15
  // ## booth_bose.ode
  // ## Pinsky-Rinzel pyramidal cell
  // ## |||#|||
  // # parameter values
  // par Isom0=-0.5
  // par Iden0=0
  // par gLs=0.1 gLd=0.1 gNa=30 gKdr=15 gCa=10 gKahp=0.8 gKC=15
  // par VNa=55
  // par VCa=80 VK=-75 VL=-60 Vsyn=0
  // par gc=1.425
  // par pp=0.5 Cm=3
  // par alphac=2 betac=0.1
  // par gnmda=1.75
  // # output cols are t, ODEs, AUXs in order, here:
  // # t vs vd cad hs ns sd cd qd gqk gkc
  // Vs'=(-gLs*(Vs-VL)-gNa*(Minfs(Vs)^2)*hs*(Vs-VNa)-gKdr*ns*(Vs-VK)+(gc/pp)*(Vd-Vs)+Isom0/pp)/Cm
  // Vd'=(-gLd*(Vd-VL)-ICad-gKahp*qd*(Vd-VK)-gKC*cd*chid*(Vd-VK)+(gc*(Vs-Vd))/(1.0-pp)-Inmda/(1-pp)+Iden0/(1-pp))/Cm
  // Cad'=-0.13*ICad-0.075*Cad
  // hs'=alphahs(Vs)-(alphahs(Vs)+betahs(Vs))*hs
  // ns'=alphans(Vs)-(alphans(Vs)+betans(Vs))*ns
  // sd'=alphasd(Vd)-(alphasd(Vd)+betasd(Vd))*sd
  // cd'=(cinf(Vd)-cd)/tauc(Vd)
  // qd'=(qinf(Cad)-qd)/tauq(Cad)
  // # pyramidal cell functions
  // ICad= gCa*sd*sd*(Vd-VCa)
  // Inmda=gnmda*(Vd-0)/(1+0.28*exp(-0.062*(Vd-0)))
  // alphams(v)= 0.32*(-46.9-v)/(exp((-46.9-v)/4.0)-1.0)
  // betams(v)= 0.28*(v+19.9)/(exp((v+19.9)/5.0)-1.0)
  // Minfs(v)= alphams(v)/(alphams(v)+betams(v))
  // alphans(v)= 0.016*(-24.9-v)/(exp((-24.9-v)/5.0)-1.0)
  // betans(v)= 0.25*exp(-1.0-0.025*v)
  // alphahs(v)= 0.125*exp((-43.0-v)/18.0)
  // betahs(v)= 4/(1.0+exp((-20.0-v)/5.0))
  // alphasd(v)= 1.6/(1.0+exp(-0.072*(v-5.0)))
  // betasd(v)= 0.02*(v+8.9)/(exp((v+8.9)/5.0)-1.0)
  // qinf(Ca)= (0.7894*exp(0.0002726*Ca))-(0.7292*exp(-0.01672*Ca))
  // tauq(Ca)= (657.9*exp(-0.02023*Ca))+(301.8*exp(-0.002381*Ca))
  // cinf(v)=(1.0/(1.0+exp((-10.1-v)/0.1016)))^0.00925
  // tauc(v)=3.627*exp(0.03704*v)
  // chid=1.073*sin(0.003453*Cad+0.08095)+0.08408*sin(0.01634*Cad-2.34)+0.01811*sin(0.0348*Cad-0.9918)
  // #chid=-1+2/(1+exp((-Cad)/96.82))
  // # auxiliary eqns
  // # aux sdc = (gc/pp)*(Vd-Vs)
  // # aux ICa = ICad
  // aux gkq = gKahp*qd
  // aux gkc = gKC*cd*chid
  // # initial conditions
  // init Vs=-62.89223689
  // init Vd=-62.98248752
  // init Cad=0.21664282
  // init hs=0.99806345
  // init ns=0.00068604
  // init sd=0.01086703
  // init qd=0.0811213
  // init cd=0.00809387
  // # integrator params
  // @ maxstor=80000,total=1000,bound=10000,xlo=0,xhi=1.5e3,ylo=-100,yhi=30
  // @ meth=cvode,atol=0.0001,toler=0.0001,dt=0.3
  // done
  // This file has been produced by sbmlutils.
  // Terms of use
  // Copyright © 2017 Matthias Koenig
  // Redistribution and use of any part of this model, with or without modification, are permitted provided that the following conditions are met:
  // Redistributions of this SBML file must retain the above copyright notice, this list of conditions and the following disclaimer.
  // Redistributions in a different form must reproduce the above copyright notice, this list of conditions and the following disclaimer in the documentation and/or other materials provided with the distribution.
  // This model is distributed in the hope that it will be useful, but WITHOUT ANY WARRANTY; without even the implied warranty of MERCHANTABILITY or FITNESS FOR A PARTICULAR PURPOSE.

  // Parameters:
  isom0 = -0.5; isom0 is "isom0 = -0.5";
  iden0 = 0; iden0 is "iden0 = 0";
  gls = 0.1; gls is "gls = 0.1";
  gld = 0.1; gld is "gld = 0.1";
  gna = 30; gna is "gna = 30";
  gkdr = 15; gkdr is "gkdr = 15";
  gca = 10; gca is "gca = 10";
  gkahp = 0.8; gkahp is "gkahp = 0.8";
  var gkc; gkc is "gkc = 15";
  vna = 55; vna is "vna = 55";
  vca = 80; vca is "vca = 80";
  vk = -75; vk is "vk = -75";
  vl = -60; vl is "vl = -60";
  vsyn = 0; vsyn is "vsyn = 0";
  gc = 1.425; gc is "gc = 1.425";
  pp = 0.5; pp is "pp = 0.5";
  cm = 3; cm is "cm = 3";
  alphac = 2; alphac is "alphac = 2";
  betac = 0.1; betac is "betac = 0.1";
  gnmda = 1.75; gnmda is "gnmda = 1.75";
  vs = -62.89224; vs is "vs = -62.89223689";
  vd = -62.98249; vd is "vd = -62.98248752";
  cad = 0.21664282; cad is "cad = 0.21664282";
  hs = 0.99806345; hs is "hs = 0.99806345";
  ns = 0.00068604; ns is "ns = 0.00068604";
  sd = 0.01086703; sd is "sd = 0.01086703";
  qd = 0.0811213; qd is "qd = 0.0811213";
  cd = 0.00809387; cd is "cd = 0.00809387";
  icad has dimensionless;
  inmda has dimensionless;
  chid has dimensionless;
  gkq has dimensionless;
  t has dimensionless; t is "model time";

  // Assignment rules:
  icad := gca*sd*sd*(vd - vca);
  inmda := gnmda*(vd - 0)/(1 + 0.28*exp(-0.062*(vd - 0)));
  chid := 1.073*sin(0.003453*cad + 0.08095) + 0.08408*sin(0.01634*cad - 2.34) + 0.01811*sin(0.0348*cad - 0.9918);
  gkq := gkahp*qd;
  gkc := gkc*cd*chid;
  t := time;

  // Rate rules:
  vs' = (-gls*(vs - vl) - gna*minfs(vs)^2*hs*(vs - vna) - gkdr*ns*(vs - vk) + gc/pp*(vd - vs) + isom0/pp)/cm;
  vd' = (-gld*(vd - vl) - icad - gkahp*qd*(vd - vk) - gkc*cd*chid*(vd - vk) + gc*(vs - vd)/(1 - pp) - inmda/(1 - pp) + iden0/(1 - pp))/cm;
  cad' = -0.13*icad - 0.075*cad;
  hs' = alphahs(vs) - (alphahs(vs) + betahs(vs))*hs;
  ns' = alphans(vs) - (alphans(vs) + betans(vs))*ns;
  sd' = alphasd(vd) - (alphasd(vd) + betasd(vd))*sd;
  cd' = (cinf(vd) - cd)/tauc(vd);
  qd' = (qinf(cad) - qd)/tauq(cad);
end
