// SBML level 3 version 1

function max(x, y)
  piecewise(x, x > y, y);
end
max is "minimum";

function min(x, y)
  piecewise(x, x < y, y);
end
min is "maximum";

function heav(x)
  piecewise(0, x < 0, 0.5, x == 0, 1, x > 0, 0);
end
heav is "heavyside";

function mod(x, y)
  piecewise(x - y*ceil(x/y), xor(x < 0, y < 0), x - y*floor(x/y));
end
mod is "modulo";

function n_inf(c, d_5)
  c/(c + d_5);
end

function h_inf(c, q_2)
  q_2/(q_2 + c);
end

function tau_h(c, a_2, q_2)
  1/(a_2*(q_2 + c));
end

function j_ip3r(c, c_t, d_5, gamma, h, m_inf, v_ip3r)
  v_ip3r*m_inf^3*n_inf(c, d_5)^3*h^3*((c_t - c)*gamma - c);
end

function j_leak(c, c_t, gamma, v_leak)
  v_leak*((c_t - c)*gamma - c);
end

function j_serca(c, k_serca, v_serca)
  v_serca*c^1.75/(c^1.75 + k_serca^1.75);
end

function j_soc(c, c_t, gamma, k_soc, v_soc)
  v_soc*k_soc^4/(k_soc^4 + ((c_t - c)*gamma)^4);
end

model main()
  // XPP model
  // This model was converted from XPP ode format to SBML using sbmlutils-0.1.5a6.
  // # XPP code to recreate bifurcation diagrams
  // # Copyright: Marsa Taheri and Gregory Handy, 2016
  // # ODEs
  // c' = (j_ip3r(c)-j_serca(c)+j_leak(c)+(j_in-j_out-j_pmca+j_soc(c,c_t))*delta)
  // c_t' = ((j_in-j_out-j_pmca+j_soc(c,c_t))*delta)
  // h'=((h_inf(c)-h)/tau_h(c))
  // aux ca_er=(c_t-c)*gamma
  // # Terms on ER
  // m_inf = ip/(ip+d_1)
  // n_inf(c) = c/(c+d_5)
  // h_inf(c) = q_2/(q_2+c)
  // q_2 = d_2 *(ip+d_1)/(ip+d_3)
  // tau_h(c) = 1/(a_2*(q_2+c))
  // j_ip3r(c) = v_ip3r*m_inf^3*n_inf(c)^3*h^3*((c_t-c)*gamma-c)
  // j_leak(c) = v_leak*((c_t-c)*gamma-c)
  // j_serca(c) = v_serca*c^1.75/(c^1.75+k_serca^1.75)
  // # Terms on plasma membrane
  // j_in = v_in
  // j_out = k_out*c
  // j_pmca=v_pmca*c^2/(k_pmca^2 + c^2)
  // j_soc(c,c_t) = v_soc*k_soc^4/(k_soc^4+((c_t-c)*gamma)^4)
  // # Initial Conditions
  // init c=0.0865415,h=0.6255124
  // init c_t=36.49084
  // param ip=0
  // param gamma=5.4054
  // # Leak for ER
  // param v_leak=0.002
  // # Leak across plasma membrane
  // param v_in=0.05, k_out=1.2
  // # IP3R Parameters
  // param v_ip3r=0.222
  // param d_1=.13,d_2=1.049,d_3=.9434,d_5=.08234
  // param a_2=0.04
  // # PMCA Terms
  // param v_pmca=10,k_pmca=2.5
  // # SOC Terms
  // param v_soc=1.57,k_soc=90
  // # SERCA Terms
  // param v_serca=0.9, k_serca=0.1
  // # Sneyd Parameter
  // param delta=0.2
  // @ ylo=0,ds=0.005,dsmin=0.001,dsmax=0.01,nmax=700,npr=700
  // @ autoymin=0,autoymax=.708,parmax=100,autoxmin=0,autoxmax=.5
  // @ total=1000,xhi=100,ylo=0,yhi=1.5,nmesh=100
  // @ bounds=1000
  // done
  // This file has been produced by sbmlutils.
  // Terms of use
  // Copyright © 2017 Matthias Koenig
  // Redistribution and use of any part of this model, with or without modification, are permitted provided that the following conditions are met:
  // Redistributions of this SBML file must retain the above copyright notice, this list of conditions and the following disclaimer.
  // Redistributions in a different form must reproduce the above copyright notice, this list of conditions and the following disclaimer in the documentation and/or other materials provided with the distribution.
  // This model is distributed in the hope that it will be useful, but WITHOUT ANY WARRANTY; without even the implied warranty of MERCHANTABILITY or FITNESS FOR A PARTICULAR PURPOSE.

  // Parameters:
  c = 0.0865415; c is "c = 0.0865415";
  h = 0.6255124; h is "h = 0.6255124";
  c_t = 36.49084; c_t is "c_t = 36.49084";
  ip = 0; ip is "ip = 0";
  gamma = 5.4054; gamma is "gamma = 5.4054";
  v_leak = 0.002; v_leak is "v_leak = 0.002";
  v_in = 0.05; v_in is "v_in = 0.05";
  k_out = 1.2; k_out is "k_out = 1.2";
  v_ip3r = 0.222; v_ip3r is "v_ip3r = 0.222";
  d_1 = 0.13; d_1 is "d_1 = .13";
  d_2 = 1.049; d_2 is "d_2 = 1.049";
  d_3 = 0.9434; d_3 is "d_3 = .9434";
  d_5 = 0.08234; d_5 is "d_5 = .08234";
  a_2 = 0.04; a_2 is "a_2 = 0.04";
  v_pmca = 10; v_pmca is "v_pmca = 10";
  k_pmca = 2.5; k_pmca is "k_pmca = 2.5";
  v_soc = 1.57; v_soc is "v_soc = 1.57";
  k_soc = 90; k_soc is "k_soc = 90";
  v_serca = 0.9; v_serca is "v_serca = 0.9";
  k_serca = 0.1; k_serca is "k_serca = 0.1";
  delta = 0.2; delta is "delta = 0.2";
  ca_er has dimensionless;
  m_inf has dimensionless;
  q_2 has dimensionless;
  j_in has dimensionless;
  j_out has dimensionless;
  j_pmca has dimensionless;
  t has dimensionless; t is "model time";

  // Assignment rules:
  ca_er := (c_t - c)*gamma;
  m_inf := ip/(ip + d_1);
  q_2 := d_2*(ip + d_1)/(ip + d_3);
  j_in := v_in;
  j_out := k_out*c;
  j_pmca := v_pmca*c^2/(k_pmca^2 + c^2);
  t := time;

  // Rate rules:
  c' = j_ip3r(c, c_t, d_5, gamma, h, m_inf, v_ip3r) - j_serca(c, k_serca, v_serca) + j_leak(c, c_t, gamma, v_leak) + (j_in - j_out - j_pmca + j_soc(c, c_t, gamma, k_soc, v_soc))*delta;
  c_t' = (j_in - j_out - j_pmca + j_soc(c, c_t, gamma, k_soc, v_soc))*delta;
  h' = (h_inf(c, q_2) - h)/tau_h(c, a_2, q_2);
end
