// SBML level 3 version 1

function max(x, y)
  piecewise(x, x > y, y);
end
max is "minimum";

function min(x, y)
  piecewise(x, x < y, y);
end
min is "maximum";

function heav(x)
  piecewise(0, x < 0, 0.5, x == 0, 1, x > 0, 0);
end
heav is "heavyside";

function mod(x, y)
  piecewise(x - y*ceil(x/y), xor(x < 0, y < 0), x - y*floor(x/y));
end
mod is "modulo";

model main()
  // XPP model
  // This model was converted from XPP ode format to SBML using sbmlutils-0.1.5a6.
  // # doublebvp.ode
  // # used for Bose and Rubin, IJBC, Vol. 25, June 30, 2015
  // # integrate 4 trajectories simultaneously
  // # (v,g) is the suppressed cell on its last cycle before it becomes active
  // v'=P*(I-v-g*(v-E))
  // g'=P*(-beta*g)
  // # (vhat,ghat) is the active cell on its last cycle of being active; ghat \equiv 0
  // vhat'=P*(I-vhat)
  // # (vtilde,gtilde) is the formerly suppressed cell on the cycle after its first reset
  // vtilde'=Q*(I-vtilde-gtilde*(vtilde-E))
  // gtilde'=Q*(-beta*gtilde)
  // # (vstar,gstar) is the formerly active cell on the cycle after it is first inhibited
  // vstar'=Q*(I-vstar-gstar*(vstar-E))
  // gstar'=Q*(-beta*gstar)
  // # two trivial equations are added, so that number of eqns = number of BCs
  // P'=0
  // Q'=0
  // # BCs
  // b v-1
  // b v'-1
  // b g-g0
  // b vhat
  // b vtilde
  // b vtilde'-1
  // b g'-gtilde
  // b vhat'-vstar
  // b vstar'-1
  // init P=0.65,Q=1.02,v=1,g=1.1,vstar=.96,gstar=1.24
  // par beta=0.2,I=2,E=-0.1,g0=1.1
  // @ total=1,dt=.01
  // done
  // This file has been produced by sbmlutils.
  // Terms of use
  // Copyright © 2017 Matthias Koenig
  // Redistribution and use of any part of this model, with or without modification, are permitted provided that the following conditions are met:
  // Redistributions of this SBML file must retain the above copyright notice, this list of conditions and the following disclaimer.
  // Redistributions in a different form must reproduce the above copyright notice, this list of conditions and the following disclaimer in the documentation and/or other materials provided with the distribution.
  // This model is distributed in the hope that it will be useful, but WITHOUT ANY WARRANTY; without even the implied warranty of MERCHANTABILITY or FITNESS FOR A PARTICULAR PURPOSE.

  // Parameters:
  p = 0.65; p is "p = 0.65";
  q = 1.02; q is "q = 1.02";
  v = 1; v is "v = 1";
  g = 1.1; g is "g = 1.1";
  vstar = 0.96; vstar is "vstar = .96";
  gstar = 1.24; gstar is "gstar = 1.24";
  beta = 0.2; beta is "beta = 0.2";
  i = 2; i is "i = 2";
  e = -0.1; e is "e = -0.1";
  g0 = 1.1; g0 is "g0 = 1.1";
  vhat = 0 dimensionless;
  vtilde = 0 dimensionless;
  gtilde = 0 dimensionless;
  t has dimensionless; t is "model time";

  // Assignment rules:
  t := time;

  // Rate rules:
  v' = p*(i - v - g*(v - e));
  g' = p*(-beta)*g;
  vhat' = p*(i - vhat);
  vtilde' = q*(i - vtilde - gtilde*(vtilde - e));
  gtilde' = q*(-beta)*gtilde;
  vstar' = q*(i - vstar - gstar*(vstar - e));
  gstar' = q*(-beta)*gstar;
  p' = 0;
  q' = 0;
end
