// SBML level 3 version 1

function max(x, y)
  piecewise(x, x > y, y);
end
max is "minimum";

function min(x, y)
  piecewise(x, x < y, y);
end
min is "maximum";

function heav(x)
  piecewise(0, x < 0, 0.5, x == 0, 1, x > 0, 0);
end
heav is "heavyside";

function mod(x, y)
  piecewise(x - y*ceil(x/y), xor(x < 0, y < 0), x - y*floor(x/y));
end
mod is "modulo";

function sinf(v, k)
  1/(1 + exp(-v/k));
end

model main()
  // XPP model
  // This model was converted from XPP ode format to SBML using sbmlutils-0.1.5a6.
  // # This ODE file reproduces figure 2 from Rempe, Best, Terman J. Math. Biol. 2010
  // # Notice that as it is written now the simulation contains noise. If you want
  // # to reproduce Figure 2 exactly, turn off noise by making gnoise=0 and gnoiserem=0
  // # To reproduce figure 3, you will need noise and you'll need to modify the code below
  // # to start at different circadian phases. You'll also probably need MATLAB or some
  // # other computing language to process the output of the XPP runs.
  // # The default mode is to plot the wake-active, sleep-active, NREM-active, and
  // # REM-active populations as in figure 2 panel b. You can also uncomment the
  // # second-to-last line to see the 2-process behavior.
  // # Sleep/wake parameters
  // par eps=3,gamma=5.7,ky=0.01,thetay=0
  // par epsv=3,gammav=3.77,kv=0.01,thetav=0
  // par xcirc=-2.1,ghom=5.5
  // par gsynv=2
  // par ic0=0,ic1=0
  // par hmax=1,alphah=18.2,betah=4.2
  // par gscn=1
  // par gsyn=5
  // par const=100
  // #initialize inp and inpv
  // par inpbase=3.3,inpvbase=0.45
  // # ---- REM-NREM stuff ----
  // par epsr=0.3,gammar=6.2,kr=0.01
  // par epsn=0.3,gamman=6,kn=0.01
  // par taur1=1,taur2=2
  // par taun1=0.5,taun2=1.7
  // par grem=5,gnrem=0.4
  // par gevlpo=6.2
  // par REMscale=11
  // par inpn=1.9,inpr=1.1
  // par gA2R=2.5
  // taur=sinf(xr,kr)*taur2+(1-sinf(xr,kr))*taur1
  // taun=sinf(xn,kn)*taun2+(1-sinf(xn,kn))*taun1
  // sinf(v,k)=1/(1+exp(-(v)/k))
  // #inhibitory currents
  // inhbr=grem*sn
  // inhbn=gnrem*sr
  // ievlpo=gevlpo*xe
  // iA2R=gA2R*s1
  // #AMIN-to-REM dynamics
  // s1'=as1*(1-s1)*sinf(x,0.1)-bs1*s1*(1-sinf(x,0.1))
  // par as1=2,bs1=0.55
  // isyn=gsyn*sv
  // isynv=gsynv*s
  // iscn=gscn*(xc-xcirc)
  // par gorx=1
  // iorx=gorx*iscn*(1-heav(xv))
  // ihom=ghom*h
  // tauv=sinf(xv,kv)*tauv2+(1-sinf(xv,kv))*tauv1
  // tau=sinf(x,ky)*taua2+(1-sinf(x,ky))*taua1
  // par tauv1=1,tauv2=2
  // par taua1=1,taua2=2
  // global 0 t {ic0=gammav-4-inpv}
  // global 0 t {ic1=gsynv-inpv}
  // # MonoAminergic group
  // x'=(3*x-x^3+2-y-isyn+iorx-ihom+inp)*const
  // y'=eps*(gamma*sinf(x,ky)-y)/tau
  // s=sinf(x,0.1)
  // # VLPO group
  // xv'=(3*xv-xv^3+2-yv-isynv+inpv-iscn+ihom)*const
  // yv'=epsv*(gammav*sinf(xv,kv)-yv)/tauv
  // sv=sinf(xv,0.1)
  // #eVLPO
  // par ke=0.25,a=2,b=1,c=1.82,kxv=1,kx=0.2,cv=-0.3
  // xe'=-xe+(c-a*sinf(xv+cv,kxv)-b*sinf(x,kx))
  // global 0 t {xe=(c-a*sinf(xv,kxv)-b*sinf(x,kx))}
  // #REM-active population
  // par rconst=2
  // xr'=rconst*REMscale*(3*xr-xr^3+3-yr-inhbr+inpr-iA2R+inoiserem)
  // yr'=REMscale*(epsr*(gammar*sinf(xr,kr)-yr)/taur)
  // sr=sinf(xr,krn)
  // par krn=1
  // #NREM-active population
  // xn'=rconst*REMscale*(3*xn-xn^3+3-yn-inhbn+inpn-ievlpo+inoisenrem)
  // yn'=REMscale*(epsn*(gamman*sinf(xn,kn)-yn)/taun)
  // sn=heav(xn)
  // #sn=sinf(xn,0.1) #either one works
  // #circadian curve
  // tc=t-2.5
  // xc=(0.97*sin((pi/12)*tc)+0.22*sin(2*(pi/12)*tc)+0.07*sin(3*(pi/12)*tc)+0.03*sin(4*(pi/12)*tc)+0.001*sin(5*(pi/12)*tc))
  // #homeostat
  // h'=(hmax-h)*(sinf(x,kv))/alphah-h*(1-sinf(x,kv))/betah
  // #initialize homeostat to what it would normally start at after
  // #a normal night of sleep in normal phase
  // global 0 t {h=0.0978}
  // #noise stuff
  // par a1=20,w1=0.01,gnoise=5,gnoiserem=5
  // ina'=(-ina+a1*normal(0,1))*w1
  // inv'=(-inv+a1*normal(0,1))*w1
  // inn'=(-inn+a1*normal(0,1))*w1
  // inr'=(-inr+a1*normal(0,1))*w1
  // inoisea=gnoise*ina
  // inoisev=gnoise*inv
  // inoiserem=gnoiserem*inr
  // inoisenrem=gnoiserem*inn
  // # add some noise to the otherwise constant inputs
  // inp=inpbase+inoisea
  // inpv=inpvbase+inoisev
  // #initial conditions
  // init x=2,y=6
  // init xv=-2,yv=0
  // init xr=-1,yr=-2
  // init xn=-3,yn=0
  // init ina=0
  // init inv=0
  // init inn=0
  // init inr=0
  // #AUXILIARY VARIABLES
  // # comment out for faster speed
  // aux ic=iscn+ic1
  // aux ica=iscn+ic0
  // aux ih=ihom
  // #aux noise=inoisea
  // # first one plots 2-process stuff, next one plots rem, nrem, aminergic
  // #@ dt=.001,total=48,meth=euler,xp=t,yp=ih,xlo=0,xhi=48,ylo=-3,yhi=3,nplot=3,yp2=ic,yp3=ica,bound=1000000,maxstor=2000001
  // @ dt=.001,total=48,meth=euler,xp=t,yp=xn,xlo=0,xhi=48,ylo=-3,yhi=3,nplot=3,yp2=xr,yp3=x,bound=1000000,maxstor=2000001,output=output1.dat
  // done
  // This file has been produced by sbmlutils.
  // Terms of use
  // Copyright © 2017 Matthias Koenig
  // Redistribution and use of any part of this model, with or without modification, are permitted provided that the following conditions are met:
  // Redistributions of this SBML file must retain the above copyright notice, this list of conditions and the following disclaimer.
  // Redistributions in a different form must reproduce the above copyright notice, this list of conditions and the following disclaimer in the documentation and/or other materials provided with the distribution.
  // This model is distributed in the hope that it will be useful, but WITHOUT ANY WARRANTY; without even the implied warranty of MERCHANTABILITY or FITNESS FOR A PARTICULAR PURPOSE.

  // Parameters:
  eps = 3; eps is "eps = 3";
  gamma = 5.7; gamma is "gamma = 5.7";
  ky = 0.01; ky is "ky = 0.01";
  thetay = 0; thetay is "thetay = 0";
  epsv = 3; epsv is "epsv = 3";
  gammav = 3.77; gammav is "gammav = 3.77";
  kv = 0.01; kv is "kv = 0.01";
  thetav = 0; thetav is "thetav = 0";
  xcirc = -2.1; xcirc is "xcirc = -2.1";
  ghom = 5.5; ghom is "ghom = 5.5";
  gsynv = 2; gsynv is "gsynv = 2";
  ic0 = 0; ic0 is "ic0 = 0";
  ic1 = 0; ic1 is "ic1 = 0";
  hmax = 1; hmax is "hmax = 1";
  alphah = 18.2; alphah is "alphah = 18.2";
  betah = 4.2; betah is "betah = 4.2";
  gscn = 1; gscn is "gscn = 1";
  gsyn = 5; gsyn is "gsyn = 5";
  const = 100; const is "const = 100";
  inpbase = 3.3; inpbase is "inpbase = 3.3";
  inpvbase = 0.45; inpvbase is "inpvbase = 0.45";
  epsr = 0.3; epsr is "epsr = 0.3";
  gammar = 6.2; gammar is "gammar = 6.2";
  kr = 0.01; kr is "kr = 0.01";
  epsn = 0.3; epsn is "epsn = 0.3";
  gamman = 6; gamman is "gamman = 6";
  kn = 0.01; kn is "kn = 0.01";
  taur1 = 1; taur1 is "taur1 = 1";
  taur2 = 2; taur2 is "taur2 = 2";
  taun1 = 0.5; taun1 is "taun1 = 0.5";
  taun2 = 1.7; taun2 is "taun2 = 1.7";
  grem = 5; grem is "grem = 5";
  gnrem = 0.4; gnrem is "gnrem = 0.4";
  gevlpo = 6.2; gevlpo is "gevlpo = 6.2";
  remscale = 11; remscale is "remscale = 11";
  inpn = 1.9; inpn is "inpn = 1.9";
  inpr = 1.1; inpr is "inpr = 1.1";
  ga2r = 2.5; ga2r is "ga2r = 2.5";
  as1 = 2; as1 is "as1 = 2";
  bs1 = 0.55; bs1 is "bs1 = 0.55";
  gorx = 1; gorx is "gorx = 1";
  tauv1 = 1; tauv1 is "tauv1 = 1";
  tauv2 = 2; tauv2 is "tauv2 = 2";
  taua1 = 1; taua1 is "taua1 = 1";
  taua2 = 2; taua2 is "taua2 = 2";
  ke = 0.25; ke is "ke = 0.25";
  a = 2; a is "a = 2";
  b = 1; b is "b = 1";
  c = 1.82; c is "c = 1.82";
  kxv = 1; kxv is "kxv = 1";
  kx = 0.2; kx is "kx = 0.2";
  cv = -0.3; cv is "cv = -0.3";
  rconst = 2; rconst is "rconst = 2";
  krn = 1; krn is "krn = 1";
  a1 = 20; a1 is "a1 = 20";
  w1 = 0.01; w1 is "w1 = 0.01";
  gnoise = 5; gnoise is "gnoise = 5";
  gnoiserem = 5; gnoiserem is "gnoiserem = 5";
  x = 2; x is "x = 2";
  y = 6; y is "y = 6";
  xv = -2; xv is "xv = -2";
  yv = 0; yv is "yv = 0";
  xr = -1; xr is "xr = -1";
  yr = -2; yr is "yr = -2";
  xn = -3; xn is "xn = -3";
  yn = 0; yn is "yn = 0";
  ina = 0; ina is "ina = 0";
  inv = 0; inv is "inv = 0";
  inn = 0; inn is "inn = 0";
  inr = 0; inr is "inr = 0";
  s1 = 0 dimensionless;
  xe = 0 dimensionless;
  h = 0 dimensionless;
  taur has dimensionless;
  taun has dimensionless;
  inhbr has dimensionless;
  inhbn has dimensionless;
  ievlpo has dimensionless;
  ia2r has dimensionless;
  isyn has dimensionless;
  isynv has dimensionless;
  iscn has dimensionless;
  iorx has dimensionless;
  ihom has dimensionless;
  tauv has dimensionless;
  tau has dimensionless;
  s has dimensionless;
  sv has dimensionless;
  sr has dimensionless;
  sn has dimensionless;
  tc has dimensionless;
  xc has dimensionless;
  inoisea has dimensionless;
  inoisev has dimensionless;
  inoiserem has dimensionless;
  inoisenrem has dimensionless;
  inp has dimensionless;
  inpv has dimensionless;
  ic has dimensionless;
  ica has dimensionless;
  ih has dimensionless;
  t has dimensionless; t is "model time";

  // Assignment rules:
  taur := sinf(xr, kr)*taur2 + (1 - sinf(xr, kr))*taur1;
  taun := sinf(xn, kn)*taun2 + (1 - sinf(xn, kn))*taun1;
  inhbr := grem*sn;
  inhbn := gnrem*sr;
  ievlpo := gevlpo*xe;
  ia2r := ga2r*s1;
  isyn := gsyn*sv;
  isynv := gsynv*s;
  iscn := gscn*(xc - xcirc);
  iorx := gorx*iscn*(1 - heav(xv));
  ihom := ghom*h;
  tauv := sinf(xv, kv)*tauv2 + (1 - sinf(xv, kv))*tauv1;
  tau := sinf(x, ky)*taua2 + (1 - sinf(x, ky))*taua1;
  s := sinf(x, 0.1);
  sv := sinf(xv, 0.1);
  sr := sinf(xr, krn);
  sn := heav(xn);
  tc := t - 2.5;
  xc := 0.97*sin(pi/12*tc) + 0.22*sin(2*(pi/12)*tc) + 0.07*sin(3*(pi/12)*tc) + 0.03*sin(4*(pi/12)*tc) + 0.001*sin(5*(pi/12)*tc);
  inoisea := gnoise*ina;
  inoisev := gnoise*inv;
  inoiserem := gnoiserem*inr;
  inoisenrem := gnoiserem*inn;
  inp := inpbase + inoisea;
  inpv := inpvbase + inoisev;
  ic := iscn + ic1;
  ica := iscn + ic0;
  ih := ihom;
  t := time;

  // Rate rules:
  s1' = as1*(1 - s1)*sinf(x, 0.1) - bs1*s1*(1 - sinf(x, 0.1));
  x' = (3*x - x^3 + 2 - y - isyn + iorx - ihom + inp)*const;
  y' = eps*(gamma*sinf(x, ky) - y)/tau;
  xv' = (3*xv - xv^3 + 2 - yv - isynv + inpv - iscn + ihom)*const;
  yv' = epsv*(gammav*sinf(xv, kv) - yv)/tauv;
  xe' = -xe + (c - a*sinf(xv + cv, kxv) - b*sinf(x, kx));
  xr' = rconst*remscale*(3*xr - xr^3 + 3 - yr - inhbr + inpr - ia2r + inoiserem);
  yr' = remscale*(epsr*(gammar*sinf(xr, kr) - yr)/taur);
  xn' = rconst*remscale*(3*xn - xn^3 + 3 - yn - inhbn + inpn - ievlpo + inoisenrem);
  yn' = remscale*(epsn*(gamman*sinf(xn, kn) - yn)/taun);
  h' = (hmax - h)*sinf(x, kv)/alphah - h*(1 - sinf(x, kv))/betah;
  ina' = (-ina + a1*normal(0, 1))*w1;
  inv' = (-inv + a1*normal(0, 1))*w1;
  inn' = (-inn + a1*normal(0, 1))*w1;
  inr' = (-inr + a1*normal(0, 1))*w1;

  // Events:
  e0: at (t >= 0), t0=false: ic0 = gammav - 4 - inpv;
  e1: at (t >= 0), t0=false: ic1 = gsynv - inpv;
  e2: at (t >= 0), t0=false: xe = c - a*sinf(xv, kxv) - b*sinf(x, kx);
  e3: at (t >= 0), t0=false: h = 0.0978;
end
