// SBML level 3 version 1

function max(x, y)
  piecewise(x, x > y, y);
end
max is "minimum";

function min(x, y)
  piecewise(x, x < y, y);
end
min is "maximum";

function heav(x)
  piecewise(0, x < 0, 0.5, x == 0, 1, x > 0, 0);
end
heav is "heavyside";

function mod(x, y)
  piecewise(x - y*ceil(x/y), xor(x < 0, y < 0), x - y*floor(x/y));
end
mod is "modulo";

function gammaf(vv, theta, sigma)
  1/(1 + exp(-(vv - theta)/sigma));
end

function tau_h(v, sigma_t_h, theta_t_h)
  0.5 + 14*gammaf(v, theta_t_h, sigma_t_h);
end

function tau_n(v, sigma_tna, sigma_tnb, theta_tna, theta_tnb)
  (0.087 + 11.4*gammaf(v, theta_tna, sigma_tna))*(0.087 + 11.4*gammaf(v, theta_tnb, sigma_tnb));
end

model main()
  // XPP model
  // This model was converted from XPP ode format to SBML using sbmlutils-0.1.5a6.
  // # numbers:
  // number Cm=1.0
  // # parameters:
  // p Iapp=3.35
  // p gA=0.39
  // p theta_m=-24.0
  // p gNa=112.5,gK=225.0,gL=0.25
  // p sigma_m=11.5
  // p theta_h=-58.3 , sigma_h=-6.7
  // p theta_n=-12.4 , sigma_n=6.8
  // p theta_t_h=-60 , sigma_t_h=-12.0
  // p theta_tna=-14.6, sigma_tna=-8.6
  // p theta_tnb=1.3 , sigma_tnb=18.7
  // p theta_a=-50 , sigma_a=20
  // p theta_b=-70 , sigma_b=-6
  // p tau_b=150, tau_a=2
  // p power_n=2.0
  // p V_Na=50.0,V_K=-90.0,V_L=-70.0
  // # auxilary functions:
  // GAMMAF(VV,theta,sigma)=1.0/(1.0+exp(-(VV-theta)/sigma))
  // # innitial conditions
  // V(0)=-70.038
  // h(0)=0.8522
  // n(0)=0.000208
  // a(0)=0.2686
  // b(0)=0.5016
  // # functions:
  // m_inf=GAMMAF(V,theta_m,sigma_m)
  // h_inf=GAMMAF(V,theta_h,sigma_h)
  // n_inf=GAMMAF(V,theta_n,sigma_n)
  // a_inf=GAMMAF(V,theta_a,sigma_a)
  // b_inf=GAMMAF(V,theta_b,sigma_b)
  // tau_h(V)=0.5+14.0*GAMMAF(V,theta_t_h,sigma_t_h)
  // tau_n(V)=(0.087+11.4*GAMMAF(V,theta_tna,sigma_tna))*(0.087+11.4*GAMMAF(V,theta_tnb,sigma_tnb))
  // # ode's
  // V'=-gNa*m_inf^3*h*(V-V_Na)-gK*(n^power_n)*(V-V_K)-gL*(V-V_L)-gA*a^3*b*(V-V_k)+Iapp
  // h'=(h_inf-h)/tau_h (V)
  // n'=(n_inf-n)/tau_n(V)
  // a'=(a_inf-a)/tau_a
  // b'=(b_inf-b)/tau_b
  // #
  // @ MAXSTOR=16000000
  // @ BACK=Black
  // @ XP=T
  // @ YP=Vs
  // @ AXES=2
  // @ TOTAL=1000.0
  // @ DT=0.01
  // @ NJMP=1
  // @ T0=0.0
  // @ TRANS=0.0
  // @ NMESH=40
  // @ METH=rungekutta
  // @ DTMIN=0.001
  // @ DTMAX=1.0
  // @ TOLER=0.00001
  // @ BOUND=10000.0
  // @ DELAY=0.0
  // @ XLO=0.0, XHI=1000.0, YLO=-90.0, YHI=50.0
  // @ NTST=50,NMAX=20000,NPR=50
  // @ DS=0.02,DSMIN=0.001,DSMAX=0.5
  // @ PARMIN=-10,PARMAX=200,NORMMIN=0.0,NORMMAX=10000.0
  // @ AUTOVAR=V,AUTOXMIN=-10.0,AUTOXMAX=100.0,AUTOYMIN=-90.0,AUTOYMAX=90.0
  // done
  // This file has been produced by sbmlutils.
  // Terms of use
  // Copyright © 2017 Matthias Koenig
  // Redistribution and use of any part of this model, with or without modification, are permitted provided that the following conditions are met:
  // Redistributions of this SBML file must retain the above copyright notice, this list of conditions and the following disclaimer.
  // Redistributions in a different form must reproduce the above copyright notice, this list of conditions and the following disclaimer in the documentation and/or other materials provided with the distribution.
  // This model is distributed in the hope that it will be useful, but WITHOUT ANY WARRANTY; without even the implied warranty of MERCHANTABILITY or FITNESS FOR A PARTICULAR PURPOSE.

  // Parameters:
  cm = 1; cm is "cm = 1.0";
  iapp = 3.35; iapp is "iapp = 3.35";
  ga = 0.39; ga is "ga = 0.39";
  theta_m = -24; theta_m is "theta_m = -24.0";
  gna = 112.5; gna is "gna = 112.5";
  gk = 225; gk is "gk = 225.0";
  gl = 0.25; gl is "gl = 0.25";
  sigma_m = 11.5; sigma_m is "sigma_m = 11.5";
  theta_h = -58.3; theta_h is "theta_h = -58.3";
  sigma_h = -6.7; sigma_h is "sigma_h = -6.7";
  theta_n = -12.4; theta_n is "theta_n = -12.4";
  sigma_n = 6.8; sigma_n is "sigma_n = 6.8";
  theta_t_h = -60; theta_t_h is "theta_t_h = -60";
  sigma_t_h = -12; sigma_t_h is "sigma_t_h = -12.0";
  theta_tna = -14.6; theta_tna is "theta_tna = -14.6";
  sigma_tna = -8.6; sigma_tna is "sigma_tna = -8.6";
  theta_tnb = 1.3; theta_tnb is "theta_tnb = 1.3";
  sigma_tnb = 18.7; sigma_tnb is "sigma_tnb = 18.7";
  theta_a = -50; theta_a is "theta_a = -50";
  sigma_a = 20; sigma_a is "sigma_a = 20";
  theta_b = -70; theta_b is "theta_b = -70";
  sigma_b = -6; sigma_b is "sigma_b = -6";
  tau_b = 150; tau_b is "tau_b = 150";
  tau_a = 2; tau_a is "tau_a = 2";
  power_n = 2; power_n is "power_n = 2.0";
  v_na = 50; v_na is "v_na = 50.0";
  v_k = -90; v_k is "v_k = -90.0";
  v_l = -70; v_l is "v_l = -70.0";
  v = -70.038; v is "v = -70.038";
  h = 0.8522; h is "h = 0.8522";
  n = 0.000208; n is "n = 0.000208";
  a = 0.2686; a is "a = 0.2686";
  b = 0.5016; b is "b = 0.5016";
  m_inf has dimensionless;
  h_inf has dimensionless;
  n_inf has dimensionless;
  a_inf has dimensionless;
  b_inf has dimensionless;
  t has dimensionless; t is "model time";

  // Assignment rules:
  m_inf := gammaf(v, theta_m, sigma_m);
  h_inf := gammaf(v, theta_h, sigma_h);
  n_inf := gammaf(v, theta_n, sigma_n);
  a_inf := gammaf(v, theta_a, sigma_a);
  b_inf := gammaf(v, theta_b, sigma_b);
  t := time;

  // Rate rules:
  v' = -gna*m_inf^3*h*(v - v_na) - gk*n^power_n*(v - v_k) - gl*(v - v_l) - ga*a^3*b*(v - v_k) + iapp;
  h' = (h_inf - h)/tau_h(v);
  n' = (n_inf - n)/tau_n(v, sigma_tna, sigma_tnb, theta_tna, theta_tnb);
  a' = (a_inf - a)/tau_a;
  b' = (b_inf - b)/tau_b;
end
