// SBML level 3 version 1

function max(x, y)
  piecewise(x, x > y, y);
end
max is "minimum";

function min(x, y)
  piecewise(x, x < y, y);
end
min is "maximum";

function heav(x)
  piecewise(0, x < 0, 0.5, x == 0, 1, x > 0, 0);
end
heav is "heavyside";

function mod(x, y)
  piecewise(x - y*ceil(x/y), xor(x < 0, y < 0), x - y*floor(x/y));
end
mod is "modulo";

function am(v)
  0.1*(v + 40)/(1 - exp(-(v + 40)/10));
end

function bm(v)
  4*exp(-(v + 65)/18);
end

function ah(v)
  0.07*exp(-(v + 65)/20);
end

function bh(v)
  1/(1 + exp(-(v + 35)/10));
end

function an(v)
  0.01*(v + 55)/(1 - exp(-(v + 55)/10));
end

function bn(v)
  0.25*exp(-(v + 65)/80);
end

function an3(v, eta, kn)
  1/kn*(-0.021)*(v + 8.3 + eta)/(exp(-(v + 8.3 + eta)/9.8) - 1);
end

function bn3(v, eta, kn)
  1/kn*0.0002*exp(-(v + 23.6 + eta)/20.7);
end

function ff(t, t_off, t_on)
  heav(t - t_on)*heav(t_off - t);
end

function ihh(v, m, h, n, n3, hk, gk, gk3, gl, gna, vk, vl, vna)
  gna*h*(v - vna)*m^3 + gk*(v - vk)*n^4 + gk3*(v - vk)*n3^4*hk + gl*(v - vl);
end

function ae(x, ae0)
  ae0/(1 + exp(-x/5));
end

function ai(x, ai0)
  ai0/(1 + exp(-x/5));
end

model main()
  // XPP model
  // This model was converted from XPP ode format to SBML using sbmlutils-0.1.5a6.
  // # hh200x50-LEV01.ode
  // # Ref: Huang et al., 2009, J Physiol Pharmacol (in press)
  // # 200 e and 50 i HH equations
  // # random applied current, random conductances
  // # to get it started, just set the excitatory synapses
  // # to some random values between 0 and 1
  // # you will get persistent activity.
  // # here are the HH functions
  // # slowly inactivating K (Kv3.1-encoded) current was included
  // am(v)=0.1*(v+40)/(1-exp(-(v+40)/10))
  // bm(v)=4*exp(-(v+65)/18)
  // ah(v)=.07*exp(-(v+65)/20)
  // bh(v)=1/(1+exp(-(v+35)/10))
  // an(v)=0.01*(v+55)/(1-exp(-(v+55)/10))
  // bn(v)=0.25*exp(-(v+65)/80)
  // an3(v)=(1/Kn)*(-0.021)*(v+8.3+eta)/(exp(-(v+8.3+eta)/9.8)-1)
  // bn3(v)=(1/Kn)*0.0002*exp(-(V+23.6+eta)/20.7)
  // # Stimulus protocol
  // ff(t)=heav(t-t_on)*heav(t_off-t)
  // par t_on=20, t_off=200
  // par Kn=1
  // % gk3: 7-->4 or 1
  // par gk3=7
  // % eta: 0-->10 mV
  // par eta=0
  // # this is the current for each cell
  // ihh(v,m,h,n,n3,hk)=gna*h*(v-vna)*m^3+gk*(v-vk)*n^4+gk3*(v-vk)*n3^4*hk+gl*(v-vl)
  // # synaptic onset parameters
  // # s' = a(vpre)(1-s)-s/tau
  // ae(x)=ae0/(1+exp(-x/5))
  // ai(x)=ai0/(1+exp(-x/5))
  // par ae0=4, ai0=1
  // # dont recompute the random tables every time a parameter is changed
  // @ autoeval=0
  // # random synapses - 20 % connectivity
  // table wee % 40000 0 39999 ran(1)<.02
  // table wei % 10000 0 9999 ran(1)<.02
  // table wie % 10000 0 9999 ran(1)<.02
  // table wii % 2500 0 2499 ran(1)<.02
  // # multiply synapses by weights
  // special see=mmult(200,200,wee,se0)
  // special sei=mmult(200,50,wei,se0)
  // special sie=mmult(50,200,wie,si0)
  // special sii=mmult(50,50,wii,si0)
  // # random currents applied to each cell
  // table r_e % 200 0 199 ran(1)-.5
  // table r_i % 50 0 49 ran(1)-.5
  // # parameters
  // par taue=4, taui=10
  // par vna=50, vk=-80, vl=-49, gna=40, gk=5, gl=0.03
  // par ie0=6.5, ie1=0
  // par ii0=0, ii1=0
  // par gee=0.1, gie=0.1, gii=0.1, gei=0.1
  // par eex=0, ein=-75
  // # finally the ODEs
  // ve[0..199]'=ie0*ff(t)+ie1*r_e([j])-ihh(ve[j],me[j],he[j],ne[j],n3e[j],hke[j])-gee*see([j])*(ve[j]-eex)-gie*sie([j])*(ve[j]-ein)
  // vi[0..49]'=ii0+ii1*r_i([j])-ihh(vi[j],mi[j],hi[j],ni[j],n3i[j],hki[j])-gei*sei([j])*(vi[j]-eex)-gii*sii([j])*(vi[j]-ein)
  // # synapses...
  // se[0..199]'=-se[j]/taue+ae(ve[j])*(1-se[j])
  // si[0..49]'=-si[j]/taui+ai(vi[j])*(1-si[j])
  // # gating variables
  // me[0..199]'=am(ve[j])*(1-me[j])-bm(ve[j])*me[j]
  // he[0..199]'=ah(ve[j])*(1-he[j])-bh(ve[j])*he[j]
  // ne[0..199]'=an(ve[j])*(1-ne[j])-bn(ve[j])*ne[j]
  // hke[0..199]'=0.0005*(1-hke[j])-0.0014*n3e[j]^4*hke[j]
  // n3e[0..199]'=an3(ve[j])*(1-n3e[j])-bn3(ve[j])*n3e[j]
  // mi[0..49]'=am(vi[j])*(1-mi[j])-bm(vi[j])*mi[j]
  // hi[0..49]'=ah(vi[j])*(1-hi[j])-bh(vi[j])*hi[j]
  // ni[0..49]'=an(vi[j])*(1-ni[j])-bn(vi[j])*ni[j]
  // hki[0..49]'=0.0005*(1-hki[j])-0.0014*n3i[j]^4*hki[j]
  // n3i[0..49]'=an3(vi[j])*(1-n3i[j])-bn3(vi[j])*n3i[j]
  // # initial data
  // init ve[0..199]=-75
  // init vi[0..49]=-75
  // # some numerical settings
  // @ total=200, meth=euler, nout=10, dt=.01
  // @ xlo=0, xhi=200, yhi=40, ylo=-90
  // done
  // This file has been produced by sbmlutils.
  // Terms of use
  // Copyright © 2017 Matthias Koenig
  // Redistribution and use of any part of this model, with or without modification, are permitted provided that the following conditions are met:
  // Redistributions of this SBML file must retain the above copyright notice, this list of conditions and the following disclaimer.
  // Redistributions in a different form must reproduce the above copyright notice, this list of conditions and the following disclaimer in the documentation and/or other materials provided with the distribution.
  // This model is distributed in the hope that it will be useful, but WITHOUT ANY WARRANTY; without even the implied warranty of MERCHANTABILITY or FITNESS FOR A PARTICULAR PURPOSE.

  // Parameters:
  t_on = 20; t_on is "t_on = 20";
  t_off = 200; t_off is "t_off = 200";
  kn = 1; kn is "kn = 1";
  gk3 = 7; gk3 is "gk3 = 7";
  eta = 0; eta is "eta = 0";
  ae0 = 4; ae0 is "ae0 = 4";
  ai0 = 1; ai0 is "ai0 = 1";
  taue = 4; taue is "taue = 4";
  taui = 10; taui is "taui = 10";
  vna = 50; vna is "vna = 50";
  vk = -80; vk is "vk = -80";
  vl = -49; vl is "vl = -49";
  gna = 40; gna is "gna = 40";
  gk = 5; gk is "gk = 5";
  gl = 0.03; gl is "gl = 0.03";
  ie0 = 6.5; ie0 is "ie0 = 6.5";
  ie1 = 0; ie1 is "ie1 = 0";
  ii0 = 0; ii0 is "ii0 = 0";
  ii1 = 0; ii1 is "ii1 = 0";
  gee = 0.1; gee is "gee = 0.1";
  gie = 0.1; gie is "gie = 0.1";
  gii = 0.1; gii is "gii = 0.1";
  gei = 0.1; gei is "gei = 0.1";
  eex = 0; eex is "eex = 0";
  ein = -75; ein is "ein = -75";
  ve[0..199] = -75 = -75;
  vi[0..49] = -75 = -75;
  t has dimensionless; t is "model time";

  // Assignment rules:
  t := time;
end
