// SBML level 3 version 1

function max(x, y)
  piecewise(x, x > y, y);
end
max is "minimum";

function min(x, y)
  piecewise(x, x < y, y);
end
min is "maximum";

function heav(x)
  piecewise(0, x < 0, 0.5, x == 0, 1, x > 0, 0);
end
heav is "heavyside";

function mod(x, y)
  piecewise(x - y*ceil(x/y), xor(x < 0, y < 0), x - y*floor(x/y));
end
mod is "modulo";

model main()
  // XPP model
  // This model was converted from XPP ode format to SBML using sbmlutils-0.1.5a6.
  // # 200 e and 50 I integrate & fire
  // # random applied current, random conductances
  // #
  // # prevent tables from being recomputed each time params change
  // @ autoeval=0
  // table wee % 40000 0 39999 ran(1)/100
  // table wei % 10000 0 9999 ran(1)/100
  // table wie % 10000 0 9999 ran(1)/25
  // table wii % 2500 0 2499 ran(1)/25
  // # multiply by the synapses
  // special see=mmult(200,200,wee,se0)
  // special sei=mmult(200,50,wei,se0)
  // special sie=mmult(50,200,wie,si0)
  // special sii=mmult(50,50,wii,si0)
  // # random currents
  // table r_e % 200 0 199 ran(1)-.5
  // table r_i % 50 0 49 ran(1)-.5
  // # parameters
  // par tau_e=20,tau_i=20,ele=-65,eli=-65
  // par vte=-50,vti=-50
  // par ver=-60,vir=-70
  // par taue=4,taui=10
  // # ODEs
  // ve[0..199]'=(-(ve[j]-ele) + ie0+ie1*r_e([j])-gee*see([j])*(ve[j]-eex)-gie*sie([j])*(ve[j]-ein))/tau_e
  // vi[0..49]'=(-(vi[j]-eli) + ii0+ii1*r_i([j])-gei*sei([j])*(vi[j]-eex)-gii*sii([j])*(ve[j]-ein))/tau_i
  // se[0..199]'=-se[j]/taue
  // si[0..49]'=-si[j]/taui
  // # each time votlage crosses threshold, reset and set synapse to 1
  // global 1 ve[0..199]-vte {se[j]=1;ve[j]=ver}
  // global 1 vi[0..49]-vti {si[j]=1;vi[j]=vir}
  // # more parameters
  // par ie0=10,ie1=.5
  // par ii0=10,ii1=.5
  // par gee=.02,gie=.05,gii=.02,gei=.02
  // par eex=0,ein=-75
  // # initial data
  // init ve[0..199]=-65
  // init vi[0..49]=-65
  // # numerical stuff
  // @ total=200,meth=euler,nout=10,dt=.01
  // done
  // This file has been produced by sbmlutils.
  // Terms of use
  // Copyright © 2017 Matthias Koenig
  // Redistribution and use of any part of this model, with or without modification, are permitted provided that the following conditions are met:
  // Redistributions of this SBML file must retain the above copyright notice, this list of conditions and the following disclaimer.
  // Redistributions in a different form must reproduce the above copyright notice, this list of conditions and the following disclaimer in the documentation and/or other materials provided with the distribution.
  // This model is distributed in the hope that it will be useful, but WITHOUT ANY WARRANTY; without even the implied warranty of MERCHANTABILITY or FITNESS FOR A PARTICULAR PURPOSE.

  // Parameters:
  tau_e = 20; tau_e is "tau_e = 20";
  tau_i = 20; tau_i is "tau_i = 20";
  ele = -65; ele is "ele = -65";
  eli = -65; eli is "eli = -65";
  vte = -50; vte is "vte = -50";
  vti = -50; vti is "vti = -50";
  ver = -60; ver is "ver = -60";
  vir = -70; vir is "vir = -70";
  taue = 4; taue is "taue = 4";
  taui = 10; taui is "taui = 10";
  ie0 = 10; ie0 is "ie0 = 10";
  ie1 = 0.5; ie1 is "ie1 = .5";
  ii0 = 10; ii0 is "ii0 = 10";
  ii1 = 0.5; ii1 is "ii1 = .5";
  gee = 0.02; gee is "gee = .02";
  gie = 0.05; gie is "gie = .05";
  gii = 0.02; gii is "gii = .02";
  gei = 0.02; gei is "gei = .02";
  eex = 0; eex is "eex = 0";
  ein = -75; ein is "ein = -75";
  ve[0..199] = -65 = -65;
  vi[0..49] = -65 = -65;
  t has dimensionless; t is "model time";

  // Assignment rules:
  t := time;

  // Events:
  e0: at (), t0=false:  = 1,  = ver;
  e1: at (), t0=false:  = 1,  = vir;
end
