// SBML level 3 version 1

function max(x, y)
  piecewise(x, x > y, y);
end
max is "minimum";

function min(x, y)
  piecewise(x, x < y, y);
end
min is "maximum";

function heav(x)
  piecewise(0, x < 0, 0.5, x == 0, 1, x > 0, 0);
end
heav is "heavyside";

function mod(x, y)
  piecewise(x - y*ceil(x/y), xor(x < 0, y < 0), x - y*floor(x/y));
end
mod is "modulo";

function ggpe2gpe(t, ggpe2gpen, ggpe2gpep, tpark)
  ggpe2gpen + (ggpe2gpep - ggpe2gpen)*heav(t - tpark);
end

function iappgpe(t, iappgpen, iappgpep, tpark)
  iappgpen + (iappgpep - iappgpen)*heav(t - tpark);
end

function ihfsstn(t, imhfsstn, sigym, thfs, tmhfs, whfs)
  imhfsstn*ym(sin(2*pi*t/tmhfs), sigym)*(1 - ym(sin(2*pi*(t + whfs)/tmhfs), sigym))*heav(t - thfs);
end

function ismthl(t, dsmthl, imsmthl, sigym, tmsmthl, wsmthl)
  imsmthl*ym(sin(2*pi*(t - dsmthl)/tmsmthl), sigym)*(1 - ym(sin(2*pi*(t - dsmthl + wsmthl)/tmsmthl), sigym));
end

function minfstn(v, sigmstn, thtmstn)
  1/(1 + exp(-(v - thtmstn)/sigmstn));
end

function hinfstn(v, sighstn, ththstn)
  1/(1 + exp((v - ththstn)/sighstn));
end

function ninfstn(v, signstn, thtnstn)
  1/(1 + exp(-(v - thtnstn)/signstn));
end

function sinfstn(v, sigsstn, thtsstn)
  1/(1 + exp(-(v - thtsstn)/sigsstn));
end

function ainfstn(v, sigastn, thtastn)
  1/(1 + exp(-(v - thtastn)/sigastn));
end

function binfstn(r, sigbstn, thtbstn)
  1/(1 + exp(-(r - thtbstn)/sigbstn)) - 1/(1 + exp(thtbstn/sigbstn));
end

function rinfstn(v, sigrstn, thtrstn)
  1/(1 + exp((v - thtrstn)/sigrstn));
end

function tauhstn(v, sightaustn, tauh0stn, tauh1stn, ththtaustn)
  tauh0stn + tauh1stn/(1 + exp((v - ththtaustn)/sightaustn));
end

function taunstn(v, signtaustn, taun0stn, taun1stn, thtntaustn)
  taun0stn + taun1stn/(1 + exp((v - thtntaustn)/signtaustn));
end

function taurstn(v, sigrtaustn, taur0stn, taur1stn, thtrtaustn)
  taur0stn + taur1stn/(1 + exp((v - thtrtaustn)/sigrtaustn));
end

function hminfstn(v, sigghmstn, thtghmstn)
  1/(1 + exp(-(v - thtghmstn)/sigghmstn));
end

function minfgp(vg, sigmgp, thtmgp)
  1/(1 + exp(-(vg - thtmgp)/sigmgp));
end

function hinfgp(vg, sighgp, ththgp)
  1/(1 + exp((vg - ththgp)/sighgp));
end

function ninfgp(vg, signgp, thtngp)
  1/(1 + exp(-(vg - thtngp)/signgp));
end

function sinfgp(vg, sigsgp, thtsgp)
  1/(1 + exp(-(vg - thtsgp)/sigsgp));
end

function ainfgp(vg, sigagp, thtagp)
  1/(1 + exp(-(vg - thtagp)/sigagp));
end

function rinfgp(vg, sigrgp, thtrgp)
  1/(1 + exp((vg - thtrgp)/sigrgp));
end

function tauhgp(vg, sightaugp, tauh0gp, tauh1gp, ththtaugp)
  tauh0gp + tauh1gp/(1 + exp((vg - ththtaugp)/sightaugp));
end

function taungp(vg, signtaugp, taun0gp, taun1gp, thtntaugp)
  taun0gp + taun1gp/(1 + exp((vg - thtntaugp)/signtaugp));
end

function hminfgp(vg, sigghmgp, thtghmgp)
  1/(1 + exp(-(vg - thtghmgp)/sigghmgp));
end

function minfthl(v, sigmthl, thtmthl)
  1/(1 + exp(-(v - thtmthl)/sigmthl));
end

function hinfthl(v, sighthl, thththl)
  1/(1 + exp((v - thththl)/sighthl));
end

function pinfthl(v, sigpthl, thtpthl)
  1/(1 + exp(-(v - thtpthl)/sigpthl));
end

function rinfthl(v, sigrthl, thtrthl)
  1/(1 + exp((v - thtrthl)/sigrthl));
end

function ahthl(v, ah0thl, sigahthl, thtahthl)
  ah0thl*exp(-(v - thtahthl)/sigahthl);
end

function bhthl(v, bh0thl, sigbhthl, thtbhthl)
  bh0thl/(1 + exp(-(v - thtbhthl)/sigbhthl));
end

function tauhthl(v, ah0thl, bh0thl, sigahthl, sigbhthl, thtahthl, thtbhthl)
  1/(ahthl(v, thtahthl, sigahthl, ah0thl) + bhthl(v, bh0thl, sigbhthl, thtbhthl));
end

function taurthl(v, sigrtauthl, taur0thl, taur1thl, thtrtauthl)
  taur0thl + taur1thl*exp(-(v - thtrtauthl)/sigrtauthl);
end

function ym(v, sigym)
  1/(1 + exp(-v/sigym));
end

function ilstn(v, glstn, vlstn)
  glstn*(v - vlstn);
end

function inastn(v, h, gnastn, sigmstn, thtmstn, vnastn)
  gnastn*minfstn(v, thtmstn, sigmstn)^3*h*(v - vnastn);
end

function ikstn(v, n, gkstn, vkstn)
  gkstn*n^4*(v - vkstn);
end

function iahpstn(v, xca, gahpstn, k1stn, vkstn)
  gahpstn*(v - vkstn)*xca/(xca + k1stn);
end

function icastn(v, gcastn, sigsstn, thtsstn, vcastn)
  gcastn*sinfstn(v, thtsstn, sigsstn)^2*(v - vcastn);
end

function itstn(v, r, gtstn, sigastn, sigbstn, thtastn, thtbstn, vcastn)
  gtstn*ainfstn(v, thtastn, sigastn)^3*binfstn(r, thtbstn, sigbstn)^2*(v - vcastn);
end

function ilgp(v, glgp, vlgp)
  glgp*(v - vlgp);
end

function inagp(v, h, gnagp, sigmgp, thtmgp, vnagp)
  gnagp*minfgp(v, sigmgp, thtmgp)^3*h*(v - vnagp);
end

function ikgp(v, n, gkgp, vkgp)
  gkgp*n^4*(v - vkgp);
end

function iahpgp(v, xcag, gahpgp, k1gp, vkgp)
  gahpgp*(v - vkgp)*xcag/(xcag + k1gp);
end

function icagp(v, gcagp, sigsgp, thtsgp, vcagp)
  gcagp*sinfgp(v, sigsgp, thtsgp)^2*(v - vcagp);
end

function itgp(v, r, gtgp, sigagp, thtagp, vcagp)
  gtgp*ainfgp(v, thtagp, sigagp)^3*r*(v - vcagp);
end

function ilthl(v, glthl, vlthl)
  glthl*(v - vlthl);
end

function inathl(v, h, gnathl, sigmthl, thtmthl, vnathl)
  gnathl*minfthl(v, thtmthl, sigmthl)^3*h*(v - vnathl);
end

function ikthl(v, h, gkthl, vkthl)
  gkthl*(0.75*(1 - h))^4*(v - vkthl);
end

function itthl(v, r, gtthl, sigpthl, thtpthl, vtthl)
  gtthl*pinfthl(v, sigpthl, thtpthl)^2*r*(v - vtthl);
end

model main()
  // XPP model
  // This model was converted from XPP ode format to SBML using sbmlutils-0.1.5a6.
  // # mdl_modif.ode
  // # Internal settings
  // @ maxstore=1000000,toler=1e-6,dtmax=0.01,t0=10000,total=10000,trans=15000,meth=qualrk,xp=t,yp=vthl1,xlo=15000,xhi=20000,ylo=-80,yhi=20,bound=1000,output='hfs.dat'
  // # Parkinsonian control
  // parameter tpark=5000
  // parameter ggpe2gpen=1
  // parameter ggpe2gpep=0
  // ggpe2gpe(t)=ggpe2gpen+(ggpe2gpep-ggpe2gpen)*heav(t-tpark)
  // parameter iappgpen=-0.5
  // parameter iappgpep=-2.3
  // iappgpe(t)=iappgpen+(iappgpep-iappgpen)*heav(t-tpark)
  // # HFS control
  // parameter thfs=10000
  // parameter imhfsstn=171.4
  // parameter tmhfs=6
  // parameter whfs=0.3
  // ihfsstn(t)=imhfsstn*ym(sin(2*pi*t/tmhfs))*(1-ym(sin(2*pi*(t+whfs)/tmhfs)))*heav(t-thfs)
  // # sensorimotor control
  // parameter imsmthl=8
  // parameter tmsmthl=25
  // parameter wsmthl=5
  // parameter dsmthl=80
  // ismthl(t)=imsmthl*ym(sin(2*pi*(t-dsmthl)/tmsmthl))*(1-ym(sin(2*pi*(t-dsmthl+wsmthl)/tmsmthl)))
  // # STN parameters
  // parameter cmstn=1
  // parameter glstn=2.25
  // parameter vlstn=-60
  // parameter gnastn=37.5
  // parameter vnastn=55
  // parameter thtmstn=-30
  // parameter sigmstn=15
  // parameter ththstn=-39
  // parameter sighstn=3.1
  // parameter tauh0stn=1
  // parameter tauh1stn=500
  // parameter ththtaustn=-57
  // parameter sightaustn=3
  // parameter phihstn=0.75
  // parameter gkstn=45
  // parameter vkstn=-80
  // parameter thtnstn=-32
  // parameter signstn=8
  // parameter taun0stn=1
  // parameter taun1stn=100
  // parameter thtntaustn=-80
  // parameter signtaustn=26
  // parameter phinstn=0.75
  // parameter gcastn=0.5
  // parameter vcastn=140
  // parameter thtsstn=-39
  // parameter sigsstn=8
  // parameter gtstn=0.5
  // parameter thtastn=-63
  // parameter sigastn=7.8
  // parameter thtbstn=0.25
  // parameter sigbstn=0.07
  // parameter thtrstn=-67
  // parameter sigrstn=2
  // parameter taur0stn=7.1
  // parameter taur1stn=17.5
  // parameter thtrtaustn=68
  // parameter sigrtaustn=2.2
  // parameter phirstn=0.5
  // parameter gahpstn=9
  // parameter k1stn=15
  // parameter kcastn=22.5
  // parameter phixcastn=0.75
  // parameter epsxcastn=5e-5
  // parameter alphastn=5
  // parameter betastn=1
  // parameter thtgstn=30
  // parameter thtghmstn=-39
  // parameter sigghmstn=8
  // parameter ggpe2stn=0.9
  // parameter vgpe2stn=-100
  // parameter im0stn=2
  // # GPe and GPi shared parameters
  // parameter cmgp=1
  // parameter glgp=0.1
  // parameter vlgp=-55
  // parameter gnagp=120
  // parameter vnagp=55
  // parameter thtmgp=-37
  // parameter sigmgp=10
  // parameter ththgp=-58
  // parameter sighgp=12
  // parameter tauh0gp=0.05
  // parameter tauh1gp=0.27
  // parameter ththtaugp=-40
  // parameter sightaugp=12
  // parameter phihgp=0.05
  // parameter gkgp=30
  // parameter vkgp=-80
  // parameter thtngp=-50
  // parameter signgp=14
  // parameter taun0gp=0.05
  // parameter taun1gp=0.27
  // parameter thtntaugp=-40
  // parameter signtaugp=12
  // parameter phingp=0.05
  // parameter gcagp=0.1
  // parameter vcagp=120
  // parameter thtsgp=-35
  // parameter sigsgp=2
  // parameter gtgp=0.5
  // parameter thtagp=-57
  // parameter sigagp=2
  // parameter thtrgp=-70
  // parameter sigrgp=2
  // parameter taurggp=30
  // parameter phirgp=1
  // parameter gahpgp=30
  // parameter k1gp=30
  // parameter kcagp=20
  // epsxcagp=1e-4
  // parameter alphagp=2
  // parameter thtggp=20
  // parameter thtghmgp=-57
  // parameter sigghmgp=2
  // # GPe non-shared parameters
  // parameter betagpe=0.04
  // parameter gstn2gpe=0.3
  // parameter vstn2gpe=0
  // parameter vgpe2gpe=-80
  // parameter im0gpe=0.3
  // # GPi non-shared parameters
  // parameter betagpi=0.08
  // parameter gstn2gpi=1
  // parameter vstn2gpi=0
  // parameter thtstn2gpi=0
  // parameter iappgpi=-1.2
  // # Thl parameters
  // parameter cmthl=1
  // parameter glthl=0.05
  // parameter vlthl=-70
  // parameter gnathl=3
  // parameter vnathl=50
  // parameter thtmthl=-37
  // parameter sigmthl=7
  // parameter thththl=-41
  // parameter sighthl=4
  // parameter ah0thl=0.128
  // parameter thtahthl=-46
  // parameter sigahthl=18
  // parameter bh0thl=4
  // parameter thtbhthl=-23
  // parameter sigbhthl=5
  // parameter phihthl=1
  // parameter gkthl=5
  // parameter vkthl=-90
  // parameter gtthl=5
  // parameter vtthl=0
  // parameter thtpthl=-60
  // parameter sigpthl=6.2
  // parameter thtrthl=-84
  // parameter sigrthl=4
  // parameter taur0thl=28
  // # For 'fast' T-current: taur0thl=5
  // parameter taur1thl=1
  // parameter thtrtauthl=-25
  // parameter sigrtauthl=10.5
  // # For 'fast' T-current: sigrtauthl=15
  // parameter phirthl=2.5
  // parameter ggpi2thl=0.15
  // parameter vgpi2thl=-85
  // # Auxiliary parameters
  // parameter sigym=0.001
  // # STN functions
  // minfstn(v)=1/(1+exp(-(v-thtmstn)/sigmstn))
  // hinfstn(v)=1/(1+exp((v-ththstn)/sighstn))
  // ninfstn(v)=1/(1+exp(-(v-thtnstn)/signstn))
  // sinfstn(v)=1/(1+exp(-(v-thtsstn)/sigsstn))
  // ainfstn(v)=1/(1+exp(-(v-thtastn)/sigastn))
  // binfstn(r)=1/(1+exp(-(r-thtbstn)/sigbstn))-1/(1+exp(thtbstn/sigbstn))
  // rinfstn(v)=1/(1+exp((v-thtrstn)/sigrstn))
  // tauhstn(v)=tauh0stn+tauh1stn/(1+exp((v-ththtaustn)/sightaustn))
  // taunstn(v)=taun0stn+taun1stn/(1+exp((v-thtntaustn)/signtaustn))
  // taurstn(v)=taur0stn+taur1stn/(1+exp((v-thtrtaustn)/sigrtaustn))
  // hminfstn(v)=1/(1+exp(-(v-thtghmstn)/sigghmstn))
  // # GPe and GPi shared functions
  // minfgp(vg)=1/(1+exp(-(vg-thtmgp)/sigmgp))
  // hinfgp(vg)=1/(1+exp((vg-ththgp)/sighgp))
  // ninfgp(vg)=1/(1+exp(-(vg-thtngp)/signgp))
  // sinfgp(vg)=1/(1+exp(-(vg-thtsgp)/sigsgp))
  // ainfgp(vg)=1/(1+exp(-(vg-thtagp)/sigagp))
  // rinfgp(vg)=1/(1+exp((vg-thtrgp)/sigrgp))
  // tauhgp(vg)=tauh0gp+tauh1gp/(1+exp((vg-ththtaugp)/sightaugp))
  // taungp(vg)=taun0gp+taun1gp/(1+exp((vg-thtntaugp)/signtaugp))
  // hminfgp(vg)=1/(1+exp(-(vg-thtghmgp)/sigghmgp))
  // # Thl functions
  // minfthl(v)=1/(1+exp(-(v-thtmthl)/sigmthl))
  // hinfthl(v) = 1/(1+exp((v-thththl)/sighthl))
  // pinfthl(v) = 1/(1+exp(-(v-thtpthl)/sigpthl))
  // rinfthl(v) = 1/(1+exp((v-thtrthl)/sigrthl))
  // ahthl(v) = ah0thl*exp(-(v-thtahthl)/sigahthl)
  // bhthl(v) = bh0thl/(1+exp(-(v-thtbhthl)/sigbhthl))
  // tauhthl(v) = 1/(ahthl(v)+bhthl(v))
  // taurthl(v)=taur0thl+taur1thl*exp(-(v-thtrtauthl)/sigrtauthl)
  // # Auxiliary functions
  // ym(v)=1/(1+exp(-v/sigym))
  // # STN currents
  // ilstn(v)=glstn*(v-vlstn)
  // inastn(v,h)=gnastn*((minfstn(v))^3)*h*(v-vnastn)
  // ikstn(v,n)=gkstn*n^4*(v-vkstn)
  // iahpstn(v,xca)=gahpstn*(v-vkstn)*xca/(xca+k1stn)
  // icastn(v)=gcastn*((sinfstn(v))^2)*(v-vcastn)
  // itstn(v,r)=gtstn*((ainfstn(v))^3)*((binfstn(r))^2)*(v-vcastn)
  // sgpe2stn1=sgpe5+sgpe2
  // sgpe2stn2=sgpe6+sgpe1
  // sgpe2stn3=sgpe8+sgpe4
  // sgpe2stn4=sgpe7+sgpe3
  // sgpe2stn5=sgpe2+sgpe6
  // sgpe2stn6=sgpe1+sgpe5
  // sgpe2stn7=sgpe3+sgpe8
  // sgpe2stn8=sgpe4+sgpe7
  // igpe2stn[1..8]=ggpe2stn*sgpe2stn[j]*(vstn[j]-vgpe2stn)
  // # GPe and GPi shared currents
  // ilgp(v)=glgp*(v-vlgp)
  // inagp(v,h)=gnagp*((minfgp(v))^3)*h*(v-vnagp)
  // ikgp(v,n)=gkgp*(n^4)*(v-vkgp)
  // iahpgp(v,xcag)=gahpgp*(v-vkgp)*xcag/(xcag+k1gp)
  // icagp(v)=gcagp*((sinfgp(v))^2)*(v-vcagp)
  // itgp(v,r)=gtgp*((ainfgp(v))^3)*r*(v-vcagp)
  // # GPe non-shared currents
  // sgpe2gpe1=sgpe2+sgpe3
  // sgpe2gpe2=sgpe1+sgpe5
  // sgpe2gpe3=sgpe4+sgpe8
  // sgpe2gpe4=sgpe3+sgpe1
  // sgpe2gpe5=sgpe6+sgpe7
  // sgpe2gpe6=sgpe5+sgpe2
  // sgpe2gpe7=sgpe8+sgpe3
  // sgpe2gpe8=sgpe7+sgpe4
  // igpe2gpe[1..8]=ggpe2gpe(t)*sgpe2gpe[j]*(vgpe[j]-vgpe2gpe)
  // sstn2gpe1=sstn8+sstn4
  // sstn2gpe2=sstn7+sstn3
  // sstn2gpe3=sstn1+sstn5
  // sstn2gpe4=sstn2+sstn6
  // sstn2gpe5=sstn4+sstn8
  // sstn2gpe6=sstn3+sstn7
  // sstn2gpe7=sstn5+sstn2
  // sstn2gpe8=sstn6+sstn1
  // istn2gpe[1..8]=gstn2gpe*sstn2gpe[j]*(vgpe[j]-vstn2gpe)
  // # GPi non-shared currents
  // sstn2gpi[1..8]=sstn[j]
  // istn2gpi[1..8]=gstn2gpi*sstn2gpi[j]*(vgpi[j]-vstn2gpi)
  // # Thl currents
  // ilthl(v)=glthl*(v-vlthl)
  // inathl(v,h)=gnathl*((minfthl(v))^3)*h*(v-vnathl)
  // ikthl(v,h)=gkthl*((0.75*(1-h))^4)*(v-vkthl)
  // itthl(v,r)=gtthl*((pinfthl(v))^2)*r*(v-vtthl)
  // sgpi2thl1=sgpi1+sgpi2+sgpi5+sgpi6
  // sgpi2thl2=sgpi3+sgpi4+sgpi7+sgpi8
  // igpi2thl[1..2]=ggpi2thl*sgpi2thl[j]*(vthl[j]-vgpi2thl)
  // # STN equations
  // vstn[1..8]'=(-ilstn(vstn[j])-inastn(vstn[j],hstn[j])-ikstn(vstn[j],nstn[j])-iahpstn(vstn[j],xcastn[j])-icastn(vstn[j])-itstn(vstn[j],rstn[j])-igpe2stn[j]+ihfsstn(t)+[j]*im0stn)/cmstn
  // hstn[1..8]'=phihstn*(hinfstn(vstn[j])-hstn[j])/tauhstn(vstn[j])
  // nstn[1..8]'=phinstn*(ninfstn(vstn[j])-nstn[j])/taunstn(vstn[j])
  // rstn[1..8]'=phirstn*(rinfstn(vstn[j])-rstn[j])/taurstn(vstn[j])
  // xcastn[1..8]'=phixcastn*epsxcastn*(-icastn(vstn[j])-itstn(vstn[j],rstn[j])-kcastn*xcastn[j])
  // sstn[1..8]'=alphastn*(1-sstn[j])*hminfstn(vstn[j]-thtgstn)-betastn*sstn[j]
  // # GPe equations
  // vgpe[1..8]'=(-itgp(vgpe[j],rgpe[j])-inagp(vgpe[j],hgpe[j])-ikgp(vgpe[j],ngpe[j])-iahpgp(vgpe[j],xcagpe[j])-icagp(vgpe[j])-ilgp(vgpe[j])+iappgpe(t)-igpe2gpe[j]-istn2gpe[j]+[j]*im0gpe)/cmgp
  // ngpe[1..8]'=phingp*(ninfgp(vgpe[j])-ngpe[j])/taungp(vgpe[j])
  // hgpe[1..8]'=phihgp*(hinfgp(vgpe[j])-hgpe[j])/tauhgp(vgpe[j])
  // rgpe[1..8]'=phirgp*(rinfgp(vgpe[j])-rgpe[j])/taurggp
  // xcagpe[1..8]'=epsxcagp*(-icagp(vgpe[j])-itgp(vgpe[j],rgpe[j])-kcagp*xcagpe[j])
  // sgpe[1..8]'=alphagp*(1-sgpe[j])*hminfgp(vgpe[j]-thtggp)-betagpe*sgpe[j]
  // # GPi equations
  // vgpi[1..8]'=(-itgp(vgpi[j],rgpi[j])-inagp(vgpi[j],hgpi[j])-ikgp(vgpi[j],ngpi[j])-iahpgp(vgpi[j],xcagpi[j])-icagp(vgpi[j])-ilgp(vgpi[j])+iappgpi-istn2gpi[j])/cmgp
  // ngpi[1..8]'=phingp*(ninfgp(vgpi[j])-ngpi[j])/taungp(vgpi[j])
  // hgpi[1..8]'=phihgp*(hinfgp(vgpi[j])-hgpi[j])/tauhgp(vgpi[j])
  // rgpi[1..8]'=phirgp*(rinfgp(vgpi[j])-rgpi[j])/taurggp
  // xcagpi[1..8]'=epsxcagp*(-icagp(vgpi[j])-itgp(vgpi[j],rgpi[j])-kcagp*xcagpi[j])
  // sgpi[1..8]'=alphagp*(1-sgpi[j])*hminfgp(vgpi[j]-thtggp)-betagpi*sgpi[j]
  // # Thl equations
  // vthl1'=(-ilthl(vthl1)-inathl(vthl1,hthl1)-ikthl(vthl1,hthl1)-itthl(vthl1,rthl1)+ismthl(t)-igpi2thl1)/cmthl
  // rthl1'=phirthl*(rinfthl(vthl1)-rthl1)/taurthl(vthl1)
  // hthl1'=phihthl*(hinfthl(vthl1)-hthl1)/tauhthl(vthl1)
  // vthl2'=(-ilthl(vthl2)-inathl(vthl2,hthl2)-ikthl(vthl2,hthl2)-itthl(vthl2,rthl2)+ismthl(t)-igpi2thl2)/cmthl
  // rthl2'=phirthl*(rinfthl(vthl2)-rthl2)/taurthl(vthl2)
  // hthl2'=phihthl*(hinfthl(vthl2)-hthl2)/tauhthl(vthl2)
  // # Make visible some variables
  // aux aismthl=ismthl(t)
  // aux asgpi2thl1=sgpi2thl1
  // aux asgpi2thl2=sgpi2thl2
  // aux aigpi2thl1=igpi2thl1
  // aux aigpi2thl2=igpi2thl2
  // aux aihfsstn=ihfsstn(t)
  // # in silent mode save only the following variables
  // only t,vthl1,vthl2,aismthl,aihfsstn,asgpi2thl1,asgpi2thl2,aigpi2thl1,aigpi2thl2,rthl1,rthl2
  // # Initial conditions
  // # ICs
  // init VSTN1=-70.2963328357186
  // init VSTN2=-69.45626520384715
  // init VSTN3=-61.57227419701998
  // init VSTN4=-57.42949551593134
  // init VSTN5=-68.26142227528348
  // init VSTN6=-64.847564080094
  // init VSTN7=-59.94034019769452
  // init VSTN8=-36.13846030480007
  // init HSTN1=0.1455501900899287
  // init HSTN2=0.1634553791482899
  // init HSTN3=0.3189732573009864
  // init HSTN4=0.2876195347465059
  // init HSTN5=0.2674565491228242
  // init HSTN6=0.3201323707767232
  // init HSTN7=0.117124130113879
  // init HSTN8=0.18070385940658
  // init NSTN1=0.1942106271083542
  // init NSTN2=0.1764180020310163
  // init NSTN3=0.03080545474027171
  // init NSTN4=0.03668644696345393
  // init NSTN5=0.07368970365024322
  // init NSTN6=0.1170103020715659
  // init NSTN7=0.2621068537744238
  // init NSTN8=0.2646853464952902
  // init RSTN1=0.5363725059416923
  // init RSTN2=0.5205023602660154
  // init RSTN3=0.6790553865510595
  // init RSTN4=0.6508979574661953
  // init RSTN5=0.3383845200833131
  // init RSTN6=0.38886607918034
  // init RSTN7=0.4963060109029069
  // init RSTN8=0.4755783001814112
  // init XCASTN1=0.5177936071017125
  // init XCASTN2=0.5224422746885499
  // init XCASTN3=0.4659124978796718
  // init XCASTN4=0.4834243501718455
  // init XCASTN5=0.4930421214390157
  // init XCASTN6=0.5106314709099659
  // init XCASTN7=0.4850441148250232
  // init XCASTN8=0.4895303851515876
  // init SSTN1=0.002245373527316081
  // init SSTN2=0.002486476184693662
  // init SSTN3=0.006067133597593091
  // init SSTN4=0.008571570634603693
  // init SSTN5=0.002867892282545885
  // init SSTN6=0.004333174583764654
  // init SSTN7=0.007248711928891034
  // init SSTN8=0.04207015249036755
  // init VGPE1=-76.19857159170789
  // init VGPE2=-75.65246053889084
  // init VGPE3=-74.04179520509994
  // init VGPE4=-72.27320500821767
  // init VGPE5=-69.65751754691165
  // init VGPE6=-69.46272243280967
  // init VGPE7=-68.66741425393707
  // init VGPE8=-67.96771029101726
  // init NGPE1=0.145251986872227
  // init NGPE2=0.1728304298020422
  // init NGPE3=0.1525161379651593
  // init NGPE4=0.1685687719329369
  // init NGPE5=0.186758331810659
  // init NGPE6=0.2021607997643594
  // init NGPE7=0.2017487143200761
  // init NGPE8=0.2095548657387559
  // init HGPE1=0.8135660530566688
  // init HGPE2=0.7855059316951624
  // init HGPE3=0.7918179591614027
  // init HGPE4=0.7677816026825283
  // init HGPE5=0.7502933467823444
  // init HGPE6=0.7384552729573229
  // init HGPE7=0.732192517801176
  // init HGPE8=0.7233501296509451
  // init RGPE1=0.9283635817280316
  // init RGPE2=0.8850705143963882
  // init RGPE3=0.8673773015303538
  // init RGPE4=0.7705147624134699
  // init RGPE5=0.6443720392593262
  // init RGPE6=0.4549492249119116
  // init RGPE7=0.6313447593781805
  // init RGPE8=0.5978520124911044
  // init XCAGPE1=0.1155293318957297
  // init XCAGPE2=0.08083423662681917
  // init XCAGPE3=0.112042386034417
  // init XCAGPE4=0.1059864484219792
  // init XCAGPE5=0.08031613671143878
  // init XCAGPE6=0.05163743209969612
  // init XCAGPE7=0.08484564353640682
  // init XCAGPE8=0.091861332731073
  // init SGPE1=0.4048566949169946
  // init SGPE2=0.4900731585990308
  // init SGPE3=0.167682474891889
  // init SGPE4=0.1393118840432917
  // init SGPE5=0.3943391430262136
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  // Terms of use
  // Copyright © 2017 Matthias Koenig
  // Redistributions of this SBML file must retain the above copyright notice, this list of conditions and the following disclaimer.
  // Redistributions in a different form must reproduce the above copyright notice, this list of conditions and the following disclaimer in the documentation and/or other materials provided with the distribution.

  // Parameters:
  tpark = 5000;
  ggpe2gpen = 1;
  ggpe2gpep = 0;
  iappgpen = -0.5;
  iappgpep = -2.3;
  thfs = 10000;
  imhfsstn = 171.4;
  tmhfs = 6;
  whfs = 0.3;
  imsmthl = 8;
  tmsmthl = 25;
  wsmthl = 5;
  dsmthl = 80;
  cmstn = 1;
  glstn = 2.25;
  vlstn = -60;
  gnastn = 37.5;
  vnastn = 55;
  thtmstn = -30;
  sigmstn = 15;
  ththstn = -39;
  sighstn = 3.1;
  tauh0stn = 1;
  tauh1stn = 500;
  ththtaustn = -57;
  sightaustn = 3;
  phihstn = 0.75;
  gkstn = 45;
  vkstn = -80;
  thtnstn = -32;
  signstn = 8;
  taun0stn = 1;
  taun1stn = 100;
  thtntaustn = -80;
  signtaustn = 26;
  phinstn = 0.75;
  gcastn = 0.5;
  vcastn = 140;
  thtsstn = -39;
  sigsstn = 8;
  gtstn = 0.5;
  thtastn = -63;
  sigastn = 7.8;
  thtbstn = 0.25;
  sigbstn = 0.07;
  thtrstn = -67;
  sigrstn = 2;
  taur0stn = 7.1;
  taur1stn = 17.5;
  thtrtaustn = 68;
  sigrtaustn = 2.2;
  phirstn = 0.5;
  gahpstn = 9;
  k1stn = 15;
  kcastn = 22.5;
  phixcastn = 0.75;
  epsxcastn = 5e-5;
  alphastn = 5;
  betastn = 1;
  thtgstn = 30;
  thtghmstn = -39;
  sigghmstn = 8;
  ggpe2stn = 0.9;
  vgpe2stn = -100;
  im0stn = 2;
  cmgp = 1;
  glgp = 0.1;
  vlgp = -55;
  gnagp = 120;
  vnagp = 55;
  thtmgp = -37;
  sigmgp = 10;
  ththgp = -58;
  sighgp = 12;
  tauh0gp = 0.05;
  tauh1gp = 0.27;
  ththtaugp = -40;
  sightaugp = 12;
  phihgp = 0.05;
  gkgp = 30;
  vkgp = -80;
  thtngp = -50;
  signgp = 14;
  taun0gp = 0.05;
  taun1gp = 0.27;
  thtntaugp = -40;
  signtaugp = 12;
  phingp = 0.05;
  gcagp = 0.1;
  vcagp = 120;
  thtsgp = -35;
  sigsgp = 2;
  gtgp = 0.5;
  thtagp = -57;
  sigagp = 2;
  thtrgp = -70;
  sigrgp = 2;
  taurggp = 30;
  phirgp = 1;
  gahpgp = 30;
  k1gp = 30;
  kcagp = 20;
  alphagp = 2;
  thtggp = 20;
  thtghmgp = -57;
  sigghmgp = 2;
  betagpe = 0.04;
  gstn2gpe = 0.3;
  vstn2gpe = 0;
  vgpe2gpe = -80;
  im0gpe = 0.3;
  betagpi = 0.08;
  gstn2gpi = 1;
  vstn2gpi = 0;
  thtstn2gpi = 0;
  iappgpi = -1.2;
  cmthl = 1;
  glthl = 0.05;
  vlthl = -70;
  gnathl = 3;
  vnathl = 50;
  thtmthl = -37;
  sigmthl = 7;
  thththl = -41;
  sighthl = 4;
  ah0thl = 0.128;
  thtahthl = -46;
  sigahthl = 18;
  bh0thl = 4;
  thtbhthl = -23;
  sigbhthl = 5;
  phihthl = 1;
  gkthl = 5;
  vkthl = -90;
  gtthl = 5;
  vtthl = 0;
  thtpthl = -60;
  sigpthl = 6.2;
  thtrthl = -84;
  sigrthl = 4;
  taur0thl = 28;
  taur1thl = 1;
  thtrtauthl = -25;
  sigrtauthl = 10.5;
  phirthl = 2.5;
  ggpi2thl = 0.15;
  vgpi2thl = -85;
  sigym = 0.001;
  vstn1 = -70.29633;
  vstn2 = -69.45627;
  vstn3 = -61.57227;
  vstn4 = -57.4295;
  vstn5 = -68.26142;
  vstn6 = -64.84756;
  vstn7 = -59.94034;
  vstn8 = -36.13846;
  hstn1 = 0.1455502;
  hstn2 = 0.1634554;
  hstn3 = 0.3189733;
  hstn4 = 0.2876195;
  hstn5 = 0.2674565;
  hstn6 = 0.3201324;
  hstn7 = 0.1171241;
  hstn8 = 0.1807039;
  nstn1 = 0.1942106;
  nstn2 = 0.176418;
  nstn3 = 0.03080545;
  nstn4 = 0.03668645;
  nstn5 = 0.0736897;
  nstn6 = 0.1170103;
  nstn7 = 0.2621069;
  nstn8 = 0.2646853;
  rstn1 = 0.5363725;
  rstn2 = 0.5205024;
  rstn3 = 0.6790554;
  rstn4 = 0.650898;
  rstn5 = 0.3383845;
  rstn6 = 0.3888661;
  rstn7 = 0.496306;
  rstn8 = 0.4755783;
  xcastn1 = 0.5177936;
  xcastn2 = 0.5224423;
  xcastn3 = 0.4659125;
  xcastn4 = 0.4834244;
  xcastn5 = 0.4930421;
  xcastn6 = 0.5106315;
  xcastn7 = 0.4850441;
  xcastn8 = 0.4895304;
  sstn1 = 0.002245374;
  sstn2 = 0.002486476;
  sstn3 = 0.006067134;
  sstn4 = 0.008571571;
  sstn5 = 0.002867892;
  sstn6 = 0.004333175;
  sstn7 = 0.007248712;
  sstn8 = 0.04207015;
  vgpe1 = -76.19857;
  vgpe2 = -75.65246;
  vgpe3 = -74.0418;
  vgpe4 = -72.27321;
  vgpe5 = -69.65752;
  vgpe6 = -69.46272;
  vgpe7 = -68.66741;
  vgpe8 = -67.96771;
  ngpe1 = 0.145252;
  ngpe2 = 0.1728304;
  ngpe3 = 0.1525161;
  ngpe4 = 0.1685688;
  ngpe5 = 0.1867583;
  ngpe6 = 0.2021608;
  ngpe7 = 0.2017487;
  ngpe8 = 0.2095549;
  hgpe1 = 0.8135661;
  hgpe2 = 0.7855059;
  hgpe3 = 0.791818;
  hgpe4 = 0.7677816;
  hgpe5 = 0.7502933;
  hgpe6 = 0.7384553;
  hgpe7 = 0.7321925;
  hgpe8 = 0.7233501;
  rgpe1 = 0.9283636;
  rgpe2 = 0.8850705;
  rgpe3 = 0.8673773;
  rgpe4 = 0.7705148;
  rgpe5 = 0.644372;
  rgpe6 = 0.4549492;
  rgpe7 = 0.6313448;
  rgpe8 = 0.597852;
  xcagpe1 = 0.1155293;
  xcagpe2 = 0.08083424;
  xcagpe3 = 0.1120424;
  xcagpe4 = 0.1059864;
  xcagpe5 = 0.08031614;
  xcagpe6 = 0.05163743;
  xcagpe7 = 0.08484564;
  xcagpe8 = 0.09186133;
  sgpe1 = 0.4048567;
  sgpe2 = 0.4900732;
  sgpe3 = 0.1676825;
  sgpe4 = 0.1393119;
  sgpe5 = 0.3943391;
  sgpe6 = 0.4751888;
  sgpe7 = 0.4343979;
  sgpe8 = 0.4544787;
  vgpi1 = -71.07358;
  vgpi2 = -71.13894;
  vgpi3 = -68.8917;
  vgpi4 = -68.6869;
  vgpi5 = -70.32782;
  vgpi6 = -70.71833;
  vgpi7 = -72.01985;
  vgpi8 = -69.35945;
  ngpi1 = 0.1807225;
  ngpi2 = 0.1815412;
  ngpi3 = 0.2007876;
  ngpi4 = 0.2005498;
  ngpi5 = 0.1917482;
  ngpi6 = 0.1830642;
  ngpi7 = 0.1859036;
  ngpi8 = 0.1810764;
  hgpi1 = 0.7498772;
  hgpi2 = 0.7485532;
  hgpi3 = 0.7200997;
  hgpi4 = 0.7204513;
  hgpi5 = 0.7334361;
  hgpi6 = 0.7464641;
  hgpi7 = 0.7623101;
  hgpi8 = 0.7581093;
  rgpi1 = 0.6919372;
  rgpi2 = 0.6407997;
  rgpi3 = 0.4723881;
  rgpi4 = 0.4859897;
  rgpi5 = 0.3553718;
  rgpi6 = 0.6306022;
  rgpi7 = 0.6515225;
  rgpi8 = 0.7107017;
  xcagpi1 = 0.06887946;
  xcagpi2 = 0.06918924;
  xcagpi3 = 0.04945241;
  xcagpi4 = 0.05188612;
  xcagpi5 = 0.05073602;
  xcagpi6 = 0.07210273;
  xcagpi7 = 0.05487279;
  xcagpi8 = 0.07028769;
  sgpi1 = 0.0266029;
  sgpi2 = 0.01858086;
  sgpi3 = 4.316933e-6;
  sgpi4 = 7.472167e-6;
  sgpi5 = 0.0004124633;
  sgpi6 = 0.02944439;
  sgpi7 = 0.2285896;
  sgpi8 = 0.1536665;
  vthl1 = -61.58326;
  rthl1 = 0.05207482;
  hthl1 = 0.952265;
  vthl2 = -74.57229;
  rthl2 = 0.02767654;
  hthl2 = 0.958151;
  epsxcagp has dimensionless;
  sgpe2stn1 has dimensionless;
  sgpe2stn2 has dimensionless;
  sgpe2stn3 has dimensionless;
  sgpe2stn4 has dimensionless;
  sgpe2stn5 has dimensionless;
  sgpe2stn6 has dimensionless;
  sgpe2stn7 has dimensionless;
  sgpe2stn8 has dimensionless;
  sgpe2gpe1 has dimensionless;
  sgpe2gpe2 has dimensionless;
  sgpe2gpe3 has dimensionless;
  sgpe2gpe4 has dimensionless;
  sgpe2gpe5 has dimensionless;
  sgpe2gpe6 has dimensionless;
  sgpe2gpe7 has dimensionless;
  sgpe2gpe8 has dimensionless;
  sstn2gpe1 has dimensionless;
  sstn2gpe2 has dimensionless;
  sstn2gpe3 has dimensionless;
  sstn2gpe4 has dimensionless;
  sstn2gpe5 has dimensionless;
  sstn2gpe6 has dimensionless;
  sstn2gpe7 has dimensionless;
  sstn2gpe8 has dimensionless;
  sgpi2thl1 has dimensionless;
  sgpi2thl2 has dimensionless;
  aismthl has dimensionless;
  asgpi2thl1 has dimensionless;
  asgpi2thl2 has dimensionless;
  aigpi2thl1 has dimensionless;
  aigpi2thl2 has dimensionless;
  aihfsstn has dimensionless;
  t has dimensionless; t is "model time";

  // Assignment rules:
  epsxcagp := 1e-4;
  sgpe2stn1 := sgpe5 + sgpe2;
  sgpe2stn2 := sgpe6 + sgpe1;
  sgpe2stn3 := sgpe8 + sgpe4;
  sgpe2stn4 := sgpe7 + sgpe3;
  sgpe2stn5 := sgpe2 + sgpe6;
  sgpe2stn6 := sgpe1 + sgpe5;
  sgpe2stn7 := sgpe3 + sgpe8;
  sgpe2stn8 := sgpe4 + sgpe7;
  sgpe2gpe1 := sgpe2 + sgpe3;
  sgpe2gpe2 := sgpe1 + sgpe5;
  sgpe2gpe3 := sgpe4 + sgpe8;
  sgpe2gpe4 := sgpe3 + sgpe1;
  sgpe2gpe5 := sgpe6 + sgpe7;
  sgpe2gpe6 := sgpe5 + sgpe2;
  sgpe2gpe7 := sgpe8 + sgpe3;
  sgpe2gpe8 := sgpe7 + sgpe4;
  sstn2gpe1 := sstn8 + sstn4;
  sstn2gpe2 := sstn7 + sstn3;
  sstn2gpe3 := sstn1 + sstn5;
  sstn2gpe4 := sstn2 + sstn6;
  sstn2gpe5 := sstn4 + sstn8;
  sstn2gpe6 := sstn3 + sstn7;
  sstn2gpe7 := sstn5 + sstn2;
  sstn2gpe8 := sstn6 + sstn1;
  sgpi2thl1 := sgpi1 + sgpi2 + sgpi5 + sgpi6;
  sgpi2thl2 := sgpi3 + sgpi4 + sgpi7 + sgpi8;
  aismthl := ismthl(t, dsmthl, imsmthl, sigym, tmsmthl, wsmthl);
  asgpi2thl1 := sgpi2thl1;
  asgpi2thl2 := sgpi2thl2;
  aigpi2thl1 := igpi2thl1;
  aigpi2thl2 := igpi2thl2;
  aihfsstn := ihfsstn(t, imhfsstn, sigym, thfs, tmhfs, whfs);
  t := time;

  // Rate rules:
  vthl1' = (-ilthl(vthl1, glthl, vlthl) - inathl(vthl1, hthl1, gnathl, sigmthl, thtmthl, vnathl) - ikthl(vthl1, hthl1, gkthl, vkthl) - itthl(vthl1, rthl1, gtthl, sigpthl, thtpthl, vtthl) + ismthl(t, dsmthl, imsmthl, sigym, tmsmthl, wsmthl) - igpi2thl1)/cmthl;
  rthl1' = phirthl*(rinfthl(vthl1, sigrthl, thtrthl) - rthl1)/taurthl(vthl1, sigrtauthl, taur0thl, taur1thl, thtrtauthl);
  hthl1' = phihthl*(hinfthl(vthl1, sighthl, thththl) - hthl1)/tauhthl(vthl1, ah0thl, bh0thl, sigahthl, sigbhthl, thtahthl, thtbhthl);
  vthl2' = (-ilthl(vthl2, glthl, vlthl) - inathl(vthl2, hthl2, gnathl, sigmthl, thtmthl, vnathl) - ikthl(vthl2, hthl2, gkthl, vkthl) - itthl(vthl2, rthl2, gtthl, sigpthl, thtpthl, vtthl) + ismthl(t, dsmthl, imsmthl, sigym, tmsmthl, wsmthl) - igpi2thl2)/cmthl;
  rthl2' = phirthl*(rinfthl(vthl2, sigrthl, thtrthl) - rthl2)/taurthl(vthl2, sigrtauthl, taur0thl, taur1thl, thtrtauthl);
  hthl2' = phihthl*(hinfthl(vthl2, sighthl, thththl) - hthl2)/tauhthl(vthl2, ah0thl, bh0thl, sigahthl, sigbhthl, thtahthl, thtbhthl);
end
