// SBML level 3 version 1

function max(x, y)
  piecewise(x, x > y, y);
end
max is "minimum";

function min(x, y)
  piecewise(x, x < y, y);
end
min is "maximum";

function heav(x)
  piecewise(0, x < 0, 0.5, x == 0, 1, x > 0, 0);
end
heav is "heavyside";

function mod(x, y)
  piecewise(x - y*ceil(x/y), xor(x < 0, y < 0), x - y*floor(x/y));
end
mod is "modulo";

function hv(x, s)
  1/(1 + exp(-x/s));
end

function pulse(t, sharpness)
  hv(t - 1, sharpness) - hv(t - 2, sharpness) + (hv(t - 5, sharpness) - hv(t - 6, sharpness));
end

function od(t, ostim, sharpness)
  ostim*pulse(t, sharpness);
end

function input(x, y, ge2)
  ge2*(x - y);
end

function v(x, vsamp, vsspike)
  (x - vsspike)/(0.5*vsamp);
end

function voltage(x, y, z, ge2, nakxsoma, tau_soma)
  tau_soma*(3*x - x^3 + 2 - nakxsoma + input(y, z, ge2));
end

function inhcng(cacam, inhmax, kinhcng, ninhcng)
  1 + (inhmax - 1)*(cacam^ninhcng/(cacam^ninhcng + kinhcng^ninhcng));
end

function icng(camp, vcilia, cacam, cnmax, hmc1, inhmax, kinhcng, n1, ninhcng, vcng)
  cnmax*camp^n1/(camp^n1 + (inhcng(cacam, inhmax, kinhcng, ninhcng)*hmc1)^n1)*(vcng - vcilia);
end

function icacl(ca, vcilia, clmax, hmc2, n2, vcl)
  clmax*ca^n2/(ca^n2 + hmc2^n2)*(vcl - vcilia);
end

function il(vcilia, gl, vl)
  gl*(vl - vcilia);
end

function cap_soma(vcilia, beta_cap, cap_max, cap_off)
  cap_max*(1 + tanh((cap_off - vcilia)/beta_cap));
end

function isoma(x, y, z, beta_cap, cap_max, cap_off, ge2, nakxsoma, tau_soma, vcilia)
  cap_soma(vcilia, cap_max, beta_cap, cap_off)*voltage(x, y, z, ge2, nakxsoma, tau_soma);
end

model main()
  // XPP model
  // This model was converted from XPP ode format to SBML using sbmlutils-0.1.5a6.
  // #D.P.Dougherty 2010
  // #Spiking model of mouse ORN
  // #This is a multi-scale extension of the model in Dougherty et al 2005. PNAS 102(30):10415-10420
  // #which includes cilium, dendrite, and soma compartments.
  // #
  // #The XPP file is configured to demonstrate a dual-pulse stimulation protocol
  // #with whole cell suction pipette recording showing the slow transduction
  // #current and fast action potentials generated.
  // #
  // #Alphabetically sorted listing of all model parameters (descriptions given below).
  // param cap=0.0035
  // param cc1lin=0.6362
  // param cc2=20.9869
  // param ck1lin=10.3615
  // param ck2=0.5833
  // param clmax=0.8294
  // param cnmax=3.6417
  // param ef=7.9725
  // param gl=15.4267
  // param hmc1=1.5965
  // param hmc2=7.6415
  // param inf=1.4654
  // param inhmax=0.98
  // param k1=2.2748
  // param k2lin=42.0896
  // param kI=16.5304
  // param kinh=1.3875
  // param kinhcng=0.2242
  // param n1=5.6384
  // param n2=3.4161
  // param ninh=0.4067
  // param ninhcng=0.6306
  // param pd=15.4669
  // param r1=9.4574
  // param r2=12.5485
  // param smax=63.0987
  // param vcl=-7.3248
  // param vcng=0.4641
  // param vl=-69.6653
  // #Spiking aspect of the model -- dendrite and soma parameters.
  // param ge1=70.244
  // param ge2=20.245
  // param tau_soma=6100
  // param epsilon=0.09
  // param beta=0.092
  // param beta_cap=0.95
  // param cap_max=400.5
  // param cap_off=-75
  // param gamma=43.92
  // param VSspike=-58.23
  // param VSamp=14.36
  // param vd=0.05
  // #Parameters descriptions with their units.
  // #
  // #cap #Capacitance of ORN ciliary membrane# nF
  // #cc1lin #Rate at which Ca2+ associates with CaM to form CaCaM # s^-1
  // #cc2 #Rate at which CaCaM dissociates to Ca2+ and CaM # s^-1
  // #ck1lin #Rate at which CaCaM activates CaMK # s^-1
  // #ck2 #Rate at which active CaMK deactivates # s^-1
  // #clmax #Maximal conductance of ANO2 Cl(Ca) channels # nS
  // #cnmax #Maximal conductance of CNG channels # nS
  // #ef #Maximum calcium efflux (assumed sodium & potassium independent) #s^-1
  // #gl #Maximum leak (generic) conductance # nS
  // #hmc1 #Concentration of cAMP needed to achieve half-maximal activation (K1/2) of the CNG channel # uM
  // #hmc2 #Concentration of Ca2+ needed to achieve half-maximal activation (K1/2) of the Cl(Ca) channel| # uM
  // #inf #Net calcium inward flux via CNG channel # uM*pC^-1
  // #inhmax #Maximum inhibition of CNG by CaCAM # unitless
  // #k1 #Receptor affinity for ligand # (um*s)^-1
  // #k2lin #Rate of G-protein activation per bound receptor complex # s^-1
  // #kinh #Concentration of aCaMK needed for half-maximal inhibition (IC50) of cAMP production # uM
  // #kinhcng #Concentration of CaCaM needed for half-maximal inhibition of the CNG channel # uM
  // #n1 #Hill coefficient of the CNG channel activation function # unitless
  // #n2 #Hill coefficient of the Cl(Ca) channel activation function # unitless
  // #ninh #Steepness of the decreasing sigmoid representing aCaMK-mediated inhibition of cAMP synthesis # unitless
  // #ninhcng #Steepness of the sigmoid inhcng representing inhibition of CNG channel by CaCaM # unitless
  // #pd #Rate at which a cAMP molecule is degraded by phosphodiesterase # s^-1
  // #r1 #Rate of unbinding of odorant from receptor # s^-1
  // #r2 #Rate at which a G-protein becomes deactivate rate # s^-1
  // #smax #Maximal (uninhibited) rate of cAMP production by adenylyl cyclase per active G-protein # uM*s^-1
  // #vcl #Reversal potential of Cl(Ca) channels # mV
  // #vcng #Reversal potential of CNG channels # mV
  // #vl #Effective reversal potential for leak current # mV
  // #ge1 #Coupling strength between cilia and dendrite compartments # s^-1
  // #ge2 #Coupling strength between dendrite and soma compartments # mV^-1
  // #tau_soma #Relative time scale of soma to cilia dynamics #s^-1
  // #epsilon #Relative time scale of Na and K channel dynamics to voltage dynamics in soma #Unitless
  // #beta #Sharpness of Na and K channel response to voltage # mV
  // #beta_cap #Sharpness of soma capacitance dependence on voltage # mV
  // #cap_max #Maximum soma capacitance # nF
  // #cap_off #Voltage at which soma capacitance is half maximal #mV
  // #gamma #Na and K channel activation rate (sets height of channel manifold) #unitless
  // #VSspike #Reference voltage for action potentials by soma # mV
  // #VSamp #Sharpness of soma voltage response #mV
  // #vd #Diffusive dendritic voltage leak/loss. #s^-1
  // #Now parameters related to the experimental design:
  // #Micromolar concentration of odorant at full concentration
  // #Feel free to play with this!!
  // param ostim=100
  // #hv defines a heaviside-like pulse but with adjustable steepness parameter.
  // #Use this to describe a "smeared" square wave odorant plume reaching the neuron.
  // #Sharpness of odorant plume
  // param SHARPNESS=0.0001
  // hv(x,s)=1/(1+exp(-x/s))
  // #Pulse comes on for 1s at t=1 then on again for 1s at t=5.
  // PULSE(t)=(hv(t-1,SHARPNESS) - hv(t-2,SHARPNESS) + (hv(t-5,SHARPNESS) - hv(t-6,SHARPNESS)))
  // OD(t) = ostim*PULSE(t)
  // #The vertebrate ORN model has 3 compartments i) Cilia, ii) Dendrite, and iii) Soma.
  // #### Cilia Compartment ####
  // dbLR/dt = k1*OD(t)*(1-bLR)-r1*bLR
  // daG/dt = k2lin*bLR*(1-aG) - r2*aG
  // dcAMP/dt = (aG*smax)/(1 + ((CAMK/kinh)^ninh)) - pd*cAMP
  // dCa/dt = inf*Icng(cAMP,Vcilia) - ef*Ca + (-cc1lin*Ca + cc2*CaCAM)
  // dCaCAM/dt = cc1lin*Ca - cc2*CaCAM
  // dCAMK/dt = ck1lin*CaCAM - ck2*CAMK
  // dVcilia/dt = (1/cap)*(Icng(cAMP,Vcilia) + Icacl(Ca,Vcilia) + Il(Vcilia))
  // #### Dendrite Compartment ####
  // dVdend/dt = ge1*(Vcilia-Vdend) - vd*Vdend
  // #### Soma Compartment ####
  // dVsoma/dt = VOLTAGE(V(Vsoma),Vcilia,Vdend)
  // dNaKXsoma/dt = tau_soma*(epsilon*(gamma*(1+tanh(V(Vsoma)/beta))-NaKXsoma))
  // Input(x,y) = ge2*(x-y)
  // V(x) = (x-VSspike)/(0.5*VSamp)
  // VOLTAGE(x,y,z) = tau_soma*(3*x - x^3 + 2 - NaKXsoma + Input(y,z))
  // inhcng(CaCAM) = 1+(inhmax-1)*((CaCAM^ninhcng)/(CaCAM^ninhcng + kinhcng^ninhcng))
  // #Current models:
  // Icng(cAMP,Vcilia) = ((cnmax*cAMP^n1)/(cAMP^n1 + (inhcng(CaCAM)*hmc1)^n1))*(vcng-Vcilia)
  // Icacl(Ca,Vcilia) = ((clmax*Ca^n2)/(Ca^n2 + hmc2^n2))*(vcl-Vcilia)
  // Il(Vcilia) = gl*(vl-Vcilia)
  // cap_soma(Vcilia) = cap_max*(1+tanh((cap_off-Vcilia)/beta_cap))
  // Isoma(x,y,z) = cap_soma(Vcilia)*VOLTAGE(x,y,z)
  // #These auxilliary functions simply model what is actually measured by suction pipette recording
  // #from whole cell.
  // aux Icilia=-(Icng(cAMP,Vcilia) + Icacl(Ca,Vcilia))
  // aux WholeCell=Isoma(V(Vsoma),Vcilia,Vdend) -(Icng(cAMP,Vcilia) + Icacl(Ca,Vcilia))
  // aux Odorant=100*PULSE(t)
  // #The number 100 is used above simply to give the odorant pulses a nice magnitude when plotted in the
  // #same axes as the currrents. Unfortunately XPP does not have real double y-axis plots.
  // #Anyway, at least you can see the odorant pulses now!
  // #Initial conditions. Note that we actually run the model to steady-state in the absence
  // #of odorant for 1s before simulation of the experiment. See T0 option below.
  // #
  // init bLR=1.e-8
  // init aG=1.e-8
  // init cAMP=1.e-8
  // init Ca=1.e-8
  // init CaCAM=1.e-8
  // init CAMK=1.e-8
  // init Vcilia=vl
  // init Vdend=vl
  // init Vsoma=vl
  // init NaKXsoma=3.e-8
  // @ BUT=RunModel:ig,BUT=FitAxes:wf,MAXSTOR=2000000,T0=-1,TOTAL=8.0,BOUND=1000000
  // @ meth=cvode,TOL=1e-5,ATOL=1e-5,T0=-1,DT=0.00001,DTMIN=0.0001,DTMAX=0.001
  // @ XLO=0,XHI=8,YLO=-250,YHI=150
  // @ NPLOT=2,YP=WholeCell,YP2=Odorant
  // done
  // This file has been produced by sbmlutils.
  // Terms of use
  // Copyright © 2017 Matthias Koenig
  // Redistribution and use of any part of this model, with or without modification, are permitted provided that the following conditions are met:
  // Redistributions of this SBML file must retain the above copyright notice, this list of conditions and the following disclaimer.
  // Redistributions in a different form must reproduce the above copyright notice, this list of conditions and the following disclaimer in the documentation and/or other materials provided with the distribution.
  // This model is distributed in the hope that it will be useful, but WITHOUT ANY WARRANTY; without even the implied warranty of MERCHANTABILITY or FITNESS FOR A PARTICULAR PURPOSE.

  // Parameters:
  cap = 0.0035; cap is "cap = 0.0035";
  cc1lin = 0.6362; cc1lin is "cc1lin = 0.6362";
  cc2 = 20.9869; cc2 is "cc2 = 20.9869";
  ck1lin = 10.3615; ck1lin is "ck1lin = 10.3615";
  ck2 = 0.5833; ck2 is "ck2 = 0.5833";
  clmax = 0.8294; clmax is "clmax = 0.8294";
  cnmax = 3.6417; cnmax is "cnmax = 3.6417";
  ef = 7.9725; ef is "ef = 7.9725";
  gl = 15.4267; gl is "gl = 15.4267";
  hmc1 = 1.5965; hmc1 is "hmc1 = 1.5965";
  hmc2 = 7.6415; hmc2 is "hmc2 = 7.6415";
  inf = 1.4654; inf is "inf = 1.4654";
  inhmax = 0.98; inhmax is "inhmax = 0.98";
  k1 = 2.2748; k1 is "k1 = 2.2748";
  k2lin = 42.0896; k2lin is "k2lin = 42.0896";
  ki = 16.5304; ki is "ki = 16.5304";
  kinh = 1.3875; kinh is "kinh = 1.3875";
  kinhcng = 0.2242; kinhcng is "kinhcng = 0.2242";
  n1 = 5.6384; n1 is "n1 = 5.6384";
  n2 = 3.4161; n2 is "n2 = 3.4161";
  ninh = 0.4067; ninh is "ninh = 0.4067";
  ninhcng = 0.6306; ninhcng is "ninhcng = 0.6306";
  pd = 15.4669; pd is "pd = 15.4669";
  r1_9_4574 = 9.4574; r1_9_4574 is "r1 = 9.4574";
  r2_12_5485 = 12.5485; r2_12_5485 is "r2 = 12.5485";
  smax = 63.0987; smax is "smax = 63.0987";
  vcl = -7.3248; vcl is "vcl = -7.3248";
  vcng = 0.4641; vcng is "vcng = 0.4641";
  vl = -69.6653; vl is "vl = -69.6653";
  ge1 = 70.244; ge1 is "ge1 = 70.244";
  ge2 = 20.245; ge2 is "ge2 = 20.245";
  tau_soma = 6100; tau_soma is "tau_soma = 6100";
  epsilon = 0.09; epsilon is "epsilon = 0.09";
  beta = 0.092; beta is "beta = 0.092";
  beta_cap = 0.95; beta_cap is "beta_cap = 0.95";
  cap_max = 400.5; cap_max is "cap_max = 400.5";
  cap_off = -75; cap_off is "cap_off = -75";
  gamma = 43.92; gamma is "gamma = 43.92";
  vsspike = -58.23; vsspike is "vsspike = -58.23";
  vsamp = 14.36; vsamp is "vsamp = 14.36";
  vd = 0.05; vd is "vd = 0.05";
  ostim = 100; ostim is "ostim = 100";
  sharpness = 0.0001; sharpness is "sharpness = 0.0001";
  blr = 1e-8; blr is "blr = 1.e-8";
  ag = 1e-8; ag is "ag = 1.e-8";
  camp = 1e-8; camp is "camp = 1.e-8";
  ca = 1e-8; ca is "ca = 1.e-8";
  cacam = 1e-8; cacam is "cacam = 1.e-8";
  camk = 1e-8; camk is "camk = 1.e-8";
  vcilia = vl;
  vdend = vl;
  vsoma = vl;
  nakxsoma = 3e-8; nakxsoma is "nakxsoma = 3.e-8";
  icilia has dimensionless;
  wholecell has dimensionless;
  odorant has dimensionless;
  t has dimensionless; t is "model time";

  // Assignment rules:
  icilia := -(icng(camp, vcilia, cacam, cnmax, hmc1, inhmax, kinhcng, n1, ninhcng, vcng) + icacl(ca, vcilia, clmax, hmc2, n2, vcl));
  wholecell := isoma(v(vsoma, vsamp, vsspike), vcilia, vdend, beta_cap, cap_max, cap_off, ge2, nakxsoma, tau_soma, vcilia) - (icng(camp, vcilia, cacam, cnmax, hmc1, inhmax, kinhcng, n1, ninhcng, vcng) + icacl(ca, vcilia, clmax, hmc2, n2, vcl));
  odorant := 100*pulse(t, sharpness);
  t := time;

  // Rate rules:
  blr' = k1*od(t, ostim, sharpness)*(1 - blr) - r1_9_4574*blr;
  ag' = k2lin*blr*(1 - ag) - r2_12_5485*ag;
  camp' = ag*smax/(1 + (camk/kinh)^ninh) - pd*camp;
  ca' = inf*icng(camp, vcilia, cacam, cnmax, hmc1, inhmax, kinhcng, n1, ninhcng, vcng) - ef*ca + (-cc1lin*ca) + cc2*cacam;
  cacam' = cc1lin*ca - cc2*cacam;
  camk' = ck1lin*cacam - ck2*camk;
  vcilia' = 1/cap*(icng(camp, vcilia, cacam, cnmax, hmc1, inhmax, kinhcng, n1, ninhcng, vcng) + icacl(ca, vcilia, clmax, hmc2, n2, vcl) + il(vcilia, gl, vl));
  vdend' = ge1*(vcilia - vdend) - vd*vdend;
  vsoma' = voltage(v(vsoma, vsamp, vsspike), vcilia, vdend, ge2, nakxsoma, tau_soma);
  nakxsoma' = tau_soma*epsilon*(gamma*(1 + tanh(v(vsoma, vsamp, vsspike)/beta)) - nakxsoma);
end
