// SBML level 3 version 1

function max(x, y)
  piecewise(x, x > y, y);
end
max is "minimum";

function min(x, y)
  piecewise(x, x < y, y);
end
min is "maximum";

function heav(x)
  piecewise(0, x < 0, 0.5, x == 0, 1, x > 0, 0);
end
heav is "heavyside";

function mod(x, y)
  piecewise(x - y*ceil(x/y), xor(x < 0, y < 0), x - y*floor(x/y));
end
mod is "modulo";

model main()
  // XPP model
  // This model was converted from XPP ode format to SBML using sbmlutils-0.1.5a6.
  // % Model for action potential of skeletal muscle fiber
  // % Adrian RH, Chandler WK, Hodgkin AL. Voltage clamp experiments in striated muscle
  // % fibres. J Physiol 208:607-44, 1970.
  // % implemented by Dr. Sheng-Nan Wu
  // % Initial values
  // Initial Vm=-95, Vt=-95, m=0.0, h=1.0, n=0.0
  // % Stimulus
  // Param period=200, iStim_mag=3, iStim_beg=1, iStim_dur=0.5
  // iStim= iStim_mag * heav(mod(t,period)-iStim_beg) * heav(iStim_beg+iStim_dur-mod(t,period))
  // % Values of the model parameters
  // Param gNa_max=1.0, gK_max=0.415, gL_max=0.0024
  // Param ENa=50.0, EK=-70.0, EL=-95.0, Cm=0.0090, Ct=0.04, Rs=15.0
  // Param alpha_m_max=0.208
  // Param beta_m_max=2.081
  // Param alpha_n_max=0.0229
  // Param beta_n_max=0.09616
  // Param alpha_h_max=0.0156
  // Param beta_h_max=3.382
  // Param Em=-42.0, En=-40.0, Eh=-41.0
  // Param v_alpha_m=10.0, v_alpha_h=14.7, v_alpha_n=7.0
  // Param v_beta_m=18.0, v_beta_h=7.6, v_beta_n=40.0
  // % Expressions
  // Ina= (gNa_max * m * m * m * h * (Vm - ENa))
  // beta_n= (beta_n_max * exp(((En - Vm) / v_beta_n)))
  // beta_m= (beta_m_max * exp(((Em - Vm) / v_beta_m)))
  // beta_h= (beta_h_max / (1.0 + exp(((Eh - Vm) / v_beta_h))))
  // IT= ((Vm - Vt) / Rs)
  // IL= (gL_max * (Vm - EL))
  // IK= (gK_max * n * n * n * n * (Vm - EK))
  // alpha_n= (alpha_n_max * (Vm - En) / (1.0 - exp(((En - Vm) / v_alpha_n))))
  // alpha_m= (alpha_m_max * (Vm - Em) / (1.0 - exp(((Em - Vm) / v_alpha_m))))
  // alpha_h= (alpha_h_max * exp(((Eh - Vm) / v_alpha_h)))
  // % Differential equations
  // dVm/dt= ((iStim - (INa + IK + IL + IT)) / Cm)
  // dm/dt= ((alpha_m * (1.0 - m)) - (beta_m * m))
  // dh/dt= ((alpha_h * (1.0 - h)) - (beta_h * h))
  // dn/dt= ((alpha_n * (1.0 - n)) - (beta_n * n))
  // dVt/dt=((Vm - Vt) / (Rs * Ct))
  // % Numerical and plotting parameters for xpp
  // @ meth=Euler, dt=0.01, total=25
  // @ yp=v, yhi=50, ylo=-110, xlo=0, xhi=25, bounds=5000
  // done
  // This file has been produced by sbmlutils.
  // Terms of use
  // Copyright © 2017 Matthias Koenig
  // Redistribution and use of any part of this model, with or without modification, are permitted provided that the following conditions are met:
  // Redistributions of this SBML file must retain the above copyright notice, this list of conditions and the following disclaimer.
  // Redistributions in a different form must reproduce the above copyright notice, this list of conditions and the following disclaimer in the documentation and/or other materials provided with the distribution.
  // This model is distributed in the hope that it will be useful, but WITHOUT ANY WARRANTY; without even the implied warranty of MERCHANTABILITY or FITNESS FOR A PARTICULAR PURPOSE.

  // Parameters:
  vm = -95; vm is "vm = -95";
  vt = -95; vt is "vt = -95";
  m = 0; m is "m = 0.0";
  h = 1; h is "h = 1.0";
  n = 0; n is "n = 0.0";
  period = 200; period is "period = 200";
  istim_mag = 3; istim_mag is "istim_mag = 3";
  istim_beg = 1; istim_beg is "istim_beg = 1";
  istim_dur = 0.5; istim_dur is "istim_dur = 0.5";
  gna_max = 1; gna_max is "gna_max = 1.0";
  gk_max = 0.415; gk_max is "gk_max = 0.415";
  gl_max = 0.0024; gl_max is "gl_max = 0.0024";
  ena = 50; ena is "ena = 50.0";
  ek = -70; ek is "ek = -70.0";
  el = -95; el is "el = -95.0";
  cm = 0.009; cm is "cm = 0.0090";
  ct = 0.04; ct is "ct = 0.04";
  rs = 15; rs is "rs = 15.0";
  alpha_m_max = 0.208; alpha_m_max is "alpha_m_max = 0.208";
  beta_m_max = 2.081; beta_m_max is "beta_m_max = 2.081";
  alpha_n_max = 0.0229; alpha_n_max is "alpha_n_max = 0.0229";
  beta_n_max = 0.09616; beta_n_max is "beta_n_max = 0.09616";
  alpha_h_max = 0.0156; alpha_h_max is "alpha_h_max = 0.0156";
  beta_h_max = 3.382; beta_h_max is "beta_h_max = 3.382";
  em = -42; em is "em = -42.0";
  en = -40; en is "en = -40.0";
  eh = -41; eh is "eh = -41.0";
  v_alpha_m = 10; v_alpha_m is "v_alpha_m = 10.0";
  v_alpha_h = 14.7; v_alpha_h is "v_alpha_h = 14.7";
  v_alpha_n = 7; v_alpha_n is "v_alpha_n = 7.0";
  v_beta_m = 18; v_beta_m is "v_beta_m = 18.0";
  v_beta_h = 7.6; v_beta_h is "v_beta_h = 7.6";
  v_beta_n = 40; v_beta_n is "v_beta_n = 40.0";
  istim has dimensionless;
  ina has dimensionless;
  beta_n has dimensionless;
  beta_m has dimensionless;
  beta_h has dimensionless;
  it has dimensionless;
  il has dimensionless;
  ik has dimensionless;
  alpha_n has dimensionless;
  alpha_m has dimensionless;
  alpha_h has dimensionless;
  t has dimensionless; t is "model time";

  // Assignment rules:
  istim := istim_mag*heav(mod(t, period) - istim_beg)*heav(istim_beg + istim_dur - mod(t, period));
  ina := gna_max*m*m*m*h*(vm - ena);
  beta_n := beta_n_max*exp((en - vm)/v_beta_n);
  beta_m := beta_m_max*exp((em - vm)/v_beta_m);
  beta_h := beta_h_max/(1 + exp((eh - vm)/v_beta_h));
  it := (vm - vt)/rs;
  il := gl_max*(vm - el);
  ik := gk_max*n*n*n*n*(vm - ek);
  alpha_n := alpha_n_max*(vm - en)/(1 - exp((en - vm)/v_alpha_n));
  alpha_m := alpha_m_max*(vm - em)/(1 - exp((em - vm)/v_alpha_m));
  alpha_h := alpha_h_max*exp((eh - vm)/v_alpha_h);
  t := time;

  // Rate rules:
  vm' = (istim - (ina + ik + il + it))/cm;
  m' = alpha_m*(1 - m) - beta_m*m;
  h' = alpha_h*(1 - h) - beta_h*h;
  n' = alpha_n*(1 - n) - beta_n*n;
  vt' = (vm - vt)/(rs*ct);
end
