// SBML level 3 version 1

function max(x, y)
  piecewise(x, x > y, y);
end
max is "minimum";

function min(x, y)
  piecewise(x, x < y, y);
end
min is "maximum";

function heav(x)
  piecewise(0, x < 0, 0.5, x == 0, 1, x > 0, 0);
end
heav is "heavyside";

function mod(x, y)
  piecewise(x - y*ceil(x/y), xor(x < 0, y < 0), x - y*floor(x/y));
end
mod is "modulo";

function gammaf(vv, theta, sigma)
  1/(1 + exp(-(vv - theta)/sigma));
end

function zfunc(aa, ca, zz)
  1/(1 + aa^zz/ca^zz);
end

model main()
  // XPP model
  // This model was converted from XPP ode format to SBML using sbmlutils-0.1.5a6.
  // # Excitatory cortical neurons, normal [Ca].
  // #
  // number Cm=1.0
  // number pms=3,pns=4
  // number VNa=55.0,t_tauh=-40.5,t_taun=-27.0
  // number thetaa=-50.0,sigmaa=20.0,thetab=-80.0,sigmab=-6.0,tauBs=15.0
  // number thetam=-30.0,sigmam=9.5,sigmah=-7.0,sigman=10.0,sigmaz=5.0
  // number VCa=120
  // number thetar=-20.0,sigmar=10.0,thetac=-30,sigmac=7
  // number pwrc=1,pwrq=4
  // #
  // p gNa=35.0,gKdr=6.0,gL=0.05,Iapp=1.0
  // p gA=1.4,gNaP=0.2,gZ=1.0
  // p thetaz=-39.0,tauZs=75.0
  // p phi=10.0, thetah=-45.0
  // p thetan=-35.0,thetap=-41.0,sigmap=3.0
  // p VK=-90.0,VL=-70.0
  // p gCa=0.08,gKCa=10.0,gKAHP=5
  // p tauRs=1.0,aq=2,ac=6,tauq=450,tauCa=13,uuCa=0.13,tauKc=2
  // #
  // GAMMAF(VV,theta,sigma)=1.0/(1.0+exp(-(VV-theta)/sigma))
  // ZFUNC(AA,CA,zz)=1/(1+(AA^zz/CA^zz))
  // #
  // VVs'=(-gL*(VVs-VL)-INa-INaP-IKdr-IA-Iz-ICa-IKC-IAHP+Iappx)/Cm
  // hhs'=phi*(GAMMAF(VVs,thetah,sigmah)-hhs)/(1.0+7.5*GAMMAF(VVs,t_tauh,-6.0))
  // nns'=phi*(GAMMAF(VVs,thetan,sigman)-nns)/(1.0+5.0*GAMMAF(VVs,t_taun,-15.0))
  // bbs'=(GAMMAF(VVs,thetab,sigmab)-bbs)/tauBs
  // zzs'=(GAMMAF(VVs,thetaz,sigmaz)-zzs)/tauZs
  // rrs'=(GAMMAF(VVs,thetar,sigmar)-rrs)/tauRs
  // ccs'=(GAMMAF(VVs,thetac,sigmac)-ccs)/tauKc
  // qqs'=(ZFUNC(aq,Ca,pwrq)-qqs)/tauq
  // Ca'=-uuCa*ICa-Ca/tauCa
  // #
  // Iappx=Iapp
  // #if(t<=3.0)then(Iapp)else(0.0)
  // Minfs=GAMMAF(VVs,thetam,sigmam)
  // Pinfs=GAMMAF(VVs,thetap,sigmap)
  // Ainfs=GAMMAF(VVs,thetaa,sigmaa)
  // mKCa=ZFUNC(ac,Ca,pwrc)
  // #
  // INa=gNa*(Minfs^pms)*hhs*(VVs-VNa)
  // INaP=gNaP*Pinfs*(VVs-VNa)
  // IKdr=gKdr*(nns^pns)*(VVs-VK)
  // IA=gA*Ainfs^3*bbs*(VVs-VK)
  // Iz=gZ*zzs*(VVs-VK)
  // ICa=gCa*rrs^2*(VVs-VCa)
  // IKC=gKCa*mKCa*ccs*(VVs-VK)
  // IAHP=gKAHP*qqs*(VVs-VK)
  // #
  // VVs(0)=-71.962
  // hhs(0)=0.979199
  // nns(0)=0.0242166
  // bbs(0)=0.207565
  // zzs(0)=0.0013689
  // Ca[0]=0.000787
  // rrs(0)=0.005507
  // ccs(0)=0.002486
  // qqs(0)=0.0
  // #
  // @ MAXSTOR=800000
  // @ BACK=Black
  // @ XP=T
  // @ YP=VVs
  // @ AXES=2
  // @ TOTAL=500.0
  // @ DT=0.05
  // @ NJMP=1
  // @ T0=0.0
  // @ TRANS=0.0
  // @ NMESH=40
  // @ METH=rungekutta
  // @ DTMIN=0.001
  // @ DTMAX=1.0
  // @ TOLER=0.00001
  // @ BOUND=10000.0
  // @ DELAY=0
  // @ XLO=0.0, XHI=500.0, YLO=-90.0, YHI=30.0
  // @ NTST=50,NMAX=2000,NPR=50
  // @ DS=0.02,DSMIN=0.001,DSMAX=0.5
  // @ PARMIN=-10,PARMAX=50,NORMMIN=0.0,NORMMAX=10000.0
  // @ AUTOVAR=VVs1,AUTOXMIN=-10.0,AUTOXMAX=50.0,AUTOYMIN=-90.0,AUTOYMAX=50.0
  // done
  // This file has been produced by sbmlutils.
  // Terms of use
  // Copyright © 2017 Matthias Koenig
  // Redistribution and use of any part of this model, with or without modification, are permitted provided that the following conditions are met:
  // Redistributions of this SBML file must retain the above copyright notice, this list of conditions and the following disclaimer.
  // Redistributions in a different form must reproduce the above copyright notice, this list of conditions and the following disclaimer in the documentation and/or other materials provided with the distribution.
  // This model is distributed in the hope that it will be useful, but WITHOUT ANY WARRANTY; without even the implied warranty of MERCHANTABILITY or FITNESS FOR A PARTICULAR PURPOSE.

  // Parameters:
  cm = 1; cm is "cm = 1.0";
  pms = 3; pms is "pms = 3";
  pns = 4; pns is "pns = 4";
  vna = 55; vna is "vna = 55.0";
  t_tauh = -40.5; t_tauh is "t_tauh = -40.5";
  t_taun = -27; t_taun is "t_taun = -27.0";
  thetaa = -50; thetaa is "thetaa = -50.0";
  sigmaa = 20; sigmaa is "sigmaa = 20.0";
  thetab = -80; thetab is "thetab = -80.0";
  sigmab = -6; sigmab is "sigmab = -6.0";
  taubs = 15; taubs is "taubs = 15.0";
  thetam = -30; thetam is "thetam = -30.0";
  sigmam = 9.5; sigmam is "sigmam = 9.5";
  sigmah = -7; sigmah is "sigmah = -7.0";
  sigman = 10; sigman is "sigman = 10.0";
  sigmaz = 5; sigmaz is "sigmaz = 5.0";
  vca = 120; vca is "vca = 120";
  thetar = -20; thetar is "thetar = -20.0";
  sigmar = 10; sigmar is "sigmar = 10.0";
  thetac = -30; thetac is "thetac = -30";
  sigmac = 7; sigmac is "sigmac = 7";
  pwrc = 1; pwrc is "pwrc = 1";
  pwrq = 4; pwrq is "pwrq = 4";
  gna = 35; gna is "gna = 35.0";
  gkdr = 6; gkdr is "gkdr = 6.0";
  gl = 0.05; gl is "gl = 0.05";
  iapp = 1; iapp is "iapp = 1.0";
  ga = 1.4; ga is "ga = 1.4";
  gnap = 0.2; gnap is "gnap = 0.2";
  gz = 1; gz is "gz = 1.0";
  thetaz = -39; thetaz is "thetaz = -39.0";
  tauzs = 75; tauzs is "tauzs = 75.0";
  phi = 10; phi is "phi = 10.0";
  thetah = -45; thetah is "thetah = -45.0";
  thetan = -35; thetan is "thetan = -35.0";
  thetap = -41; thetap is "thetap = -41.0";
  sigmap = 3; sigmap is "sigmap = 3.0";
  vk = -90; vk is "vk = -90.0";
  vl = -70; vl is "vl = -70.0";
  gca = 0.08; gca is "gca = 0.08";
  gkca = 10; gkca is "gkca = 10.0";
  gkahp = 5; gkahp is "gkahp = 5";
  taurs = 1; taurs is "taurs = 1.0";
  aq = 2; aq is "aq = 2";
  ac = 6; ac is "ac = 6";
  tauq = 450; tauq is "tauq = 450";
  tauca = 13; tauca is "tauca = 13";
  uuca = 0.13; uuca is "uuca = 0.13";
  taukc = 2; taukc is "taukc = 2";
  vvs = -71.962; vvs is "vvs = -71.962";
  hhs = 0.979199; hhs is "hhs = 0.979199";
  nns = 0.0242166; nns is "nns = 0.0242166";
  bbs = 0.207565; bbs is "bbs = 0.207565";
  zzs = 0.0013689; zzs is "zzs = 0.0013689";
  rrs = 0.005507; rrs is "rrs = 0.005507";
  ccs = 0.002486; ccs is "ccs = 0.002486";
  qqs = 0; qqs is "qqs = 0.0";
  ca = 0 dimensionless;
  iappx has dimensionless;
  minfs has dimensionless;
  pinfs has dimensionless;
  ainfs has dimensionless;
  mkca has dimensionless;
  ina has dimensionless;
  inap has dimensionless;
  ikdr has dimensionless;
  ia has dimensionless;
  iz has dimensionless;
  ica has dimensionless;
  ikc has dimensionless;
  iahp has dimensionless;
  t has dimensionless; t is "model time";

  // Assignment rules:
  iappx := iapp;
  minfs := gammaf(vvs, thetam, sigmam);
  pinfs := gammaf(vvs, thetap, sigmap);
  ainfs := gammaf(vvs, thetaa, sigmaa);
  mkca := zfunc(ac, ca, pwrc);
  ina := gna*minfs^pms*hhs*(vvs - vna);
  inap := gnap*pinfs*(vvs - vna);
  ikdr := gkdr*nns^pns*(vvs - vk);
  ia := ga*ainfs^3*bbs*(vvs - vk);
  iz := gz*zzs*(vvs - vk);
  ica := gca*rrs^2*(vvs - vca);
  ikc := gkca*mkca*ccs*(vvs - vk);
  iahp := gkahp*qqs*(vvs - vk);
  // (no variable named) := 0.000787;
  t := time;

  // Rate rules:
  vvs' = (-gl*(vvs - vl) - ina - inap - ikdr - ia - iz - ica - ikc - iahp + iappx)/cm;
  hhs' = phi*(gammaf(vvs, thetah, sigmah) - hhs)/(1 + 7.5*gammaf(vvs, t_tauh, -6));
  nns' = phi*(gammaf(vvs, thetan, sigman) - nns)/(1 + 5*gammaf(vvs, t_taun, -15));
  bbs' = (gammaf(vvs, thetab, sigmab) - bbs)/taubs;
  zzs' = (gammaf(vvs, thetaz, sigmaz) - zzs)/tauzs;
  rrs' = (gammaf(vvs, thetar, sigmar) - rrs)/taurs;
  ccs' = (gammaf(vvs, thetac, sigmac) - ccs)/taukc;
  qqs' = (zfunc(aq, ca, pwrq) - qqs)/tauq;
  ca' = -uuca*ica - ca/tauca;
end
