// SBML level 3 version 1

function max(x, y)
  piecewise(x, x > y, y);
end
max is "minimum";

function min(x, y)
  piecewise(x, x < y, y);
end
min is "maximum";

function heav(x)
  piecewise(0, x < 0, 0.5, x == 0, 1, x > 0, 0);
end
heav is "heavyside";

function mod(x, y)
  piecewise(x - y*ceil(x/y), xor(x < 0, y < 0), x - y*floor(x/y));
end
mod is "modulo";

function i_dc(t, idc)
  idc;
end

function minf(v, beta_m, gamma_m)
  0.5*(1 + tanh((v - beta_m)/gamma_m));
end

function yinf(v, beta_y, gamma_y)
  0.5*(1 + tanh((v - beta_y)/gamma_y));
end

function tauy(v, beta_y, gamma_y)
  1/cosh((v - beta_y)/(2*gamma_y));
end

function itf(v, mt, ht, gtbar)
  gtbar*mt^2*ht*v;
end

function mtinf(v)
  1/(1 + exp(-(v + 60)/6.2));
end

function htinf(v)
  1/(1 + exp((v + 84)/4));
end

function tauht(v, apt)
  28 + apt*exp((v + 25)/(-10.5));
end

function zinf(v, beta_z, gamma_z)
  1/(1 + exp((beta_z - v)/gamma_z));
end

model main()
  // XPP model
  // This model was converted from XPP ode format to SBML using sbmlutils-0.1.5a6.
  // # Modified Morris-Lecar model from Prescott (2008, 2008) + T-current from Rubin (2004)
  // # modified from ml_salka.ode
  // #stim used in experiments, mean=0, std=0.1
  // table Iext stim.tab
  // #Iext(t)=0
  // nd=normal(0,0.3)
  // par dc_noise=6.9511
  // aux noise=dc_noise+nd
  // dV/dt = (i_dc(t)+amp*Iext(t)+dc_noise+nd-gna*minf(V)*(V-Vna)-gk*y*(V-VK)-gl*(V-Vl)-itf(V,mtinf(V),h)-gadap*z*(V-VK))/c
  // dy/dt = phi_y*(yinf(V)-y)/tauy(V)
  // dh/dt = qht*(htinf(V)-h)/tauht(V)
  // dz/dt = alpha_z*(zinf(V)-z)
  // par c=2
  // i_dc(t)=idc
  // # idc is -20.89 voor -80, -2 voor -70, 16.27 voor -60, 31.43 voor -50
  // par idc=32
  // par amp=150
  // aux stim=i_dc(t)+amp*Iext(t)
  // init V=-50, y=0, h=0, z=0
  // # FAST INWARD CURRENT (INa or activation variable)
  // # This is assumed to activate instantaneously with changes in voltage
  // # voltage-dependent activation curve is described by m
  // minf(V)=.5*(1+tanh((V-beta_m)/gamma_m))
  // # maximal conductance and reversal potential
  // par beta_m=-1.2,gamma_m=18
  // par gna=20,vna=50
  // # DELAYED RECTIFIER CURRENT (IKdr or recovery variable)
  // # this current activates more slowly than INa
  // # In this code, activation of IKdr is controlled by y
  // yinf(V)=.5*(1+tanh((V-beta_y)/gamma_y))
  // tauy(V)=1/cosh((V-beta_y)/(2*gamma_y))
  // # in the 2D model, varying beta_w shifts the w activation curve (w=y here) and can convert the neuron between class 1, 2, and 3
  // par beta_y=0, gamma_y=10
  // # maximal conductance and reversal potential
  // par gk=20, vk=-100, phi_y=0.15
  // # LEAK CURRENT (Il)
  // # just a passive leak conductance
  // par gl=2, vl=-70
  // # T CURRENT (IT)
  // itf(v,mt,ht)=gtbar*mt^2*ht*v
  // # fast (instantaneous) activation
  // mtinf(v) = 1/(1+exp(-(v+60)/6.2))
  // # slow inactivation
  // htinf(v) = 1/(1+exp((v+84)/4))
  // tauht(v)=(28+apt*exp((v+25)/(-10.5)))
  // par gtbar=20,qht=2.5,apt=1
  // # Adaptation current
  // zinf(v)=1/(1+exp((beta_z-v)/gamma_z))
  // # deze parameters zijn om hem op Destexhe 1993 K2 stroom te laten lijken
  // # par beta_z=-43, gamma_z=17, alpha_z=0.08, gadap=2
  // # Deze zijn voor de 'AHP-stroom'
  // par beta_z=0, gamma_z=5, alpha_z=0.005, gadap=40
  // # en deze voor de 'M-stroom'
  // #par beta_z=-35, gamma_z=5, alpha_z=0.005, gadap=2
  // # NB alpha_z lijk op 1/tau
  // # following parameters control duration of simulation and axes of default plot
  // @ total=303000,xlo=0,xhi=6000,ylo=-100,yhi=50
  // #@ total=12000,xlo=0,xhi=6000,ylo=-100,yhi=50
  // @ meth=euler, dt=0.1, bounds=1000
  // @ MAXSTOR=3030010
  // @ OUTPUT=prescott_rubin_adap.dat
  // done
  // This file has been produced by sbmlutils.
  // Terms of use
  // Copyright © 2017 Matthias Koenig
  // Redistribution and use of any part of this model, with or without modification, are permitted provided that the following conditions are met:
  // Redistributions of this SBML file must retain the above copyright notice, this list of conditions and the following disclaimer.
  // Redistributions in a different form must reproduce the above copyright notice, this list of conditions and the following disclaimer in the documentation and/or other materials provided with the distribution.
  // This model is distributed in the hope that it will be useful, but WITHOUT ANY WARRANTY; without even the implied warranty of MERCHANTABILITY or FITNESS FOR A PARTICULAR PURPOSE.

  // Parameters:
  dc_noise = 6.9511; dc_noise is "dc_noise = 6.9511";
  c = 2; c is "c = 2";
  idc = 32; idc is "idc = 32";
  amp = 150; amp is "amp = 150";
  v = -50; v is "v = -50";
  y = 0; y is "y = 0";
  h = 0; h is "h = 0";
  z = 0; z is "z = 0";
  beta_m = -1.2; beta_m is "beta_m = -1.2";
  gamma_m = 18; gamma_m is "gamma_m = 18";
  gna = 20; gna is "gna = 20";
  vna = 50; vna is "vna = 50";
  beta_y = 0; beta_y is "beta_y = 0";
  gamma_y = 10; gamma_y is "gamma_y = 10";
  gk = 20; gk is "gk = 20";
  vk = -100; vk is "vk = -100";
  phi_y = 0.15; phi_y is "phi_y = 0.15";
  gl = 2; gl is "gl = 2";
  vl = -70; vl is "vl = -70";
  gtbar = 20; gtbar is "gtbar = 20";
  qht = 2.5; qht is "qht = 2.5";
  apt = 1; apt is "apt = 1";
  beta_z = 0; beta_z is "beta_z = 0";
  gamma_z = 5; gamma_z is "gamma_z = 5";
  alpha_z = 0.005; alpha_z is "alpha_z = 0.005";
  gadap = 40; gadap is "gadap = 40";
  nd has dimensionless;
  noise has dimensionless;
  stim has dimensionless;
  t has dimensionless; t is "model time";

  // Assignment rules:
  nd := normal(0, 0.3);
  noise := dc_noise + nd;
  stim := i_dc(t, idc) + amp*iext(t);
  t := time;

  // Rate rules:
  v' = (i_dc(t, idc) + amp*iext(t) + dc_noise + nd - gna*minf(v, beta_m, gamma_m)*(v - vna) - gk*y*(v - vk) - gl*(v - vl) - itf(v, mtinf(v), h, gtbar) - gadap*z*(v - vk))/c;
  y' = phi_y*(yinf(v, beta_y, gamma_y) - y)/tauy(v, beta_y, gamma_y);
  h' = qht*(htinf(v) - h)/tauht(v, apt);
  z' = alpha_z*(zinf(v, beta_z, gamma_z) - z);
end
