// SBML level 3 version 1

function max(x, y)
  piecewise(x, x > y, y);
end
max is "minimum";

function min(x, y)
  piecewise(x, x < y, y);
end
min is "maximum";

function heav(x)
  piecewise(0, x < 0, 0.5, x == 0, 1, x > 0, 0);
end
heav is "heavyside";

function mod(x, y)
  piecewise(x - y*ceil(x/y), xor(x < 0, y < 0), x - y*floor(x/y));
end
mod is "modulo";

model main()
  // XPP model
  // This model was converted from XPP ode format to SBML using sbmlutils-0.1.5a6.
  // # Code for article by N. Huebel and M. A. Dahlem:
  // # "Dynamics from seconds to hours in Hodgkin–Huxley model with
  // # time-dependent ion concentrations and buffer reservoirs"
  // # PLoS Comp Biol (2014)
  // # email: niklas.huebel@gmail.com
  // # Oct. 7, 2014
  // #
  // #
  // # README
  // #
  // # This code computes time series like in Fig. 5. SD is
  // # triggered either by current stimulation (dynamics of variable
  // # "stim") or by pump interruption (dynamics of pump coefficient
  // # "z"). Two regulation schemes for potassium are implemented:
  // # glial buffering and diffusive coupling to the vascular system
  // # (with a switch parameter "s", see below). For diffusive
  // # coupling with elevated "k_bath" values the time series of Fig. 7
  // # can be simulated.
  // #
  // ##################################
  // # RATE EQUATIONS FOR 5D SD MODEL #
  // ##################################
  // v' = 1000. * v_DOT
  // n' = 1000. * n_DOT
  // ki' = 1000. * ki_DOT
  // cli' = 1000. * cli_DOT
  // dk' = 1000. * dk_DOT
  // #########################################################
  // # STIMULATE MEMBRANE WITH A 0.5sec DEPOLARIZING CURRENT #
  // #########################################################
  // stim' = 0
  // global 1 1.000000000001*t - 20.0 {stim=Amp}
  // global 1 1.000000000001*t - (20.0 + 0.5) {stim=0}
  // par Amp=0.
  // #par Amp=100.
  // #####################################
  // # SWITCH PUMP OFF FOR delta SECONDS #
  // #####################################
  // z' = 0
  // global 1 1.000000000001*t - 20.0 {z=0.0}
  // global 1 1.000000000001*t - (20.0 + delta) {z=1.0}
  // #par delta=0.
  // par delta=9.5
  // ######################
  // # INITIAL CONDITIONS #
  // ######################
  // init v=-67.193253
  // init n=0.069410823
  // init ki=129.25764
  // init cli=9.900239
  // init dk=0
  // init stim=0
  // init z=1
  // #########################
  // # REGULATION PARAMETERS #
  // #########################
  // # s=0: glial buffering
  // # s=1: diffusive coupling
  // # k_bath is the bath concentration
  // par k_bath=4
  // par s=0
  // ##########
  // # GATING #
  // ##########
  // A_N = 0.01 * (v + 34.0) / (1.0 - exp(-0.1 * (v + 34.0)))
  // B_N = 0.125 * exp(-(v + 44.0) / 80.0)
  // A_M = 0.1 * (v + 30.0) / (1.0 - exp(-0.1 * (v + 30.0)))
  // B_M = 4.0 * exp(-(v + 55.0) / 18.0)
  // m = A_M / (A_M + B_M)
  // h = 1 - 1. / (1 + exp(-6.5*(n-0.35)))
  // ######################
  // # ION CONCENTRATIONS #
  // ######################
  // par vol_i=2.16
  // par vol_e=0.72
  // par ki0=129.25764
  // par nai0=25.231485
  // par cli0=9.900239
  // par ke0=4.
  // par nae0=125.30555
  // par cle0=123.2716
  // nai = nai0 + ki0 - ki - cli0 + cli
  // nae = (nai0 * Vol_i + nae0 * vol_e - nai * vol_i) / vol_e
  // cle = (cli0 * Vol_i + cle0 * vol_e - cli * vol_i) / vol_e
  // ke = (ki0 * Vol_i + ke0 * vol_e - ki * vol_i) / vol_e + dk
  // #####################
  // # NERNST POTENTIALS #
  // #####################
  // EK = 26.64 * log(ke /ki)
  // ENA = 26.64 * log(nae/nai)
  // ECL =-26.64 * log(cle/cli)
  // ############
  // # CURRENTS #
  // ############
  // par G_NA_L=0.0175
  // par G_NA_G=100.
  // par G_K_L=0.05
  // par G_K_G=40.
  // par G_CL_L=0.02
  // par NA_PUMP=25
  // par K_PUMP=5.5
  // par MAX_PUMP=6.8
  // I_NA_L = G_NA_L * (v - ENA)
  // I_NA_G = G_NA_G * m**3 * h * (v - ENA)
  // I_K_L = G_K_L * (v - EK)
  // I_K_G = G_K_G * n**4 * (v - EK)
  // I_CL_L = G_CL_L * (v - ECL)
  // IPUMP = MAX_PUMP / (1.0 + exp((NA_PUMP - NAI)/3.)) / (1. + exp(K_PUMP - ke)) * z
  // #################
  // # FULL CURRENTS #
  // #################
  // I_NA = I_NA_L + I_NA_G + 3. * IPUMP
  // I_K = I_K_L + I_K_G - 2. * IPUMP
  // ########################
  // # POTASSIUM REGULATION #
  // ########################
  // par lambda=3.0e-05
  // par b0=500
  // par K_cr=15.
  // par k1=5.e-8
  // J_DIFF = lambda * (k_bath - ke)
  // dk_DOT_1 = J_DIFF
  // k2 = k1 / (1 + exp((K_cr - ke) / 1.09))
  // dk_DOT_0 = -k1 * dk - k2 * ke * (B0 + dk)
  // #############################
  // # RATE FUNCTIONS FOR SOLVER #
  // #############################
  // par PHI=3
  // par C=1
  // par CONV=9.55589e-05
  // v_DOT = -1. / C * (I_CL_L + I_NA + I_K - stim)
  // n_DOT = PHI * (A_N * (1 - n) - B_N * n)
  // ki_DOT = -1. / Vol_i * CONV * I_K
  // cli_DOT = 1. / Vol_i * CONV * I_CL_L
  // dk_DOT = (1 - s) * dk_DOT_0 + s * dk_DOT_1
  // ###############
  // # AUXILIARIES #
  // ###############
  // aux _nai = nai
  // aux _nae = nae
  // aux _cle = cle
  // aux _ke = ke
  // aux _EK = EK
  // aux _ENA = ENA
  // aux _ECL = ECL
  // aux _I_NA_L = I_NA_L
  // aux _I_NA_G = I_NA_G
  // aux _I_K_L = I_K_L
  // aux _I_K_G = I_K_G
  // aux _I_CL_L = I_CL_L
  // aux _IPUMP = IPUMP
  // aux _I_NA = I_NA
  // aux _I_K = I_K
  // ########################
  // # INTEGRATION NUMERICS #
  // ########################
  // @ meth=stiff
  // @ dt=5e-2
  // @ maxstor=10000000, bounds=10000000
  // @ total=500
  // @ bell=0
  // ################
  // # PLOT OPTIONS #
  // ################
  // @ xhi=500
  // @ nplot=4, yp1=v, yp2=_EK, yp3=_ENA, yp4=_ECL, ylo=-150, yhi=160
  // done
  // This file has been produced by sbmlutils.
  // Terms of use
  // Copyright © 2017 Matthias Koenig
  // Redistribution and use of any part of this model, with or without modification, are permitted provided that the following conditions are met:
  // Redistributions of this SBML file must retain the above copyright notice, this list of conditions and the following disclaimer.
  // Redistributions in a different form must reproduce the above copyright notice, this list of conditions and the following disclaimer in the documentation and/or other materials provided with the distribution.
  // This model is distributed in the hope that it will be useful, but WITHOUT ANY WARRANTY; without even the implied warranty of MERCHANTABILITY or FITNESS FOR A PARTICULAR PURPOSE.

  // Parameters:
  amp = 0; amp is "amp = 0.";
  delta = 9.5; delta is "delta = 9.5";
  v = -67.193253; v is "v = -67.193253";
  n = 0.069410823; n is "n = 0.069410823";
  ki = 129.25764; ki is "ki = 129.25764";
  cli = 9.900239; cli is "cli = 9.900239";
  dk = 0; dk is "dk = 0";
  stim = 0; stim is "stim = 0";
  z = 1; z is "z = 1";
  k_bath = 4; k_bath is "k_bath = 4";
  s = 0; s is "s = 0";
  vol_i = 2.16; vol_i is "vol_i = 2.16";
  vol_e = 0.72; vol_e is "vol_e = 0.72";
  ki0 = 129.25764; ki0 is "ki0 = 129.25764";
  nai0 = 25.231485; nai0 is "nai0 = 25.231485";
  cli0 = 9.900239; cli0 is "cli0 = 9.900239";
  ke0 = 4; ke0 is "ke0 = 4.";
  nae0 = 125.30555; nae0 is "nae0 = 125.30555";
  cle0 = 123.2716; cle0 is "cle0 = 123.2716";
  g_na_l = 0.0175; g_na_l is "g_na_l = 0.0175";
  g_na_g = 100; g_na_g is "g_na_g = 100.";
  g_k_l = 0.05; g_k_l is "g_k_l = 0.05";
  g_k_g = 40; g_k_g is "g_k_g = 40.";
  g_cl_l = 0.02; g_cl_l is "g_cl_l = 0.02";
  na_pump = 25; na_pump is "na_pump = 25";
  k_pump = 5.5; k_pump is "k_pump = 5.5";
  max_pump = 6.8; max_pump is "max_pump = 6.8";
  lambda = 3e-5; lambda is "lambda = 3.0e-05";
  b0 = 500; b0 is "b0 = 500";
  k_cr = 15; k_cr is "k_cr = 15.";
  k1 = 5e-8; k1 is "k1 = 5.e-8";
  phi = 3; phi is "phi = 3";
  c = 1; c is "c = 1";
  conv = 9.55589e-5; conv is "conv = 9.55589e-05";
  a_n has dimensionless;
  b_n has dimensionless;
  a_m has dimensionless;
  b_m has dimensionless;
  m has dimensionless;
  h has dimensionless;
  nai has dimensionless;
  nae has dimensionless;
  cle has dimensionless;
  ke has dimensionless;
  ek has dimensionless;
  ena has dimensionless;
  ecl has dimensionless;
  i_na_l has dimensionless;
  i_na_g has dimensionless;
  i_k_l has dimensionless;
  i_k_g has dimensionless;
  i_cl_l has dimensionless;
  ipump has dimensionless;
  i_na has dimensionless;
  i_k has dimensionless;
  j_diff has dimensionless;
  dk_dot_1 has dimensionless;
  k2 has dimensionless;
  dk_dot_0 has dimensionless;
  v_dot has dimensionless;
  n_dot has dimensionless;
  ki_dot has dimensionless;
  cli_dot has dimensionless;
  dk_dot has dimensionless;
  _nai has dimensionless;
  _nae has dimensionless;
  _cle has dimensionless;
  _ke has dimensionless;
  _ek has dimensionless;
  _ena has dimensionless;
  _ecl has dimensionless;
  _i_na_l has dimensionless;
  _i_na_g has dimensionless;
  _i_k_l has dimensionless;
  _i_k_g has dimensionless;
  _i_cl_l has dimensionless;
  _ipump has dimensionless;
  _i_na has dimensionless;
  _i_k has dimensionless;
  t has dimensionless; t is "model time";

  // Assignment rules:
  a_n := 0.01*(v + 34)/(1 - exp(-0.1*(v + 34)));
  b_n := 0.125*exp(-(v + 44)/80);
  a_m := 0.1*(v + 30)/(1 - exp(-0.1*(v + 30)));
  b_m := 4*exp(-(v + 55)/18);
  m := a_m/(a_m + b_m);
  h := 1 - 1/(1 + exp(-6.5*(n - 0.35)));
  nai := nai0 + ki0 - ki - cli0 + cli;
  nae := (nai0*vol_i + nae0*vol_e - nai*vol_i)/vol_e;
  cle := (cli0*vol_i + cle0*vol_e - cli*vol_i)/vol_e;
  ke := (ki0*vol_i + ke0*vol_e - ki*vol_i)/vol_e + dk;
  ek := 26.64*log10(ke/ki);
  ena := 26.64*log10(nae/nai);
  ecl := -26.64*log10(cle/cli);
  i_na_l := g_na_l*(v - ena);
  i_na_g := g_na_g*m^3*h*(v - ena);
  i_k_l := g_k_l*(v - ek);
  i_k_g := g_k_g*n^4*(v - ek);
  i_cl_l := g_cl_l*(v - ecl);
  ipump := max_pump/(1 + exp((na_pump - nai)/3))/(1 + exp(k_pump - ke))*z;
  i_na := i_na_l + i_na_g + 3*ipump;
  i_k := i_k_l + i_k_g - 2*ipump;
  j_diff := lambda*(k_bath - ke);
  dk_dot_1 := j_diff;
  k2 := k1/(1 + exp((k_cr - ke)/1.09));
  dk_dot_0 := -k1*dk - k2*ke*(b0 + dk);
  v_dot := -1/c*(i_cl_l + i_na + i_k - stim);
  n_dot := phi*(a_n*(1 - n) - b_n*n);
  ki_dot := -1/vol_i*conv*i_k;
  cli_dot := 1/vol_i*conv*i_cl_l;
  dk_dot := (1 - s)*dk_dot_0 + s*dk_dot_1;
  _nai := nai;
  _nae := nae;
  _cle := cle;
  _ke := ke;
  _ek := ek;
  _ena := ena;
  _ecl := ecl;
  _i_na_l := i_na_l;
  _i_na_g := i_na_g;
  _i_k_l := i_k_l;
  _i_k_g := i_k_g;
  _i_cl_l := i_cl_l;
  _ipump := ipump;
  _i_na := i_na;
  _i_k := i_k;
  t := time;

  // Rate rules:
  v' = 1000*v_dot;
  n' = 1000*n_dot;
  ki' = 1000*ki_dot;
  cli' = 1000*cli_dot;
  dk' = 1000*dk_dot;
  stim' = 0;
  z' = 0;

  // Events:
  e0: at (1*t - 20 >= 0), t0=false: stim = amp;
  e1: at (1*t - (20 + 0.5) >= 0), t0=false: stim = 0;
  e2: at (1*t - 20 >= 0), t0=false: z = 0;
  e3: at (1*t - (20 + delta) >= 0), t0=false: z = 1;
end
