// SBML level 3 version 1

function max(x, y)
  piecewise(x, x > y, y);
end
max is "minimum";

function min(x, y)
  piecewise(x, x < y, y);
end
min is "maximum";

function heav(x)
  piecewise(0, x < 0, 0.5, x == 0, 1, x > 0, 0);
end
heav is "heavyside";

function mod(x, y)
  piecewise(x - y*ceil(x/y), xor(x < 0, y < 0), x - y*floor(x/y));
end
mod is "modulo";

function sinf(v, ss, thetas)
  1/(1 + exp(-(v + thetas)/ss));
end

function sinfca(v, ssca, thetas)
  1/(1 + exp(-(v + thetas)/ssca));
end

function minf(v, sm, thetam)
  1/(1 + exp(-(v + thetam)/sm));
end

function hinf(v, sh, thetah)
  1/(1 + exp((v - thetah)/sh));
end

function ninf(v, sn, thetan)
  1/(1 + exp((v - thetan)/sn));
end

function taun(v, sigman, taun0, taun1, thn)
  taun0 + taun1/(1 + exp((v + thn)/sigman));
end

function tauh(v, sigmah, tauh0, tauh1, thh)
  tauh0 + tauh1/(1 + exp((v + thh)/sigmah));
end

function rinf(v, kr, thetar)
  1/(1 + exp((v - thetar)/kr));
end

function taur(v, sigmar, taur0, taur1, thr)
  taur0 + taur1/(1 + exp((v + thr)/sigmar));
end

function tinf(v, kt, thetat)
  1/(1 + exp((v - thetat)/kt));
end

function rnew(r, rsig, rth)
  1/(1 + exp((r - rth)/rsig)) - 1/(1 + exp(-rth/rsig));
end

function sinfg(vg, ksg, thetasg)
  1/(1 + exp(-(vg - thetasg)/ksg));
end

function sinf1g(vg, ks1g, thetas1g)
  1/(1 + exp(-(vg - thetas1g)/ks1g));
end

function rinfg(vg, krg, thetarg)
  1/(1 + exp(-(vg - thetarg)/krg));
end

function minfg(vg, sigmamg, thetamg)
  1/(1 + exp(-(vg - thetamg)/sigmamg));
end

function ninfg(vg, sigmang, thetang)
  1/(1 + exp(-(vg - thetang)/sigmang));
end

function taung(vg, sng, taun0g, taun1g, thng)
  taun0g + taun1g/(1 + exp(-(vg - thng)/sng));
end

function hinfg(vg, sigmahg, thetahg)
  1/(1 + exp(-(vg - thetahg)/sigmahg));
end

function tauhg(vg, shg, tauh0g, tauh1g, thhg)
  tauh0g + tauh1g/(1 + exp(-(vg - thhg)/shg));
end

function hv(v)
  1/(1 + exp(-v/0.001));
end

function il(v, gl, vl)
  gl*(v - vl);
end

function ina(v, h, gna, sm, thetam, vna)
  gna*minf(v, thetam, sm)^3*h*(v - vna);
end

function ik(v, n, gk, vk)
  gk*n^4*(v - vk);
end

function iahp(v, ca, gahp, k1, vk)
  gahp*(v - vk)*ca/(ca + k1);
end

function ica(v, gca, ssca, thetas, vca)
  gca*sinfca(v, thetas, ssca)^2*(v - vca);
end

function it(v, r, gt, kt, rsig, rth, thetat, vca)
  gt*tinf(v, kt, thetat)^3*rnew(r, rsig, rth)^2*(v - vca);
end

function itg(vg, rg, gtg, ksg, thetasg, vcag)
  gtg*sinfg(vg, ksg, thetasg)^3*rg*(vg - vcag);
end

function inag(vg, hg, gnag, sigmamg, thetamg, vnag)
  gnag*minfg(vg, sigmamg, thetamg)^3*hg*(vg - vnag);
end

function ikg(vg, ng, gkg, vkg)
  gkg*ng^4*(vg - vkg);
end

function iahpg(vg, cag, gahpg, k1g, vkg)
  gahpg*(vg - vkg)*cag/(cag + k1g);
end

function icag(vg, gcag, ks1g, thetas1g, vcag)
  gcag*sinf1g(vg, thetas1g, ks1g)^2*(vg - vcag);
end

function ilg(vg, glg, vlg)
  glg*(vg - vlg);
end

model main()
  // XPP model
  // This model was converted from XPP ode format to SBML using sbmlutils-0.1.5a6.
  // #this is the stimulation protocol with three electrodes attached to 5th, 6th and 7th STN units
  // #with a local (w1=0.3,w2=0) or non-local (w1=0.3,w2=0.1) spread of stimulation signals.
  // #Used to generate figures 5 and 7 in PLoS One paper.
  // #stimulation parameters
  // par w1=0.3,w2=0,Kn=60,gsyn=1.4,iapp=8,fr=0.01,t0=1000,Cn=0.04
  // # stn parameters
  // p vl=-60.,vna=55.,vk=-80.,thetam=30,sm=15
  // p gl=2.25,gna=50.,gk=40.,tn=1.,th=0.05
  // p gahp=9.,gca=.5,vca=140.,k1=15.,eps=5e-05
  // p kca=22.5,thetas=39.,ss=2.,xp=1.,i=0.,ssca=8.
  // p thetah=-39.,sh=3.1,thetan=-32.,sn=-8.
  // p taun0=1.,taun1=100.,thn=80.,sigman=26.
  // p tauh0=1.,tauh1=500,thh=57.,sigmah=3.,phi=5.
  // p thetat=-63.,kt=-7.8,gt=.5,phir=2.
  // p thetar=-67.,kr=2.,taur0=7.1,taur1=17.5,thr=-68,sigmar=2.2
  // p alpha=5,beta=1.,ab=-30.,vsyn=-100.
  // p rth=.25,rsig=-.07,i1=0.,rho1=.5,a1=.9
  // # gp parameters
  // p gnag=120.,gkg=30.,gahpg=30.,gtg=.5,gcag=.1,glg=.1
  // p vnag=55.,vkg=-80.,vcag=120.,vlg=-55.
  // p thetasg=-57.,ksg=2.,thetas1g=-35.,ks1g=2.
  // p thetarg=-70.,krg=-2.,taurg=30.
  // p thetamg=-37.,sigmamg=10.
  // p thetang=-50.,sigmang=14.
  // p taun0g=.05,taun1g=.27,thng=-40.,sng=-12.
  // p thetahg=-58.,sigmahg=-12.
  // p tauh0g=.05,tauh1g=.27,thhg=-40.,shg=-12.
  // p k1g=30.,kcag=3.,epsg=0.0055
  // p phig=1.,deltang=.3,deltahg=.1
  // p gsyngg=.0,vsyngg=-80.
  // p gsyng=0.4,vsyng=0,alphag=2.,betag=.14,abg=-20
  // p ka=.33
  // # stn functions
  // sinf(v)=1./(1.+exp(-(v+thetas)/ss))
  // sinfca(v)=1./(1.+exp(-(v+thetas)/ssca))
  // minf(v)=1./(1.+exp(-(v+thetam)/sm))
  // hinf(v)=1./(1.+exp((v-thetah)/sh))
  // ninf(v)=1./(1.+exp((v-thetan)/sn))
  // taun(v)=taun0+taun1/(1+exp((v+thn)/sigman))
  // tauh(v)=tauh0+tauh1/(1+exp((v+thh)/sigmah))
  // rinf(v)=1/(1+exp((v-thetar)/kr))
  // taur(v)=taur0+taur1/(1+exp((v+thr)/sigmar))
  // tinf(v)=1/(1+exp((v-thetat)/kt))
  // rnew(r)=1/(1+exp((r-rth)/rsig))-1/(1+exp(-rth/rsig))
  // # gp functions
  // sinfg(vg)=1/(1+exp(-(vg-thetasg)/ksg))
  // sinf1g(vg)=1/(1+exp(-(vg-thetas1g)/ks1g))
  // rinfg(vg)=1/(1+exp(-(vg-thetarg)/krg))
  // minfg(vg)=1./(1.+exp(-(vg-thetamg)/sigmamg))
  // ninfg(vg)=1./(1.+exp(-(vg-thetang)/sigmang))
  // taung(vg)=taun0g+taun1g/(1+exp(-(vg-thng)/sng))
  // hinfg(vg)=1./(1.+exp(-(vg-thetahg)/sigmahg))
  // tauhg(vg)=tauh0g+tauh1g/(1+exp(-(vg-thhg)/shg))
  // hv(v)=1./(1.+exp(-v/.001))
  // # stn currents
  // il(v)=gl*(v-vl)
  // ina(v,h)=gna*(minf(v))^3*h*(v-vna)
  // ik(v,n)=gk*n^4*(v-vk)
  // iahp(v,ca)=gahp*(v-vk)*ca/(ca+k1)
  // ica(v)=gca*((sinfca(v))^2)*(v-vca)
  // it(v,r)=gt*(tinf(v)**3)*(rnew(r)^2)*(v-vca)
  // ###################################################################
  // circular structure
  // ###################################################################
  // isyn1=gsyn*(sg10+sg1+sg2)*(v1-vsyn)
  // isyn[2..9]=gsyn*(sg[j-1]+sg[j]+sg[j+1])*(v[j]-vsyn)
  // isyn10=gsyn*(sg9+sg10+sg1)*(v10-vsyn)
  // ###################################################################
  // # gp currents
  // itg(vg,rg)=gtg*(sinfg(vg)^3)*rg*(vg-vcag)
  // inag(vg,hg)=gnag*(minfg(vg)^3)*hg*(vg-vnag)
  // ikg(vg,ng)=gkg*(ng^4)*(vg-vkg)
  // iahpg(vg,cag)=gahpg*(vg-vkg)*cag/(cag+k1g)
  // icag(vg)=gcag*((sinf1g(vg))^2)*(vg-vcag)
  // ilg(vg)=glg*(vg-vlg)
  // ###########################################
  // isyng[1..10]=gsyng*s[j]*(vg[j]-vsyng)
  // ###########################################
  // #stimulation current
  // C1=Cn*Heav(t-t0)
  // tau=0.5/fr
  // tau0=0.5/fr
  // Istim1=0.
  // Istim2=0.
  // Istim3=w2*Istim5
  // Istim4=w1*Istim5+w2*Istim6
  // Istim5=2.*Kn*(1./(1.+exp(-(C1*(delay(x1,tau0+tau)-delay(x1,tau0)))/14.))-0.5)+w1*Istim6+w2*Istim7
  // Istim6=2.*Kn*(1./(1.+exp(-(C1*(delay(x2,tau0+tau)-delay(x2,tau0)))/14.))-0.5)+w1*(Istim5+Istim7)
  // Istim7=2.*Kn*(1./(1.+exp(-(C1*(delay(x3,tau0+tau)-delay(x3,tau0)))/14.))-0.5)+w1*Istim6+w2*Istim5
  // Istim8=w1*Istim7+w2*Istim6
  // istim9=w2*Istim7
  // Istim10=0.
  // aux Stim5=Istim5
  // aux Stim6=Istim6
  // aux Stim7=Istim7
  // # LFP of the neuronal population,assumes recording with electrode at 5th STN neuron
  // Lfp5=0.1*(-isyn5+Istim5-w1*(isyn4+isyn6)-w2*(isyn3+isyn7))
  // Lfp6=0.1*(-isyn6+Istim6-w1*(isyn5+isyn7)-w2*(isyn4+isyn8))
  // Lfp7=0.1*(-isyn7+Istim7-w1*(isyn6+isyn8)-w2*(isyn5+isyn9))
  // aux Muf5=Lfp5
  // aux Muf6=Lfp6
  // aux Muf7=Lfp7
  // # stn initial conditions
  // i V1=-71.2,V2=-66.2,V3=-55.8,V4=-64.6,V5=-61.2,V6=-69.0,V7=-71.4,V8=-69.3,V9=-68.6,V10=-72.0
  // i H1=0.18,H2=0.35,H3=0.26,H4=0.28,H5=0.19,H6=0.31,H7=0.15,H8=0.23,H9=0.22,H10=0.34
  // i N1=0.33,N2=0.02,N3=0.1,N4=0.05,N5=0.26,N6=0.05,N7=0.44,N8=0.11,N9=0.11,N10=0.03
  // i R1=0.51,R2=0.57,R3=0.3,R4=0.63,R5=0.48,R6=0.54,R7=0.42,R8=0.62,R9=0.5,R10=0.61
  // i CA1=0.53,CA2=0.52,CA3=0.51,CA4=0.51,CA5=0.51,CA6=0.51,CA7=0.5,CA8=0.50,CA9=0.45,CA10=0.45
  // i S1=0.015,S2=0.,S3=0.,S4=0.,S5=0.003,S6=0.,S7=0.22,S8=0.,S9=0.,S10=0.
  // # gp initial conditions
  // i VG1=-66.42,VG2=-59.05,VG3=32.92,VG4=-59.91,VG5=-62.2,VG6=-59.7,VG7=-77.47,VG8=-61.83,VG9=-42.9,VG10=-74.73
  // i NG1=0.24,NG2=0.34,NG3=0.46,NG4=0.33,NG5=0.28,NG6=0.33,NG7=0.62,NG8=0.29,NG9=0.38,NG10=0.34
  // i HG1=0.55,HG2=0.52,HG3=0.51,HG4=0.55,HG5=0.58,HG6=0.52,HG7=0.29,HG8=0.59,HG9=0.54,HG10=0.42
  // i RG1=0.22,RG2=0.1,RG3=0.16,RG4=0.12,RG5=0.19,RG6=0.12,RG7=0.15,RG8=0.18,RG9=0.16,RG10=0.13
  // i CAG1=0.43,CAG2=0.28,CAG3=0.35,CAG4=0.31,CAG5=0.39,CAG6=0.31,CAG7=0.40,CAG8=0.39,CAG9=0.34,CAG10=0.33
  // i SG1=0.48,SG2=0.02,SG3=0.33,SG4=0.04,SG5=0.37,SG6=0.04,SG7=0.67,SG8=0.13,SG9=0.29,SG10=0.54
  // #delay initial conditions
  // i x1=0.,x2=0.,x3=0.
  // p Istn=10.,Igpe=0.
  // aux Mf5=0.001*delay(x1,tau0)
  // aux Mf6=0.001*delay(x2,tau0)
  // aux Mf7=0.001*delay(x3,tau0)
  // om=2.*pi*fr
  // # harmonic oscillators' equations
  // x1'=y1
  // y1'=-1.*om*y1-(om^2)*x1+Lfp5
  // x2'=y2
  // y2'=-1.*om*y2-(om^2)*x2+Lfp6
  // x3'=y3
  // y3'=-1.*om*y3-(om^2)*x3+Lfp7
  // # stn equations
  // v[1..10]'=-(il(v[j])+ina(v[j],h[j])+ik(v[j],n[j])+iahp(v[j],ca[j])+ica(v[j])+it(v[j],r[j]))-isyn[j]+Istn+Istim[j]
  // r[1..10]'=phir*(rinf(v[j])-r[j])/taur(v[j])
  // h[1..10]'=phi*( hinf(v[j])-h[j] )/tauh(v[j])
  // n[1..10]'=phi*( ninf(v[j])-n[j] )/taun(v[j])
  // ca[1..10]'=phi*eps*(-ica(v[j])-it(v[j],r[j]) - kca*ca[j])
  // s[1..10]'=alpha*(1-s[j])*sinf(v[j]+ab)-beta*s[j]
  // # gp equations
  // vg[1..10]'= -(itg(vg[j],rg[j])+inag(vg[j],hg[j])+ikg(vg[j],ng[j])+iahpg(vg[j],cag[j])+icag(vg[j])+ilg(vg[j]))+iapp-isyng[j]+Igpe
  // ng[1..10]'= deltang*(ninfg(vg[j])-ng[j])/taung(vg[j])
  // hg[1..10]'= deltahg*(hinfg(vg[j])-hg[j])/tauhg(vg[j])
  // rg[1..10]'= phig*(rinfg(vg[j])-rg[j])/taurg
  // cag[1..10]'=epsg*(-icag(vg[j])-itg(vg[j],rg[j]) - kcag*cag[j])
  // sg[1..10]'=alphag*(1-sg[j])*sinfg(vg[j]+abg)-betag*sg[j]
  // @ dt=.05,total=6999,meth=qualrk,xp=t,yp=v1,xlo=0,xhi=7000,ylo=-80,yhi=20.,bound=500001,maxstor=500001,delay=100.
  // done
  // This file has been produced by sbmlutils.
  // Terms of use
  // Copyright © 2017 Matthias Koenig
  // Redistribution and use of any part of this model, with or without modification, are permitted provided that the following conditions are met:
  // Redistributions of this SBML file must retain the above copyright notice, this list of conditions and the following disclaimer.
  // Redistributions in a different form must reproduce the above copyright notice, this list of conditions and the following disclaimer in the documentation and/or other materials provided with the distribution.
  // This model is distributed in the hope that it will be useful, but WITHOUT ANY WARRANTY; without even the implied warranty of MERCHANTABILITY or FITNESS FOR A PARTICULAR PURPOSE.

  // Parameters:
  w1 = 0.3; w1 is "w1 = 0.3";
  w2 = 0; w2 is "w2 = 0";
  kn = 60; kn is "kn = 60";
  gsyn = 1.4; gsyn is "gsyn = 1.4";
  iapp = 8; iapp is "iapp = 8";
  fr = 0.01; fr is "fr = 0.01";
  t0 = 1000; t0 is "t0 = 1000";
  cn = 0.04; cn is "cn = 0.04";
  vl = -60; vl is "vl = -60.";
  vna = 55; vna is "vna = 55.";
  vk = -80; vk is "vk = -80.";
  thetam = 30; thetam is "thetam = 30";
  sm = 15; sm is "sm = 15";
  gl = 2.25; gl is "gl = 2.25";
  gna = 50; gna is "gna = 50.";
  gk = 40; gk is "gk = 40.";
  tn = 1; tn is "tn = 1.";
  th = 0.05; th is "th = 0.05";
  gahp = 9; gahp is "gahp = 9.";
  gca = 0.5; gca is "gca = .5";
  vca = 140; vca is "vca = 140.";
  k1 = 15; k1 is "k1 = 15.";
  eps = 5e-5; eps is "eps = 5e-05";
  kca = 22.5; kca is "kca = 22.5";
  thetas = 39; thetas is "thetas = 39.";
  ss = 2; ss is "ss = 2.";
  xp = 1; xp is "xp = 1.";
  i = 0; i is "i = 0.";
  ssca = 8; ssca is "ssca = 8.";
  thetah = -39; thetah is "thetah = -39.";
  sh = 3.1; sh is "sh = 3.1";
  thetan = -32; thetan is "thetan = -32.";
  sn = -8; sn is "sn = -8.";
  taun0 = 1; taun0 is "taun0 = 1.";
  taun1 = 100; taun1 is "taun1 = 100.";
  thn = 80; thn is "thn = 80.";
  sigman = 26; sigman is "sigman = 26.";
  tauh0 = 1; tauh0 is "tauh0 = 1.";
  tauh1 = 500; tauh1 is "tauh1 = 500";
  thh = 57; thh is "thh = 57.";
  sigmah = 3; sigmah is "sigmah = 3.";
  phi = 5; phi is "phi = 5.";
  thetat = -63; thetat is "thetat = -63.";
  kt = -7.8; kt is "kt = -7.8";
  gt = 0.5; gt is "gt = .5";
  phir = 2; phir is "phir = 2.";
  thetar = -67; thetar is "thetar = -67.";
  kr = 2; kr is "kr = 2.";
  taur0 = 7.1; taur0 is "taur0 = 7.1";
  taur1 = 17.5; taur1 is "taur1 = 17.5";
  thr = -68; thr is "thr = -68";
  sigmar = 2.2; sigmar is "sigmar = 2.2";
  alpha = 5; alpha is "alpha = 5";
  beta = 1; beta is "beta = 1.";
  ab = -30; ab is "ab = -30.";
  vsyn = -100; vsyn is "vsyn = -100.";
  rth = 0.25; rth is "rth = .25";
  rsig = -0.07; rsig is "rsig = -.07";
  i1 = 0; i1 is "i1 = 0.";
  rho1 = 0.5; rho1 is "rho1 = .5";
  a1 = 0.9; a1 is "a1 = .9";
  gnag = 120; gnag is "gnag = 120.";
  gkg = 30; gkg is "gkg = 30.";
  gahpg = 30; gahpg is "gahpg = 30.";
  gtg = 0.5; gtg is "gtg = .5";
  gcag = 0.1; gcag is "gcag = .1";
  glg = 0.1; glg is "glg = .1";
  vnag = 55; vnag is "vnag = 55.";
  vkg = -80; vkg is "vkg = -80.";
  vcag = 120; vcag is "vcag = 120.";
  vlg = -55; vlg is "vlg = -55.";
  thetasg = -57; thetasg is "thetasg = -57.";
  ksg = 2; ksg is "ksg = 2.";
  thetas1g = -35; thetas1g is "thetas1g = -35.";
  ks1g = 2; ks1g is "ks1g = 2.";
  thetarg = -70; thetarg is "thetarg = -70.";
  krg = -2; krg is "krg = -2.";
  taurg = 30; taurg is "taurg = 30.";
  thetamg = -37; thetamg is "thetamg = -37.";
  sigmamg = 10; sigmamg is "sigmamg = 10.";
  thetang = -50; thetang is "thetang = -50.";
  sigmang = 14; sigmang is "sigmang = 14.";
  taun0g = 0.05; taun0g is "taun0g = .05";
  taun1g = 0.27; taun1g is "taun1g = .27";
  thng = -40; thng is "thng = -40.";
  sng = -12; sng is "sng = -12.";
  thetahg = -58; thetahg is "thetahg = -58.";
  sigmahg = -12; sigmahg is "sigmahg = -12.";
  tauh0g = 0.05; tauh0g is "tauh0g = .05";
  tauh1g = 0.27; tauh1g is "tauh1g = .27";
  thhg = -40; thhg is "thhg = -40.";
  shg = -12; shg is "shg = -12.";
  k1g = 30; k1g is "k1g = 30.";
  kcag = 3; kcag is "kcag = 3.";
  epsg = 0.0055; epsg is "epsg = 0.0055";
  phig = 1; phig is "phig = 1.";
  deltang = 0.3; deltang is "deltang = .3";
  deltahg = 0.1; deltahg is "deltahg = .1";
  gsyngg = 0; gsyngg is "gsyngg = .0";
  vsyngg = -80; vsyngg is "vsyngg = -80.";
  gsyng = 0.4; gsyng is "gsyng = 0.4";
  vsyng = 0; vsyng is "vsyng = 0";
  alphag = 2; alphag is "alphag = 2.";
  betag = 0.14; betag is "betag = .14";
  abg = -20; abg is "abg = -20";
  ka = 0.33; ka is "ka = .33";
  v1_71_2 = -71.2; v1_71_2 is "v1 = -71.2";
  v2_66_2 = -66.2; v2_66_2 is "v2 = -66.2";
  v3_55_8 = -55.8; v3_55_8 is "v3 = -55.8";
  v4_64_6 = -64.6; v4_64_6 is "v4 = -64.6";
  v5_61_2 = -61.2; v5_61_2 is "v5 = -61.2";
  v6_69_0 = -69; v6_69_0 is "v6 = -69.0";
  v7_71_4 = -71.4; v7_71_4 is "v7 = -71.4";
  v8_69_3 = -69.3; v8_69_3 is "v8 = -69.3";
  v9_68_6 = -68.6; v9_68_6 is "v9 = -68.6";
  v10_72_0 = -72; v10_72_0 is "v10 = -72.0";
  h1 = 0.18; h1 is "h1 = 0.18";
  h2 = 0.35; h2 is "h2 = 0.35";
  h3 = 0.26; h3 is "h3 = 0.26";
  h4 = 0.28; h4 is "h4 = 0.28";
  h5 = 0.19; h5 is "h5 = 0.19";
  h6 = 0.31; h6 is "h6 = 0.31";
  h7 = 0.15; h7 is "h7 = 0.15";
  h8 = 0.23; h8 is "h8 = 0.23";
  h9 = 0.22; h9 is "h9 = 0.22";
  h10 = 0.34; h10 is "h10 = 0.34";
  n1 = 0.33; n1 is "n1 = 0.33";
  n2 = 0.02; n2 is "n2 = 0.02";
  n3 = 0.1; n3 is "n3 = 0.1";
  n4 = 0.05; n4 is "n4 = 0.05";
  n5 = 0.26; n5 is "n5 = 0.26";
  n6 = 0.05; n6 is "n6 = 0.05";
  n7 = 0.44; n7 is "n7 = 0.44";
  n8 = 0.11; n8 is "n8 = 0.11";
  n9 = 0.11; n9 is "n9 = 0.11";
  n10 = 0.03; n10 is "n10 = 0.03";
  r1_0_51 = 0.51; r1_0_51 is "r1 = 0.51";
  r2_0_57 = 0.57; r2_0_57 is "r2 = 0.57";
  r3_0_3 = 0.3; r3_0_3 is "r3 = 0.3";
  r4_0_63 = 0.63; r4_0_63 is "r4 = 0.63";
  r5_0_48 = 0.48; r5_0_48 is "r5 = 0.48";
  r6_0_54 = 0.54; r6_0_54 is "r6 = 0.54";
  r7_0_42 = 0.42; r7_0_42 is "r7 = 0.42";
  r8_0_62 = 0.62; r8_0_62 is "r8 = 0.62";
  r9_0_5 = 0.5; r9_0_5 is "r9 = 0.5";
  r10_0_61 = 0.61; r10_0_61 is "r10 = 0.61";
  ca1_0_53 = 0.53; ca1_0_53 is "ca1 = 0.53";
  ca2_0_52 = 0.52; ca2_0_52 is "ca2 = 0.52";
  ca3_0_51 = 0.51; ca3_0_51 is "ca3 = 0.51";
  ca4_0_51 = 0.51; ca4_0_51 is "ca4 = 0.51";
  ca5_0_51 = 0.51; ca5_0_51 is "ca5 = 0.51";
  ca6_0_51 = 0.51; ca6_0_51 is "ca6 = 0.51";
  ca7_0_5 = 0.5; ca7_0_5 is "ca7 = 0.5";
  ca8_0_50 = 0.5; ca8_0_50 is "ca8 = 0.50";
  ca9_0_45 = 0.45; ca9_0_45 is "ca9 = 0.45";
  ca10_0_45 = 0.45; ca10_0_45 is "ca10 = 0.45";
  s1_0_015 = 0.015; s1_0_015 is "s1 = 0.015";
  s2_0 = 0; s2_0 is "s2 = 0.";
  s3_0 = 0; s3_0 is "s3 = 0.";
  s4_0 = 0; s4_0 is "s4 = 0.";
  s5_0_003 = 0.003; s5_0_003 is "s5 = 0.003";
  s6_0 = 0; s6_0 is "s6 = 0.";
  s7_0_22 = 0.22; s7_0_22 is "s7 = 0.22";
  s8_0 = 0; s8_0 is "s8 = 0.";
  s9_0 = 0; s9_0 is "s9 = 0.";
  s10_0 = 0; s10_0 is "s10 = 0.";
  vg1 = -66.42; vg1 is "vg1 = -66.42";
  vg2 = -59.05; vg2 is "vg2 = -59.05";
  vg3 = 32.92; vg3 is "vg3 = 32.92";
  vg4 = -59.91; vg4 is "vg4 = -59.91";
  vg5 = -62.2; vg5 is "vg5 = -62.2";
  vg6 = -59.7; vg6 is "vg6 = -59.7";
  vg7 = -77.47; vg7 is "vg7 = -77.47";
  vg8 = -61.83; vg8 is "vg8 = -61.83";
  vg9 = -42.9; vg9 is "vg9 = -42.9";
  vg10 = -74.73; vg10 is "vg10 = -74.73";
  ng1 = 0.24; ng1 is "ng1 = 0.24";
  ng2 = 0.34; ng2 is "ng2 = 0.34";
  ng3 = 0.46; ng3 is "ng3 = 0.46";
  ng4 = 0.33; ng4 is "ng4 = 0.33";
  ng5 = 0.28; ng5 is "ng5 = 0.28";
  ng6 = 0.33; ng6 is "ng6 = 0.33";
  ng7 = 0.62; ng7 is "ng7 = 0.62";
  ng8 = 0.29; ng8 is "ng8 = 0.29";
  ng9 = 0.38; ng9 is "ng9 = 0.38";
  ng10 = 0.34; ng10 is "ng10 = 0.34";
  hg1 = 0.55; hg1 is "hg1 = 0.55";
  hg2 = 0.52; hg2 is "hg2 = 0.52";
  hg3 = 0.51; hg3 is "hg3 = 0.51";
  hg4 = 0.55; hg4 is "hg4 = 0.55";
  hg5 = 0.58; hg5 is "hg5 = 0.58";
  hg6 = 0.52; hg6 is "hg6 = 0.52";
  hg7 = 0.29; hg7 is "hg7 = 0.29";
  hg8 = 0.59; hg8 is "hg8 = 0.59";
  hg9 = 0.54; hg9 is "hg9 = 0.54";
  hg10 = 0.42; hg10 is "hg10 = 0.42";
  rg1 = 0.22; rg1 is "rg1 = 0.22";
  rg2 = 0.1; rg2 is "rg2 = 0.1";
  rg3 = 0.16; rg3 is "rg3 = 0.16";
  rg4 = 0.12; rg4 is "rg4 = 0.12";
  rg5 = 0.19; rg5 is "rg5 = 0.19";
  rg6 = 0.12; rg6 is "rg6 = 0.12";
  rg7 = 0.15; rg7 is "rg7 = 0.15";
  rg8 = 0.18; rg8 is "rg8 = 0.18";
  rg9 = 0.16; rg9 is "rg9 = 0.16";
  rg10 = 0.13; rg10 is "rg10 = 0.13";
  cag1 = 0.43; cag1 is "cag1 = 0.43";
  cag2 = 0.28; cag2 is "cag2 = 0.28";
  cag3 = 0.35; cag3 is "cag3 = 0.35";
  cag4 = 0.31; cag4 is "cag4 = 0.31";
  cag5 = 0.39; cag5 is "cag5 = 0.39";
  cag6 = 0.31; cag6 is "cag6 = 0.31";
  cag7 = 0.4; cag7 is "cag7 = 0.40";
  cag8 = 0.39; cag8 is "cag8 = 0.39";
  cag9 = 0.34; cag9 is "cag9 = 0.34";
  cag10 = 0.33; cag10 is "cag10 = 0.33";
  sg1 = 0.48; sg1 is "sg1 = 0.48";
  sg2 = 0.02; sg2 is "sg2 = 0.02";
  sg3 = 0.33; sg3 is "sg3 = 0.33";
  sg4 = 0.04; sg4 is "sg4 = 0.04";
  sg5 = 0.37; sg5 is "sg5 = 0.37";
  sg6 = 0.04; sg6 is "sg6 = 0.04";
  sg7 = 0.67; sg7 is "sg7 = 0.67";
  sg8 = 0.13; sg8 is "sg8 = 0.13";
  sg9 = 0.29; sg9 is "sg9 = 0.29";
  sg10 = 0.54; sg10 is "sg10 = 0.54";
  x1_0 = 0; x1_0 is "x1 = 0.";
  x2_0 = 0; x2_0 is "x2 = 0.";
  x3_0 = 0; x3_0 is "x3 = 0.";
  istn = 10; istn is "istn = 10.";
  igpe = 0; igpe is "igpe = 0.";
  y1 = 0 dimensionless;
  y2 = 0 dimensionless;
  y3 = 0 dimensionless;
  isyn1 has dimensionless;
  isyn10 has dimensionless;
  c1 has dimensionless;
  tau has dimensionless;
  tau0 has dimensionless;
  istim1 has dimensionless;
  istim2 has dimensionless;
  istim3 has dimensionless;
  istim4 has dimensionless;
  istim5 has dimensionless;
  istim6 has dimensionless;
  istim7 has dimensionless;
  istim8 has dimensionless;
  istim9 has dimensionless;
  istim10 has dimensionless;
  stim5 has dimensionless;
  stim6 has dimensionless;
  stim7 has dimensionless;
  lfp5 has dimensionless;
  lfp6 has dimensionless;
  lfp7 has dimensionless;
  muf5 has dimensionless;
  muf6 has dimensionless;
  muf7 has dimensionless;
  mf5 has dimensionless;
  mf6 has dimensionless;
  mf7 has dimensionless;
  om has dimensionless;
  t has dimensionless; t is "model time";

  // Assignment rules:
  isyn1 := gsyn*(sg10 + sg1 + sg2)*(v1_71_2 - vsyn);
  isyn10 := gsyn*(sg9 + sg10 + sg1)*(v10_72_0 - vsyn);
  c1 := cn*heav(t - t0);
  tau := 0.5/fr;
  tau0 := 0.5/fr;
  istim1 := 0;
  istim2 := 0;
  istim3 := w2*istim5;
  istim4 := w1*istim5 + w2*istim6;
  istim5 := 2*kn*(1/(1 + exp(-(c1*(delay(x1_0, tau0 + tau) - delay(x1_0, tau0)))/14)) - 0.5) + w1*istim6 + w2*istim7;
  istim6 := 2*kn*(1/(1 + exp(-(c1*(delay(x2_0, tau0 + tau) - delay(x2_0, tau0)))/14)) - 0.5) + w1*(istim5 + istim7);
  istim7 := 2*kn*(1/(1 + exp(-(c1*(delay(x3_0, tau0 + tau) - delay(x3_0, tau0)))/14)) - 0.5) + w1*istim6 + w2*istim5;
  istim8 := w1*istim7 + w2*istim6;
  istim9 := w2*istim7;
  istim10 := 0;
  stim5 := istim5;
  stim6 := istim6;
  stim7 := istim7;
  lfp5 := 0.1*(-isyn5 + istim5 - w1*(isyn4 + isyn6) - w2*(isyn3 + isyn7));
  lfp6 := 0.1*(-isyn6 + istim6 - w1*(isyn5 + isyn7) - w2*(isyn4 + isyn8));
  lfp7 := 0.1*(-isyn7 + istim7 - w1*(isyn6 + isyn8) - w2*(isyn5 + isyn9));
  muf5 := lfp5;
  muf6 := lfp6;
  muf7 := lfp7;
  mf5 := 0.001*delay(x1_0, tau0);
  mf6 := 0.001*delay(x2_0, tau0);
  mf7 := 0.001*delay(x3_0, tau0);
  om := 2*pi*fr;
  t := time;

  // Rate rules:
  x1_0' = y1;
  y1' = -1*om*y1 - om^2*x1_0 + lfp5;
  x2_0' = y2;
  y2' = -1*om*y2 - om^2*x2_0 + lfp6;
  x3_0' = y3;
  y3' = -1*om*y3 - om^2*x3_0 + lfp7;
end
