// SBML level 3 version 1

function max(x, y)
  piecewise(x, x > y, y);
end
max is "minimum";

function min(x, y)
  piecewise(x, x < y, y);
end
min is "maximum";

function heav(x)
  piecewise(0, x < 0, 0.5, x == 0, 1, x > 0, 0);
end
heav is "heavyside";

function mod(x, y)
  piecewise(x - y*ceil(x/y), xor(x < 0, y < 0), x - y*floor(x/y));
end
mod is "modulo";

model main()
  // XPP model
  // This model was converted from XPP ode format to SBML using sbmlutils-0.1.5a6.
  // # 2 Compartment Spinal Cord Injury Motoneuron Model
  // # Basic SCI motoneuron model without synaptic inputs
  // # Applied current can be a ramp, pulse or a single value
  // # Change parameter values to get different motoneuron behavior
  // #-------------------------------------------------------------
  // # Current Balance
  // #-------------------------------------------------------------
  // dvs/dt=(-INa-IKdr-IsCaN-IsKCa-Isleak+Is+gc*(vd-vs)/p)/c
  // dvd/dt=(-ICaP-INap-IdKCa-Idleak+Id+gc*(vs-vd)/(1-p))/c
  // #-------------------------------------------------------------
  // # Currents: Soma
  // #-------------------------------------------------------------
  // INa=gna*mna^3*hna*(vs-ena)
  // IKdr=gkdr*n^4*(vs-ek)
  // IsCaN=gscan*mscan^2*hscan*(vs-eca)
  // IsKCa=gskca*(cas/(cas+0.2))*(vs-ek)
  // Isleak=gl*(vs-el)
  // Is=Iramp+Ipulse+Iappls
  // Id=Iappld
  // #-------------------------------------------------------------
  // # Currents: Dendrites
  // #-------------------------------------------------------------
  // IdKCa=gdkca*(cad/(cad+0.2))*(vd-ek)
  // ICaP=gcap*mcap*(vd-eca)
  // Idleak=gl*(vd-el)
  // INap=gnap*mnap*(vd-ena)
  // #-------------------------------------------------------------
  // # Variables: Soma
  // #-------------------------------------------------------------
  // mna=1/(1+exp((vs-thetamna)/kmna))
  // dhna/dt=(hnainf-hna)/tauhna
  // hnainf=1/(1+exp((vs-thetahna)/khna))
  // tauhna=120/(exp((vs+50)/15)+exp(-(vs+50)/16))
  // dn/dt=(ninf-n)/taun
  // ninf=1/(1+exp((vs-thetan)/kn))
  // taun=28/(exp((vs+40)/40)+exp(-(vs+40)/50))
  // dmscan/dt=(mscaninf-mscan)/taumscan
  // mscaninf=1/(1+exp((vs-thetamsca)/kmscan))
  // dhscan/dt=(hscaninf-hscan)/tauhscan
  // hscaninf=1/(1+exp((vs-thetahsca)/khscan))
  // dcas/dt=f*(-alpha1*IsCaN-kca*cas)
  // #-------------------------------------------------------------
  // # Variables: Dendrites
  // #-------------------------------------------------------------
  // dmcap/dt=(mcapinf-mcap)/taumcap
  // mcapinf=1/(1+exp((vd-thetamcap)/kmcap))
  // dmnap/dt=(mnapinf-mnap)/taumnap
  // mnapinf=1/(1+exp((vd-thetamnap)/kmnap))
  // dcad/dt=f*(-alpha2*ICaP-kca*cad)
  // #-------------------------------------------------------------
  // # Applied Current
  // #-------------------------------------------------------------
  // # Applied
  // par Iappls=0
  // par Iappld=0
  // # Ramp
  // Iramp=offsetr+scaler*(t-tonr)*(heav(t-tonr)*heav(toffr-t))\
  // +2*scaler*(tswitchr-t)*(heav(t-tswitchr)*heav(toffr-t))
  // par offsetr=0
  // #par scaler=0
  // par scaler=0.01
  // par tonr=0
  // par toffr=10000
  // par tswitchr=2500
  // # Pulse
  // Ipulse=offsetp+scalep1*(heav(t-tonp1)*heav(toffp1-t))\
  // +scalep2*(heav(t-tonp2)*heav(toffp2-t))
  // par offsetp=0
  // par scalep1=0
  // #par scalep1=20 for pulse figures
  // par tonp1=2000
  // par toffp1=4000
  // par scalep2=0
  // par tonp2=4000
  // par toffp2=10000
  // #-------------------------------------------------------------
  // # Parameters
  // #-------------------------------------------------------------
  // par gc=0.1
  // par p=0.1
  // par c=1
  // par gna=120
  // par ena=55
  // par thetamna=-35
  // par kmna=-7.8
  // par thetahna=-55
  // par khna=7
  // par gkdr=100
  // par ek=-80
  // par thetan=-28
  // par kn=-15
  // par gscan=14
  // par eca=80
  // par thetamsca=-30
  // par kmscan=-5
  // par taumscan=16
  // par thetahsca=-45
  // par khscan=5
  // par tauhscan=160
  // par gskca=3.136
  // par gdkca=0.69
  // par gl=0.51
  // par el=-60
  // par f=0.01
  // par alpha1=0.009
  // par alpha2=0.009
  // par kca=2
  // par gcap=.33
  // par thetamcap=-40
  // par kmcap=-7
  // par taumcap=40
  // par gnap=.2
  // par thetamnap=-25
  // par kmnap=-4
  // par taumnap=40
  // # ------------------------------------------------------------
  // # Auxiliary Variables
  // # ------------------------------------------------------------
  // aux Na=INa
  // aux Kdr=IKdr
  // aux Ca1=IsCaN
  // aux CaCs=cas
  // aux CaCd=cad
  // aux sKCa=IsKCa
  // aux dKCa=IdKCa
  // aux sLeak=Isleak
  // aux dLeak=Idleak
  // aux CaP=ICaP
  // #aux Cap=ICap
  // aux Nap=INap
  // aux I1=Is
  // aux I2=Id
  // # --------------------------------------------------------
  // # Initial Conditions
  // # --------------------------------------------------------
  // init vs=-53.97266
  // init vd=-52.66585
  // init hna=0.463375
  // init n=0.1503945
  // init mscan=0.008206959
  // init hscan=0.857482
  // init cas=0.0004874682
  // init mcap=0.1407098
  // init mnap=0.0009903489
  // init cad=0.02772107
  // # ------------------------------------------------------------
  // # Settings
  // # ------------------------------------------------------------
  // @ bounds=1000000
  // @ TOTAL=10000
  // @ DT=.05
  // @ xlo=0
  // @ xhi=10000
  // @ ylo=-100
  // @ yhi=80
  // @ nplot=2
  // @ yp2=I1
  // @ METH=qualrk
  // @ maxstor=1000000
  // d
  // This file has been produced by sbmlutils.
  // Terms of use
  // Copyright © 2017 Matthias Koenig
  // Redistribution and use of any part of this model, with or without modification, are permitted provided that the following conditions are met:
  // Redistributions of this SBML file must retain the above copyright notice, this list of conditions and the following disclaimer.
  // Redistributions in a different form must reproduce the above copyright notice, this list of conditions and the following disclaimer in the documentation and/or other materials provided with the distribution.
  // This model is distributed in the hope that it will be useful, but WITHOUT ANY WARRANTY; without even the implied warranty of MERCHANTABILITY or FITNESS FOR A PARTICULAR PURPOSE.

  // Parameters:
  iappls = 0; iappls is "iappls = 0";
  iappld = 0; iappld is "iappld = 0";
  offsetr = 0; offsetr is "offsetr = 0";
  scaler = 0.01; scaler is "scaler = 0.01";
  tonr = 0; tonr is "tonr = 0";
  toffr = 10000; toffr is "toffr = 10000";
  tswitchr = 2500; tswitchr is "tswitchr = 2500";
  offsetp = 0; offsetp is "offsetp = 0";
  scalep1 = 0; scalep1 is "scalep1 = 0";
  tonp1 = 2000; tonp1 is "tonp1 = 2000";
  toffp1 = 4000; toffp1 is "toffp1 = 4000";
  scalep2 = 0; scalep2 is "scalep2 = 0";
  tonp2 = 4000; tonp2 is "tonp2 = 4000";
  toffp2 = 10000; toffp2 is "toffp2 = 10000";
  gc = 0.1; gc is "gc = 0.1";
  p = 0.1; p is "p = 0.1";
  c = 1; c is "c = 1";
  gna = 120; gna is "gna = 120";
  ena = 55; ena is "ena = 55";
  thetamna = -35; thetamna is "thetamna = -35";
  kmna = -7.8; kmna is "kmna = -7.8";
  thetahna = -55; thetahna is "thetahna = -55";
  khna = 7; khna is "khna = 7";
  gkdr = 100; gkdr is "gkdr = 100";
  ek = -80; ek is "ek = -80";
  thetan = -28; thetan is "thetan = -28";
  kn = -15; kn is "kn = -15";
  gscan = 14; gscan is "gscan = 14";
  eca = 80; eca is "eca = 80";
  thetamsca = -30; thetamsca is "thetamsca = -30";
  kmscan = -5; kmscan is "kmscan = -5";
  taumscan = 16; taumscan is "taumscan = 16";
  thetahsca = -45; thetahsca is "thetahsca = -45";
  khscan = 5; khscan is "khscan = 5";
  tauhscan = 160; tauhscan is "tauhscan = 160";
  gskca = 3.136; gskca is "gskca = 3.136";
  gdkca = 0.69; gdkca is "gdkca = 0.69";
  gl = 0.51; gl is "gl = 0.51";
  el = -60; el is "el = -60";
  f = 0.01; f is "f = 0.01";
  alpha1 = 0.009; alpha1 is "alpha1 = 0.009";
  alpha2 = 0.009; alpha2 is "alpha2 = 0.009";
  kca = 2; kca is "kca = 2";
  gcap = 0.33; gcap is "gcap = .33";
  thetamcap = -40; thetamcap is "thetamcap = -40";
  kmcap = -7; kmcap is "kmcap = -7";
  taumcap = 40; taumcap is "taumcap = 40";
  gnap = 0.2; gnap is "gnap = .2";
  thetamnap = -25; thetamnap is "thetamnap = -25";
  kmnap = -4; kmnap is "kmnap = -4";
  taumnap = 40; taumnap is "taumnap = 40";
  vs = -53.97266; vs is "vs = -53.97266";
  vd = -52.66585; vd is "vd = -52.66585";
  hna = 0.463375; hna is "hna = 0.463375";
  n = 0.1503945; n is "n = 0.1503945";
  mscan = 0.008206959; mscan is "mscan = 0.008206959";
  hscan = 0.857482; hscan is "hscan = 0.857482";
  cas = 0.0004874682; cas is "cas = 0.0004874682";
  mcap = 0.1407098; mcap is "mcap = 0.1407098";
  mnap = 0.0009903489; mnap is "mnap = 0.0009903489";
  cad = 0.02772107; cad is "cad = 0.02772107";
  ina has dimensionless;
  ikdr has dimensionless;
  iscan has dimensionless;
  iskca has dimensionless;
  isleak has dimensionless;
  is has dimensionless;
  id has dimensionless;
  idkca has dimensionless;
  icap has dimensionless;
  idleak has dimensionless;
  inap has dimensionless;
  mna has dimensionless;
  hnainf has dimensionless;
  tauhna has dimensionless;
  ninf has dimensionless;
  taun has dimensionless;
  mscaninf has dimensionless;
  hscaninf has dimensionless;
  mcapinf has dimensionless;
  mnapinf has dimensionless;
  iramp has dimensionless;
  ipulse has dimensionless;
  na has dimensionless;
  kdr has dimensionless;
  ca1 has dimensionless;
  cacs has dimensionless;
  cacd has dimensionless;
  skca has dimensionless;
  dkca has dimensionless;
  sleak has dimensionless;
  dleak has dimensionless;
  cap has dimensionless;
  nap has dimensionless;
  i1 has dimensionless;
  i2 has dimensionless;
  t has dimensionless; t is "model time";

  // Assignment rules:
  ina := gna*mna^3*hna*(vs - ena);
  ikdr := gkdr*n^4*(vs - ek);
  iscan := gscan*mscan^2*hscan*(vs - eca);
  iskca := gskca*(cas/(cas + 0.2))*(vs - ek);
  isleak := gl*(vs - el);
  is := iramp + ipulse + iappls;
  id := iappld;
  idkca := gdkca*(cad/(cad + 0.2))*(vd - ek);
  icap := gcap*mcap*(vd - eca);
  idleak := gl*(vd - el);
  inap := gnap*mnap*(vd - ena);
  mna := 1/(1 + exp((vs - thetamna)/kmna));
  hnainf := 1/(1 + exp((vs - thetahna)/khna));
  tauhna := 120/(exp((vs + 50)/15) + exp(-(vs + 50)/16));
  ninf := 1/(1 + exp((vs - thetan)/kn));
  taun := 28/(exp((vs + 40)/40) + exp(-(vs + 40)/50));
  mscaninf := 1/(1 + exp((vs - thetamsca)/kmscan));
  hscaninf := 1/(1 + exp((vs - thetahsca)/khscan));
  mcapinf := 1/(1 + exp((vd - thetamcap)/kmcap));
  mnapinf := 1/(1 + exp((vd - thetamnap)/kmnap));
  iramp := offsetr + scaler*(t - tonr)*heav(t - tonr)*heav(toffr - t) + 2*scaler*(tswitchr - t)*heav(t - tswitchr)*heav(toffr - t);
  ipulse := offsetp + scalep1*heav(t - tonp1)*heav(toffp1 - t) + scalep2*heav(t - tonp2)*heav(toffp2 - t);
  na := ina;
  kdr := ikdr;
  ca1 := iscan;
  cacs := cas;
  cacd := cad;
  skca := iskca;
  dkca := idkca;
  sleak := isleak;
  dleak := idleak;
  cap := icap;
  nap := inap;
  i1 := is;
  i2 := id;
  t := time;

  // Rate rules:
  vs' = (-ina - ikdr - iscan - iskca - isleak + is + gc*(vd - vs)/p)/c;
  vd' = (-icap - inap - idkca - idleak + id + gc*(vs - vd)/(1 - p))/c;
  hna' = (hnainf - hna)/tauhna;
  n' = (ninf - n)/taun;
  mscan' = (mscaninf - mscan)/taumscan;
  hscan' = (hscaninf - hscan)/tauhscan;
  cas' = f*(-alpha1*iscan - kca*cas);
  mcap' = (mcapinf - mcap)/taumcap;
  mnap' = (mnapinf - mnap)/taumnap;
  cad' = f*(-alpha2*icap - kca*cad);
end
