// SBML level 3 version 1

function max(x, y)
  piecewise(x, x > y, y);
end
max is "minimum";

function min(x, y)
  piecewise(x, x < y, y);
end
min is "maximum";

function heav(x)
  piecewise(0, x < 0, 0.5, x == 0, 1, x > 0, 0);
end
heav is "heavyside";

function mod(x, y)
  piecewise(x - y*ceil(x/y), xor(x < 0, y < 0), x - y*floor(x/y));
end
mod is "modulo";

function ina(v, h, gna, km, thm, vna)
  gna*minf(v, km, thm)^3*h*(v - vna);
end

function minf(v, km, thm)
  1/(1 + exp((v - thm)/km));
end

function hinf(v, kh, thh)
  1/(1 + exp((v - thh)/kh));
end

function tauh(v)
  30/(exp((v + 50)/15) + exp(-(v + 50)/16));
end

function ikdr(v, n, gkdr, vk)
  gkdr*n^4*(v - vk);
end

function ninf(v, kn, thn)
  1/(1 + exp((v - thn)/kn));
end

function taun(v)
  7/(exp((v + 40)/40) + exp(-(v + 40)/50));
end

function inap(v, gnap, kp, thp, vna)
  gnap*pinf(v, thp, kp)*(v - vna);
end

function pinf(v, kp, thp)
  1/(1 + exp((v - thp)/kp));
end

function im(v, z, gm, vk)
  gm*z*(v - vk);
end

function zinf(v, kz, thz)
  1/(1 + exp((v - thz)/kz));
end

function iahp(v, u, gahp, vk)
  gahp*u*(v - vk);
end

function uinf(v, ku, thu)
  1/(1 + exp((v - thu)/ku));
end

function ih(v, r, gh, vh)
  gh*r*(v - vh);
end

function rinf(v, kr, thr)
  1/(1 + exp((v - thr)/kr));
end

function taur(v)
  6000/(exp((v + 140)/21.6) + exp(-(v + 40)/22.7));
end

function il(v, gl, vl)
  gl*(v - vl);
end

function istep(t, is, toff, ton)
  is*heav(t - ton)*heav(toff - t);
end

function icos(t, a, f, i0)
  i0 + a*cos(2*pi*f*t);
end

function iapp(t, a, f, i0, is, toff, ton)
  istep(t, is, ton, toff) + icos(t, i0, a, f);
end

function isyn(v, t, b, f, vsyn)
  b*(1 + cos(2*pi*f*t))*(v - vsyn);
end

model main()
  // XPP model
  // This model was converted from XPP ode format to SBML using sbmlutils-0.1.5a6.
  // # PARAMETERS
  // p i0=2.5,is=0.0,ton=100,toff=900,A=0.0,f=0.0,B=0.0
  // p gm=1
  // p gnap=0.04,gh=0.05
  // p gna=100.0,gkdr=20.0,gahp=10.0,gl=0.12
  // p Cm=1,Vna=55.0,Vk=-90,Vh=-27.4,Vl=-70
  // p Vsyn=0
  // p THm=-28.0,Km=-7.8,THh=-50.0,Kh=7.0
  // p THn=-23.0,Kn=-15.0
  // p THp=-53.0,Kp=-5.0
  // p THu=-25.0,Ku=-3,tauu=75.0
  // p THz=-45.0,Kz=-4.25,tauz=75.0
  // p THr=-83.9,Kr=7.4
  // #
  // #
  // # INITIAL CONDITIONS
  // V(0)=-67.231830
  // h(0)=0.92141213
  // n(0)=0.0497938
  // z(0)=0.00040176
  // u(0)=0.00040176
  // r(0)=0.095137881
  // #
  // #
  // # FUNCTIONS
  // Ina(V,h)=gna*(minf(V)^3)*h*(V-Vna)
  // minf(V)=1.0/(1.0+exp((V-THm)/Km))
  // hinf(V)=1.0/(1.0+exp((V-THh)/Kh))
  // tauh(V)=30.0/(exp((V+50.0)/15.0)+exp(-(V+50.0)/16.0))
  // #
  // Ikdr(V,n)=gkdr*(n^4)*(V-Vk)
  // ninf(V)=1.0/(1.0+exp((V-THn)/Kn))
  // taun(V)=7.0/(exp((V+40.0)/40.0)+exp(-(V+40.0)/50.0))
  // #
  // Inap(V)=gnap*pinf(V)*(V-Vna)
  // pinf(V)=1.0/(1+exp((V-THp)/Kp))
  // #
  // Im(V,z)=gm*z*(V-Vk)
  // zinf(V)=1.0/(1+exp((V-THz)/Kz))
  // #
  // Iahp(V,u)=gahp*u*(V-Vk)
  // uinf(V)=1.0/(1+exp((V-THu)/Ku))
  // #
  // Ih(V,r)=gh*r*(V-Vh)
  // rinf(V)=1.0/(1+exp((V-THr)/Kr))
  // taur(V)=6000.0/(exp((V+140.0)/21.6)+exp(-(V+40.0)/22.7))
  // #
  // Il(V)=gl*(V-Vl)
  // #
  // Istep(t)=is*heav(t-ton)*heav(toff-t)
  // Icos(t)=i0+A*cos(2*Pi*f*t)
  // Iapp(t)=Istep(t)+Icos(t)
  // aux I = Iapp(t)
  // #
  // #
  // Isyn(V,t)=B*(1+cos(2*Pi*f*t))*(V-Vsyn)
  // #
  // #
  // #
  // # EQUATIONS
  // V'=(-Ina(V,h)-Ikdr(V,n)-Iahp(V,u)-Im(V,z)-Inap(V)-Ih(V,r)-Isyn(V,t)-Il(V)+Iapp(t))/Cm
  // h'=(hinf(v)-h)/tauh(v)
  // n'=(ninf(v)-n)/taun(v)
  // z'=(zinf(v)-z)/tauz
  // u'=(uinf(v)-u)/tauu
  // r'=(rinf(v)-r)/taur(v)
  // #
  // #
  // #
  // #
  // #
  // # xpp formatting
  // @ XP=t
  // @ YP=vs
  // @ TOTAL=3000,DT=0.01
  // @ MAXSTOR=8000000,BOUNDS=10000,method=runge-kutta
  // @ xlo=0,xhi=3000,ylo=-92,yhi=53
  // #
  // @ NTST=250,NMAX=55000,NPR=50
  // @ DS=0.2,DSMIN=0.001,DSMAX=0.3
  // @ PARMIN=-30,PARMAX=400,NORMMIN=0.0,NORMMAX=10000.0
  // @ AUTOVAR=vs,AUTOXMIN=-25.0,AUTOXMAX=400.0,AUTOYMIN=-80.0,AUTOYMAX=55.0
  // done
  // This file has been produced by sbmlutils.
  // Terms of use
  // Copyright © 2017 Matthias Koenig
  // Redistribution and use of any part of this model, with or without modification, are permitted provided that the following conditions are met:
  // Redistributions of this SBML file must retain the above copyright notice, this list of conditions and the following disclaimer.
  // Redistributions in a different form must reproduce the above copyright notice, this list of conditions and the following disclaimer in the documentation and/or other materials provided with the distribution.
  // This model is distributed in the hope that it will be useful, but WITHOUT ANY WARRANTY; without even the implied warranty of MERCHANTABILITY or FITNESS FOR A PARTICULAR PURPOSE.

  // Parameters:
  i0 = 2.5; i0 is "i0 = 2.5";
  is = 0; is is "is = 0.0";
  ton = 100; ton is "ton = 100";
  toff = 900; toff is "toff = 900";
  a = 0; a is "a = 0.0";
  f = 0; f is "f = 0.0";
  b = 0; b is "b = 0.0";
  gm = 1; gm is "gm = 1";
  gnap = 0.04; gnap is "gnap = 0.04";
  gh = 0.05; gh is "gh = 0.05";
  gna = 100; gna is "gna = 100.0";
  gkdr = 20; gkdr is "gkdr = 20.0";
  gahp = 10; gahp is "gahp = 10.0";
  gl = 0.12; gl is "gl = 0.12";
  cm = 1; cm is "cm = 1";
  vna = 55; vna is "vna = 55.0";
  vk = -90; vk is "vk = -90";
  vh = -27.4; vh is "vh = -27.4";
  vl = -70; vl is "vl = -70";
  vsyn = 0; vsyn is "vsyn = 0";
  thm = -28; thm is "thm = -28.0";
  km = -7.8; km is "km = -7.8";
  thh = -50; thh is "thh = -50.0";
  kh = 7; kh is "kh = 7.0";
  thn = -23; thn is "thn = -23.0";
  kn = -15; kn is "kn = -15.0";
  thp = -53; thp is "thp = -53.0";
  kp = -5; kp is "kp = -5.0";
  thu = -25; thu is "thu = -25.0";
  ku = -3; ku is "ku = -3";
  tauu = 75; tauu is "tauu = 75.0";
  thz = -45; thz is "thz = -45.0";
  kz = -4.25; kz is "kz = -4.25";
  tauz = 75; tauz is "tauz = 75.0";
  thr = -83.9; thr is "thr = -83.9";
  kr = 7.4; kr is "kr = 7.4";
  v = -67.23183; v is "v = -67.231830";
  h = 0.92141213; h is "h = 0.92141213";
  n = 0.0497938; n is "n = 0.0497938";
  z = 0.00040176; z is "z = 0.00040176";
  u = 0.00040176; u is "u = 0.00040176";
  r = 0.095137881; r is "r = 0.095137881";
  i has dimensionless;
  t has dimensionless; t is "model time";

  // Assignment rules:
  i := iapp(t, a, f, i0, is, toff, ton);
  t := time;

  // Rate rules:
  v' = (-ina(v, h, gna, km, thm, vna) - ikdr(v, n, gkdr, vk) - iahp(v, u, gahp, vk) - im(v, z, gm, vk) - inap(v, gnap, kp, thp, vna) - ih(v, r, gh, vh) - isyn(v, t, b, f, vsyn) - il(v, gl, vl) + iapp(t, a, f, i0, is, toff, ton))/cm;
  h' = (hinf(v, kh, thh) - h)/tauh(v);
  n' = (ninf(v, kn, thn) - n)/taun(v);
  z' = (zinf(v, kz, thz) - z)/tauz;
  u' = (uinf(v, ku, thu) - u)/tauu;
  r' = (rinf(v, kr, thr) - r)/taur(v);
end
