// SBML level 3 version 1

function max(x, y)
  piecewise(x, x > y, y);
end
max is "minimum";

function min(x, y)
  piecewise(x, x < y, y);
end
min is "maximum";

function heav(x)
  piecewise(0, x < 0, 0.5, x == 0, 1, x > 0, 0);
end
heav is "heavyside";

function mod(x, y)
  piecewise(x - y*ceil(x/y), xor(x < 0, y < 0), x - y*floor(x/y));
end
mod is "modulo";

function f(u)
  1/(1 + exp(-u));
end

function i_e(t, ie0, ie1, w)
  ie0 + ie1*sin(w*t);
end

function i_i(t, ii0, ii1, w)
  ii0 + ii1*sin(w*t);
end

model main()
  // XPP model
  // This model was converted from XPP ode format to SBML using sbmlutils-0.1.5a6.
  // # wilson-cowan
  // f(u)=1/(1+exp(-u))
  // par aee=10,aie=8,aei=12,aii=3,ze=.2,zi=4
  // par tau=1
  // i_e(t)=ie0+ie1*sin(w*t)
  // i_i(t)=ii0+ii1*sin(w*t)
  // par ie0=0,ie1=0,w=.25
  // par ii0=0,ii1=0
  // init u=.1,v=.05
  // u'=-u+f(aee*u-aie*v-ze+i_e(t))
  // v'=(-v+f(aei*u-aii*v-zi+i_i(t)))/tau
  // @ total=40
  // @ xp=u,yp=v,xlo=-.1,xhi=1,ylo=-.1,yhi=1
  // done
  // This file has been produced by sbmlutils.
  // Terms of use
  // Copyright © 2017 Matthias Koenig
  // Redistribution and use of any part of this model, with or without modification, are permitted provided that the following conditions are met:
  // Redistributions of this SBML file must retain the above copyright notice, this list of conditions and the following disclaimer.
  // Redistributions in a different form must reproduce the above copyright notice, this list of conditions and the following disclaimer in the documentation and/or other materials provided with the distribution.
  // This model is distributed in the hope that it will be useful, but WITHOUT ANY WARRANTY; without even the implied warranty of MERCHANTABILITY or FITNESS FOR A PARTICULAR PURPOSE.

  // Parameters:
  aee = 10; aee is "aee = 10";
  aie = 8; aie is "aie = 8";
  aei = 12; aei is "aei = 12";
  aii = 3; aii is "aii = 3";
  ze = 0.2; ze is "ze = .2";
  zi = 4; zi is "zi = 4";
  tau = 1; tau is "tau = 1";
  ie0 = 0; ie0 is "ie0 = 0";
  ie1 = 0; ie1 is "ie1 = 0";
  w = 0.25; w is "w = .25";
  ii0 = 0; ii0 is "ii0 = 0";
  ii1 = 0; ii1 is "ii1 = 0";
  u = 0.1; u is "u = .1";
  v = 0.05; v is "v = .05";
  t has dimensionless; t is "model time";

  // Assignment rules:
  t := time;

  // Rate rules:
  u' = -u + f(aee*u - aie*v - ze + i_e(t, ie0, ie1, w));
  v' = (-v + f(aei*u - aii*v - zi + i_i(t, ii0, ii1, w)))/tau;
end
