// SBML level 3 version 1

function max(x, y)
  piecewise(x, x > y, y);
end
max is "minimum";

function min(x, y)
  piecewise(x, x < y, y);
end
min is "maximum";

function heav(x)
  piecewise(0, x < 0, 0.5, x == 0, 1, x > 0, 0);
end
heav is "heavyside";

function mod(x, y)
  piecewise(x - y*ceil(x/y), xor(x < 0, y < 0), x - y*floor(x/y));
end
mod is "modulo";

function gammaf(vv, theta, sigma)
  1/(1 + exp(-(vv - theta)/sigma));
end

model main()
  // XPP model
  // This model was converted from XPP ode format to SBML using sbmlutils-0.1.5a6.
  // # Excitatory cortical neurons, 0 [Ca].
  // #
  // number Cm=1.0
  // number pms=3,pns=4
  // number VNa=55.0,t_tauh=-40.5,t_taun=-27.0
  // number thetaa=-50.0,sigmaa=20.0,thetab=-80.0,sigmab=-6.0,tauBs=15.0
  // number sigmam=9.5,sigmah=-7.0,sigman=10.0,sigmaz=5.0,sigmak=7
  // #
  // p gNa=35.0,gKdr=6.0,gL=0.05,Iapp=0.661914
  // p gA=1.4,gNaP=0.3,gZ=1.0
  // p thetaz=-39.0,tauZs=75.0
  // p phi=10.0, thetah=-45.0
  // p thetam=-30.0,thetan=-35.0,thetap=-47.0,sigmap=3.0
  // p VK=-90.0,VL=-70.0
  // #
  // GAMMAF(VV,theta,sigma)=1.0/(1.0+exp(-(VV-theta)/sigma))
  // #ZFUNC(AA,CA,zz)=1/(1+(AA^zz/CA^zz))
  // #
  // VVs'=(-gL*(VVs-VL)-INa-INaP-IKdr-IA-Iz+Iappx)/Cm
  // hhs'=phi*(GAMMAF(VVs,thetah,sigmah)-hhs)/(1.0+7.5*GAMMAF(VVs,t_tauh,-6.0))
  // nns'=phi*(GAMMAF(VVs,thetan,sigman)-nns)/(1.0+5.0*GAMMAF(VVs,t_taun,-15.0))
  // bbs'=(GAMMAF(VVs,thetab,sigmab)-bbs)/tauBs
  // zzs'=(GAMMAF(VVs,thetaz,sigmaz)-zzs)/tauZs
  // #
  // Iappx=Iapp
  // #Iappx=if(t<=3.0)then(Iapp)else(0.0)
  // Minfs=GAMMAF(VVs,thetam,sigmam)
  // Pinfs=GAMMAF(VVs,thetap,sigmap)
  // Ainfs=GAMMAF(VVs,thetaa,sigmaa)
  // #
  // INa=gNa*(Minfs^pms)*hhs*(VVs-VNa)
  // INaP=gNaP*Pinfs*(VVs-VNa)
  // IKdr=gKdr*(nns^pns)*(VVs-VK)
  // IA=gA*Ainfs^3*bbs*(VVs-VK)
  // Iz=gZ*zzs*(VVs-VK)
  // #
  // VVs(0)=-71.81327
  // hhs(0)=0.98786
  // nns(0)=0.02457
  // bbs(0)=0.203517
  // zzs(0)=0.00141
  // #
  // @ MAXSTOR=800000
  // @ BACK=Black
  // @ XP=T
  // @ YP=VVs
  // @ AXES=2
  // @ TOTAL=500.0
  // @ DT=0.05
  // @ NJMP=1
  // @ T0=0.0
  // @ TRANS=0.0
  // @ NMESH=40
  // @ METH=rungekutta
  // @ DTMIN=0.001
  // @ DTMAX=1.0
  // @ TOLER=0.00001
  // @ BOUND=10000.0
  // @ DELAY=0
  // @ XLO=0.0, XHI=500.0, YLO=-90.0, YHI=30.0
  // @ NTST=50,NMAX=2000,NPR=50
  // @ DS=0.02,DSMIN=0.001,DSMAX=0.5
  // @ PARMIN=-10,PARMAX=50,NORMMIN=0.0,NORMMAX=10000.0
  // @ AUTOVAR=VVs1,AUTOXMIN=-10.0,AUTOXMAX=50.0,AUTOYMIN=-90.0,AUTOYMAX=50.0
  // done
  // This file has been produced by sbmlutils.
  // Terms of use
  // Copyright © 2017 Matthias Koenig
  // Redistribution and use of any part of this model, with or without modification, are permitted provided that the following conditions are met:
  // Redistributions of this SBML file must retain the above copyright notice, this list of conditions and the following disclaimer.
  // Redistributions in a different form must reproduce the above copyright notice, this list of conditions and the following disclaimer in the documentation and/or other materials provided with the distribution.
  // This model is distributed in the hope that it will be useful, but WITHOUT ANY WARRANTY; without even the implied warranty of MERCHANTABILITY or FITNESS FOR A PARTICULAR PURPOSE.

  // Parameters:
  cm = 1;
  pms = 3;
  pns = 4;
  vna = 55;
  t_tauh = -40.5;
  t_taun = -27;
  thetaa = -50;
  sigmaa = 20;
  thetab = -80;
  sigmab = -6;
  taubs = 15;
  sigmam = 9.5;
  sigmah = -7;
  sigman = 10;
  sigmaz = 5;
  sigmak = 7;
  gna = 35;
  gkdr = 6;
  gl = 0.05;
  iapp = 0.661914;
  ga = 1.4;
  gnap = 0.3;
  gz = 1;
  thetaz = -39;
  tauzs = 75;
  phi = 10;
  thetah = -45;
  thetam = -30;
  thetan = -35;
  thetap = -47;
  sigmap = 3;
  vk = -90;
  vl = -70;
  vvs = -71.81327;
  hhs = 0.98786;
  nns = 0.02457;
  bbs = 0.203517;
  zzs = 0.00141;
  iappx has dimensionless;
  minfs has dimensionless;
  pinfs has dimensionless;
  ainfs has dimensionless;
  ina has dimensionless;
  inap has dimensionless;
  ikdr has dimensionless;
  ia has dimensionless;
  iz has dimensionless;
  t has dimensionless; t is "model time";

  // Assignment rules:
  iappx := iapp;
  minfs := gammaf(vvs, thetam, sigmam);
  pinfs := gammaf(vvs, thetap, sigmap);
  ainfs := gammaf(vvs, thetaa, sigmaa);
  ina := gna*minfs^pms*hhs*(vvs - vna);
  inap := gnap*pinfs*(vvs - vna);
  ikdr := gkdr*nns^pns*(vvs - vk);
  ia := ga*ainfs^3*bbs*(vvs - vk);
  iz := gz*zzs*(vvs - vk);
  t := time;

  // Rate rules:
  vvs' = (-gl*(vvs - vl) - ina - inap - ikdr - ia - iz + iappx)/cm;
  hhs' = phi*(gammaf(vvs, thetah, sigmah) - hhs)/(1 + 7.5*gammaf(vvs, t_tauh, -6));
  nns' = phi*(gammaf(vvs, thetan, sigman) - nns)/(1 + 5*gammaf(vvs, t_taun, -15));
  bbs' = (gammaf(vvs, thetab, sigmab) - bbs)/taubs;
  zzs' = (gammaf(vvs, thetaz, sigmaz) - zzs)/tauzs;
end
